# Carbon and graphite products; at manufacturer

Dataset: openLCA process, unit process
Category: 3359: Other Electrical Equipment and Component Manufacturing
Geography: United States
Time period: 2017-01-01 to 2017-12-31
Data quality: US EPA - Process Pedigree Matrix (1;1)
Exchange data quality scheme: US EPA - Flow Pedigree Matrix
Generated by: US EPA with CSRA and ERG
Owner: US EPA
Published in: Yang, Ingwersen et al. 2017
restrictionsDescription: This model shold be appropriately cited (see Yang, Ingwersen et al. 2017 source or Publication field) when used. Any changes or derivations of this model by the user should be documented. The model itself and any results from use of this model shall not be construed to consitute US EPA opinion or policy.
copyright: false

## General comment
BEA Code & Name is '335991:Carbon and graphite product manufacturing'. Description of the primary industry producing this good or service, adapted from the Census Bureau NAICS 2007 descriptions: This U.S. industry comprises establishments primarily engaged in manufacturing carbon, graphite, and metal-graphite brushes and brush stock; carbon or graphite electrodes for thermal and electrolytic uses; carbon and graphite fibers; and other carbon, graphite, and metal-graphite products.

## Technology
The process describes the average US production of this good or service within this NAICS-based grouping defined in the BEA 2007 detailed input-output tables (BEA 2015). Distribution, wholesale and retailing of this good or service, use, and final disposal are not included. Creation of a product system with this process will enable modeling of all upstream (supply-chain) activities.

## Geography
Data represent the 50 US states

## Time period
2017 was the year in which this version of USEEIO was released and is the target date for the model

## Reference product
- Carbon and graphite products; at manufacturer: 1 USD

## Inputs from technosphere
All rows: data quality (1,3,1,1,1)
- Accounting, tax preparation, bookkeeping, and payroll: 0.000388012 USD
- Other retail: 2.77867e-8 USD
- Machine shops; at manufacturer: 0.00928049 USD
- Consumer goods and general rental centers: 4.168e-8 USD
- Plywood and veneer; at manufacturer: 1.88949e-6 USD
- Used and secondhand goods: 2.77867e-8 USD
- Lids, jars, bottle caps, other metal closures and crowns; at manufacturer: 5.27947e-7 USD
- Relay and industrial controls; at manufacturer: 0.0015453 USD
- Commercial machinery repair: 0.0015455 USD
- Printed circuit and electronic assembly; at manufacturer: 0.00309088 USD
- Animal farms and aquaculture ponds (except cattle and poultry): 8.336e-8 USD
- Light bulbs; at manufacturer: 1.38933e-8 USD
- Fiber, yarn, and thread; at manufacturer: 1.47269e-6 USD
- Metal coatings, engravings, and heat treatments; at manufacturer: 0.00772726 USD
- Transmission and power train parts; at manufacturer: 1.38933e-8 USD
- Soap and cleaning compounds; at manufacturer: 3.47333e-7 USD
- Cardboard; at manufacturer: 0.00154607 USD
- Plastics; at manufacturer: 1.29764e-5 USD
- Other support services: 0.00115928 USD
- Vehicle repair: 0.000772759 USD
- Lessors of nonfinancial intangible assets: 0.00657203 USD
- Motor vehicle steering, suspension components (except spring), and brake systems; at manufacturer: 1.38933e-8 USD
- Insurance carriers: 0.00849875 USD
- Pipeline transport: 0.000386261 USD
- Ball and roller bearings; at manufacturer: 5.0016e-7 USD
- Aluminum; at manufacturer: 1.65331e-6 USD
- Postal service: 6.80773e-7 USD
- Veneer, plywood, and engineered wood; at manufacturer: 6.6688e-7 USD
- Limited-service restaurants: 0.000773162 USD
- Fabric; at manufacturer: 1.4588e-6 USD
- Other computer related services, including facilities management: 3.47333e-7 USD
- Cutlery and handtools; at manufacturer: 4.5848e-7 USD
- Carbon and graphite products; at manufacturer: 0.00154499 USD
- Metal pipe fittings, ball and roller bearings, industrial patterns, metal bath fixtures, other misc. fabricated metals; at manufacturer: 0.00502644 USD
- Electronic equipment repair and maintenance: 0.000386609 USD
- Springs and wires; at manufacturer: 8.61387e-7 USD
- Promoters and agents: 2.77867e-8 USD
- Magazines and journals; at publisher: 2.36187e-7 USD
- Insurance agencies and brokerages: 0.0023179 USD
- Custom metal rolls; at manufacturer: 0.00424946 USD
- Ground or treated minerals and earth; at manufacturer: 0.0386259 USD
- Water transport (boats, ships, ferries): 0.0104289 USD
- Wholesale trade: 0.0587252 USD
- Household goods repair: 0.000386345 USD
- Employment services: 0.00077294 USD
- Hotels and campgrounds: 0.000386637 USD
- Architectural, engineering, and related services: 0.00347891 USD
- Material handling equipment; at manufacturer: 0.000386289 USD
- Welding and Soldering Equipment, Scales and Balances, and other general purpose machinery; at manufacturer: 2.36187e-7 USD
- Finished and coated fabric; at manufacturer: 2.5008e-6 USD
- Primary iron, steel, and ferroalloy products; at manufacturer: 1.70193e-5 USD
- Clothing; at manufacturer: 5.55733e-8 USD
- Vehicle engines and engine parts; at manufacturer: 1.38933e-8 USD
- Specialty transformers; at manufacturer: 4.168e-8 USD
- Gasoline, fuels, and by-products of petroleum refining; at manufacturer: 0.00424918 USD
- Gaskets, seals, musical instruments, fasteners, brooms, brushes, mop and other misc. goods; at manufacturer: 1.55327e-5 USD
- Coal; at mine: 0.000386248 USD
- Air transport: 0.000773398 USD
- Investigation and security: 0.000772843 USD
- Cardboard containers; at manufacturer: 0.00116488 USD
- Cutting and machine tool accessory, rolling mill, and other metalworking machines; at manufacturer: 0.000386984 USD
- Lumber and treated lumber; at manufacturer: 2.00064e-6 USD
- Nondepository credit intermediation and related activities: 0.00849898 USD
- Wireless telecommunications: 0.000386762 USD
- Timber and raw forest products; at forest: 1.86171e-6 USD
- Facilities support: 0.000386442 USD
- Other basic organic chemicals; at manufacturer: 0.0185403 USD
- Aluminum products; at manufacturer: 1.12536e-6 USD
- State and local government enterprises: 0.000772773 USD
- Advertising and public relations: 0.0011637 USD
- Dry-cleaning and laundry: 1.38933e-8 USD
- Sports: 4.168e-8 USD
- Packaged meat (except poultry); at manufacturer: 9.72533e-8 USD
- Cast iron and steel; at manufacturer: 0.000772495 USD
- Passenger ground transport: 1.94507e-7 USD
- Watches, clocks, and other measuring and controlling devices; at manufacturer: 2.77867e-8 USD
- Unrefined oil and gas; at extraction site: 1.38933e-8 USD
- Paints and coatings; at manufacturer: 7.15507e-6 USD
- Synthetic rubber and artificial and synthetic fibers; at manufacturer: 1.28513e-5 USD
- Business support: 0.00154574 USD
- Scenic and sightseeing transportation and support activities for transportation: 1.52827e-7 USD
- Rail transport: 0.0463508 USD
- Paper bags and coated paper; at manufacturer: 0.000386289 USD
- Plastic bags, films, and sheets; at manufacturer: 0.015069 USD
- Vehicle rental and leasing: 0.00077287 USD
- Greenhouse crops, mushrooms, nurseries, and flowers; at farm: 4.91824e-6 USD
- Marketing research and all other miscellaneous professional, scientific, and technical services: 0.000774899 USD
- Laminated plastic plates and shapes; at manufacturer: 5.14053e-7 USD
- Commercial equipment rental: 0.000772731 USD
- Polystyrene foam products; at manufacturer: 5.55733e-8 USD
- Warehousing: 0.000774774 USD
- Valve and fittings (except for plumbing); at manufacturer: 4.30693e-7 USD
- Abrasive products; at manufacturer: 9.86427e-7 USD
- Independent artists, writers, and performers: 8.336e-8 USD
- Legal services: 0.000774857 USD
- Wiring devices; at manufacturer: 2.22293e-7 USD
- Secondary copper products; at manufacturer: 9.72533e-7 USD
- Electronic capacitors, resistors, coils, transformers, connectors and other components (except semiconductors and printed circuit assemblies); at manufacturer: 0.00115901 USD
- Air conditioning, refrigeration, and warm air heating equipment; at manufacturer: 1.80613e-7 USD
- Full-service restaurants: 0.000386637 USD
- Company and enterprise management: 0.0170178 USD
- Investment advice, portfolio management, and other financial advising services: 1.11147e-7 USD
- Other rubber products; at manufacturer: 2.084e-7 USD
- Other petroleum and coal products; at manufacturer: 0.176516 USD
- Light gauge metal cans, boxes, and containers; at manufacturer: 5.69627e-7 USD
- Ophthalmic goods; at manufacturer: 1.38933e-8 USD
- Civic, social, professional, and similar organizations: 2.22293e-7 USD
- Software: 9.72533e-8 USD
- Semiconductors; at manufacturer: 0.00695457 USD
- Office administration: 1.52827e-7 USD
- Chemicals (except basic chemicals, agrichemicals, polymers, paints, pharmaceuticals,soaps, cleaning compounds); at manufacturer: 0.0154503 USD
- Urethane and other foam products; at manufacturer: 6.94667e-8 USD
- Management consulting: 0.000387331 USD
- Other vehicle parts; at manufacturer: 5.69627e-7 USD
- Specialized design: 0.00154566 USD
- Vending, commercial laundry, and other commercial and service industry machinery; at manufacturer: 8.336e-8 USD
- Electricity; at consumer: 0.0158383 USD
- Data processing and hosting: 0.000388068 USD
- Securities and commodities brokerage and exchanges: 0.00966173 USD
- Other nonmetallic mineral products; at manufacturer: 0.034376 USD
- Nonferrous metal casts; at manufacturer: 0.00115958 USD
- Telecommunications: 0.00154681 USD
- Screws, nuts, and bolts; at manufacturer: 0.00193263 USD
- Other real estate: 0.0019322 USD
- Natural gas; at consumer: 0.0220177 USD
- Computer terminals and other computer peripheral equipment; at manufacturer: 2.77867e-8 USD
- Wooden windows, door, and flooring; at manufacturer: 2.77867e-8 USD
- Plastic pipe, fittings, and sausage casings; at manufacturer: 0.00502258 USD
- Paper; at manufacturer: 0.000386317 USD
- Buildings and dwellings services: 0.00231874 USD
- Golf courses, marinas, ski resorts, fitness and other rec centers and industries: 8.336e-8 USD
- Nonresidential building repair and maintanence: 0.00231819 USD
- Computer systems design: 1.00032e-6 USD
- Environmental and other technical consulting services: 2.63973e-7 USD
- Monetary authorities and depository credit intermediation: 0.00347926 USD
- Other secondary nonferrous metal products; at manufacturer: 0.000774232 USD
- Performances: 1.38933e-8 USD
- Satellite, telecommunications resellers, and all other telecommunications: 1.11147e-7 USD
- Other plastic products; at manufacturer: 0.000387415 USD
- Truck transport: 0.0123651 USD
- Noncomparable imports: 0.00154627 USD
- Compressed Gases; at manufacturer: 9.72533e-8 USD
- All other forging, stamping, and sintering; at manufacturer: 6.80773e-7 USD
- Vehicles and parts sales: 1.2504e-7 USD
- Waste management and remediation: 0.00154578 USD
- Scientific research and development: 4.168e-8 USD
- Metal structural products; at manufacturer: 6.252e-7 USD
- Metal hinges, keys, lock, and other hardware; at manufacturer: 9.5864e-7 USD
- Secondary steel products; at manufacturer: 2.63973e-7 USD
- Synthetic dyes and pigments; at manufacturer: 4.86267e-7 USD
- Drinking water and wastewater treatment; at consumer: 0.000772759 USD
- Other primary nonferrous metals; at manufacturer: 9.72533e-8 USD
- All other food and drinking places: 6.94667e-8 USD
- Home furniture - Cabinets and non-wood, nonupholstered; at manufacturer: 6.39093e-7 USD

## Inputs from nature
- Water, fresh: 0.000298478 m3; data quality (1,2,1,4,2)
- Occupation, urban, discontinuously built: 0.000115027 m2*a; data quality (4,2,1,1,1)
- Energy, wind: 4.4935e-7 MJ; data quality (3,1,1,1,1)
- Water, fresh: 0.000597271 m3; data quality (2,2,1,4,2)
- Occupation, industrial area: 0.000523264 m2*a; data quality (4,2,1,1,1)
- Water, saline: 1.1253e-5 m3; data quality (4,2,1,4,2)
- Energy, solar: 5.77227e-7 MJ; data quality (3,1,1,1,1)
- Occupation, industrial area, built up: 0.000174421 m2*a; data quality (4,2,1,1,1)

## Emissions to nature
- antimony: 3.09787e-14 kg; data quality (2,1,1,1,5)
- Nitrogen: 3.90432e-9 kg; data quality (2,2,1,1,5)
- ethylene glycol: 2.19375e-8 kg; data quality (3,2,1,1,4)
- t-butyl methyl ether: 8.57288e-9 kg; data quality (3,2,1,1,4)
- methyl methacrylate: 2.00764e-11 kg; data quality (4,2,1,1,5)
- 1,2,4-trimethylbenzene: 3.65549e-10 kg; data quality (5,1,1,1,5)
- Carbon dioxide: 0.0829074 kg; data quality (4,2,1,4,1)
- monochloroethane: 1.06061e-14 kg; data quality (3,2,1,1,5)
- methyl isobutyl ketone: 8.33485e-8 kg; data quality (3,2,1,1,4)
- Water, fresh: 0.000738402 m3; data quality (1,2,1,4,2)
- nickel: 1.06567e-14 kg; data quality (4,1,1,1,5)
- benzene: 1.72423e-6 kg; data quality (3,2,1,1,4)
- 4-nitrophenol: 3.84064e-10 kg; data quality (2,2,1,1,4)
- acetophenone: 1.01916e-11 kg; data quality (3,2,1,1,4)
- lead: 9.61399e-10 kg; data quality (3,1,1,1,4)
- Cobalt: 1.50634e-7 kg; data quality (3,2,1,1,4)
- benzo(a)pyrene: 3.23645e-9 kg; data quality (2,2,1,1,4)
- methane, dichloro-, hcc-30: 4.2473e-8 kg; data quality (3,2,1,1,4)
- Indeno(1,2,3-cd)pyrene: 3.4095e-13 kg; data quality (3,2,1,3,2)
- VOC, volatile organic compounds: 0.000118413 kg; data quality (3,2,1,1,4)
- ethylene oxide: 7.99678e-12 kg; data quality (3,2,1,1,5)
- Pendimethalin: 2.10036e-12 kg; data quality (5,1,1,1,5)
- trifluralin: 6.19575e-13 kg; data quality (4,1,1,1,5)
- benzyl chloride: 1.7619e-13 kg; data quality (2,2,1,1,5)
- phthalic anhydride: 6.52075e-15 kg; data quality (2,2,1,1,5)
- ethane, 1,2-dichloro-: 9.71726e-12 kg; data quality (3,2,1,1,4)
- Chrysene: 9.57734e-10 kg; data quality (2,2,1,1,4)
- aniline: 7.11592e-14 kg; data quality (4,2,1,1,5)
- Triethyl amine: 1.65764e-9 kg; data quality (3,2,1,1,4)
- diethanolamine: 1.07403e-13 kg; data quality (3,2,1,1,5)
- Benzo(g,h,i)perylene: 2.32671e-7 kg; data quality (3,2,1,1,4)
- fluorene: 4.34944e-11 kg; data quality (3,2,1,3,2)
- acrolein: 1.95367e-7 kg; data quality (2,2,1,1,4)
- vinyl acetate: 1.1934e-11 kg; data quality (4,2,1,1,4)
- tertiary-Butyl Acetate: 5.56042e-8 kg; data quality (3,2,1,1,4)
- pyrene: 7.12502e-12 kg; data quality (3,2,1,3,2)
- benzene, ethyl-: 4.48644e-8 kg; data quality (4,2,1,1,4)
- biphenyl: 8.30063e-15 kg; data quality (4,2,1,1,5)
- 4,4'-METHYLENEBIS(2-CHLOROANALINE): 7.85518e-15 kg; data quality (5,2,1,1,5)
- Zinc: 8.67405e-14 kg; data quality (5,1,1,1,5)
- formaldehyde: 8.3606e-7 kg; data quality (2,2,1,1,4)
- ammonia: 6.44573e-6 kg; data quality (3,2,1,1,4)
- chlorine: 1.14008e-7 kg; data quality (4,2,1,1,4)
- trichloroethylene: 6.97532e-7 kg; data quality (4,2,1,1,4)
- 1,4-dioxane: 2.75636e-14 kg; data quality (4,2,1,1,5)
- para-xylene: 1.16213e-7 kg; data quality (4,2,1,1,4)
- pentachlorophenol: 3.53995e-10 kg; data quality (3,2,1,1,4)
- 2,4,5-trichlorophenol: 2.43286e-10 kg; data quality (2,2,1,1,4)
- oxadiazon: 1.54894e-12 kg; data quality (3,1,1,1,5)
- formic acid: 1.48698e-12 kg; data quality (3,1,1,1,5)
- hydrogen fluoride: 7.76239e-11 kg; data quality (2,2,1,1,5)
- phthalate, dioctyl-: 4.02035e-11 kg; data quality (3,2,1,1,5)
- Phthalate, dibutyl-: 5.30193e-10 kg; data quality (3,2,1,1,4)
- dimethyl formamide: 5.1118e-8 kg; data quality (4,2,1,1,4)
- carbon disulfide: 2.13639e-7 kg; data quality (4,2,1,1,4)
- chromium: 4.64681e-12, 9.10775e-15, 8.4706e-12 kg (3 entries, compartments not in this file); data quality (4,1,1,1,5)
- nitrogen oxides: 0.000255011 kg; data quality (2,2,1,1,4)
- Aluminum: 8.67405e-15 kg; data quality (4,1,1,1,5)
- selenium: 5.50091e-11 kg; data quality (2,2,1,1,4)
- nitric acid: 3.25803e-7 kg; data quality (3,1,1,1,4)
- isophorone: 1.5661e-10 kg; data quality (3,2,1,1,4)
- copper: 9.9132e-14 kg; data quality (4,1,1,1,5)
- hydrogen chloride: 7.60402e-9 kg; data quality (2,2,1,1,4)
- benz[a]anthracene: 1.06323e-12 kg; data quality (2,2,1,2,3)
- epichlorohydrin: 6.40219e-15 kg; data quality (3,2,1,1,5)
- Dibenz(a,h)anthracene: 8.47657e-14 kg; data quality (2,2,1,1,4)
- manganese: 1.64969e-10 kg; data quality (3,2,1,1,4)
- o-Xylene: 5.18722e-8 kg; data quality (3,2,1,1,4)
- ammonia: 5.04334e-12 kg; data quality (3,1,1,1,5)
- toluene: 2.91971e-6 kg; data quality (4,2,1,1,4)
- Benzo(g,h,i)perylene: 7.81231e-9 kg; data quality (2,1,1,1,4)
- Propane, 1,1,1,3,3,3-hexafluoro-, HCFC-236fa: 4.91239e-13 kg; data quality (4,2,1,4,1)
- toluene: 3.96528e-15 kg; data quality (5,1,1,1,5)
- ethane, 1,1,2-trichloro-: 3.22072e-9 kg; data quality (4,2,1,1,4)
- Benzo(a)anthracene: 1.42155e-9 kg; data quality (2,2,1,1,4)
- Phthalate, dimethyl-: 3.70329e-11 kg; data quality (4,2,1,1,4)
- hexachlorobenzene: 1.96816e-10 kg; data quality (3,2,1,1,4)
- toluene-2,4-diisocyante: 4.17966e-14 kg; data quality (3,2,1,1,5)
- 1,4-dichlorobenzene: 3.68023e-10 kg; data quality (2,2,1,1,4)
- Anthracene: 6.88673e-11 kg; data quality (4,1,1,1,4)
- Diethylene glycol butyl ether: 3.3335e-11 kg; data quality (4,2,1,1,5)
- Dinitrogen monoxide: 1.54469e-7 kg; data quality (4,2,1,4,1)
- Benzo(b)fluoranthene: 1.42199e-9 kg; data quality (2,2,1,1,4)
- Phosphorus: 1.95705e-11 kg; data quality (2,1,1,1,5)
- manganese: 5.32834e-14 kg; data quality (4,1,1,1,5)
- TERT-BUTYL ALCOHOL: 2.64081e-10, 1.60303e-12 kg (2 entries, compartments not in this file); data quality (4,1,1,1,5)
- propylene oxide: 1.8729e-12 kg; data quality (3,2,1,1,5)
- beryllium: 7.77764e-13 kg; data quality (2,2,1,1,4)
- Propane, 1,2-dichloro-: 1.12794e-13 kg; data quality (4,2,1,1,5)
- Ethane, 1,1,1-trifluoro-, HFC-143a: 1.81838e-11 kg; data quality (4,2,1,4,1)
- 2-METHOXYETHANOL: 3.78802e-14 kg; data quality (4,2,1,1,5)
- Methane, difluoro-, HFC-32: 2.47497e-11 kg; data quality (4,2,1,4,1)
- naphthalene: 3.17078e-8 kg; data quality (3,2,1,1,4)
- acenaphthene: 3.04957e-10 kg; data quality (3,2,1,1,4)
- acrylonitrile: 4.073e-7 kg; data quality (4,2,1,1,4)
- carbon tetrachloride: 3.71217e-9 kg; data quality (4,2,1,1,4)
- carbonyl sulfide: 9.87194e-6 kg; data quality (4,2,1,1,4)
- acenaphthylene: 3.80048e-11 kg; data quality (3,2,1,4,1)
- BENEFIN: 1.54894e-12 kg; data quality (5,1,1,1,5)
- propanal: 4.23704e-9 kg; data quality (3,2,1,4,1)
- 1,2,4-trichlorobenzene: 1.02371e-10 kg; data quality (4,2,1,1,4)
- bromoform: 9.85268e-15 kg; data quality (3,2,1,1,5)
- phenanthrene: 1.07433e-9 kg; data quality (3,1,1,1,4)
- cumene: 4.47241e-11 kg; data quality (3,2,1,1,4)
- PHOSPHORUS: 7.73676e-14 kg; data quality (2,2,1,1,5)
- nickel: 1.57474e-9 kg; data quality (3,2,1,1,4)
- Methane: 1.56972e-6 kg; data quality (4,2,1,4,1)
- Chromium, ion: 1.51469e-8 kg; data quality (2,2,1,1,4)
- Water, saline: 5.70188e-6 m3; data quality (4,2,1,4,2)
- acetaldehyde: 1.61241e-7 kg; data quality (3,2,1,1,4)
- Xylene: 1.41714e-7 kg; data quality (4,2,1,1,4)
- 2,4,6-trichlorophenol: 2.28251e-10 kg; data quality (2,2,1,1,4)
- Chrysene, 5-methyl-: 5.54649e-18 kg; data quality (2,2,1,1,5)
- Ethylene glycol monoethyl ether: 1.46421e-9 kg; data quality (3,2,1,1,4)
- butanol: 2.38245e-10 kg; data quality (5,1,1,1,5)
- Chromium VI: 6.41848e-9 kg; data quality (3,2,1,1,4)
- benzene, chloro-: 3.83785e-11 kg; data quality (4,2,1,1,4)
- hexachloro-1,3-butadiene: 2.70621e-10 kg; data quality (4,2,1,1,4)
- dibenzofuran: 2.61191e-9 kg; data quality (4,2,1,1,4)
- arsenic: 1.69199e-7 kg; data quality (3,2,1,1,4)
- carbon monoxide: 0.00279094 kg; data quality (2,2,1,1,4)
- methanol: 1.77554e-7 kg; data quality (4,2,1,1,4)
- phenanthrene: 4.60194e-8 kg; data quality (3,2,1,1,4)
- copper: 9.06879e-7, 3.04111e-9 kg (2 entries, compartments not in this file); data quality (4,1,1,1,4)
- methane, bromo-, halon 1001: 2.2702e-13 kg; data quality (3,2,1,1,5)
- Carbaryl: 1.54894e-12 kg; data quality (5,1,1,1,5)
- hexane: 9.69497e-7 kg; data quality (3,2,1,1,4)
- 2,2,4-trimethylpentane: 4.45271e-9 kg; data quality (3,2,1,4,1)
- Hydrazine, methyl-: 4.28303e-14 kg; data quality (2,2,1,1,5)
- hydrogen sulfide: 1.36412e-6 kg; data quality (3,2,1,1,4)
- Ethene, chloro-: 1.51073e-9 kg; data quality (3,2,1,1,4)
- 1-Methyl-2-pyrrolidinone: 4.88132e-6 kg; data quality (5,1,1,1,4)
- 2-ethoxyethyl acetate: 3.06031e-12 kg; data quality (5,2,1,1,5)
- sulfur dioxide: 0.000611871 kg; data quality (2,2,1,1,4)
- CHLORINE: 6.88673e-10 kg; data quality (2,1,1,1,4)
- Ethane, 1,1,1,2-tetrafluoro-, HFC-134a: 1.60186e-10 kg; data quality (4,2,1,4,1)
- ethylbenzene: 1.09123e-10 kg; data quality (4,1,1,1,5)
- Ethane, pentafluoro-, HFC-125: 4.24995e-11 kg; data quality (4,2,1,4,1)
- Thiophanat-methyl: 6.56749e-13 kg; data quality (4,1,1,1,5)
- m-xylene: 3.22647e-8 kg; data quality (3,2,1,1,4)
- anthracene: 8.54005e-11 kg; data quality (3,2,1,1,4)
- hexachloroethane: 3.22559e-10 kg; data quality (4,2,1,1,4)
- 2,4-dinitrophenol: 6.45118e-10 kg; data quality (5,2,1,1,4)
- mercury: 3.65966e-10 kg; data quality (2,2,1,1,4)
- methanol: 2.09106e-11 kg; data quality (3,1,1,1,5)
- 3,3'-Dichlorobenzidine: 9.67676e-10 kg; data quality (3,2,1,1,4)
- chloroform: 2.88563e-9 kg; data quality (4,2,1,1,4)
- N,N-DIMETHYLANILINE: 1.43445e-11 kg; data quality (5,2,1,1,5)
- 1,1,2,2-tetrachloroethane: 1.50345e-11 kg; data quality (3,2,1,1,4)
- 3-methylcholanthrene: 1.16794e-14 kg; data quality (2,2,1,1,4)
- methylene diphenyl diisocyanate: 7.98067e-8 kg; data quality (4,2,1,1,4)
- cyanide: 1.33879e-5 kg; data quality (2,2,1,1,4)
- antimony: 3.17122e-9 kg; data quality (3,2,1,1,4)
- phenol: 7.19102e-7 kg; data quality (4,2,1,1,4)
- particulates, < 10 um: 1.93946e-5 kg; data quality (3,2,1,1,4)
- Benzo(k)fluoranthene: 1.09853e-10 kg; data quality (2,2,1,1,4)
- CHLORONAPHTHALENE: 3.12967e-18 kg; data quality (1,2,1,1,5)
- BUTYL ISOCYANATE: 6.16632e-14 kg; data quality (4,2,1,1,5)
- Dimethyl sulfate: 1.2113e-14 kg; data quality (2,2,1,1,5)
- 2-methylnaphthalene: 4.04973e-12 kg; data quality (2,2,1,1,4)
- styrene: 1.00195e-6 kg; data quality (4,2,1,1,4)
- methane, monochloro-, r-40: 1.61631e-12 kg; data quality (3,2,1,1,4)
- Nitrobenzene: 1.21643e-10 kg; data quality (4,2,1,1,4)
- particulates, < 2.5 um: 0.00017271 kg; data quality (3,2,1,1,4)
- hydroquinone: 1.89695e-15 kg; data quality (3,2,1,1,5)
- Hexachlorocyclopentadiene: 2.9659e-10 kg; data quality (3,2,1,1,4)
- ethene, tetrachloro-: 8.33648e-9 kg; data quality (3,2,1,1,4)
- butadiene: 2.49181e-9 kg; data quality (3,2,1,4,1)
- fluoranthene: 1.07348e-11 kg; data quality (3,2,1,3,2)
- 2-chloro-1-phenylethanone: 1.7619e-15 kg; data quality (2,2,1,1,5)
- cadmium: 2.62622e-9 kg; data quality (3,2,1,1,4)
- toluene, 2,4-dinitro-: 1.92715e-10 kg; data quality (5,2,1,1,4)
- Hydrocarbons, aromatic: 2.17802e-5 kg; data quality (4,2,1,1,4)
- lead: 2.83112e-8 kg; data quality (3,2,1,1,4)
- diisocyanates: 9.67203e-13 kg; data quality (4,1,1,1,5)
- ethane, 1,2-dibromo-: 1.92721e-14 kg; data quality (2,2,1,1,5)
- 1,1,1-trichloroethane: 3.70952e-7 kg; data quality (3,2,1,1,4)
- ETHYLENETHIOUREA: 2.61839e-14 kg; data quality (5,2,1,1,5)

## Inventory method
Input-output

## Modelling constants
The reference unit of all processes is 1 USD2013 of the good or service. The technosphere inputs are based on the US BEA detailed input-output tables for 2007. The IO tables are combined to develop a commodity-by-commodity model based on the the industry-technology assumption (see Suh et al., 2010), which assumes all commodities produced by a given industry have the same input structure, but that multiple industries can produce the same commodity. Thus, model technosphere flows represent commodity outputs (and not industry outputs) from other processes in the model. There are no by-products included in these processes. All commodity production is based on US-conditions, despite in reality that some goods and services are produced overseas, as USEEIO v1.1 is a single-region IO model.

## Completeness
The input-output approach assures that all purchased inputs associated with the sectors making these commodities as reported in the US census for 2007 are included. The direct resources extracted including minerals, energy sources, water and land occupied are included. Emissions to air include all critieria air pollutants, greenhouse gases, and hazardous and toxic air pollutants as defined by US EPA. Releases to water include toxics, total nitrogen and total phosphorus, and water discharges. Releases to soil or groundwater include toxics and agriculutural pesticides. Some metal releases to air, water and soil are not included because they could not be speciated. Solid hazardous and non-hazardous wastes generated are not included as an elementary flows although purchases of waste services are included.

## Data treatment
Greenhouse gases are primarily from the US Greenhouse Gas Emission Inventory (USEPA 2016a). Biogenic C uptake is not included (change from version 1.0), as biogenic C emission are not included. Toxic releases to air, water and soil (except pesticides) are from the 2013 Toxic Release Inventory (USEPA 2015a). Criteria air pollutants and hazardous air pollutants are from the 2011 National Emissions Inventory (USEPA 2015b). All estimates are normalized by industry based on sector output in the data year, then converted to 2013 USD using relative sector-specific CPIs (if data year is not 2013). Energy use represent raw renewables or fossil fuel energies and is based on EIA data for 2014. See Table 1 in Yang, Ingwersen et al. 2017 and Supporting Information 1, and the v1.1 data update notes (Ingwersen et al. 2017) for all details on environmental data sources used.Land occupation associated with manufacturing buildings was estimated based on the building floorspace data provided by the U.S. Energy Information Administration in the 2010 Manufacturing Energy Consumption Survey (EIA 2013). Portions of total renewable energy (EIA 2016) based on EIA-923 reports for 2014 (EIA 2017) are included. Nitrogen and Phosphorus releases are modeled in total N and total P equivalents as estimated by the Discharge Monitoring Report Nutrient Loading tool (USEPA 2016b). Self-supplied withdrawals were assigned to industrial sectors based on water use statistics for Canadian industries by NAICS 3-digit sector scaled to US production levels based on gross domestic product by industry (BEA 2015; Statistics Canada 2010), and further disaggregated to the manufacturing sectors based on compensation of employees as provided by the 2007 IO tables (BEA 2015). Water withdrawals associated with public supply were allocated to sectors based on their use of water, sewage, and other services in USD based on the IO tables (BEA 2015). Portions of total renewable energy (EIA 2016) by type are assigned to sectors (hydro, wind, solar, or) based on EIA-923 reports for 2014 (EIA 2017).

## Data collection
2015-2016

## Sampling procedure
US federal government sources, including surveys and US EPA emissions databases are used as the primary sources. From these sources, data for US reporting establishments/facilities are aggregated by the NAICS sector as defined in the BEA detailed 2007 input-output tables. When level of sector aggregation differs, or when direct emissions are not reported but modeled, additional sources are used to make allocations and estimates.

## Review details
In regard to quality assurance and peer-review, each dataset created went through Quality Assurance as defined in a quality assurance project plans at US EPA, CSRA or ERG. The model was assembled with the IO model builder model (USEPA 2016c). Validation functions were used to check that all the model components were properly assembled and harmonized. Bayou Demeke and Santosh Ghimire provided internal peer review of the model methodology and the manuscript underwent standard EPA management review. An editor and two anonymous reviewers at the Journal of Cleaner Production reviewed the model. In regard to data quality evaluation, data quality assessment was performed at the flow and process levels according to the updated US EPA data quality assessment guidelines as defined in US EPA (2016b).

## Intended application
The primary application is for use in the US Environmentally-Extended Input-Ouput model, USEEIO, version 1.1. This model is being used by the US EPA for supporting tools that prioritize goods and services based on potential environmental impacts, resource use or emissions for large regions, including the US and US states, and as a strealined tool for organizations as a starting point to consider sustainable materials management. Model results are designed to provide meso/macro-level decision support.

## Project
USEEIO v1.1 was developed by the US EPA with CSRA and ERG with Wesley W. Ingwersen and David E. Meyer as research leads. Yi Yang was the technical lead on the work for CSRA (contract EP-C-15-012); Troy Hawkins was lead for ERG (contract EP-C-12-021).

## Sources
- Kim et el. 2013
- USDA 2014
- USEPA 2015a
- USGS 2015
- USDA 2016
- BLM 2008
- Ingwersen et al. 2017
- Maupin et al. 2014
- Goebes et al. 2003
- Macknick et al. 2011
- Yienger et al. 1995
- EIA 2016
- Lovelace 2009
- USDA 2009b
- BEA 2015
- Blackhurst et al. 2010
- Ingwersen et al. DRAFT
- Statistics Canada 2010
- USEPA 2016a
- USDA 2009a
- USEPA 2015b
- USEPA 2016c
- EIA 2013
- USDA 2006
- EIA 2017
- USEPA 2016b
- EIA 2015
- Torcellini et al. 2003
- USGS 2016
- Edelen and Ingwersen 2017
- Nickerson et al. 2011
