# Nonresidential building repair and maintanence

Dataset: openLCA process, unit process
Category: 23: Construction
Geography: United States
Time period: 2017-01-01 to 2017-12-31
Data quality: US EPA - Process Pedigree Matrix (1;1)
Exchange data quality scheme: US EPA - Flow Pedigree Matrix
Generated by: US EPA with CSRA and ERG
Owner: US EPA
Published in: Yang, Ingwersen et al. 2017
restrictionsDescription: This model shold be appropriately cited (see Yang, Ingwersen et al. 2017 source or Publication field) when used. Any changes or derivations of this model by the user should be documented. The model itself and any results from use of this model shall not be construed to consitute US EPA opinion or policy.
copyright: false

## General comment
BEA Code & Name is '230301:Nonresidential maintenance and repair'. Description of the primary industry producing this good or service, adapted from the Census Bureau NAICS 2007 descriptions: This industry includes maintenance and repair of nonresidential structures.

## Technology
The process describes the average US production of this good or service within this NAICS-based grouping defined in the BEA 2007 detailed input-output tables (BEA 2015). Distribution, wholesale and retailing of this good or service, use, and final disposal are not included. Creation of a product system with this process will enable modeling of all upstream (supply-chain) activities.

## Geography
Data represent the 50 US states

## Time period
2017 was the year in which this version of USEEIO was released and is the target date for the model

## Reference product
- Nonresidential building repair and maintanence: 1 USD

## Inputs from technosphere
All rows: data quality (1,3,1,1,1)
- Advertising and public relations: 0.00239743 USD
- Telecommunications: 0.00153131 USD
- Office supplies (not paper); at manufacturer: 6.929e-5 USD
- Secondary steel products; at manufacturer: 0.00148973 USD
- Monetary authorities and depository credit intermediation: 0.00329127 USD
- Clay and ceramic products; at manufacturer: 0.00198862 USD
- Communication and energy wire and cable; at manufacturer: 0.00453849 USD
- Other rubber products; at manufacturer: 0.0006929 USD
- Wireless telecommunications: 0.00076219 USD
- Paper bags and coated paper; at manufacturer: 0.000256373 USD
- Synthetic dyes and pigments; at manufacturer: 6.929e-6 USD
- Satellite, telecommunications resellers, and all other telecommunications: 0.000228657 USD
- Telephones; at manufacturer: 4.1574e-5 USD
- Urethane and other foam products; at manufacturer: 0.00137887 USD
- Golf courses, marinas, ski resorts, fitness and other rec centers and industries: 9.7006e-5 USD
- Office administration: 0.00013858 USD
- Toiletries; at manufacturer: 6.929e-5 USD
- Custom metal rolls; at manufacturer: 0.000353379 USD
- Metal pipe fittings, ball and roller bearings, industrial patterns, metal bath fixtures, other misc. fabricated metals; at manufacturer: 0.00161446 USD
- Insurance agencies and brokerages: 3.4645e-5 USD
- Cardboard containers; at manufacturer: 0.00110864 USD
- Other retail: 0.0555498 USD
- Paints and coatings; at manufacturer: 0.00351993 USD
- Switchgear and switchboards; at manufacturer: 0.00204405 USD
- Limited-service restaurants: 0.000235586 USD
- Architectural, engineering, and related services: 0.0136293 USD
- Scientific research and development: 2.0787e-5 USD
- Valve and fittings (except for plumbing); at manufacturer: 0.00183618 USD
- Household goods repair: 0.000491959 USD
- Facilities support: 4.1574e-5 USD
- Small electrical appliances; at manufacturer: 0.000651326 USD
- Light gauge metal cans, boxes, and containers; at manufacturer: 6.929e-6 USD
- Lumber and treated lumber; at manufacturer: 0.0084118 USD
- Nonresidential building repair and maintanence: 0.000187083 USD
- Cutlery and handtools; at manufacturer: 0.000110864 USD
- Soap and cleaning compounds; at manufacturer: 0.000394953 USD
- Blood sugar, pregnancy, and other diagnostic test kits; at manufacturer: 0.000429598 USD
- Heating equipment other than warm air furnaces; at manufacturer: 0.000879983 USD
- Paper; at manufacturer: 0.00013858 USD
- Hotels and campgrounds: 0.000713687 USD
- Primary copper; at manufacturer: 2.0787e-5 USD
- Automatic controls for HVAC and refrigeration equipment; at manufacturer: 0.00103935 USD
- Vehicle engines and engine parts; at manufacturer: 0.000242515 USD
- Aluminum; at manufacturer: 0.000214799 USD
- Specialized design: 3.4645e-5 USD
- Plastic pipe, fittings, and sausage casings; at manufacturer: 0.00268152 USD
- Water transport (boats, ships, ferries): 0.00162831 USD
- Vending, commercial laundry, and other commercial and service industry machinery; at manufacturer: 6.929e-6 USD
- Chemicals (except basic chemicals, agrichemicals, polymers, paints, pharmaceuticals,soaps, cleaning compounds); at manufacturer: 0.00384559 USD
- Computer terminals and other computer peripheral equipment; at manufacturer: 7.6219e-5 USD
- Rail transport: 0.00152438 USD
- Major home appliances (except ovens, stoves, refrigerators and laundry machines); at manufacturer: 0.000103935 USD
- Wiring devices; at manufacturer: 0.00465629 USD
- Other real estate: 0.00482951 USD
- Mining and oil/gas field machinery; at manufacturer: 8.3148e-5 USD
- Other transportation equipment; at manufacturer: 1.3858e-5 USD
- Storage batteries; at manufacturer: 0.000145509 USD
- Dimensional stone; at mine: 0.0143638 USD
- Plastic bottles; at manufacturer: 6.929e-6 USD
- Compressed Gases; at manufacturer: 0.000443456 USD
- Air and gas compressors; at manufacturer: 0.000263302 USD
- Civic, social, professional, and similar organizations: 0.000235586 USD
- Communications equipment; at manufacturer: 0.00090077 USD
- Independent artists, writers, and performers: 4.1574e-5 USD
- Books, newspapers, magazines, and other print media; at manufacturer: 5.5432e-5 USD
- Pipeline transport: 0.000180154 USD
- Waste management and remediation: 0.00115021 USD
- Nondepository credit intermediation and related activities: 0.000394953 USD
- Glass and glass products; at manufacturer: 0.000297947 USD
- Plywood and veneer; at manufacturer: 0.00787827 USD
- Optical instruments and lenses; at manufacturer: 1.3858e-5 USD
- Fabricated pipe and pipe fittings; at manufacturer: 0.00309726 USD
- Software: 9.7006e-5 USD
- Business support: 0.000145509 USD
- Cardboard; at manufacturer: 0.000422669 USD
- Passenger ground transport: 0.000200941 USD
- Construction machinery; at manufacturer: 0.00062361 USD
- Pharmaceutical products (pills, powders, solutions, etc.); at manufacturer: 0.000124722 USD
- Computer systems design: 0.00034645 USD
- Power tools; at manufacturer: 7.6219e-5 USD
- Veneer, plywood, and engineered wood; at manufacturer: 0.00196091 USD
- Machine shops; at manufacturer: 0.00113636 USD
- Gaskets, seals, musical instruments, fasteners, brooms, brushes, mop and other misc. goods; at manufacturer: 0.000582036 USD
- Other plastic products; at manufacturer: 0.0158605 USD
- Asphalt shingles; at manufacturer: 0.0100956 USD
- Electronic equipment repair and maintenance: 0.000609752 USD
- Other primary nonferrous metals; at manufacturer: 6.929e-6 USD
- Welding and Soldering Equipment, Scales and Balances, and other general purpose machinery; at manufacturer: 0.000311805 USD
- Commercial equipment rental: 0.0132413 USD
- Other textiles; at manufacturer: 0.00125415 USD
- Full-service restaurants: 0.00055432 USD
- Sand, gravel, clay, phosphate, other nonmetallic minerals; at mine: 0.000374166 USD
- All other food and drinking places: 4.1574e-5 USD
- Buildings and dwellings services: 0.000859196 USD
- Vehicle repair: 0.000921557 USD
- Performances: 1.3858e-5 USD
- Investigation and security: 0.000166296 USD
- Insurance carriers: 0.000117793 USD
- Medicinal and botanical ingredients; at manufacturer: 2.7716e-5 USD
- Motors and generators; at manufacturer: 0.00126108 USD
- Nonferrous metal casts; at manufacturer: 0.000110864 USD
- Metal plumbing drains, faucets, valves, and other fittings; at manufacturer: 0.00337442 USD
- Sports: 4.1574e-5 USD
- Employment services: 0.000471172 USD
- Legal services: 0.00251523 USD
- Lime and gypsum products; at manufacturer: 0.00304183 USD
- Environmental and other technical consulting services: 0.000117793 USD
- Heavy gauge metal tanks; at manufacturer: 0.00105321 USD
- Wooden windows, door, and flooring; at manufacturer: 0.0110102 USD
- All other forging, stamping, and sintering; at manufacturer: 0.000117793 USD
- other miscellaneous electrical equipment and components; at manufacturer: 0.000200941 USD
- Wood kitchen cabinets and countertops; at manufacturer: 0.004684 USD
- Light bulbs; at manufacturer: 6.2361e-5 USD
- Asphalt pavement; at manufacturer: 0.00719923 USD
- Analytical laboratory instruments; at manufacturer: 6.929e-6 USD
- Accounting, tax preparation, bookkeeping, and payroll: 0.001171 USD
- Aluminum products; at manufacturer: 0.000159367 USD
- Pesticides; at manufacturer: 1.3858e-5 USD
- Other basic inorganic chemicals; at manufacturer: 4.8503e-5 USD
- Rubber and plastic belts and hoses; at manufacturer: 1.3858e-5 USD
- Springs and wires; at manufacturer: 0.000595894 USD
- Cement; at manufacturer: 0.0016006 USD
- Petrochemicals; at manufacturer: 6.929e-6 USD
- Adhesives; at manufacturer: 0.000983918 USD
- News syndicates, libraries, archives, Internet publishing and all other information services: 6.929e-6 USD
- Other basic organic chemicals; at manufacturer: 0.000394953 USD
- Investment advice, portfolio management, and other financial advising services: 0.000110864 USD
- Colleges, universities, junior colleges, and professional schools: 6.929e-6 USD
- Metal coatings, engravings, and heat treatments; at manufacturer: 0.00159367 USD
- Other vehicle parts; at manufacturer: 0.00041574 USD
- Metal hinges, keys, lock, and other hardware; at manufacturer: 0.00189855 USD
- Mineral wool; at manufacturer: 3.4645e-5 USD
- Metal windows, doors, and architectural products; at manufacturer: 0.0157427 USD
- Drinking water and wastewater treatment; at consumer: 0.000194012 USD
- Tobacco, cotton, sugarcane, peanuts, sugar beets, herbs and spices, and other crops; at farm: 0.000602823 USD
- Plastics; at manufacturer: 8.3148e-5 USD
- Printing support; at manufacturer: 6.929e-6 USD
- Cast iron and steel; at manufacturer: 0.00055432 USD
- Cut stone and stone products; at manufacturer: 0.000547391 USD
- Specialty transformers; at manufacturer: 6.929e-6 USD
- Power boilers and heat exchangers; at manufacturer: 0.00041574 USD
- Commercial machinery repair: 0.00179461 USD
- Vaccines and other biological medical products; at manufacturer: 0.00105321 USD
- Ground or treated minerals and earth; at manufacturer: 5.5432e-5 USD
- Other nonmetallic mineral products; at manufacturer: 4.8503e-5 USD
- Motor vehicle steering, suspension components (except spring), and brake systems; at manufacturer: 0.00270924 USD
- Material handling equipment; at manufacturer: 4.1574e-5 USD
- Electronic capacitors, resistors, coils, transformers, connectors and other components (except semiconductors and printed circuit assemblies); at manufacturer: 4.8503e-5 USD
- Abrasive products; at manufacturer: 0.000367237 USD
- Rubber tires; at manufacturer: 0.000699829 USD
- Securities and commodities brokerage and exchanges: 0.00090077 USD
- Consumer goods and general rental centers: 5.5432e-5 USD
- Promoters and agents: 1.3858e-5 USD
- Air conditioning, refrigeration, and warm air heating equipment; at manufacturer: 0.0103242 USD
- Machinery for the paper, textile, food or other industries (except semiconductor machinery); at manufacturer: 0.00013858 USD
- Natural gas; at consumer: 0.000748332 USD
- Management consulting: 0.000297947 USD
- Primary iron, steel, and ferroalloy products; at manufacturer: 0.00265381 USD
- Other computer related services, including facilities management: 0.00062361 USD
- Fabric; at manufacturer: 0.000117793 USD
- Other petroleum and coal products; at manufacturer: 0.000976989 USD
- Screws, nuts, and bolts; at manufacturer: 0.000394953 USD
- Gasoline, fuels, and by-products of petroleum refining; at manufacturer: 0.0272795 USD
- Postal service: 3.4645e-5 USD
- Fluid meters and counting devices; at manufacturer: 1.3858e-5 USD
- External hard drives, CDs, other storage media; at manufacturer: 1.3858e-5 USD
- Secondary copper products; at manufacturer: 0.000609752 USD
- Light fixtures; at manufacturer: 0.00533533 USD
- Air transport: 0.00115714 USD
- Data processing and hosting: 0.000374166 USD
- Shelving and lockers; at manufacturer: 2.7716e-5 USD
- Wood pulp; at manufacturer: 0.000200941 USD
- Marketing research and all other miscellaneous professional, scientific, and technical services: 0.000145509 USD
- Vehicle rental and leasing: 0.000907699 USD
- Carpets and rugs; at manufacturer: 0.000194012 USD
- Other secondary nonferrous metal products; at manufacturer: 0.000388024 USD
- Transmission and power train parts; at manufacturer: 0.000270231 USD
- General merchandise stores: 0.00141352 USD
- Electricity; at consumer: 0.0018639 USD
- Travel arrangement and reservation: 6.929e-5 USD
- Wireless communications; at manufacturer: 6.929e-5 USD
- Metal structural products; at manufacturer: 0.00990847 USD
- Farm machinery and equipment; at manufacturer: 1.3858e-5 USD
- Pumps and pumping equipment; at manufacturer: 0.00119179 USD
- Sanitary paper (tissues, napkins, diapers, etc.); at manufacturer: 6.929e-6 USD
- Other concrete products; at manufacturer: 0.00243208 USD
- Plastic bags, films, and sheets; at manufacturer: 0.000533533 USD
- Ready-mix concrete; at manufacturer: 0.0141837 USD
- Fertilizers; at manufacturer: 0.00128879 USD
- Vehicles and parts sales: 0.0010047 USD
- Wholesale trade: 0.0313606 USD
- Polystyrene foam products; at manufacturer: 0.00116407 USD
- Other support services: 6.929e-5 USD
- Vehicle electrical and electronic equipment; at manufacturer: 0.000644397 USD
- Lessors of nonfinancial intangible assets: 0.000450385 USD
- Concrete pipe, bricks, and blocks; at manufacturer: 0.0025568 USD
- Stationery; at manufacturer: 6.929e-6 USD
- Truck transport: 0.00936108 USD
- Food and beverage stores: 0.00027716 USD

## Inputs from nature
- Water, fresh: 6.07022e-5, 0.000105051 m3 (2 entries, compartments not in this file); data quality (1,2,1,4,2)
- Occupation, urban, discontinuously built: 0.000196806 m2*a; data quality (4,2,1,1,1)

## Emissions to nature
- acrolein: 1.06161e-7 kg; data quality (3,2,1,4,1)
- particulates, < 2.5 um: 0.000120614 kg; data quality (3,2,1,2,4)
- Benzo(g,h,i)perylene: 1.86044e-10 kg; data quality (3,2,1,4,1)
- Xylene: 1.53802e-6 kg; data quality (3,2,1,4,1)
- methane, dichloro-, hcc-30: 1.13551e-8 kg; data quality (3,2,1,1,5)
- carbon monoxide: 0.00043197 kg; data quality (3,2,1,1,1)
- propylene oxide: 2.03795e-14 kg; data quality (3,2,1,1,5)
- propanal: 3.83194e-7 kg; data quality (3,2,1,4,1)
- lead: 2.83237e-10 kg; data quality (3,2,1,1,5)
- Phosphorus: 5.96731e-7 kg; data quality (2,1,1,1,5)
- methyl methacrylate: 2.31202e-10 kg; data quality (4,2,1,1,5)
- Phthalate, dibutyl-: 4.74884e-15 kg; data quality (4,2,1,1,5)
- 1,4-dioxane: 4.35275e-12 kg; data quality (4,2,1,1,5)
- naphthalene: 3.13084e-8 kg; data quality (3,2,1,4,1)
- ethene, tetrachloro-: 6.04357e-9 kg; data quality (3,2,1,1,5)
- methane, monochloro-, r-40: 2.67097e-12 kg; data quality (3,2,1,1,5)
- carbonyl sulfide: 8.14875e-13 kg; data quality (4,2,1,1,5)
- nickel: 4.49229e-10 kg; data quality (3,2,1,5,1)
- styrene: 8.54001e-8 kg; data quality (4,2,1,2,3)
- acrylonitrile: 2.03724e-10 kg; data quality (4,2,1,1,5)
- ammonia: 3.67069e-7 kg; data quality (3,2,1,4,1)
- VOC, volatile organic compounds: 4.01463e-5 kg; data quality (3,2,1,1,1)
- Dibenz(a,h)anthracene: 1.3801e-12 kg; data quality (3,2,1,4,1)
- Propane, 1,2-dichloro-: 1.92723e-13 kg; data quality (4,2,1,1,5)
- chromium: 2.98505e-10 kg; data quality (4,1,1,1,5)
- Benzo(a)anthracene: 3.23517e-17 kg; data quality (2,2,1,1,5)
- methane, bromo-, halon 1001: 6.69405e-13 kg; data quality (3,2,1,1,5)
- monochloroethane: 4.31162e-13 kg; data quality (3,2,1,1,5)
- manganese: 3.37101e-10 kg; data quality (3,2,1,3,3)
- ethane, 1,2-dichloro-: 1.44988e-10 kg; data quality (3,2,1,1,5)
- Cobalt: 4.16266e-12 kg; data quality (3,2,1,1,5)
- toluene: 1.67169e-6 kg; data quality (3,2,1,4,1)
- nitrogen oxides: 0.000351931 kg; data quality (3,2,1,1,1)
- ethylene glycol: 2.83176e-10 kg; data quality (5,2,1,1,5)
- Ethane, 1,1,1,2-tetrafluoro-, HFC-134a: 7.27767e-6 kg; data quality (4,2,1,4,1)
- Chromium, ion: 1.38777e-10 kg; data quality (3,2,1,3,3)
- butadiene: 1.30084e-7 kg; data quality (3,2,1,4,1)
- Ethene, chloro-: 2.78758e-10 kg; data quality (3,2,1,1,5)
- benz[a]anthracene: 7.5829e-11 kg; data quality (3,2,1,4,1)
- Methane: 2.33623e-6 kg; data quality (4,2,1,4,1)
- 1,1,2,2-tetrachloroethane: 1.12439e-10 kg; data quality (3,2,1,1,5)
- antimony: 6.39845e-13 kg; data quality (3,2,1,1,5)
- phenanthrene: 7.89622e-9 kg; data quality (3,2,1,4,1)
- arsenic: 1.13202e-9 kg; data quality (3,2,1,5,1)
- cumene: 4.3221e-10 kg; data quality (4,2,1,1,5)
- carbon disulfide: 1.94313e-12 kg; data quality (4,2,1,1,5)
- m-xylene: 3.94246e-8 kg; data quality (3,2,1,4,1)
- hydrogen chloride: 1.5106e-10 kg; data quality (2,2,1,1,5)
- ethane, 1,2-dibromo-: 2.3586e-13 kg; data quality (2,2,1,1,5)
- phenol: 8.59215e-9 kg; data quality (4,2,1,1,5)
- Indeno(1,2,3-cd)pyrene: 5.69291e-11 kg; data quality (3,2,1,4,1)
- mercury: 6.9365e-12 kg; data quality (3,2,1,4,2)
- fluorene: 3.30779e-9 kg; data quality (3,2,1,4,1)
- chloroform: 8.84865e-14 kg; data quality (4,2,1,1,5)
- benzene, chloro-: 2.04366e-12 kg; data quality (4,2,1,1,5)
- benzo(a)pyrene: 5.91658e-11 kg; data quality (3,2,1,4,1)
- Propane, 1,1,1,3,3,3-hexafluoro-, HCFC-236fa: 2.23183e-8 kg; data quality (4,2,1,4,1)
- diisocyanates: 3.18405e-14 kg; data quality (4,1,1,1,5)
- Ethylene glycol monoethyl ether: 1.00032e-9 kg; data quality (3,2,1,1,5)
- Benzo(k)fluoranthene: 4.21155e-11 kg; data quality (3,2,1,4,1)
- acenaphthene: 2.9049e-9 kg; data quality (3,2,1,4,1)
- Phthalate, dimethyl-: 1.1427e-9 kg; data quality (4,2,1,1,5)
- methanol: 1.21619e-8 kg; data quality (3,2,1,1,5)
- 2,2,4-trimethylpentane: 4.80248e-7 kg; data quality (3,2,1,4,1)
- Chrysene: 9.25511e-11 kg; data quality (3,2,1,4,1)
- Ethane, 1,1,1-trifluoro-, HFC-143a: 8.26136e-7 kg; data quality (4,2,1,4,1)
- hexane: 2.57158e-7 kg; data quality (3,2,1,4,1)
- Carbon dioxide: 0.0934103 kg; data quality (4,2,1,4,1)
- Hydrocarbons, aromatic: 2.5819e-8 kg; data quality (3,2,1,4,1)
- 3-methylcholanthrene: 3.63978e-18 kg; data quality (2,2,1,1,5)
- Ethane, pentafluoro-, HFC-125: 1.93086e-6 kg; data quality (4,2,1,4,1)
- Benzo(b)fluoranthene: 4.8692e-11 kg; data quality (3,2,1,4,1)
- methyl isobutyl ketone: 1.26503e-9 kg; data quality (4,2,1,1,5)
- para-xylene: 1.94274e-9 kg; data quality (3,2,1,4,1)
- benzene: 1.12751e-6 kg; data quality (3,2,1,4,1)
- carbon tetrachloride: 1.92252e-13 kg; data quality (4,2,1,1,5)
- acetaldehyde: 1.7877e-6 kg; data quality (3,2,1,4,1)
- selenium: 5.00234e-13 kg; data quality (2,2,1,1,5)
- anthracene: 1.99065e-10 kg; data quality (3,2,1,4,1)
- beryllium: 1.2603e-12 kg; data quality (2,2,1,1,5)
- pyrene: 6.39832e-10 kg; data quality (3,2,1,4,1)
- PHOSPHORUS: 6.09674e-13 kg; data quality (2,2,1,1,5)
- trichloroethylene: 3.26472e-9 kg; data quality (3,2,1,1,5)
- nickel: 9.95016e-11 kg; data quality (4,1,1,1,5)
- Nitrogen: 1.66691e-6 kg; data quality (2,2,1,1,5)
- benzene, ethyl-: 4.02368e-7 kg; data quality (3,2,1,4,1)
- Methane, difluoro-, HFC-32: 1.12444e-6 kg; data quality (4,2,1,4,1)
- methylene diphenyl diisocyanate: 1.09487e-10 kg; data quality (4,2,1,1,5)
- 1,4-dichlorobenzene: 7.0868e-13 kg; data quality (2,2,1,1,5)
- 2-ethoxyethyl acetate: 4.25905e-20 kg; data quality (5,2,1,1,5)
- Chromium VI: 3.52212e-11 kg; data quality (3,2,1,3,3)
- 2-methylnaphthalene: 1.62333e-12 kg; data quality (2,2,1,1,5)
- acenaphthylene: 2.94875e-9 kg; data quality (3,2,1,4,1)
- ethane, 1,1,2-trichloro-: 7.19353e-17 kg; data quality (4,2,1,1,5)
- Dinitrogen monoxide: 3.56468e-7 kg; data quality (4,2,1,4,1)
- formaldehyde: 3.92546e-6 kg; data quality (3,2,1,4,1)
- BUTYL ISOCYANATE: 5.26418e-12 kg; data quality (4,2,1,1,5)
- Water, fresh: 0.000134663 m3; data quality (1,2,1,4,2)
- 1,1,1-trichloroethane: 5.79211e-8 kg; data quality (3,2,1,1,5)
- fluoranthene: 9.31652e-10 kg; data quality (3,2,1,4,1)
- sulfur dioxide: 9.24852e-7 kg; data quality (3,2,1,4,1)
- cadmium: 2.64849e-12 kg; data quality (3,2,1,1,5)
- tertiary-Butyl Acetate: 4.25905e-20 kg; data quality (4,2,1,1,5)
- particulates, < 10 um: 0.000772953 kg; data quality (3,2,1,1,5)
- o-Xylene: 1.58707e-8 kg; data quality (3,2,1,4,1)

## Inventory method
Input-output

## Modelling constants
The reference unit of all processes is 1 USD2013 of the good or service. The technosphere inputs are based on the US BEA detailed input-output tables for 2007. The IO tables are combined to develop a commodity-by-commodity model based on the the industry-technology assumption (see Suh et al., 2010), which assumes all commodities produced by a given industry have the same input structure, but that multiple industries can produce the same commodity. Thus, model technosphere flows represent commodity outputs (and not industry outputs) from other processes in the model. There are no by-products included in these processes. All commodity production is based on US-conditions, despite in reality that some goods and services are produced overseas, as USEEIO v1.1 is a single-region IO model.

## Completeness
The input-output approach assures that all purchased inputs associated with the sectors making these commodities as reported in the US census for 2007 are included. The direct resources extracted including minerals, energy sources, water and land occupied are included. Emissions to air include all critieria air pollutants, greenhouse gases, and hazardous and toxic air pollutants as defined by US EPA. Releases to water include toxics, total nitrogen and total phosphorus, and water discharges. Releases to soil or groundwater include toxics and agriculutural pesticides. Some metal releases to air, water and soil are not included because they could not be speciated. Solid hazardous and non-hazardous wastes generated are not included as an elementary flows although purchases of waste services are included.

## Data treatment
Greenhouse gases are primarily from the US Greenhouse Gas Emission Inventory (USEPA 2016a). Biogenic C uptake is not included (change from version 1.0), as biogenic C emission are not included. Toxic releases to air, water and soil (except pesticides) are from the 2013 Toxic Release Inventory (USEPA 2015a). Criteria air pollutants and hazardous air pollutants are from the 2011 National Emissions Inventory (USEPA 2015b). All estimates are normalized by industry based on sector output in the data year, then converted to 2013 USD using relative sector-specific CPIs (if data year is not 2013). Energy use represent raw renewables or fossil fuel energies and is based on EIA data for 2014. See Table 1 in Yang, Ingwersen et al. 2017 and Supporting Information 1, and the v1.1 data update notes (Ingwersen et al. 2017) for all details on environmental data sources used.Land occupation associated with manufacturing buildings was estimated based on the building floorspace data provided by the U.S. Energy Information Administration in the 2010 Manufacturing Energy Consumption Survey (EIA 2013). Portions of total renewable energy (EIA 2016) based on EIA-923 reports for 2014 (EIA 2017) are included. Nitrogen and Phosphorus releases are modeled in total N and total P equivalents as estimated by the Discharge Monitoring Report Nutrient Loading tool (USEPA 2016b). Self-supplied withdrawals were assigned to industrial sectors based on water use statistics for Canadian industries by NAICS 3-digit sector scaled to US production levels based on gross domestic product by industry (BEA 2015; Statistics Canada 2010), and further disaggregated to the manufacturing sectors based on compensation of employees as provided by the 2007 IO tables (BEA 2015). Water withdrawals associated with public supply were allocated to sectors based on their use of water, sewage, and other services in USD based on the IO tables (BEA 2015). Portions of total renewable energy (EIA 2016) by type are assigned to sectors (hydro, wind, solar, or) based on EIA-923 reports for 2014 (EIA 2017).

## Data collection
2015-2016

## Sampling procedure
US federal government sources, including surveys and US EPA emissions databases are used as the primary sources. From these sources, data for US reporting establishments/facilities are aggregated by the NAICS sector as defined in the BEA detailed 2007 input-output tables. When level of sector aggregation differs, or when direct emissions are not reported but modeled, additional sources are used to make allocations and estimates.

## Review details
In regard to quality assurance and peer-review, each dataset created went through Quality Assurance as defined in a quality assurance project plans at US EPA, CSRA or ERG. The model was assembled with the IO model builder model (USEPA 2016c). Validation functions were used to check that all the model components were properly assembled and harmonized. Bayou Demeke and Santosh Ghimire provided internal peer review of the model methodology and the manuscript underwent standard EPA management review. An editor and two anonymous reviewers at the Journal of Cleaner Production reviewed the model. In regard to data quality evaluation, data quality assessment was performed at the flow and process levels according to the updated US EPA data quality assessment guidelines as defined in US EPA (2016b).

## Intended application
The primary application is for use in the US Environmentally-Extended Input-Ouput model, USEEIO, version 1.1. This model is being used by the US EPA for supporting tools that prioritize goods and services based on potential environmental impacts, resource use or emissions for large regions, including the US and US states, and as a strealined tool for organizations as a starting point to consider sustainable materials management. Model results are designed to provide meso/macro-level decision support.

## Project
USEEIO v1.1 was developed by the US EPA with CSRA and ERG with Wesley W. Ingwersen and David E. Meyer as research leads. Yi Yang was the technical lead on the work for CSRA (contract EP-C-15-012); Troy Hawkins was lead for ERG (contract EP-C-12-021).

## Sources
- Ingwersen et al. DRAFT
- USDA 2016
- USGS 2016
- Macknick et al. 2011
- EIA 2013
- USGS 2015
- BEA 2015
- USDA 2009a
- USEPA 2016c
- EIA 2016
- Nickerson et al. 2011
- Goebes et al. 2003
- Yienger et al. 1995
- Maupin et al. 2014
- BLM 2008
- Lovelace 2009
- Edelen and Ingwersen 2017
- USEPA 2015b
- Statistics Canada 2010
- USEPA 2016a
- EIA 2017
- Torcellini et al. 2003
- USDA 2009b
- USDA 2014
- USEPA 2016b
- Kim et el. 2013
- USEPA 2015a
- Ingwersen et al. 2017
- EIA 2015
- USDA 2006
- Blackhurst et al. 2010
