# Ice cream and frozen desserts; at manufacturer

Dataset: openLCA process, unit process
Category: 3115: Dairy Product Manufacturing
Geography: United States
Time period: 2017-01-01 to 2017-12-31
Data quality: US EPA - Process Pedigree Matrix (1;1)
Exchange data quality scheme: US EPA - Flow Pedigree Matrix
Generated by: US EPA with CSRA and ERG
Owner: US EPA
Published in: Yang, Ingwersen et al. 2017
restrictionsDescription: This model shold be appropriately cited (see Yang, Ingwersen et al. 2017 source or Publication field) when used. Any changes or derivations of this model by the user should be documented. The model itself and any results from use of this model shall not be construed to consitute US EPA opinion or policy.
copyright: false

## General comment
BEA Code & Name is '311520:Ice cream and frozen dessert manufacturing'. Description of the primary industry producing this good or service, adapted from the Census Bureau NAICS 2007 descriptions: This industry comprises establishments primarily engaged in manufacturing ice cream, frozen yogurts, frozen ices, sherbets, frozen tofu, and other frozen desserts (except bakery products).

## Technology
The process describes the average US production of this good or service within this NAICS-based grouping defined in the BEA 2007 detailed input-output tables (BEA 2015). Distribution, wholesale and retailing of this good or service, use, and final disposal are not included. Creation of a product system with this process will enable modeling of all upstream (supply-chain) activities.

## Geography
Data represent the 50 US states

## Time period
2017 was the year in which this version of USEEIO was released and is the target date for the model

## Reference product
- Ice cream and frozen desserts; at manufacturer: 1 USD

## Inputs from technosphere
All rows: data quality (1,3,1,1,1)
- Other retail: 0.00140609 USD
- Valve and fittings (except for plumbing); at manufacturer: 0.000341975 USD
- Machine shops; at manufacturer: 5.85092e-6 USD
- Insurance agencies and brokerages: 0.000648128 USD
- Plastic bags, films, and sheets; at manufacturer: 0.00619503 USD
- Monetary authorities and depository credit intermediation: 0.00224038 USD
- Laminated plastic plates and shapes; at manufacturer: 2.18835e-5 USD
- Other plastic products; at manufacturer: 0.0049664 USD
- Gasoline, fuels, and by-products of petroleum refining; at manufacturer: 0.000878735 USD
- Flavored drink concentrates; at manufacturer: 0.0353814 USD
- Advertising and public relations: 0.0110851 USD
- Accounting, tax preparation, bookkeeping, and payroll: 0.00061625 USD
- Polystyrene foam products; at manufacturer: 0.000367243 USD
- Air transport: 0.00088866 USD
- Business support: 0.000240345 USD
- Environmental and other technical consulting services: 0.000321956 USD
- Paper bags and coated paper; at manufacturer: 0.0043647 USD
- Plastics; at manufacturer: 0.00114219 USD
- Commercial machinery repair: 0.00215167 USD
- Specialized design: 2.75048e-5 USD
- Air conditioning, refrigeration, and warm air heating equipment; at manufacturer: 0.00233952 USD
- Other real estate: 0.000536086 USD
- Sugar, candy, and chocolate; at manufacturer: 0.0261915 USD
- Truck transport: 0.0199879 USD
- Electronic equipment repair and maintenance: 0.00045307 USD
- Golf courses, marinas, ski resorts, fitness and other rec centers and industries: 5.85092e-6 USD
- Cheese; at manufacturer: 0.000156336 USD
- Limited-service restaurants: 0.00037883 USD
- Drinking water and wastewater treatment; at consumer: 0.00121639 USD
- Fresh fruits and tree nuts; at farm: 0.0184624 USD
- Corn products; at manufacturer: 0.011732 USD
- Dry, condensed, and evaporated dairy; at manufacturer: 0.0515791 USD
- Metal hinges, keys, lock, and other hardware; at manufacturer: 2.92546e-6 USD
- Refined vegetable, olive, and seed oils; at manufacturer: 0.00124434 USD
- Pipeline transport: 0.000214131 USD
- Chemicals (except basic chemicals, agrichemicals, polymers, paints, pharmaceuticals,soaps, cleaning compounds); at manufacturer: 4.0984e-5 USD
- Adhesives; at manufacturer: 0.000422525 USD
- Securities and commodities brokerage and exchanges: 0.000361277 USD
- All other foods; at manufacturer: 0.00446111 USD
- Cookies, crackers, pastas, and tortillas; at manufacturer: 0.0044058 USD
- Vehicle rental and leasing: 0.00144803 USD
- Civic, social, professional, and similar organizations: 0.000125263 USD
- All other food and drinking places: 2.92546e-6 USD
- Plastic pipe, fittings, and sausage casings; at manufacturer: 0.000147262 USD
- Satellite, telecommunications resellers, and all other telecommunications: 0.000110751 USD
- Employment services: 0.000745886 USD
- Other petroleum and coal products; at manufacturer: 0.0132112 USD
- Vehicles and parts sales: 0.00023544 USD
- Electricity; at consumer: 0.00790351 USD
- Transmission and power train parts; at manufacturer: 0.000444179 USD
- Veneer, plywood, and engineered wood; at manufacturer: 0.00472049 USD
- Telecommunications: 0.0016725 USD
- Gaskets, seals, musical instruments, fasteners, brooms, brushes, mop and other misc. goods; at manufacturer: 0.000212725 USD
- Company and enterprise management: 0.0291377 USD
- Full-service restaurants: 0.000249121 USD
- Buildings and dwellings services: 0.00363322 USD
- Rail transport: 0.00192902 USD
- Nondepository credit intermediation and related activities: 0.00134728 USD
- Light bulbs; at manufacturer: 0.00042393 USD
- Vehicle repair: 0.00113045 USD
- Relay and industrial controls; at manufacturer: 7.79541e-5 USD
- Cardboard containers; at manufacturer: 0.0446041 USD
- Software: 2.92546e-6 USD
- Poultry farms: 0.0174134 USD
- Food and beverage stores: 0.000120932 USD
- Fluid milk and butter; at manufacturer: 0.0887911 USD
- Specialty transformers; at manufacturer: 0.00031903 USD
- Consumer goods and general rental centers: 0.000125263 USD
- Plastic bottles; at manufacturer: 0.00619133 USD
- Investigation and security: 1.45125e-5 USD
- General merchandise stores: 0.000136965 USD
- State and local government enterprises: 0.00132715 USD
- Sports: 2.92546e-6 USD
- Facilities support: 4.33078e-6 USD
- Rubber tires; at manufacturer: 1.40533e-6 USD
- Nonresidential building repair and maintanence: 0.00294273 USD
- Vegetable oils and by-products; at manufacturer: 0.000355811 USD
- Marketing research and all other miscellaneous professional, scientific, and technical services: 0.00165327 USD
- Lessors of nonfinancial intangible assets: 0.00120172 USD
- Vehicle engines and engine parts; at manufacturer: 0.000215536 USD
- Data processing and hosting: 0.00072419 USD
- Scientific research and development: 2.92546e-6 USD
- Metal pipe fittings, ball and roller bearings, industrial patterns, metal bath fixtures, other misc. fabricated metals; at manufacturer: 0.00449924 USD
- Office administration: 0.000212725 USD
- Glass and glass products; at manufacturer: 9.14333e-5 USD
- Vehicle electrical and electronic equipment; at manufacturer: 2.92546e-6 USD
- Hotels and campgrounds: 0.000138485 USD
- Promoters and agents: 2.92546e-6 USD
- Machinery for the paper, textile, food or other industries (except semiconductor machinery); at manufacturer: 0.000166751 USD
- Material handling equipment; at manufacturer: 0.000438328 USD
- Seasonings and dressings; at manufacturer: 0.00652407 USD
- Packaged meat (except poultry); at manufacturer: 0.000306166 USD
- Legal services: 0.00051416 USD
- Ice cream and frozen desserts; at manufacturer: 0.0362551 USD
- Other computer related services, including facilities management: 0.000125263 USD
- Paper; at manufacturer: 0.000849266 USD
- Cardboard; at manufacturer: 0.00142855 USD
- All other converted paper products; at manufacturer: 0.00995356 USD
- Wireless telecommunications: 0.000451665 USD
- Waste management and remediation: 0.00289463 USD
- Coal; at mine: 0.00076939 USD
- Other basic organic chemicals; at manufacturer: 0.00239651 USD
- Natural gas; at consumer: 0.00385842 USD
- Soap and cleaning compounds; at manufacturer: 0.00530867 USD
- Computer terminals and other computer peripheral equipment; at manufacturer: 1.17018e-5 USD
- Management consulting: 0.00139424 USD
- Motor vehicle steering, suspension components (except spring), and brake systems; at manufacturer: 0.000216941 USD
- Scenic and sightseeing transportation and support activities for transportation: 1.40533e-6 USD
- Lids, jars, bottle caps, other metal closures and crowns; at manufacturer: 1.40533e-6 USD
- Other vehicle parts; at manufacturer: 0.000393857 USD
- Tobacco, cotton, sugarcane, peanuts, sugar beets, herbs and spices, and other crops; at farm: 0.0004196 USD
- Passenger ground transport: 0.000120932 USD
- Commercial equipment rental: 0.000831785 USD
- Warehousing: 0.000671646 USD
- Independent artists, writers, and performers: 0.000115082 USD
- Water transport (boats, ships, ferries): 0.00130515 USD
- Insurance carriers: 0.00205221 USD
- Household goods repair: 0.000342319 USD
- Noncomparable imports: 0.00121216 USD
- Electronic capacitors, resistors, coils, transformers, connectors and other components (except semiconductors and printed circuit assemblies); at manufacturer: 0.000352386 USD
- Architectural, engineering, and related services: 0.00349188 USD
- Light gauge metal cans, boxes, and containers; at manufacturer: 0.00083373 USD
- Dairies: 0.107978 USD
- Other support services: 7.25624e-6 USD
- Investment advice, portfolio management, and other financial advising services: 0.000118007 USD
- Computer systems design: 0.000361277 USD
- Wholesale trade: 0.061839 USD

## Inputs from nature
- Occupation, industrial area, built up: 0.000317715 m2*a; data quality (4,2,1,1,1)
- Water, fresh: 0.000911883 m3; data quality (2,2,1,4,2)
- Occupation, urban, discontinuously built: 9.19082e-5 m2*a; data quality (4,2,1,1,1)
- Water, fresh: 0.00269588 m3; data quality (3,2,1,4,2)
- Occupation, industrial area: 0.000953146 m2*a; data quality (4,2,1,1,1)
- Water, saline: 0.000155819 m3; data quality (4,2,1,4,2)

## Emissions to nature
- benzene: 1.31043e-8 kg; data quality (3,2,1,2,4)
- trichloroethylene: 6.40213e-11 kg; data quality (4,2,1,1,4)
- mercury: 4.06968e-12 kg; data quality (2,2,1,1,5)
- o-toluidine: 1.93364e-13 kg; data quality (4,2,1,1,4)
- Xylene: 3.37357e-9 kg; data quality (3,2,1,4,1)
- anthracene: 4.50306e-11 kg; data quality (3,2,1,1,5)
- Water, saline: 7.89533e-5 m3; data quality (4,2,1,4,2)
- toluene: 4.03506e-8 kg; data quality (4,2,1,1,4)
- PERACETIC ACID: 6.71908e-8 kg; data quality (4,1,1,1,5)
- naphthalene: 1.09623e-9 kg; data quality (3,2,1,2,4)
- 2-methylnaphthalene: 2.31341e-13 kg; data quality (2,2,1,1,4)
- SULFURYL FLUORIDE: 2.40103e-8 kg; data quality (4,1,1,1,4)
- 3-methylcholanthrene: 2.45451e-15 kg; data quality (2,2,1,1,4)
- toluene: 2.0998e-12 kg; data quality (5,1,1,1,4)
- Ethane, 1,1,1-trifluoro-, HFC-143a: 2.51912e-7 kg; data quality (4,2,1,4,1)
- PHOSPHORUS: 2.08555e-13 kg; data quality (2,2,1,1,5)
- acenaphthene: 2.11905e-11 kg; data quality (3,2,1,2,3)
- Carbon dioxide: 0.0314222 kg; data quality (4,2,1,4,1)
- Hydrocarbons, aromatic: 4.48789e-10 kg; data quality (3,2,1,3,2)
- acetaldehyde: 1.12335e-8 kg; data quality (3,2,1,3,3)
- nitrogen oxides: 5.32589e-6 kg; data quality (3,2,1,1,3)
- Benzo(b)fluoranthene: 1.80235e-13 kg; data quality (3,2,1,4,1)
- o-cresol: 2.98353e-11 kg; data quality (3,2,1,1,5)
- Benzo(a)anthracene: 1.62381e-14 kg; data quality (2,2,1,1,5)
- 2,4,6-trichlorophenol: 4.54146e-17 kg; data quality (2,2,1,1,5)
- selenium: 4.25999e-12 kg; data quality (2,2,1,1,5)
- Propane, 1,1,1,3,3,3-hexafluoro-, HCFC-236fa: 6.80547e-9 kg; data quality (4,2,1,4,1)
- acrolein: 6.09309e-10 kg; data quality (3,2,1,3,2)
- lead: 3.9835e-11 kg; data quality (3,2,1,1,5)
- sulfur dioxide: 1.41172e-7 kg; data quality (2,2,1,1,4)
- arsenic: 2.32282e-11 kg; data quality (3,2,1,2,4)
- acenaphthylene: 1.95003e-10 kg; data quality (3,2,1,1,5)
- particulates, < 2.5 um: 1.32661e-6 kg; data quality (3,2,1,1,4)
- o-Xylene: 8.05955e-10 kg; data quality (3,2,1,2,4)
- PERACETIC ACID: 5.50147e-10 kg; data quality (4,1,1,1,4)
- propanal: 2.49266e-9 kg; data quality (3,2,1,2,3)
- nickel: 6.81673e-11 kg; data quality (3,2,1,1,5)
- Benzo(g,h,i)perylene: 4.25177e-11 kg; data quality (3,2,1,1,4)
- nitric acid: 8.79054e-8 kg; data quality (3,1,1,1,4)
- carbon monoxide: 1.14877e-5 kg; data quality (3,2,1,1,1)
- Phthalate, dibutyl-: 3.54678e-11 kg; data quality (3,2,1,1,5)
- Nitrogen: 7.43194e-8 kg; data quality (3,2,1,1,5)
- phthalate, dioctyl-: 1.08918e-12 kg; data quality (3,2,1,1,4)
- 1,1,1-trichloroethane: 6.73703e-14 kg; data quality (4,2,1,1,5)
- hexane: 6.33484e-8 kg; data quality (3,2,1,1,5)
- manganese: 8.72962e-11 kg; data quality (3,2,1,1,5)
- Chromium, ion: 4.03714e-11 kg; data quality (2,2,1,1,5)
- AMMONIA: 1.47573e-8 kg; data quality (3,1,1,1,4)
- ethane, 1,2-dichloro-: 2.2985e-10 kg; data quality (3,2,1,1,5)
- Water, fresh: 0.00307879 m3; data quality (3,2,1,4,2)
- ethene, tetrachloro-: 7.73523e-14 kg; data quality (3,2,1,1,5)
- phenol: 3.81864e-10 kg; data quality (3,2,1,1,5)
- Dibenz(a,h)anthracene: 1.83963e-14 kg; data quality (2,2,1,1,5)
- methane, monochloro-, r-40: 4.68224e-14 kg; data quality (3,2,1,1,5)
- beryllium: 9.22356e-13 kg; data quality (2,2,1,1,5)
- Ethane, 1,1,1,2-tetrafluoro-, HFC-134a: 2.21916e-6 kg; data quality (4,2,1,4,1)
- pentachlorophenol: 1.02183e-16 kg; data quality (3,2,1,1,5)
- methane, chlorodifluoro-, hcfc-22: 5.64118e-10 kg; data quality (4,1,1,1,4)
- Benzo(k)fluoranthene: 1.6545e-13 kg; data quality (3,2,1,4,1)
- Cobalt: 3.63132e-12 kg; data quality (3,2,1,1,5)
- fluoranthene: 5.12821e-11 kg; data quality (3,2,1,1,5)
- Phosphorus: 3.58398e-8 kg; data quality (2,1,1,1,5)
- 2,4-dinitrophenol: 3.63316e-16 kg; data quality (5,2,1,1,5)
- phenanthrene: 2.3086e-10 kg; data quality (3,2,1,1,5)
- chlorine: 1.00477e-10 kg; data quality (3,2,1,1,5)
- methane, bromo-, halon 1001: 3.05299e-14 kg; data quality (3,2,1,1,5)
- Indeno(1,2,3-cd)pyrene: 9.60464e-12 kg; data quality (3,2,1,1,5)
- benzene, ethyl-: 1.91954e-9 kg; data quality (3,2,1,3,2)
- formaldehyde: 2.19314e-8 kg; data quality (3,2,1,3,2)
- styrene: 3.30164e-9 kg; data quality (3,2,1,1,5)
- ethane, 1,2-dibromo-: 1.1196e-13 kg; data quality (2,2,1,1,5)
- ammonia: 2.73084e-6 kg; data quality (3,2,1,1,5)
- carbon tetrachloride: 9.16012e-14 kg; data quality (4,2,1,1,5)
- benzo(a)pyrene: 1.10895e-11 kg; data quality (3,2,1,1,5)
- acetophenone: 4.27596e-11 kg; data quality (3,2,1,1,5)
- VOC, volatile organic compounds: 8.33968e-7 kg; data quality (3,2,1,1,3)
- benzene, chloro-: 6.71795e-14 kg; data quality (4,2,1,1,5)
- 4-nitrophenol: 1.13605e-10 kg; data quality (3,2,1,1,5)
- biphenyl: 1.08901e-10 kg; data quality (3,2,1,1,5)
- p-cresol: 5.99962e-11 kg; data quality (3,2,1,1,5)
- cadmium: 3.47038e-11 kg; data quality (3,2,1,1,5)
- NITRIC ACID: 2.89547e-6 kg; data quality (3,1,1,1,5)
- para-xylene: 2.84886e-11 kg; data quality (3,2,1,4,1)
- Methane, difluoro-, HFC-32: 3.42874e-7 kg; data quality (4,2,1,4,1)
- particulates, < 10 um: 1.45581e-6 kg; data quality (3,2,1,1,4)
- methanol: 3.94946e-11 kg; data quality (4,2,1,1,4)
- hydrogen chloride: 9.45899e-10 kg; data quality (2,2,1,1,4)
- benz[a]anthracene: 1.34738e-11 kg; data quality (3,2,1,1,5)
- Ethane, pentafluoro-, HFC-125: 5.88774e-7 kg; data quality (4,2,1,4,1)
- Chromium VI: 2.3172e-12 kg; data quality (3,2,1,1,5)
- butadiene: 6.34135e-10 kg; data quality (3,2,1,4,1)
- methane, dichloro-, hcc-30: 6.66131e-11 kg; data quality (4,2,1,1,4)
- fluorene: 5.76263e-11 kg; data quality (3,2,1,2,4)
- antimony: 1.0132e-13 kg; data quality (3,2,1,1,5)
- chloroform: 5.69953e-14 kg; data quality (4,2,1,1,5)
- 2,2,4-trimethylpentane: 7.57811e-9 kg; data quality (3,2,1,2,4)
- hydrogen fluoride: 8.90346e-11 kg; data quality (2,2,1,1,4)
- m-xylene: 7.11203e-10 kg; data quality (3,2,1,4,1)
- Ethene, chloro-: 3.66382e-14 kg; data quality (3,2,1,1,5)
- Methane: 5.86164e-7 kg; data quality (4,2,1,4,1)
- Chrysene: 6.18691e-13 kg; data quality (2,2,1,2,3)
- Dinitrogen monoxide: 5.57278e-8 kg; data quality (4,2,1,4,1)
- pyrene: 6.73182e-11 kg; data quality (3,2,1,1,5)

## Inventory method
Input-output

## Modelling constants
The reference unit of all processes is 1 USD2013 of the good or service. The technosphere inputs are based on the US BEA detailed input-output tables for 2007. The IO tables are combined to develop a commodity-by-commodity model based on the the industry-technology assumption (see Suh et al., 2010), which assumes all commodities produced by a given industry have the same input structure, but that multiple industries can produce the same commodity. Thus, model technosphere flows represent commodity outputs (and not industry outputs) from other processes in the model. There are no by-products included in these processes. All commodity production is based on US-conditions, despite in reality that some goods and services are produced overseas, as USEEIO v1.1 is a single-region IO model.

## Completeness
The input-output approach assures that all purchased inputs associated with the sectors making these commodities as reported in the US census for 2007 are included. The direct resources extracted including minerals, energy sources, water and land occupied are included. Emissions to air include all critieria air pollutants, greenhouse gases, and hazardous and toxic air pollutants as defined by US EPA. Releases to water include toxics, total nitrogen and total phosphorus, and water discharges. Releases to soil or groundwater include toxics and agriculutural pesticides. Some metal releases to air, water and soil are not included because they could not be speciated. Solid hazardous and non-hazardous wastes generated are not included as an elementary flows although purchases of waste services are included.

## Data treatment
Greenhouse gases are primarily from the US Greenhouse Gas Emission Inventory (USEPA 2016a). Biogenic C uptake is not included (change from version 1.0), as biogenic C emission are not included. Toxic releases to air, water and soil (except pesticides) are from the 2013 Toxic Release Inventory (USEPA 2015a). Criteria air pollutants and hazardous air pollutants are from the 2011 National Emissions Inventory (USEPA 2015b). All estimates are normalized by industry based on sector output in the data year, then converted to 2013 USD using relative sector-specific CPIs (if data year is not 2013). Energy use represent raw renewables or fossil fuel energies and is based on EIA data for 2014. See Table 1 in Yang, Ingwersen et al. 2017 and Supporting Information 1, and the v1.1 data update notes (Ingwersen et al. 2017) for all details on environmental data sources used.Land occupation associated with manufacturing buildings was estimated based on the building floorspace data provided by the U.S. Energy Information Administration in the 2010 Manufacturing Energy Consumption Survey (EIA 2013). Portions of total renewable energy (EIA 2016) based on EIA-923 reports for 2014 (EIA 2017) are included. Nitrogen and Phosphorus releases are modeled in total N and total P equivalents as estimated by the Discharge Monitoring Report Nutrient Loading tool (USEPA 2016b). Self-supplied withdrawals were assigned to industrial sectors based on water use statistics for Canadian industries by NAICS 3-digit sector scaled to US production levels based on gross domestic product by industry (BEA 2015; Statistics Canada 2010), and further disaggregated to the manufacturing sectors based on compensation of employees as provided by the 2007 IO tables (BEA 2015). Water withdrawals associated with public supply were allocated to sectors based on their use of water, sewage, and other services in USD based on the IO tables (BEA 2015). Portions of total renewable energy (EIA 2016) by type are assigned to sectors (hydro, wind, solar, or) based on EIA-923 reports for 2014 (EIA 2017).

## Data collection
2015-2016

## Sampling procedure
US federal government sources, including surveys and US EPA emissions databases are used as the primary sources. From these sources, data for US reporting establishments/facilities are aggregated by the NAICS sector as defined in the BEA detailed 2007 input-output tables. When level of sector aggregation differs, or when direct emissions are not reported but modeled, additional sources are used to make allocations and estimates.

## Review details
In regard to quality assurance and peer-review, each dataset created went through Quality Assurance as defined in a quality assurance project plans at US EPA, CSRA or ERG. The model was assembled with the IO model builder model (USEPA 2016c). Validation functions were used to check that all the model components were properly assembled and harmonized. Bayou Demeke and Santosh Ghimire provided internal peer review of the model methodology and the manuscript underwent standard EPA management review. An editor and two anonymous reviewers at the Journal of Cleaner Production reviewed the model. In regard to data quality evaluation, data quality assessment was performed at the flow and process levels according to the updated US EPA data quality assessment guidelines as defined in US EPA (2016b).

## Intended application
The primary application is for use in the US Environmentally-Extended Input-Ouput model, USEEIO, version 1.1. This model is being used by the US EPA for supporting tools that prioritize goods and services based on potential environmental impacts, resource use or emissions for large regions, including the US and US states, and as a strealined tool for organizations as a starting point to consider sustainable materials management. Model results are designed to provide meso/macro-level decision support.

## Project
USEEIO v1.1 was developed by the US EPA with CSRA and ERG with Wesley W. Ingwersen and David E. Meyer as research leads. Yi Yang was the technical lead on the work for CSRA (contract EP-C-15-012); Troy Hawkins was lead for ERG (contract EP-C-12-021).

## Sources
- USDA 2009a
- Macknick et al. 2011
- EIA 2017
- Maupin et al. 2014
- USDA 2016
- Blackhurst et al. 2010
- BLM 2008
- USEPA 2016b
- Yienger et al. 1995
- Nickerson et al. 2011
- USGS 2015
- EIA 2013
- USEPA 2015b
- Kim et el. 2013
- Edelen and Ingwersen 2017
- USDA 2006
- USEPA 2016a
- Ingwersen et al. DRAFT
- Ingwersen et al. 2017
- USEPA 2015a
- USEPA 2016c
- Statistics Canada 2010
- EIA 2015
- EIA 2016
- USDA 2009b
- USGS 2016
- Torcellini et al. 2003
- Goebes et al. 2003
- USDA 2014
- BEA 2015
- Lovelace 2009
