# Coffee and tea; at manufacturer

Dataset: openLCA process, unit process
Category: 3119: Other Food Manufacturing
Geography: United States
Time period: 2017-01-01 to 2017-12-31
Data quality: US EPA - Process Pedigree Matrix (1;1)
Exchange data quality scheme: US EPA - Flow Pedigree Matrix
Generated by: US EPA with CSRA and ERG
Owner: US EPA
Published in: Yang, Ingwersen et al. 2017
restrictionsDescription: This model shold be appropriately cited (see Yang, Ingwersen et al. 2017 source or Publication field) when used. Any changes or derivations of this model by the user should be documented. The model itself and any results from use of this model shall not be construed to consitute US EPA opinion or policy.
copyright: false

## General comment
BEA Code & Name is '311920:Coffee and tea manufacturing'. Description of the primary industry producing this good or service, adapted from the Census Bureau NAICS 2007 descriptions: This industry comprises establishments primarily engaged in one or more of the following: (1) roasting coffee; (2) manufacturing coffee and tea concentrates (including instant and freeze-dried); (3) blending tea; (4) manufacturing herbal tea; and (5) manufacturing coffee extracts, flavorings, and syrups.

## Technology
The process describes the average US production of this good or service within this NAICS-based grouping defined in the BEA 2007 detailed input-output tables (BEA 2015). Distribution, wholesale and retailing of this good or service, use, and final disposal are not included. Creation of a product system with this process will enable modeling of all upstream (supply-chain) activities.

## Geography
Data represent the 50 US states

## Time period
2017 was the year in which this version of USEEIO was released and is the target date for the model

## Reference product
- Coffee and tea; at manufacturer: 1 USD

## Inputs from technosphere
All rows: data quality (1,3,1,1,1)
- Data processing and hosting: 0.00302591 USD
- Limited-service restaurants: 0.00276152 USD
- Other real estate: 0.000789815 USD
- Metal pipe fittings, ball and roller bearings, industrial patterns, metal bath fixtures, other misc. fabricated metals; at manufacturer: 0.00649056 USD
- Poultry farms: 9.91183e-6 USD
- Nondepository credit intermediation and related activities: 0.00487096 USD
- Tobacco, cotton, sugarcane, peanuts, sugar beets, herbs and spices, and other crops; at farm: 0.0597614 USD
- Buildings and dwellings services: 0.00449453 USD
- Metal hinges, keys, lock, and other hardware; at manufacturer: 4.58581e-8 USD
- Investment advice, portfolio management, and other financial advising services: 0.000788731 USD
- Refined vegetable, olive, and seed oils; at manufacturer: 0.000269817 USD
- Coal; at mine: 0.00161121 USD
- Computer terminals and other computer peripheral equipment; at manufacturer: 0.000393971 USD
- Environmental and other technical consulting services: 0.000132485 USD
- Fresh soybeans, canola, flaxseeds, and other oilseeds; at farm: 1.15439e-6 USD
- Fluid milk and butter; at manufacturer: 0.000618377 USD
- Commercial machinery repair: 0.0021184 USD
- Architectural, engineering, and related services: 0.0201268 USD
- Passenger ground transport: 0.000526371 USD
- Vehicle repair: 0.00105977 USD
- Rail transport: 0.00135243 USD
- Other vehicle parts; at manufacturer: 5.26477e-5 USD
- Securities and commodities brokerage and exchanges: 0.000398633 USD
- Other retail: 1.93835e-5 USD
- Other basic organic chemicals; at manufacturer: 0.000405193 USD
- Hotels and campgrounds: 0.0010517 USD
- Lessors of nonfinancial intangible assets: 0.00513711 USD
- All other food and drinking places: 0.000131309 USD
- Electronic equipment repair and maintenance: 0.000397478 USD
- Machinery for the paper, textile, food or other industries (except semiconductor machinery); at manufacturer: 2.61391e-6 USD
- Other plastic products; at manufacturer: 0.0647645 USD
- Company and enterprise management: 0.0268462 USD
- Legal services: 0.0027673 USD
- Drinking water and wastewater treatment; at consumer: 0.00053351 USD
- Scientific research and development: 0.000131309 USD
- Business support: 0.00079134 USD
- All other converted paper products; at manufacturer: 0.00546654 USD
- Promoters and agents: 0.000131309 USD
- Satellite, telecommunications resellers, and all other telecommunications: 0.000131354 USD
- Electricity; at consumer: 0.00571815 USD
- Sports: 0.000131309 USD
- Motor vehicle steering, suspension components (except spring), and brake systems; at manufacturer: 3.2378e-6 USD
- Timber and raw forest products; at forest: 7.96131e-7 USD
- Wireless telecommunications: 0.000790176 USD
- Air transport: 0.00329657 USD
- Laminated plastic plates and shapes; at manufacturer: 1.37172e-6 USD
- Corn products; at manufacturer: 0.000176122 USD
- Other support services: 0.000132485 USD
- Software: 4.58581e-8 USD
- Vegetable oils and by-products; at manufacturer: 9.78725e-5 USD
- Seasonings and dressings; at manufacturer: 2.84919e-5 USD
- Valve and fittings (except for plumbing); at manufacturer: 9.68569e-6 USD
- Employment services: 0.000133661 USD
- Civic, social, professional, and similar organizations: 0.00065873 USD
- Fresh fruits and tree nuts; at farm: 0.270855 USD
- Gaskets, seals, musical instruments, fasteners, brooms, brushes, mop and other misc. goods; at manufacturer: 4.58581e-8 USD
- Light bulbs; at manufacturer: 1.09657e-6 USD
- Accounting, tax preparation, bookkeeping, and payroll: 0.00302764 USD
- Computer systems design: 0.00105503 USD
- Plastic pipe, fittings, and sausage casings; at manufacturer: 1.69272e-6 USD
- Investigation and security: 0.000396113 USD
- Frozen food; at manufacturer: 1.95052e-6 USD
- Commercial equipment rental: 0.00132333 USD
- All other foods; at manufacturer: 1.57313e-5 USD
- Specialty transformers; at manufacturer: 1.09657e-6 USD
- Fruit and vegetable preservation; at manufacturer: 1.43702e-5 USD
- Glass and glass products; at manufacturer: 0.00109875 USD
- Other computer related services, including facilities management: 0.000527427 USD
- Consumer goods and general rental centers: 0.000264862 USD
- Truck transport: 0.0311488 USD
- Sugar, candy, and chocolate; at manufacturer: 0.000179069 USD
- Pipeline transport: 1.09657e-6 USD
- Animal farms and aquaculture ponds (except cattle and poultry): 5.17485e-7 USD
- Food and beverage stores: 1.28e-6 USD
- Lids, jars, bottle caps, other metal closures and crowns; at manufacturer: 1.09052e-6 USD
- Office administration: 0.000131348 USD
- Machine shops; at manufacturer: 5.69395e-7 USD
- Packaged meat (except poultry); at manufacturer: 6.37867e-5 USD
- Polystyrene foam products; at manufacturer: 2.88101e-6 USD
- Flavored drink concentrates; at manufacturer: 0.000126595 USD
- Full-service restaurants: 0.00171 USD
- Air conditioning, refrigeration, and warm air heating equipment; at manufacturer: 8.7267e-6 USD
- Insurance agencies and brokerages: 0.00131794 USD
- Cheese; at manufacturer: 0.000110462 USD
- State and local government enterprises: 0.000533641 USD
- Golf courses, marinas, ski resorts, fitness and other rec centers and industries: 0.000262617 USD
- Other petroleum and coal products; at manufacturer: 5.03987e-5 USD
- Insurance carriers: 0.00356025 USD
- Specialized design: 0.00079327 USD
- Paper; at manufacturer: 3.28366e-6 USD
- Adhesives; at manufacturer: 4.58581e-8 USD
- Vehicle electrical and electronic equipment; at manufacturer: 4.58581e-8 USD
- Gasoline, fuels, and by-products of petroleum refining; at manufacturer: 0.00200408 USD
- Rubber tires; at manufacturer: 1.05071e-6 USD
- Plastic bags, films, and sheets; at manufacturer: 0.00596349 USD
- Marketing research and all other miscellaneous professional, scientific, and technical services: 0.00737323 USD
- Noncomparable imports: 0.00358563 USD
- Dairies: 0.00566169 USD
- Monetary authorities and depository credit intermediation: 0.00947948 USD
- Vehicle rental and leasing: 0.00211955 USD
- Waste management and remediation: 0.00185846 USD
- Plastic bottles; at manufacturer: 0.0172847 USD
- Cutting and machine tool accessory, rolling mill, and other metalworking machines; at manufacturer: 3.98065e-8 USD
- Natural gas; at consumer: 0.0088479 USD
- Management consulting: 0.000529053 USD
- Material handling equipment; at manufacturer: 0.000530687 USD
- Facilities support: 1.13638e-6 USD
- Cardboard; at manufacturer: 0.00211954 USD
- Paper bags and coated paper; at manufacturer: 0.007069 USD
- Vehicle engines and engine parts; at manufacturer: 2.18709e-6 USD
- Flours and malts; at manufacturer: 3.58259e-6 USD
- Household goods repair: 0.000397347 USD
- Transmission and power train parts; at manufacturer: 5.72774e-6 USD
- Wholesale trade: 0.105229 USD
- Light gauge metal cans, boxes, and containers; at manufacturer: 0.025072 USD
- Relay and industrial controls; at manufacturer: 2.04946e-5 USD
- Plastics; at manufacturer: 1.93537e-5 USD
- Ice cream and frozen desserts; at manufacturer: 4.83327e-5 USD
- Cardboard containers; at manufacturer: 0.0107826 USD
- Scenic and sightseeing transportation and support activities for transportation: 1.05071e-6 USD
- Vehicles and parts sales: 1.27461e-5 USD
- Dry, condensed, and evaporated dairy; at manufacturer: 0.00147393 USD
- Water transport (boats, ships, ferries): 0.00342175 USD
- Warehousing: 0.000660221 USD
- Independent artists, writers, and performers: 0.000526199 USD
- Telecommunications: 0.00250385 USD
- Electronic capacitors, resistors, coils, transformers, connectors and other components (except semiconductors and printed circuit assemblies); at manufacturer: 0.000663315 USD
- General merchandise stores: 2.56e-6 USD
- Nonresidential building repair and maintanence: 0.00291213 USD
- Soap and cleaning compounds; at manufacturer: 1.33423e-5 USD
- Advertising and public relations: 0.00802989 USD
- Coffee and tea; at manufacturer: 0.00223079 USD
- Fresh vegetables, melons, and potatoes; at farm: 3.34375e-6 USD
- Chemicals (except basic chemicals, agrichemicals, polymers, paints, pharmaceuticals,soaps, cleaning compounds); at manufacturer: 3.24499e-5 USD

## Inputs from nature
- Occupation, urban, discontinuously built: 4.45223e-5 m2*a; data quality (4,2,1,1,1)
- Occupation, industrial area, built up: 4.85983e-5 m2*a; data quality (4,2,1,1,1)
- Occupation, industrial area: 0.000145795 m2*a; data quality (4,2,1,1,1)
- Water, saline: 0.000103424 m3; data quality (4,2,1,4,2)
- Water, fresh: 0.00150168 m3; data quality (4,2,1,4,2)
- Water, fresh: 0.00043902 m3; data quality (3,2,1,4,2)

## Emissions to nature
- VOC, volatile organic compounds: 1.99985e-5 kg; data quality (3,2,1,1,4)
- particulates, < 10 um: 2.16976e-5 kg; data quality (3,2,1,1,4)
- Cobalt: 4.16203e-11 kg; data quality (3,2,1,1,4)
- beryllium: 3.6174e-13 kg; data quality (2,2,1,1,4)
- 3-methylcholanthrene: 5.88013e-15 kg; data quality (2,2,1,1,4)
- chlorine: 3.05449e-11 kg; data quality (2,1,1,1,4)
- benzo(a)pyrene: 1.12302e-11 kg; data quality (3,2,1,1,4)
- benzene, ethyl-: 2.35134e-9 kg; data quality (3,2,1,3,2)
- pentachlorophenol: 3.34695e-17 kg; data quality (3,2,1,1,5)
- toluene: 1.56994e-12 kg; data quality (5,1,1,1,4)
- Benzo(a)anthracene: 4.78815e-14 kg; data quality (2,2,1,1,4)
- Chromium VI: 2.98883e-11 kg; data quality (3,2,1,1,4)
- AMMONIA: 2.31329e-10 kg; data quality (3,1,1,1,4)
- Ethene, chloro-: 1.17537e-14 kg; data quality (3,2,1,1,5)
- Phosphorus: 8.36243e-9 kg; data quality (2,1,1,1,5)
- Water, fresh: 0.00167474 m3; data quality (3,2,1,4,2)
- hydrogen fluoride: 3.27688e-10 kg; data quality (2,2,1,1,5)
- 2,4,6-trichlorophenol: 7.11897e-19 kg; data quality (2,2,1,1,5)
- Methane: 5.81758e-7 kg; data quality (4,2,1,4,1)
- PERACETIC ACID: 5.47019e-11, 4.11325e-10 kg (2 entries, compartments not in this file); data quality (4,1,1,1,4)
- hexane: 1.59811e-7 kg; data quality (3,2,1,1,4)
- selenium: 6.90769e-12 kg; data quality (2,2,1,1,5)
- methane, bromo-, halon 1001: 6.34734e-10 kg; data quality (3,2,1,1,4)
- ethylene oxide: 1.23484e-12 kg; data quality (4,1,1,1,5)
- particulates, < 2.5 um: 1.57304e-5 kg; data quality (3,2,1,1,4)
- Chrysene: 3.83615e-13 kg; data quality (3,2,1,4,1)
- Benzo(k)fluoranthene: 2.05798e-13 kg; data quality (3,2,1,4,1)
- naphthalene: 1.18542e-9 kg; data quality (3,2,1,2,3)
- Xylene: 7.12079e-9 kg; data quality (3,2,1,3,2)
- sulfur dioxide: 3.17283e-6 kg; data quality (2,2,1,1,4)
- Ethane, 1,1,1,2-tetrafluoro-, HFC-134a: 4.95283e-9 kg; data quality (4,2,1,4,1)
- Dibenz(a,h)anthracene: 9.35456e-15 kg; data quality (2,2,1,1,4)
- butadiene: 8.76972e-10 kg; data quality (3,2,1,4,1)
- Phosphine: 1.27985e-12 kg; data quality (4,2,1,1,5)
- aniline: 1.68375e-10 kg; data quality (4,2,1,1,5)
- Nitrogen: 1.09587e-8 kg; data quality (2,2,1,1,5)
- 2,2,4-trimethylpentane: 8.07572e-9 kg; data quality (3,2,1,2,3)
- ethane, 1,2-dibromo-: 1.7565e-15 kg; data quality (2,2,1,1,5)
- manganese: 2.01908e-10 kg; data quality (3,2,1,1,4)
- benzene: 1.75742e-8 kg; data quality (3,2,1,2,3)
- Indeno(1,2,3-cd)pyrene: 9.62729e-12 kg; data quality (3,2,1,1,4)
- phthalate, dioctyl-: 8.14369e-13 kg; data quality (3,2,1,1,4)
- 2,4-dinitrophenol: 1.18169e-16 kg; data quality (5,2,1,1,5)
- acenaphthylene: 1.99169e-10 kg; data quality (3,2,1,1,4)
- Ethane, 1,1,1-trifluoro-, HFC-143a: 5.62229e-10 kg; data quality (4,2,1,4,1)
- Propane, 1,2-dichloro-: 2.06009e-14 kg; data quality (4,2,1,1,5)
- acetaldehyde: 1.11145e-6 kg; data quality (3,2,1,1,4)
- benzene, chloro-: 2.1654e-14 kg; data quality (4,2,1,1,5)
- carbon monoxide: 5.16344e-5 kg; data quality (2,2,1,1,3)
- acrolein: 2.15053e-8 kg; data quality (2,2,1,1,4)
- nitric acid: 7.8194e-10 kg; data quality (3,1,1,1,4)
- hydrogen chloride: 9.54648e-9 kg; data quality (2,2,1,1,5)
- Phthalate, dibutyl-: 3.54678e-11 kg; data quality (3,2,1,1,4)
- propanal: 2.96589e-9 kg; data quality (3,2,1,3,2)
- methane, chlorodifluoro-, hcfc-22: 8.84285e-12 kg; data quality (4,1,1,1,4)
- Benzo(b)fluoranthene: 2.25346e-13 kg; data quality (3,2,1,4,1)
- Triethyl amine: 1.34646e-13 kg; data quality (4,2,1,1,5)
- o-Xylene: 9.12222e-10 kg; data quality (3,2,1,2,3)
- mercury: 2.20859e-12 kg; data quality (2,2,1,1,4)
- Methane, difluoro-, HFC-32: 7.65243e-10 kg; data quality (4,2,1,4,1)
- antimony: 3.66663e-14 kg; data quality (3,2,1,1,5)
- 2-methylnaphthalene: 1.1739e-11 kg; data quality (2,2,1,1,4)
- Chromium, ion: 6.85582e-10 kg; data quality (2,2,1,1,4)
- methane, dichloro-, hcc-30: 5.23798e-11 kg; data quality (4,2,1,1,4)
- methanol: 1.81931e-8 kg; data quality (4,2,1,1,4)
- lead: 1.15218e-9 kg; data quality (3,2,1,1,4)
- methane, monochloro-, r-40: 1.50065e-14 kg; data quality (3,2,1,1,5)
- 1,1,1-trichloroethane: 1.26945e-8 kg; data quality (4,2,1,1,4)
- Water, saline: 5.24047e-5 m3; data quality (4,2,1,4,2)
- anthracene: 4.53415e-11 kg; data quality (3,2,1,1,4)
- chloroform: 1.22996e-10 kg; data quality (4,2,1,1,4)
- lead: 3.25263e-12 kg; data quality (3,1,1,1,5)
- benz[a]anthracene: 1.3407e-11 kg; data quality (3,2,1,1,4)
- Hydrocarbons, aromatic: 5.73183e-10 kg; data quality (3,2,1,4,1)
- ammonia: 6.82489e-6 kg; data quality (3,2,1,1,4)
- carbon tetrachloride: 2.94423e-14 kg; data quality (4,2,1,1,5)
- nickel: 1.06178e-9 kg; data quality (3,2,1,1,4)
- trichloroethylene: 4.78836e-11 kg; data quality (4,2,1,1,4)
- phenol: 8.59258e-8 kg; data quality (4,2,1,1,4)
- propylene oxide: 1.14421e-11 kg; data quality (3,1,1,1,5)
- Carbon dioxide: 0.0308441 kg; data quality (4,2,1,4,1)
- biphenyl: 1.08901e-10 kg; data quality (3,2,1,1,4)
- acenaphthene: 2.46932e-11 kg; data quality (3,2,1,3,2)
- styrene: 3.33802e-9 kg; data quality (3,2,1,1,4)
- fluoranthene: 5.30562e-11 kg; data quality (3,2,1,1,4)
- arsenic: 1.25849e-10 kg; data quality (3,2,1,1,4)
- Benzo(g,h,i)perylene: 3.65881e-11 kg; data quality (3,2,1,1,4)
- ethane, 1,2-dichloro-: 2.2981e-10 kg; data quality (3,2,1,1,4)
- m-xylene: 9.83517e-10 kg; data quality (3,2,1,4,1)
- SULFURYL FLUORIDE: 1.79517e-8 kg; data quality (4,1,1,1,4)
- NITRIC ACID: 3.62486e-8 kg; data quality (3,1,1,1,4)
- Ethane, pentafluoro-, HFC-125: 1.31405e-9 kg; data quality (4,2,1,4,1)
- p-cresol: 5.99962e-11 kg; data quality (3,2,1,1,4)
- methyl isobutyl ketone: 3.78302e-12 kg; data quality (4,2,1,1,5)
- fluorene: 6.28536e-11 kg; data quality (3,2,1,2,3)
- Dinitrogen monoxide: 5.67524e-8 kg; data quality (4,2,1,4,1)
- acetophenone: 4.27596e-11 kg; data quality (3,2,1,1,4)
- o-toluidine: 1.44571e-13 kg; data quality (4,2,1,1,4)
- para-xylene: 3.93967e-11 kg; data quality (3,2,1,4,1)
- formaldehyde: 8.36207e-7 kg; data quality (2,2,1,1,4)
- 4-nitrophenol: 1.13605e-10 kg; data quality (3,2,1,1,4)
- ethylene glycol: 2.62035e-12 kg; data quality (5,2,1,1,5)
- cadmium: 5.58251e-10 kg; data quality (3,2,1,1,4)
- Sulfuric acid: 3.89569e-10 kg; data quality (2,1,1,1,5)
- PHOSPHORUS: 5.80593e-9 kg; data quality (2,2,1,1,4)
- Propane, 1,1,1,3,3,3-hexafluoro-, HCFC-236fa: 1.51888e-11 kg; data quality (4,2,1,4,1)
- nitrogen oxides: 4.52187e-5 kg; data quality (2,2,1,1,4)
- o-cresol: 2.98353e-11 kg; data quality (3,2,1,1,4)
- pyrene: 7.02356e-11 kg; data quality (3,2,1,1,4)
- toluene: 3.86654e-8 kg; data quality (3,2,1,2,3)
- monochloroethane: 4.72795e-19 kg; data quality (3,2,1,1,5)
- ethene, tetrachloro-: 1.19173e-12 kg; data quality (3,2,1,1,5)
- phenanthrene: 2.48381e-10 kg; data quality (3,2,1,1,4)

## Inventory method
Input-output

## Modelling constants
The reference unit of all processes is 1 USD2013 of the good or service. The technosphere inputs are based on the US BEA detailed input-output tables for 2007. The IO tables are combined to develop a commodity-by-commodity model based on the the industry-technology assumption (see Suh et al., 2010), which assumes all commodities produced by a given industry have the same input structure, but that multiple industries can produce the same commodity. Thus, model technosphere flows represent commodity outputs (and not industry outputs) from other processes in the model. There are no by-products included in these processes. All commodity production is based on US-conditions, despite in reality that some goods and services are produced overseas, as USEEIO v1.1 is a single-region IO model.

## Completeness
The input-output approach assures that all purchased inputs associated with the sectors making these commodities as reported in the US census for 2007 are included. The direct resources extracted including minerals, energy sources, water and land occupied are included. Emissions to air include all critieria air pollutants, greenhouse gases, and hazardous and toxic air pollutants as defined by US EPA. Releases to water include toxics, total nitrogen and total phosphorus, and water discharges. Releases to soil or groundwater include toxics and agriculutural pesticides. Some metal releases to air, water and soil are not included because they could not be speciated. Solid hazardous and non-hazardous wastes generated are not included as an elementary flows although purchases of waste services are included.

## Data treatment
Greenhouse gases are primarily from the US Greenhouse Gas Emission Inventory (USEPA 2016a). Biogenic C uptake is not included (change from version 1.0), as biogenic C emission are not included. Toxic releases to air, water and soil (except pesticides) are from the 2013 Toxic Release Inventory (USEPA 2015a). Criteria air pollutants and hazardous air pollutants are from the 2011 National Emissions Inventory (USEPA 2015b). All estimates are normalized by industry based on sector output in the data year, then converted to 2013 USD using relative sector-specific CPIs (if data year is not 2013). Energy use represent raw renewables or fossil fuel energies and is based on EIA data for 2014. See Table 1 in Yang, Ingwersen et al. 2017 and Supporting Information 1, and the v1.1 data update notes (Ingwersen et al. 2017) for all details on environmental data sources used.Land occupation associated with manufacturing buildings was estimated based on the building floorspace data provided by the U.S. Energy Information Administration in the 2010 Manufacturing Energy Consumption Survey (EIA 2013). Portions of total renewable energy (EIA 2016) based on EIA-923 reports for 2014 (EIA 2017) are included. Nitrogen and Phosphorus releases are modeled in total N and total P equivalents as estimated by the Discharge Monitoring Report Nutrient Loading tool (USEPA 2016b). Self-supplied withdrawals were assigned to industrial sectors based on water use statistics for Canadian industries by NAICS 3-digit sector scaled to US production levels based on gross domestic product by industry (BEA 2015; Statistics Canada 2010), and further disaggregated to the manufacturing sectors based on compensation of employees as provided by the 2007 IO tables (BEA 2015). Water withdrawals associated with public supply were allocated to sectors based on their use of water, sewage, and other services in USD based on the IO tables (BEA 2015). Portions of total renewable energy (EIA 2016) by type are assigned to sectors (hydro, wind, solar, or) based on EIA-923 reports for 2014 (EIA 2017).

## Data collection
2015-2016

## Sampling procedure
US federal government sources, including surveys and US EPA emissions databases are used as the primary sources. From these sources, data for US reporting establishments/facilities are aggregated by the NAICS sector as defined in the BEA detailed 2007 input-output tables. When level of sector aggregation differs, or when direct emissions are not reported but modeled, additional sources are used to make allocations and estimates.

## Review details
In regard to quality assurance and peer-review, each dataset created went through Quality Assurance as defined in a quality assurance project plans at US EPA, CSRA or ERG. The model was assembled with the IO model builder model (USEPA 2016c). Validation functions were used to check that all the model components were properly assembled and harmonized. Bayou Demeke and Santosh Ghimire provided internal peer review of the model methodology and the manuscript underwent standard EPA management review. An editor and two anonymous reviewers at the Journal of Cleaner Production reviewed the model. In regard to data quality evaluation, data quality assessment was performed at the flow and process levels according to the updated US EPA data quality assessment guidelines as defined in US EPA (2016b).

## Intended application
The primary application is for use in the US Environmentally-Extended Input-Ouput model, USEEIO, version 1.1. This model is being used by the US EPA for supporting tools that prioritize goods and services based on potential environmental impacts, resource use or emissions for large regions, including the US and US states, and as a strealined tool for organizations as a starting point to consider sustainable materials management. Model results are designed to provide meso/macro-level decision support.

## Project
USEEIO v1.1 was developed by the US EPA with CSRA and ERG with Wesley W. Ingwersen and David E. Meyer as research leads. Yi Yang was the technical lead on the work for CSRA (contract EP-C-15-012); Troy Hawkins was lead for ERG (contract EP-C-12-021).

## Sources
- Ingwersen et al. 2017
- Lovelace 2009
- Macknick et al. 2011
- EIA 2015
- USEPA 2016c
- USDA 2006
- Kim et el. 2013
- BEA 2015
- EIA 2016
- Ingwersen et al. DRAFT
- USDA 2009a
- USDA 2016
- BLM 2008
- USGS 2016
- USEPA 2016a
- Nickerson et al. 2011
- USEPA 2016b
- Maupin et al. 2014
- Statistics Canada 2010
- Goebes et al. 2003
- USEPA 2015a
- USGS 2015
- EIA 2017
- Blackhurst et al. 2010
- USDA 2009b
- USDA 2014
- Torcellini et al. 2003
- Edelen and Ingwersen 2017
- USEPA 2015b
- Yienger et al. 1995
- EIA 2013
