# Insurance carriers

Dataset: openLCA process, unit process
Category: 5241: Insurance Carriers
Geography: United States
Time period: 2017-01-01 to 2017-12-31
Data quality: US EPA - Process Pedigree Matrix (1;1)
Exchange data quality scheme: US EPA - Flow Pedigree Matrix
Generated by: US EPA with CSRA and ERG
Owner: US EPA
Published in: Yang, Ingwersen et al. 2017
restrictionsDescription: This model shold be appropriately cited (see Yang, Ingwersen et al. 2017 source or Publication field) when used. Any changes or derivations of this model by the user should be documented. The model itself and any results from use of this model shall not be construed to consitute US EPA opinion or policy.
copyright: false

## General comment
BEA Code & Name is '524100:Insurance carriers'. Description of the primary industry producing this good or service, adapted from the Census Bureau NAICS 2007 descriptions: This industry group comprises establishments primarily engaged in underwriting (assuming the risk, assigning premiums, and so forth) annuities and insurance policies and investing premiums to build up a portfolio of financial assets to be used against future claims. Direct insurance carriers are establishments that are primarily engaged in initially underwriting and assuming the risk of annuities and insurance policies. Reinsurance carriers are establishments that are primarily engaged in assuming all or part of the risk associated with an existing insurance policy (or set of policies) originally underwritten by another insurance carrier. Industries are defined in terms of the type of risk being insured against, such as death, loss of employment because of age or disability, and/or property damage. Contributions and premiums are set on the basis of actuarial calculations of probable payouts based on risk factors from experience tables and expected investment returns on reserves.

## Technology
The process describes the average US production of this good or service within this NAICS-based grouping defined in the BEA 2007 detailed input-output tables (BEA 2015). Distribution, wholesale and retailing of this good or service, use, and final disposal are not included. Creation of a product system with this process will enable modeling of all upstream (supply-chain) activities.

## Geography
Data represent the 50 US states

## Time period
2017 was the year in which this version of USEEIO was released and is the target date for the model

## Reference product
- Insurance carriers: 1 USD

## Inputs from technosphere
All rows: data quality (1,3,1,1,1)
- Air purification and ventilation equipment; at manufacturer: -3.7828e-7 USD
- Fluid meters and counting devices; at manufacturer: 1.88515e-6 USD
- Management consulting: 0.000218678 USD
- Metal hinges, keys, lock, and other hardware; at manufacturer: 2.45185e-5 USD
- Other basic organic chemicals; at manufacturer: 5.64033e-6 USD
- Wireless communications; at manufacturer: 7.54062e-6 USD
- Veneer, plywood, and engineered wood; at manufacturer: 9.88794e-8 USD
- Telecommunications: 0.00213138 USD
- Books; at publisher: 3.07859e-8 USD
- Cardboard containers; at manufacturer: 2.20083e-6 USD
- Books, newspapers, magazines, and other print media; at manufacturer: 0.00658568 USD
- External hard drives, CDs, other storage media; at manufacturer: 1.14793e-7 USD
- Promoters and agents: 0.000141389 USD
- Machine shops; at manufacturer: 5.73964e-9 USD
- Motor vehicle steering, suspension components (except spring), and brake systems; at manufacturer: 1.90237e-6 USD
- Metal pipe fittings, ball and roller bearings, industrial patterns, metal bath fixtures, other misc. fabricated metals; at manufacturer: 9.75739e-8 USD
- Railroad rolling stock; at manufacturer: -1.51312e-8 USD
- Ice cream and frozen desserts; at manufacturer: -1.2105e-7 USD
- Food and beverage stores: 1.43491e-8 USD
- Printing support; at manufacturer: 5.65546e-6 USD
- Sound recording: -1.08945e-6 USD
- Full-service restaurants: 0.00172835 USD
- Other real estate: 0.00651585 USD
- Wholesale trade: 0.000646493 USD
- Rail transport: 0.000111243 USD
- Office supplies (not paper); at manufacturer: 5.45266e-8 USD
- Clothing; at manufacturer: -1.81575e-7 USD
- Transmission and power train parts; at manufacturer: 5.56781e-6 USD
- Electricity; at consumer: 0.000269705 USD
- Other plastic products; at manufacturer: 3.37901e-5 USD
- Computer systems design: 0.000894757 USD
- Telephones; at manufacturer: 1.49231e-7 USD
- Noncomparable imports: 0.00286137 USD
- Office machinery; at manufacturer: 0.000130076 USD
- Flavored drink concentrates; at manufacturer: -4.53936e-8 USD
- Paper bags and coated paper; at manufacturer: 5.90514e-6 USD
- Household goods repair: 4.28193e-5 USD
- Paints and coatings; at manufacturer: 9.43151e-6 USD
- Stationery; at manufacturer: 7.17455e-8 USD
- Cardboard; at manufacturer: 2.29887e-5 USD
- Distilleries and spirits; at manufacturer: -1.51312e-8 USD
- Seasonings and dressings; at manufacturer: -1.2105e-7 USD
- Independent artists, writers, and performers: 0.000109631 USD
- Plastic bags, films, and sheets; at manufacturer: 1.88515e-6 USD
- Soap and cleaning compounds; at manufacturer: 1.88802e-6 USD
- Performances: 2.47021e-5 USD
- Monetary authorities and depository credit intermediation: 0.0136678 USD
- Scenic and sightseeing transportation and support activities for transportation: 6.66376e-5 USD
- Legal services: 0.0160921 USD
- General merchandise stores: 5.73964e-8 USD
- Business support: 3.22456e-5 USD
- Fruit and vegetable preservation; at manufacturer: -4.38805e-7 USD
- Wireless telecommunications: 9.9393e-5 USD
- Employment services: 0.00150045 USD
- Soft drinks, bottled water, and ice; at manufacturer: -6.05249e-8 USD
- Air transport: 0.00012055 USD
- Other support services: 0.000182771 USD
- Securities and commodities brokerage and exchanges: 0.00554214 USD
- Insurance agencies and brokerages: 0.215316 USD
- Coffee and tea; at manufacturer: -6.05249e-8 USD
- Golf courses, marinas, ski resorts, fitness and other rec centers and industries: 5.2194e-5 USD
- Satellite, telecommunications resellers, and all other telecommunications: 0.000152585 USD
- Data processing and hosting: 0.000599428 USD
- Lessors of nonfinancial intangible assets: 0.00114397 USD
- Other petroleum and coal products; at manufacturer: 1.32276e-5 USD
- Directory, mailing list, and other publishers; at publisher: 0.000124846 USD
- Frozen food; at manufacturer: -3.02624e-7 USD
- Other retail: 3.69425e-7 USD
- Sugar, candy, and chocolate; at manufacturer: -1.51312e-8 USD
- Warehousing: 3.77031e-6 USD
- Hotels and campgrounds: 0.000270137 USD
- Dry-cleaning and laundry: 1.43491e-8 USD
- Limited-service restaurants: 0.00168678 USD
- Nondepository credit intermediation and related activities: 0.00398286 USD
- Flours and malts; at manufacturer: -1.96706e-7 USD
- Bread and other baked goods; at manufacturer: -1.05919e-7 USD
- Investment advice, portfolio management, and other financial advising services: 0.00247636 USD
- Pet care, photofinishing, parking and other sundry services: 1.72046e-5 USD
- Coal; at mine: 1.72189e-8 USD
- Cutlery and handtools; at manufacturer: -8.79175e-8 USD
- Waste management and remediation: 0.000895477 USD
- Commercial machinery repair: 0.000158785 USD
- Fresh vegetables, melons, and potatoes; at farm: -1.51312e-8 USD
- Architectural, engineering, and related services: 0.000320836 USD
- Computer terminals and other computer peripheral equipment; at manufacturer: 1.40908e-6 USD
- Civic, social, professional, and similar organizations: 0.00159532 USD
- Other textiles; at manufacturer: 3.01473e-5 USD
- Storage batteries; at manufacturer: 1.14228e-5 USD
- All other food and drinking places: 3.08622e-5 USD
- Pipeline transport: 1.43491e-8 USD
- Other computer related services, including facilities management: 0.00101267 USD
- Electronic capacitors, resistors, coils, transformers, connectors and other components (except semiconductors and printed circuit assemblies); at manufacturer: 7.17455e-8 USD
- Vehicle rental and leasing: 5.7709e-5 USD
- Chemicals (except basic chemicals, agrichemicals, polymers, paints, pharmaceuticals,soaps, cleaning compounds); at manufacturer: 7.79603e-6 USD
- Audio and video equipment; at manufacturer: 5.73964e-9 USD
- Specialized design: 0.000554302 USD
- Drinking water and wastewater treatment; at consumer: 2.29944e-5 USD
- Packaged poultry; at manufacturer: -1.51312e-7 USD
- Accounting, tax preparation, bookkeeping, and payroll: 0.00932955 USD
- Electronic equipment repair and maintenance: 4.45128e-5 USD
- State and local government enterprises: 3.59155e-5 USD
- Truck transport: 0.000267554 USD
- Facilities support: 0.00123785 USD
- Light fixtures; at manufacturer: 8.60946e-9 USD
- Sports: 2.31275e-5 USD
- Natural gas; at consumer: 4.43773e-5 USD
- Federal government enterprises: 5.33786e-7 USD
- Welding and Soldering Equipment, Scales and Balances, and other general purpose machinery; at manufacturer: 5.73964e-9 USD
- Ball and roller bearings; at manufacturer: -7.56561e-8 USD
- Investigation and security: 0.000289322 USD
- Cheese; at manufacturer: -2.72362e-7 USD
- Photographers: 1.88515e-6 USD
- Sporting and athletic goods; at manufacturer: 2.86982e-9 USD
- Advertising and public relations: 0.0135329 USD
- Commercial equipment rental: 0.00093637 USD
- Water transport (boats, ships, ferries): 1.86063e-6 USD
- Company and enterprise management: 0.00407985 USD
- Vehicle engines and engine parts; at manufacturer: 1.90811e-6 USD
- Communication and energy wire and cable; at manufacturer: 7.54062e-6 USD
- Jewelry and silverware; at manufacturer: 2.58284e-8 USD
- Passenger ground transport: 0.000472096 USD
- Consumer goods and general rental centers: 0.000567483 USD
- Scientific research and development: 1.46361e-7 USD
- Vehicles and parts sales: 7.58079e-6 USD
- Glass and glass products; at manufacturer: 1.94829e-6 USD
- Air conditioning, refrigeration, and warm air heating equipment; at manufacturer: 5.73964e-9 USD
- Travel arrangement and reservation: 0.00830038 USD
- Wild-caught fish and game; at place of capture: -6.05249e-8 USD
- Adhesives; at manufacturer: 5.73964e-9 USD
- Rubber tires; at manufacturer: 4.33901e-5 USD
- Environmental and other technical consulting services: 4.9014e-5 USD
- Breweries and beer; at manufacturer: -2.42099e-7 USD
- Movies and film: 3.73077e-8 USD
- Radio and television: -1.51312e-8 USD
- Insurance carriers: 0.0926284 USD
- Unrefined oil and gas; at extraction site: -6.2038e-7 USD
- Marketing research and all other miscellaneous professional, scientific, and technical services: 0.000271509 USD
- Packaged meat (except poultry); at manufacturer: -6.96036e-7 USD
- Dry, condensed, and evaporated dairy; at manufacturer: -1.51312e-8 USD
- Seafood; at manufacturer: -9.07873e-8 USD
- Couriers and messengers: 1.22261e-5 USD
- Snack foods; at manufacturer: -1.51312e-8 USD
- Signs; at manufacturer: 8.89644e-8 USD
- Computer storage device readers; at manufacturer: 7.74851e-8 USD
- Vehicle electrical and electronic equipment; at manufacturer: 1.13281e-5 USD
- Buildings and dwellings services: 0.0012218 USD
- Gasoline, fuels, and by-products of petroleum refining; at manufacturer: 3.44437e-5 USD
- Vehicle repair: 8.35673e-5 USD
- Magazines and journals; at publisher: 0.000104062 USD
- Fluid milk and butter; at manufacturer: -6.05249e-8 USD
- Office furniture and custom architectural woodwork and millwork; at manufacturer: -2.87493e-7 USD
- Other educational services: 2.86982e-8 USD
- All other foods; at manufacturer: -3.02624e-8 USD
- Internet publishing and broadcasting: 0.000469636 USD
- Other vehicle parts; at manufacturer: 5.71286e-6 USD
- Other engine equipment; at manufacturer: 2.86982e-9 USD
- Petrochemicals; at manufacturer: 2.86982e-9 USD
- Office administration: 5.65546e-5 USD
- Gaskets, seals, musical instruments, fasteners, brooms, brushes, mop and other misc. goods; at manufacturer: 6.02662e-8 USD
- News syndicates, libraries, archives, Internet publishing and all other information services: 7.56984e-6 USD
- Funds, trusts, and financial vehicles: 0.00617953 USD
- Nonresidential building repair and maintanence: 0.00013802 USD
- Lids, jars, bottle caps, other metal closures and crowns; at manufacturer: -3.02624e-8 USD
- Software: 7.1874e-5 USD
- Postal service: 9.68724e-6 USD
- Cookies, crackers, pastas, and tortillas; at manufacturer: -4.53936e-8 USD
- Paper; at manufacturer: 4.21863e-7 USD

## Inputs from nature
- Water, fresh: 8.20634e-6, 1.42019e-5 m3 (2 entries, compartments not in this file); data quality (1,2,1,4,2)
- Occupation, urban, discontinuously built: 0.000155093 m2*a; data quality (4,2,1,1,1)

## Emissions to nature
- nickel: 9.82425e-13 kg; data quality (3,2,1,1,5)
- Propoxur: -3.81527e-18 kg; data quality (5,2,1,1,5)
- 1-Methyl-2-pyrrolidinone: -1.51775e-14, -2.01916e-13 kg (2 entries, compartments not in this file); data quality (5,1,1,1,5)
- ammonia: -4.98016e-14 kg; data quality (3,1,1,1,5)
- toluene: 1.39305e-9 kg; data quality (3,2,1,4,2)
- 3,3'-dimethylbenzidine: -4.54473e-18 kg; data quality (1,2,1,1,5)
- bis(2-chloroethyl)ether: -5.11246e-21 kg; data quality (3,2,1,1,5)
- hydrogen sulfide: -1.83247e-14 kg; data quality (3,2,1,1,5)
- Phosphorus: -3.97271e-9, -1.93382e-14 kg (2 entries, compartments not in this file); data quality (4,1,1,1,5)
- Indeno(1,2,3-cd)pyrene: 3.13712e-14 kg; data quality (3,2,1,4,1)
- Ethane, 1,1,1,2-tetrafluoro-, HFC-134a: 4.68296e-12 kg; data quality (4,2,1,4,1)
- 2-NITROPROPANE: -9.76675e-17 kg; data quality (5,1,1,1,5)
- Ethane, 1,1,1-trifluoro-, HFC-143a: 5.31594e-13 kg; data quality (4,2,1,4,1)
- Chromium VI: 4.36802e-14 kg; data quality (3,2,1,3,3)
- o-Xylene: 1.53384e-11 kg; data quality (3,2,1,4,1)
- phenol: -2.34402e-16 kg; data quality (3,1,1,1,5)
- isophorone: -1.31383e-14 kg; data quality (2,2,1,1,5)
- ALLYL CHLORIDE: -2.96923e-20 kg; data quality (3,2,1,1,5)
- dimethyl formamide: -9.34133e-14 kg; data quality (4,2,1,1,5)
- Triethyl amine: -8.09178e-16 kg; data quality (4,2,1,1,5)
- copper: -8.46238e-11, -3.98205e-14, -3.92887e-13 kg (3 entries, compartments not in this file); data quality (4,1,1,1,5)
- ethyl acrylate: -4.39638e-14 kg; data quality (4,2,1,1,5)
- Dibenz(a,h)anthracene: 2.92001e-15 kg; data quality (2,2,1,1,5)
- Ethylene glycol: -6.59275e-13 kg; data quality (5,1,1,1,5)
- propylene oxide: -1.408e-15 kg; data quality (3,2,1,1,5)
- 2-METHOXYETHANOL: -8.86477e-18 kg; data quality (4,2,1,1,5)
- butanol: -1.57499e-12 kg; data quality (5,1,1,1,5)
- ammonia: 3.73402e-10 kg; data quality (3,2,1,2,4)
- para-xylene: 7.91124e-13 kg; data quality (3,2,1,4,1)
- nickel: -8.32127e-18, -4.43977e-13 kg (2 entries, compartments not in this file); data quality (4,1,1,1,5)
- pentachlorophenol: -2.37861e-20 kg; data quality (3,2,1,1,5)
- Sulfuric acid: -2.95981e-12 kg; data quality (2,1,1,1,5)
- particulates, < 2.5 um: 3.47594e-8 kg; data quality (3,2,1,1,5)
- 2,4,5-trichlorophenol: -3.81527e-18 kg; data quality (2,2,1,1,5)
- NITROGLYCERIN: -1.13013e-12, -7.22803e-13, -2.7484e-12 kg (3 entries, compartments not in this file); data quality (5,1,1,1,5)
- trichloroethylene: -4.7685e-13 kg; data quality (4,2,1,1,5)
- propanal: 4.53497e-11 kg; data quality (3,2,1,4,1)
- manganese: -3.8191e-15, -2.36863e-13 kg (2 entries, compartments not in this file); data quality (4,1,1,1,5)
- methane, monochloro-, r-40: -6.4058e-15 kg; data quality (3,2,1,1,5)
- m-xylene: 4.27736e-11 kg; data quality (3,2,1,4,1)
- Nitrobenzene: -3.95498e-17 kg; data quality (4,2,1,1,5)
- Ethane, pentafluoro-, HFC-125: 1.24245e-12 kg; data quality (4,2,1,4,1)
- naphthalene: 2.82616e-11 kg; data quality (3,2,1,4,1)
- methanol: -5.43605e-14 kg; data quality (4,2,1,1,5)
- 1,4-dichlorobenzene: -8.4893e-15 kg; data quality (2,2,1,1,5)
- Diethylene glycol butyl ether: -7.6029e-14 kg; data quality (4,2,1,1,5)
- VOC, volatile organic compounds: 3.88745e-8 kg; data quality (3,2,1,1,3)
- Naphthalene: -2.30997e-14 kg; data quality (4,1,1,1,5)
- 2-chloro-1-phenylethanone: -5.41534e-17 kg; data quality (2,2,1,1,5)
- hexachloroethane: -1.90763e-17 kg; data quality (4,2,1,1,5)
- Propene, 1,3-dichloro-: -1.54651e-15 kg; data quality (3,2,1,1,5)
- phenanthrene: 1.29572e-12 kg; data quality (3,2,1,3,2)
- ethene, tetrachloro-: -4.44294e-13 kg; data quality (3,2,1,1,5)
- ethylene glycol: -6.34839e-15 kg; data quality (5,1,1,1,5)
- cyclohexane: -1.95335e-17 kg; data quality (4,1,1,1,5)
- Dinitrogen monoxide: 4.73496e-10 kg; data quality (4,2,1,4,1)
- antimony: 1.034e-14 kg; data quality (3,2,1,1,5)
- epichlorohydrin: -7.25805e-16 kg; data quality (3,2,1,1,5)
- lead: -4.9329e-13 kg; data quality (3,2,1,1,5)
- pyrene: 4.51219e-13 kg; data quality (3,2,1,4,1)
- 1,2,4-trimethylbenzene: -1.48845e-14 kg; data quality (5,1,1,1,5)
- lead: -3.40864e-11, -2.75402e-15 kg (2 entries, compartments not in this file); data quality (3,1,1,1,5)
- particulates, < 10 um: 1.77462e-9 kg; data quality (3,2,1,1,5)
- benzene: -1.11341e-17 kg; data quality (3,1,1,1,5)
- Toluene, 2,4-dinitro-: -3.9067e-17 kg; data quality (5,1,1,1,5)
- benzidine: -7.63053e-16 kg; data quality (2,2,1,1,5)
- chlorine: -8.00184e-13 kg; data quality (4,2,1,1,5)
- Benzo(b)fluoranthene: 3.74047e-14 kg; data quality (3,2,1,4,1)
- 1,4-dioxane: -3.18355e-16 kg; data quality (4,2,1,1,5)
- 2,2,4-trimethylpentane: 4.53687e-10 kg; data quality (3,2,1,4,1)
- benzene, ethyl-: 3.18351e-10 kg; data quality (3,2,1,4,1)
- fluorene: 8.24557e-13 kg; data quality (3,2,1,3,2)
- t-butyl methyl ether: -5.71172e-13 kg; data quality (3,2,1,1,5)
- hexane: 7.64124e-10 kg; data quality (3,2,1,2,4)
- acetonitrile: -5.0425e-15 kg; data quality (3,2,1,1,5)
- benzene: 8.41201e-10 kg; data quality (3,2,1,4,1)
- phenol: -8.82853e-13 kg; data quality (4,2,1,1,5)
- 2-methylnaphthalene: 8.1517e-15 kg; data quality (2,2,1,1,5)
- hexachlorobenzene: -9.3153e-16 kg; data quality (3,2,1,1,5)
- Cresol: -2.6282e-15 kg; data quality (4,2,1,1,5)
- hydroquinone: -5.93716e-15 kg; data quality (3,2,1,1,5)
- Propane, 1,1,1,3,3,3-hexafluoro-, HCFC-236fa: 1.43611e-14 kg; data quality (4,2,1,4,1)
- mercury: 2.72726e-14 kg; data quality (2,2,1,1,5)
- acrylic acid: -1.58727e-17 kg; data quality (4,2,1,1,5)
- PYRENE, 1-NITRO-: -2.74404e-19 kg; data quality (2,2,1,1,5)
- Cobalt: -2.85282e-15 kg; data quality (3,2,1,1,5)
- 1,2,4-trichlorobenzene: -2.589e-16 kg; data quality (4,2,1,1,5)
- 2-Acetylaminofluorene: -3.81527e-16 kg; data quality (5,2,1,1,5)
- 2-(2-BUTOXYETHOXY) ETHYL ACETATE: -8.41661e-15 kg; data quality (5,2,1,1,5)
- ethylene glycol: -5.77164e-13 kg; data quality (5,2,1,1,5)
- acetophenone: -1.1776e-16 kg; data quality (4,2,1,1,5)
- 7-OXABICYCLO[2,2,1]HEPTANE-2,3-DICARBOXYLIC ACID, DIPOTASSIUM SALT: -3.12829e-13 kg; data quality (5,1,1,1,5)
- CHLORONAPHTHALENE: -2.3683e-22 kg; data quality (1,2,1,1,5)
- bromoform: -3.04674e-16 kg; data quality (3,2,1,1,5)
- NITRIC ACID: -1.45173e-14 kg; data quality (3,1,1,1,5)
- diethanolamine: -8.73711e-15 kg; data quality (3,2,1,1,5)
- arsenic: 1.74523e-13 kg; data quality (3,2,1,2,4)
- acetamide: -3.81527e-18 kg; data quality (5,2,1,1,5)
- benz[a]anthracene: 4.255e-14 kg; data quality (3,2,1,3,1)
- Hydrazine: -7.7221e-16 kg; data quality (4,2,1,1,5)
- 1-METHYLNAPTHALENE: -5.83503e-18 kg; data quality (2,2,1,1,5)
- chlorine: -2.81282e-15 kg; data quality (2,1,1,1,5)
- o-cresol: -2.79091e-18 kg; data quality (4,2,1,1,5)
- nitric acid: -5.57133e-12, -1.95335e-17 kg (2 entries, compartments not in this file); data quality (3,1,1,1,5)
- benzo(a)pyrene: 3.47288e-14 kg; data quality (3,2,1,4,1)
- Nitrogen: -1.19456e-8 kg; data quality (3,2,1,1,5)
- polychlorinated biphenyls: -4.19857e-21 kg; data quality (3,2,1,1,5)
- 3-methylcholanthrene: 8.84606e-17 kg; data quality (2,2,1,1,5)
- Benzo(a)anthracene: 7.86397e-16 kg; data quality (2,2,1,1,5)
- aniline: -5.03615e-19 kg; data quality (4,2,1,1,5)
- p-phenylenediamine: -3.81527e-16 kg; data quality (5,2,1,1,5)
- anthracene: 2.59846e-13 kg; data quality (3,2,1,4,1)
- acenaphthene: 3.22417e-13 kg; data quality (3,2,1,4,1)
- barium: -4.89646e-17 kg; data quality (4,1,1,1,5)
- Xylene: -7.2274e-17 kg; data quality (4,1,1,1,5)
- 2,4-D: -2.36804e-14 kg; data quality (3,2,1,1,5)
- Carbon dioxide: 0.000221697 kg; data quality (4,2,1,4,1)
- vinyl acetate: -9.27294e-16 kg; data quality (4,2,1,1,5)
- Phthalate, dibutyl-: -6.70702e-13 kg; data quality (4,1,1,1,5)
- butadiene: 1.31806e-10 kg; data quality (3,2,1,4,1)
- benzene, chloro-: -3.17824e-15 kg; data quality (4,2,1,1,5)
- ethane, 1,2-dichloro-: -3.84692e-14 kg; data quality (3,2,1,1,5)
- 1,1,1-trichloroethane: 3.14439e-13 kg; data quality (4,2,1,1,5)
- selenium: 3.3935e-14 kg; data quality (2,2,1,1,5)
- 1,2-BUTYLENE OXIDE: -2.24986e-15 kg; data quality (4,2,1,1,5)
- hydrogen chloride: 8.8479e-11 kg; data quality (2,2,1,1,5)
- dibenzofuran: -5.35809e-16 kg; data quality (4,2,1,1,5)
- Benzo(k)fluoranthene: 3.66658e-14 kg; data quality (3,2,1,4,1)
- Ethene, chloro-: -8.21076e-14 kg; data quality (3,2,1,1,5)
- Dinitrotoluene, technical grade (2,4 (77%)- and 2,6 (19%)-): -1.95335e-17, -1.82894e-12 kg (2 entries, compartments not in this file); data quality (5,1,1,1,5)
- Methane, difluoro-, HFC-32: 7.23546e-13 kg; data quality (4,2,1,4,1)
- nitrogen oxides: 1.31433e-7 kg; data quality (2,2,1,1,4)
- Dimethylcarbamyl chloride: -2.96923e-20 kg; data quality (5,2,1,1,5)
- ethylene oxide: -2.85382e-16 kg; data quality (3,2,1,1,5)
- Hydrazine, methyl-: -1.19566e-15 kg; data quality (2,2,1,1,5)
- 2-ethoxyethyl acetate: -7.46893e-15 kg; data quality (5,2,1,1,5)
- Propene: -9.76675e-16 kg; data quality (3,1,1,1,5)
- BUTYL ISOCYANATE: -1.88539e-14 kg; data quality (4,2,1,1,5)
- monochloroethane: -2.2726e-14 kg; data quality (3,2,1,1,5)
- benzyl chloride: -5.41531e-15 kg; data quality (2,2,1,1,5)
- Benzo(g,h,i)perylene: 9.70528e-14 kg; data quality (3,2,1,4,1)
- Propane sultone: -3.81527e-18 kg; data quality (5,2,1,1,5)
- acrolein: 1.87816e-11 kg; data quality (3,2,1,4,2)
- 2-nitropropane: -9.01547e-22 kg; data quality (5,2,1,1,5)
- formic acid: -6.77812e-15 kg; data quality (3,1,1,1,5)
- methylene diphenyl diisocyanate: -1.22889e-13 kg; data quality (4,2,1,1,5)
- toluene-2,4-diisocyante: -2.07088e-16 kg; data quality (3,2,1,1,5)
- cyanide: -1.82737e-13 kg; data quality (2,2,1,1,5)
- acenaphthylene: 1.24684e-12 kg; data quality (3,2,1,4,1)
- carbon disulfide: -4.19896e-15 kg; data quality (4,2,1,1,5)
- Phthalate, dimethyl-: -1.26507e-15 kg; data quality (4,2,1,1,5)
- methyl isobutyl ketone: -1.05787e-12 kg; data quality (4,2,1,1,5)
- ETHYLENETHIOUREA: -6.10443e-18 kg; data quality (5,2,1,1,5)
- NITROUS ACID: -1.95335e-17 kg; data quality (5,1,1,1,5)
- Aluminum: -5.17638e-15 kg; data quality (4,1,1,1,5)
- chromium: -3.05207e-16, -2.5083e-15, -2.95249e-13 kg (3 entries, compartments not in this file); data quality (4,1,1,1,5)
- styrene: 1.49906e-9 kg; data quality (4,2,1,1,5)
- ethane, 1,1,2-trichloro-: 2.88636e-16 kg; data quality (4,2,1,1,5)
- fluoranthene: 3.91064e-13 kg; data quality (3,2,1,3,2)
- Triethylene glycol: -2.74318e-18 kg; data quality (5,2,1,1,5)
- carbon monoxide: 5.34603e-7 kg; data quality (3,2,1,1,1)
- Hydrocarbons, aromatic: 8.90628e-12 kg; data quality (3,2,1,4,1)
- carbonyl sulfide: -1.52896e-15 kg; data quality (4,2,1,1,5)
- cumene: -3.33568e-14 kg; data quality (4,2,1,1,5)
- cadmium: 4.95435e-13 kg; data quality (3,2,1,1,5)
- beryllium: 9.17097e-15 kg; data quality (2,2,1,1,5)
- 1,1-DICHLOROETHYLENE: -1.10774e-15 kg; data quality (3,2,1,1,5)
- acrylonitrile: -2.09428e-14 kg; data quality (4,2,1,1,5)
- manganese: 3.21066e-12 kg; data quality (3,2,1,1,5)
- Chrysene, 5-methyl-: -1.39213e-19 kg; data quality (2,2,1,1,5)
- ethylbenzene: -1.37008e-13 kg; data quality (4,1,1,1,5)
- formaldehyde: 4.7357e-10 kg; data quality (3,2,1,4,1)
- Phthalate, dibutyl-: -3.97233e-15 kg; data quality (4,2,1,1,5)
- sulfur dioxide: 1.11324e-8 kg; data quality (2,2,1,1,5)
- Chrysene: 3.60301e-14 kg; data quality (3,2,1,4,1)
- 1,4-BENZOQUINONE: -8.55058e-20 kg; data quality (3,2,1,1,5)
- Propane, 1,2-dichloro-: -7.9874e-16 kg; data quality (4,2,1,1,5)
- 1,1,2,2-tetrachloroethane: -7.49349e-15 kg; data quality (3,2,1,1,5)
- Ethylene glycol monoethyl ether: -2.85069e-15 kg; data quality (4,2,1,1,5)
- methane, dichloro-, hcc-30: -4.35568e-12 kg; data quality (4,2,1,1,5)
- Dimethyl sulfate: -5.93972e-16 kg; data quality (2,2,1,1,5)
- Chromium, ion: 5.76256e-13 kg; data quality (2,2,1,1,5)
- methyl methacrylate: -4.95129e-16 kg; data quality (4,2,1,1,5)
- Xylene: 1.03858e-9 kg; data quality (3,2,1,4,1)
- hexachloro-1,3-butadiene: -3.41628e-16 kg; data quality (4,2,1,1,5)
- 2,4-dinitrophenol: -3.09513e-18 kg; data quality (5,2,1,1,5)
- toluene, 2,4-dinitro-: -3.12762e-18 kg; data quality (5,2,1,1,5)
- carbon tetrachloride: -2.29976e-14 kg; data quality (4,2,1,1,5)
- hydrogen fluoride: -5.46235e-13 kg; data quality (2,2,1,1,5)
- chloroform: -8.30563e-14 kg; data quality (4,2,1,1,5)
- PHOSPHORUS: 1.69083e-13 kg; data quality (2,2,1,1,5)
- Urethane: -2.23105e-18 kg; data quality (5,2,1,1,5)
- Hexachlorocyclopentadiene: -7.51251e-17 kg; data quality (3,2,1,1,5)
- phthalate, dioctyl-: -1.0838e-14 kg; data quality (3,2,1,1,5)
- Asbestos: -4.72336e-17 kg; data quality (5,2,1,1,5)
- Methane: 2.00176e-8 kg; data quality (4,2,1,4,1)
- 4-nitrophenol: -2.68261e-18 kg; data quality (2,2,1,1,5)
- methane, bromo-, halon 1001: -3.16224e-14 kg; data quality (3,2,1,1,5)
- Water, fresh: 1.89734e-5 m3; data quality (1,2,1,4,2)
- biphenyl: -7.09951e-15 kg; data quality (4,2,1,1,5)
- ethane, 1,2-dibromo-: 5.37198e-16 kg; data quality (2,2,1,1,5)
- acetaldehyde: 2.13144e-10 kg; data quality (3,2,1,4,1)

## Inventory method
Input-output

## Modelling constants
The reference unit of all processes is 1 USD2013 of the good or service. The technosphere inputs are based on the US BEA detailed input-output tables for 2007. The IO tables are combined to develop a commodity-by-commodity model based on the the industry-technology assumption (see Suh et al., 2010), which assumes all commodities produced by a given industry have the same input structure, but that multiple industries can produce the same commodity. Thus, model technosphere flows represent commodity outputs (and not industry outputs) from other processes in the model. There are no by-products included in these processes. All commodity production is based on US-conditions, despite in reality that some goods and services are produced overseas, as USEEIO v1.1 is a single-region IO model.

## Completeness
The input-output approach assures that all purchased inputs associated with the sectors making these commodities as reported in the US census for 2007 are included. The direct resources extracted including minerals, energy sources, water and land occupied are included. Emissions to air include all critieria air pollutants, greenhouse gases, and hazardous and toxic air pollutants as defined by US EPA. Releases to water include toxics, total nitrogen and total phosphorus, and water discharges. Releases to soil or groundwater include toxics and agriculutural pesticides. Some metal releases to air, water and soil are not included because they could not be speciated. Solid hazardous and non-hazardous wastes generated are not included as an elementary flows although purchases of waste services are included.

## Data treatment
Greenhouse gases are primarily from the US Greenhouse Gas Emission Inventory (USEPA 2016a). Biogenic C uptake is not included (change from version 1.0), as biogenic C emission are not included. Toxic releases to air, water and soil (except pesticides) are from the 2013 Toxic Release Inventory (USEPA 2015a). Criteria air pollutants and hazardous air pollutants are from the 2011 National Emissions Inventory (USEPA 2015b). All estimates are normalized by industry based on sector output in the data year, then converted to 2013 USD using relative sector-specific CPIs (if data year is not 2013). Energy use represent raw renewables or fossil fuel energies and is based on EIA data for 2014. See Table 1 in Yang, Ingwersen et al. 2017 and Supporting Information 1, and the v1.1 data update notes (Ingwersen et al. 2017) for all details on environmental data sources used.Land occupation for commercial buildings was estimated based on the building floorspace data provided by the U.S. Energy Information Administration 2012 Commercial Building Energy Consumption Survey (CBECS) (EIA 2015). Total commercial public supply water use is reported by USGS (Maupin et al. 2014). Water use is allocated across commercial sectors based on their use of water, sewage, and other services in USD based on the 2007 Benchmark Use Table before redefinitions (BEA 2015).

## Data collection
2015-2016

## Sampling procedure
US federal government sources, including surveys and US EPA emissions databases are used as the primary sources. From these sources, data for US reporting establishments/facilities are aggregated by the NAICS sector as defined in the BEA detailed 2007 input-output tables. When level of sector aggregation differs, or when direct emissions are not reported but modeled, additional sources are used to make allocations and estimates.

## Review details
In regard to quality assurance and peer-review, each dataset created went through Quality Assurance as defined in a quality assurance project plans at US EPA, CSRA or ERG. The model was assembled with the IO model builder model (USEPA 2016c). Validation functions were used to check that all the model components were properly assembled and harmonized. Bayou Demeke and Santosh Ghimire provided internal peer review of the model methodology and the manuscript underwent standard EPA management review. An editor and two anonymous reviewers at the Journal of Cleaner Production reviewed the model. In regard to data quality evaluation, data quality assessment was performed at the flow and process levels according to the updated US EPA data quality assessment guidelines as defined in US EPA (2016b).

## Intended application
The primary application is for use in the US Environmentally-Extended Input-Ouput model, USEEIO, version 1.1. This model is being used by the US EPA for supporting tools that prioritize goods and services based on potential environmental impacts, resource use or emissions for large regions, including the US and US states, and as a strealined tool for organizations as a starting point to consider sustainable materials management. Model results are designed to provide meso/macro-level decision support.

## Project
USEEIO v1.1 was developed by the US EPA with CSRA and ERG with Wesley W. Ingwersen and David E. Meyer as research leads. Yi Yang was the technical lead on the work for CSRA (contract EP-C-15-012); Troy Hawkins was lead for ERG (contract EP-C-12-021).

## Sources
- Statistics Canada 2010
- USEPA 2016c
- Ingwersen et al. 2017
- USDA 2014
- Torcellini et al. 2003
- BEA 2015
- USEPA 2016b
- USDA 2006
- Blackhurst et al. 2010
- USDA 2009a
- USGS 2016
- Lovelace 2009
- Yienger et al. 1995
- USDA 2016
- USEPA 2015b
- USEPA 2016a
- Goebes et al. 2003
- Ingwersen et al. DRAFT
- USDA 2009b
- Nickerson et al. 2011
- USGS 2015
- Macknick et al. 2011
- Edelen and Ingwersen 2017
- Kim et el. 2013
- EIA 2017
- Maupin et al. 2014
- EIA 2016
- USEPA 2015a
- EIA 2013
- EIA 2015
- BLM 2008
