# Toiletries; at manufacturer

Dataset: openLCA process, unit process
Category: 3256: Soap, Cleaning Compound, and Toilet Preparation Manufacturing
Geography: United States
Time period: 2017-01-01 to 2017-12-31
Data quality: US EPA - Process Pedigree Matrix (1;1)
Exchange data quality scheme: US EPA - Flow Pedigree Matrix
Generated by: US EPA with CSRA and ERG
Owner: US EPA
Published in: Yang, Ingwersen et al. 2017
restrictionsDescription: This model shold be appropriately cited (see Yang, Ingwersen et al. 2017 source or Publication field) when used. Any changes or derivations of this model by the user should be documented. The model itself and any results from use of this model shall not be construed to consitute US EPA opinion or policy.
copyright: false

## General comment
BEA Code & Name is '325620:Toilet preparation manufacturing'. Description of the primary industry producing this good or service, adapted from the Census Bureau NAICS 2007 descriptions: This industry comprises establishments primarily engaged in preparing, blending, compounding, and packaging toilet preparations, such as perfumes, shaving preparations, hair preparations, face creams, lotions (including sunscreens), and other cosmetic preparations.

## Technology
The process describes the average US production of this good or service within this NAICS-based grouping defined in the BEA 2007 detailed input-output tables (BEA 2015). Distribution, wholesale and retailing of this good or service, use, and final disposal are not included. Creation of a product system with this process will enable modeling of all upstream (supply-chain) activities.

## Geography
Data represent the 50 US states

## Time period
2017 was the year in which this version of USEEIO was released and is the target date for the model

## Reference product
- Toiletries; at manufacturer: 1 USD

## Inputs from technosphere
All rows: data quality (1,3,1,1,1)
- Signal testing instruments; at manufacturer: 2.60241e-5 USD
- Sports: 2.717e-6 USD
- Full-service restaurants: 0.00010422 USD
- Fruit and vegetable preservation; at manufacturer: 2.52889e-5 USD
- Fabric; at manufacturer: 4.43129e-5 USD
- Performances: 1.62973e-6 USD
- Household goods repair: 0.000114201 USD
- Light fixtures; at manufacturer: 3.65584e-7 USD
- Wiring devices; at manufacturer: 5.33093e-5 USD
- Other retail: 0.00999026 USD
- Food and beverage stores: 0.00062128 USD
- Metal pipe fittings, ball and roller bearings, industrial patterns, metal bath fixtures, other misc. fabricated metals; at manufacturer: 0.000179848 USD
- Other primary nonferrous metals; at manufacturer: 5.19442e-7 USD
- Abrasive products; at manufacturer: 3.26592e-5 USD
- All other forging, stamping, and sintering; at manufacturer: 4.35459e-6 USD
- Special tools, dies, jigs, and fixtures; at manufacturer: 9.25218e-8 USD
- Air and gas compressors; at manufacturer: 1.0343e-6 USD
- Lids, jars, bottle caps, other metal closures and crowns; at manufacturer: 0.00574266 USD
- Rubber and plastic belts and hoses; at manufacturer: 0.00179497 USD
- Home furniture - Cabinets and non-wood, nonupholstered; at manufacturer: 1.08773e-5 USD
- Metal structural products; at manufacturer: 1.44529e-6 USD
- Newspapers; at publisher: 2.87305e-8 USD
- Other secondary nonferrous metal products; at manufacturer: 1.0135e-5 USD
- Vaccines and other biological medical products; at manufacturer: 0.00106391 USD
- Air conditioning, refrigeration, and warm air heating equipment; at manufacturer: 0.000713385 USD
- Glass and glass products; at manufacturer: 0.007355 USD
- Dimensional stone; at mine: 2.84431e-6 USD
- Paints and coatings; at manufacturer: 0.00256138 USD
- Motors and generators; at manufacturer: 5.2601e-5 USD
- Scenic and sightseeing transportation and support activities for transportation: 2.26807e-5 USD
- other miscellaneous electrical equipment and components; at manufacturer: 4.73744e-5 USD
- Air transport: 0.00102596 USD
- State and local government enterprises: 0.000376593 USD
- Poultry farms: 3.35711e-5 USD
- Books, newspapers, magazines, and other print media; at manufacturer: 0.000332625 USD
- Other textiles; at manufacturer: 2.58635e-5 USD
- Investment advice, portfolio management, and other financial advising services: 3.04459e-5 USD
- Relay and industrial controls; at manufacturer: 3.52974e-5 USD
- Sugar, candy, and chocolate; at manufacturer: 2.09724e-5 USD
- Heavy gauge metal tanks; at manufacturer: 0.00109565 USD
- Analytical laboratory instruments; at manufacturer: 0.000265048 USD
- Specialized design: 0.000724178 USD
- Sanitary paper (tissues, napkins, diapers, etc.); at manufacturer: 5.18011e-5 USD
- Fabricated pipe and pipe fittings; at manufacturer: 2.86818e-6 USD
- Investigation and security: 0.000213048 USD
- Specialty transformers; at manufacturer: 0.000104953 USD
- Screws, nuts, and bolts; at manufacturer: 0.00161554 USD
- Light bulbs; at manufacturer: 0.000130815 USD
- Independent artists, writers, and performers: 3.97567e-6 USD
- Primary iron, steel, and ferroalloy products; at manufacturer: 5.55274e-5 USD
- Seasonings and dressings; at manufacturer: 7.36329e-6 USD
- Satellite, telecommunications resellers, and all other telecommunications: 5.74273e-5 USD
- Ink and ink cartridges; at manufacturer: 1.78199e-6 USD
- Toiletries; at manufacturer: 0.0338681 USD
- Lessors of nonfinancial intangible assets: 0.000486009 USD
- Dry, condensed, and evaporated dairy; at manufacturer: 3.35849e-5 USD
- Ball and roller bearings; at manufacturer: 4.30187e-6 USD
- Electromedical appartuses; at manufacturer: 2.21178e-5 USD
- Power boilers and heat exchangers; at manufacturer: 0.00357236 USD
- Plastic bags, films, and sheets; at manufacturer: 0.000102637 USD
- Metal hinges, keys, lock, and other hardware; at manufacturer: 0.00240978 USD
- Rail transport: 0.0018106 USD
- Synthetic rubber and artificial and synthetic fibers; at manufacturer: 9.63186e-5 USD
- Unrefined oil and gas; at extraction site: 0.00030728 USD
- Pharmaceutical products (pills, powders, solutions, etc.); at manufacturer: 0.000386692 USD
- Sand, gravel, clay, phosphate, other nonmetallic minerals; at mine: 0.000688483 USD
- Hydraulic pumps, motors, cylinders and actuators; at manufacturer: 2.85892e-5 USD
- Iron, gold, silver, and other metal ores; at mine: 8.33183e-7 USD
- Metal coatings, engravings, and heat treatments; at manufacturer: 0.00677491 USD
- Plastic pipe, fittings, and sausage casings; at manufacturer: 0.00910319 USD
- Packaged meat (except poultry); at manufacturer: 0.00323473 USD
- Lime and gypsum products; at manufacturer: 1.72739e-5 USD
- Synthetic dyes and pigments; at manufacturer: 0.00172252 USD
- Drinking water and wastewater treatment; at consumer: 0.000348876 USD
- Light gauge metal cans, boxes, and containers; at manufacturer: 0.000714234 USD
- Electronic equipment repair and maintenance: 0.000247885 USD
- All other converted paper products; at manufacturer: 1.14044e-5 USD
- Office administration: 0.000101141 USD
- Plastics; at manufacturer: 0.00010603 USD
- Dairies: 3.13862e-5 USD
- Company and enterprise management: 0.105855 USD
- Other computer related services, including facilities management: 0.000137964 USD
- Animal farms and aquaculture ponds (except cattle and poultry): 2.07383e-5 USD
- Electronic capacitors, resistors, coils, transformers, connectors and other components (except semiconductors and printed circuit assemblies); at manufacturer: 0.000733233 USD
- Management consulting: 0.000689974 USD
- Plywood and veneer; at manufacturer: 1.14245e-5 USD
- Corn products; at manufacturer: 2.14501e-5 USD
- Wood pulp; at manufacturer: 0.000105669 USD
- Noncomparable imports: 0.00368357 USD
- Consumer goods and general rental centers: 5.3041e-5 USD
- Vegetable oils and by-products; at manufacturer: 0.00842081 USD
- Packaged poultry; at manufacturer: 5.08549e-6 USD
- Other petroleum and coal products; at manufacturer: 0.00063182 USD
- Copper, nickel, lead, and zinc; at mine: 9.13961e-7 USD
- Welding and Soldering Equipment, Scales and Balances, and other general purpose machinery; at manufacturer: 4.56247e-6 USD
- Nonferrous metal casts; at manufacturer: 6.14824e-6 USD
- Commercial equipment rental: 0.000245048 USD
- Cutlery and handtools; at manufacturer: 5.46082e-5 USD
- Wholesale trade: 0.0404775 USD
- Other real estate: 0.000439016 USD
- Wireless telecommunications: 0.000212216 USD
- Semiconductors; at manufacturer: 0.00553016 USD
- Motor vehicle steering, suspension components (except spring), and brake systems; at manufacturer: 2.6795e-5 USD
- Fresh vegetables, melons, and potatoes; at farm: 6.19994e-5 USD
- Fresh fruits and tree nuts; at farm: 0.000109614 USD
- Vehicles and parts sales: 0.000444328 USD
- Environmental and other technical consulting services: 0.000145583 USD
- Other rubber products; at manufacturer: 0.0028612 USD
- Securities and commodities brokerage and exchanges: 4.96213e-5 USD
- Vending, commercial laundry, and other commercial and service industry machinery; at manufacturer: 2.18563e-5 USD
- Monetary authorities and depository credit intermediation: 0.000840029 USD
- Other vehicle parts; at manufacturer: 0.00185825 USD
- Compressed Gases; at manufacturer: 7.10764e-6 USD
- Gasoline, fuels, and by-products of petroleum refining; at manufacturer: 0.00708732 USD
- Material handling equipment; at manufacturer: 0.000113775 USD
- Fresh wheat, corn, rice, and other grains; at farm: 2.327e-5 USD
- Paper; at manufacturer: 0.000538245 USD
- Advertising and public relations: 0.0146284 USD
- Other support services: 0.000213929 USD
- Speed changers, industrial high-speed drives, and gears; at manufacturer: 5.64383e-6 USD
- Petrochemicals; at manufacturer: 0.00149283 USD
- Cardboard containers; at manufacturer: 0.0221384 USD
- Pipeline transport: 6.10089e-5 USD
- Nonresidential building repair and maintanence: 0.000980833 USD
- Timber and raw forest products; at forest: 3.3775e-6 USD
- Machine shops; at manufacturer: 0.00502011 USD
- Communication and energy wire and cable; at manufacturer: 3.62351e-5 USD
- Dry-cleaning and laundry: 1.82792e-7 USD
- Business support: 0.000448608 USD
- Industrial process variable instruments; at manufacturer: 1.63318e-6 USD
- Surgical and medical instruments; at manufacturer: 6.0687e-5 USD
- Plastic bottles; at manufacturer: 0.0197119 USD
- Passenger ground transport: 4.15812e-5 USD
- Fertilizers; at manufacturer: 6.39025e-5 USD
- Warehousing: 0.00110852 USD
- Employment services: 0.000384738 USD
- Cardboard; at manufacturer: 0.0015382 USD
- Veneer, plywood, and engineered wood; at manufacturer: 1.3436e-5 USD
- Dental equipment and supplies; at manufacturer: 1.82792e-7 USD
- Nondepository credit intermediation and related activities: 0.000821859 USD
- Cast iron and steel; at manufacturer: 1.93366e-5 USD
- Legal services: 0.00244454 USD
- Data processing and hosting: 0.000754012 USD
- General merchandise stores: 0.00121414 USD
- Accounting, tax preparation, bookkeeping, and payroll: 0.00060773 USD
- Fresh soybeans, canola, flaxseeds, and other oilseeds; at farm: 6.63217e-6 USD
- Refined vegetable, olive, and seed oils; at manufacturer: 5.83235e-5 USD
- Coal; at mine: 6.95356e-5 USD
- Water transport (boats, ships, ferries): 0.00019202 USD
- Aluminum; at manufacturer: 2.60031e-6 USD
- Vehicle electrical and electronic equipment; at manufacturer: 1.02467e-6 USD
- Golf courses, marinas, ski resorts, fitness and other rec centers and industries: 7.04695e-6 USD
- Fluid milk and butter; at manufacturer: 2.06849e-5 USD
- Blood sugar, pregnancy, and other diagnostic test kits; at manufacturer: 9.27001e-6 USD
- Vehicle repair: 0.000364776 USD
- Polystyrene foam products; at manufacturer: 0.000185053 USD
- Metal windows, doors, and architectural products; at manufacturer: 4.79441e-5 USD
- Vehicle engines and engine parts; at manufacturer: 7.19889e-7 USD
- Shelving and lockers; at manufacturer: 2.5457e-7 USD
- Surgical appliance and supplies; at manufacturer: 0.000483389 USD
- Insurance carriers: 0.00196963 USD
- Cookies, crackers, pastas, and tortillas; at manufacturer: 2.79722e-7 USD
- Chemicals (except basic chemicals, agrichemicals, polymers, paints, pharmaceuticals,soaps, cleaning compounds); at manufacturer: 0.0053033 USD
- Ground or treated minerals and earth; at manufacturer: 2.87305e-6 USD
- Architectural, engineering, and related services: 0.000785883 USD
- Secondary copper products; at manufacturer: 4.57109e-6 USD
- Transmission and power train parts; at manufacturer: 2.85064e-5 USD
- Cutting and machine tool accessory, rolling mill, and other metalworking machines; at manufacturer: 0.000109581 USD
- Computer systems design: 0.000674831 USD
- Urethane and other foam products; at manufacturer: 3.77473e-6 USD
- Finished and coated fabric; at manufacturer: 4.88826e-5 USD
- Hotels and campgrounds: 8.26445e-5 USD
- Other basic organic chemicals; at manufacturer: 0.0363703 USD
- Greenhouse crops, mushrooms, nurseries, and flowers; at farm: 1.68489e-5 USD
- Medicinal and botanical ingredients; at manufacturer: 0.00145844 USD
- Scientific research and development: 2.27749e-6 USD
- Printed circuit and electronic assembly; at manufacturer: 0.00233814 USD
- Custom computer programming: 4.11214e-6 USD
- Natural gas; at consumer: 0.00110584 USD
- Flours and malts; at manufacturer: 2.69815e-5 USD
- Truck transport: 0.00616581 USD
- Other plastic products; at manufacturer: 0.0310746 USD
- Flavored drink concentrates; at manufacturer: 1.41592e-5 USD
- Ophthalmic goods; at manufacturer: 1.82792e-7 USD
- Electricity; at consumer: 0.00228435 USD
- All other foods; at manufacturer: 3.16146e-5 USD
- Magazines and journals; at publisher: 0.00022178 USD
- Civic, social, professional, and similar organizations: 7.55218e-6 USD
- Valve and fittings (except for plumbing); at manufacturer: 0.00615502 USD
- Buildings and dwellings services: 0.00115965 USD
- Telecommunications: 0.000778367 USD
- Springs and wires; at manufacturer: 6.26431e-7 USD
- Laminated plastic plates and shapes; at manufacturer: 4.63371e-6 USD
- Soap and cleaning compounds; at manufacturer: 0.0175755 USD
- Air purification and ventilation equipment; at manufacturer: 8.05329e-6 USD
- Dental laboratories; at manufacturer: 9.13961e-7 USD
- Limited-service restaurants: 0.000147715 USD
- Packaging machinery; at manufacturer: 0.00253263 USD
- Vehicle rental and leasing: 0.000506479 USD
- Office supplies (not paper); at manufacturer: 9.13961e-8 USD
- Frozen food; at manufacturer: 5.25423e-6 USD
- Optical instruments and lenses; at manufacturer: 3.19691e-5 USD
- Tobacco, cotton, sugarcane, peanuts, sugar beets, herbs and spices, and other crops; at farm: 5.3869e-5 USD
- Waste management and remediation: 0.000871426 USD
- Machinery for the paper, textile, food or other industries (except semiconductor machinery); at manufacturer: 2.34528e-6 USD
- Software: 5.40405e-5 USD
- Gaskets, seals, musical instruments, fasteners, brooms, brushes, mop and other misc. goods; at manufacturer: 0.000120003 USD
- Travel arrangement and reservation: 1.24565e-6 USD
- Facilities support: 0.000154429 USD
- Switchgear and switchboards; at manufacturer: 4.5698e-7 USD
- Adhesives; at manufacturer: 0.000292842 USD
- Paper bags and coated paper; at manufacturer: 0.000160482 USD
- Custom metal rolls; at manufacturer: 2.41211e-5 USD
- Wireless communications; at manufacturer: 7.94906e-6 USD
- Insurance agencies and brokerages: 0.000530061 USD
- Aluminum products; at manufacturer: 3.93778e-6 USD
- Computer terminals and other computer peripheral equipment; at manufacturer: 1.73451e-5 USD
- Marketing research and all other miscellaneous professional, scientific, and technical services: 7.50279e-5 USD
- Other basic inorganic chemicals; at manufacturer: 0.00226935 USD
- Promoters and agents: 1.59462e-6 USD
- Rubber tires; at manufacturer: 1.48495e-8 USD
- Postal service: 1.85044e-6 USD
- All other food and drinking places: 2.45233e-6 USD
- Commercial machinery repair: 0.00070158 USD
- Pumps and pumping equipment; at manufacturer: 1.37857e-5 USD

## Inputs from nature
- Energy, solar: 6.7226e-5 MJ; data quality (3,1,1,1,1)
- Occupation, industrial area, built up: 3.20575e-5 m2*a; data quality (4,2,1,1,1)
- Water, saline: 0.000269372 m3; data quality (4,2,1,4,2)
- Water, fresh: 0.000926826, 0.00353631 m3 (2 entries, compartments not in this file); data quality (4,2,1,4,2)
- Occupation, industrial area: 9.61726e-5 m2*a; data quality (4,2,1,1,1)
- Occupation, urban, discontinuously built: 5.93669e-5 m2*a; data quality (4,2,1,1,1)
- Energy, hydraulic potential: 2.04002e-6 MJ; data quality (3,1,1,1,1)
- Energy, biomass: 0.000230007 MJ; data quality (3,1,1,1,1)
- Energy, wind: 4.29807e-6 MJ; data quality (3,1,1,1,1)

## Emissions to nature
- Triethyl amine: 3.21349e-10 kg; data quality (5,1,1,1,5)
- Benzo(k)fluoranthene: 1.17433e-12 kg; data quality (3,2,1,4,1)
- ammonia: 2.99222e-9 kg; data quality (3,1,1,1,5)
- HYDROCHLORIC ACID: 6.19766e-11 kg; data quality (2,1,1,1,4)
- beryllium: 1.06303e-11 kg; data quality (2,2,1,1,5)
- benzene, chloro-: 2.28518e-11 kg; data quality (4,2,1,1,4)
- propargyl alcohol: 3.55027e-12, 1.08621e-12 kg (2 entries, compartments not in this file); data quality (4,1,1,1,4)
- Phthalate, dibutyl-: 3.77125e-12 kg; data quality (3,2,1,1,5)
- Methane, tetrachloro-, R-10: 3.93067e-12, 2.85659e-14 kg (2 entries, compartments not in this file); data quality (3,1,1,1,4)
- 2-PHENYLPHENOL: 3.17724e-12 kg; data quality (3,1,1,1,5)
- Methane, monochloro-, R-40: 2.69372e-13, 1.2709e-12 kg (2 entries, compartments not in this file); data quality (3,1,1,1,5)
- Decabromodiphenyl oxide: 1.27975e-13, 3.5496e-12 kg (2 entries, compartments not in this file); data quality (4,1,1,1,4)
- Epichlorohydrin: 2.36494e-11 kg; data quality (2,1,1,1,4)
- ethane, 1,2-dichloro-: 2.20315e-10 kg; data quality (3,2,1,1,4)
- DIPHENYLAMINE: 4.7648e-13 kg; data quality (1,1,1,1,4)
- butanol: 1.18292e-8 kg; data quality (5,1,1,1,5)
- BENZOIC TRICHLORIDE (BENZOTRICHLORIDE): 2.9411e-13 kg; data quality (3,2,1,1,4)
- Aluminum: 1.63144e-9, 5.47424e-12 kg (2 entries, compartments not in this file); data quality (4,1,1,1,5)
- hexane: 1.74584e-7 kg; data quality (3,2,1,1,5)
- dibenzofuran: 3.11646e-11 kg; data quality (4,2,1,1,5)
- epichlorohydrin: 1.59325e-9 kg; data quality (3,2,1,1,5)
- toluene-2,4-diisocyante: 8.17939e-11 kg; data quality (3,2,1,1,5)
- p-cresol: 5.74451e-11 kg; data quality (4,2,1,1,5)
- Xylene: 4.77794e-8 kg; data quality (3,2,1,3,3)
- MALEIC ANHYDRIDE: 1.7696e-11 kg; data quality (4,1,1,1,4)
- PYRIDINE: 1.19427e-11 kg; data quality (4,1,1,1,5)
- mercury: 3.79339e-11 kg; data quality (2,2,1,1,5)
- 1,4-dichlorobenzene: 5.93826e-11 kg; data quality (2,2,1,1,5)
- Phthalate, dimethyl-: 6.10868e-12 kg; data quality (4,1,1,1,4)
- TERT-BUTYL ALCOHOL: 4.79908e-13 kg; data quality (4,1,1,1,4)
- toluene: 1.13346e-11 kg; data quality (5,1,1,1,5)
- Diethylene glycol butyl ether: 3.09783e-11 kg; data quality (3,2,1,1,5)
- CHLORINE: 1.14264e-14 kg; data quality (2,1,1,1,4)
- Acetonitrile: 1.17577e-11 kg; data quality (3,1,1,1,4)
- 5-FLUOROURACIL: 2.01635e-11 kg; data quality (5,1,1,1,5)
- manganese: 1.18834e-11 kg; data quality (4,1,1,1,4)
- benzene, ethyl-: 1.52275e-8 kg; data quality (3,2,1,3,2)
- Acrylic acid: 1.57312e-11 kg; data quality (4,1,1,1,4)
- O-ANISIDINE: 1.13119e-14 kg; data quality (5,2,1,1,4)
- Cumene hydroperoxide: 4.74278e-10 kg; data quality (3,1,1,1,5)
- acrylonitrile: 5.78898e-10 kg; data quality (3,2,1,1,5)
- biphenyl: 1.58858e-11 kg; data quality (4,2,1,1,5)
- nitrogen oxides: 2.96674e-5 kg; data quality (3,2,1,1,3)
- maleic anhydride: 2.80875e-9 kg; data quality (2,2,1,1,4)
- Cyclohexanol: 9.29026e-11 kg; data quality (4,1,1,1,5)
- 2,2-BIS(4-HYDROXY-3,5-DIBROMOPHENYL)PROPANE: 1.42601e-13 kg; data quality (5,1,1,1,4)
- trichloroethylene: 3.00052e-9 kg; data quality (4,2,1,1,5)
- Naphthalene: 9.97922e-11 kg; data quality (4,1,1,1,4)
- Hydrazine, methyl-: 3.91178e-10 kg; data quality (2,2,1,1,5)
- POTASSIUM BROMATE: 4.51452e-12 kg; data quality (5,1,1,1,5)
- ethylene glycol: 4.75764e-11 kg; data quality (5,1,1,1,5)
- dimethyl formamide: 2.38325e-10 kg; data quality (4,2,1,1,5)
- ozone: 1.29292e-12 kg; data quality (4,1,1,1,5)
- chlorine: 9.71482e-9 kg; data quality (4,2,1,1,5)
- Phosphorus: 4.13744e-8 kg; data quality (2,1,1,1,5)
- 2-ethoxyethyl acetate: 4.3432e-14 kg; data quality (5,2,1,1,4)
- TERT-BUTYL ALCOHOL: 2.86608e-9 kg; data quality (4,1,1,1,5)
- carbonyl sulfide: 1.13196e-13 kg; data quality (4,2,1,1,4)
- Methane, dichlorodifluoro-, CFC-12: 1.52521e-10 kg; data quality (4,1,1,1,5)
- 4,4'-isopropylidenediphenol: 3.18126e-11 kg; data quality (4,1,1,1,5)
- chromium: 1.67078e-13, 1.12509e-11, 3.52418e-11 kg (3 entries, compartments not in this file); data quality (4,1,1,1,5)
- methane, chlorodifluoro-, hcfc-22: 9.81514e-10 kg; data quality (4,1,1,1,5)
- Ethene, tetrachloro-: 2.85659e-12 kg; data quality (3,1,1,1,4)
- Zinc: 3.23437e-12 kg; data quality (5,1,1,1,5)
- 1,4-dioxane: 1.25307e-8 kg; data quality (4,2,1,1,5)
- ACRYLAMIDE: 2.05675e-13 kg; data quality (4,1,1,1,4)
- Chloroform: 2.98651e-12, 3.70146e-12 kg (2 entries, compartments not in this file); data quality (3,1,1,1,4)
- NICOTINE: 1.61637e-11 kg; data quality (2,1,1,1,5)
- 2-nitropropane: 1.13119e-13 kg; data quality (5,2,1,1,4)
- nickel: 2.69587e-9 kg; data quality (3,2,1,1,5)
- BUTYL ACRYLATE: 2.68299e-11, 6.15896e-11 kg (2 entries, compartments not in this file); data quality (4,1,1,1,4)
- aniline: 2.86534e-10 kg; data quality (4,2,1,1,5)
- particulates, < 10 um: 1.22983e-6 kg; data quality (3,2,1,1,5)
- benz[a]anthracene: 5.5642e-10 kg; data quality (2,2,1,1,5)
- 2,4-dimethylphenol: 7.96532e-13 kg; data quality (4,1,1,1,4)
- 2-methylnaphthalene: 6.70392e-13 kg; data quality (2,2,1,1,5)
- Bisphenol A: 1.14264e-14 kg; data quality (4,1,1,1,4)
- ACRYLAMIDE: 2.33145e-10 kg; data quality (4,2,1,1,4)
- CHLOROMETHYL METHYL ETHER: 1.38082e-14 kg; data quality (5,2,1,1,5)
- Benzo(a)anthracene: 6.02381e-15 kg; data quality (2,2,1,1,5)
- Benzyl chloride: 6.56418e-13 kg; data quality (3,1,1,1,5)
- formaldehyde: 1.03811e-10 kg; data quality (2,1,1,1,5)
- 2,4-dinitrophenol: 2.74276e-11 kg; data quality (5,1,1,1,4)
- Hydrocarbons, aromatic: 2.95142e-9 kg; data quality (3,2,1,4,1)
- 2-chloro-1-phenylethanone: 1.61328e-11 kg; data quality (2,2,1,1,5)
- m-cresol: 3.63746e-12 kg; data quality (4,2,1,1,5)
- bromoform: 8.98747e-11 kg; data quality (3,2,1,1,5)
- Carbon dioxide: 0.0511525 kg; data quality (4,2,1,4,1)
- VOC, volatile organic compounds: 1.69319e-5 kg; data quality (3,2,1,1,4)
- copper: 1.15406e-12, 3.93139e-12 kg (2 entries, compartments not in this file); data quality (4,1,1,1,4)
- lead: 1.61069e-12, 5.96185e-11 kg (2 entries, compartments not in this file); data quality (3,1,1,1,4)
- N,N-DIMETHYLANILINE: 3.42791e-14 kg; data quality (3,1,1,1,4)
- 4-Methyl-2-pentanone: 2.85659e-12 kg; data quality (4,1,1,1,4)
- methyl methacrylate: 2.64001e-9 kg; data quality (3,2,1,1,5)
- mercury: 1.17692e-14, 3.97638e-14 kg (2 entries, compartments not in this file); data quality (3,1,1,1,4)
- NITROUS ACID: 2.21876e-9 kg; data quality (5,1,1,1,4)
- CFC-114: 6.40729e-11 kg; data quality (5,1,1,1,5)
- ethene, tetrachloro-: 3.48278e-9 kg; data quality (3,2,1,1,5)
- silver: 6.2845e-15 kg; data quality (4,1,1,1,4)
- SEC-BUTYL ALCOHOL: 3.12334e-10 kg; data quality (5,1,1,1,5)
- butadiene: 4.89245e-9 kg; data quality (3,2,1,4,1)
- Sodium formate: 1.31403e-12, 3.15368e-13 kg (2 entries, compartments not in this file); data quality (3,1,1,1,4)
- benzene: 4.08472e-8 kg; data quality (3,2,1,4,1)
- 2-PHENYLPHENOL: 1.67968e-12, 1.48543e-12 kg (2 entries, compartments not in this file); data quality (3,1,1,1,4)
- Butyraldehyde: 1.01672e-11 kg; data quality (4,1,1,1,5)
- formaldehyde: 1.11815e-7 kg; data quality (3,2,1,4,1)
- 1,2-BUTYLENE OXIDE: 1.26817e-13 kg; data quality (4,2,1,1,4)
- Thiram: 5.07331e-12 kg; data quality (4,1,1,1,4)
- PYRIDINE: 2.52523e-12 kg; data quality (4,1,1,1,4)
- Propane, 1,2-dichloro-: 2.38997e-12 kg; data quality (4,2,1,1,4)
- Phthalate, dioctyl-: 8.21238e-12, 5.71318e-14 kg (2 entries, compartments not in this file); data quality (4,1,1,1,4)
- Indeno(1,2,3-cd)pyrene: 7.54809e-13 kg; data quality (3,2,1,4,1)
- MOLYBDENUM(VI): 7.85906e-12 kg; data quality (3,1,1,1,4)
- acetaldehyde: 5.43081e-8 kg; data quality (3,2,1,4,1)
- biphenyl: 6.35448e-16 kg; data quality (3,1,1,1,5)
- Acrylonitrile: 6.98993e-12, 2.38293e-13 kg (2 entries, compartments not in this file); data quality (3,1,1,1,5)
- BUTYL ISOCYANATE: 7.48728e-13 kg; data quality (5,2,1,1,5)
- cyclohexane: 4.97001e-10 kg; data quality (4,1,1,1,5)
- carbon tetrachloride: 3.17227e-11 kg; data quality (4,2,1,1,4)
- Dimethyl sulfate: 5.5739e-9 kg; data quality (2,2,1,1,5)
- Benzyl chloride: 1.80789e-10 kg; data quality (3,1,1,1,4)
- 1,1,1-trichloroethane: 1.12231e-9 kg; data quality (4,2,1,1,5)
- DIETHANOLAMINE: 1.87609e-10, 3.15538e-11 kg (2 entries, compartments not in this file); data quality (4,1,1,1,5)
- Vinyl acetate: 2.01055e-11 kg; data quality (4,1,1,1,4)
- Dinitrogen monoxide: 2.21466e-7 kg; data quality (4,2,1,4,1)
- DMTT (DAZOMET): 6.39877e-13 kg; data quality (4,1,1,1,4)
- o-cresol: 1.0095e-13 kg; data quality (4,2,1,1,4)
- benzyl chloride: 2.90848e-10 kg; data quality (2,2,1,1,5)
- isophorone: 6.79501e-11 kg; data quality (2,2,1,1,5)
- Hydrazine: 9.00065e-11 kg; data quality (4,2,1,1,5)
- t-Butyl methyl ether: 1.52771e-11 kg; data quality (4,1,1,1,4)
- dimethyl formamide: 1.04723e-12, 2.41096e-12 kg (2 entries, compartments not in this file); data quality (4,1,1,1,4)
- 1,2,4-trimethylbenzene: 9.49621e-10 kg; data quality (5,1,1,1,5)
- Ethylene glycol monoethyl ether: 4.00351e-9, 4.32146e-8, 2.35968e-10 kg (3 entries, compartments not in this file); data quality (5,1,1,1,5)
- N-(3-CHLORALLYL) HEXAMINIUM CHLORIDE: 1.11203e-10 kg; data quality (3,1,1,1,5)
- cumene: 7.56469e-10 kg; data quality (4,2,1,1,5)
- benzo(a)pyrene: 2.54856e-12 kg; data quality (2,2,1,2,3)
- QUINOLINE: 2.34648e-12 kg; data quality (2,1,1,1,4)
- p-phenylenediamine: 2.18038e-9 kg; data quality (5,2,1,1,5)
- Dibenz(a,h)anthracene: 1.01675e-13 kg; data quality (2,2,1,1,4)
- Benzo(g,h,i)perylene: 2.80782e-10 kg; data quality (3,2,1,1,5)
- ACETONE CYANOHYDRIN: 6.53588e-11 kg; data quality (3,1,1,1,4)
- Methyl acrylate: 7.11202e-13, 6.64031e-10 kg (2 entries, compartments not in this file); data quality (3,1,1,1,5)
- polychlorinated biphenyls: 4.34514e-14 kg; data quality (3,2,1,1,4)
- Phenol, 2,4-dimethyl-: 6.79869e-14 kg; data quality (4,1,1,1,4)
- Phthalate, dimethyl-: 1.34898e-11 kg; data quality (4,2,1,1,5)
- Phenol: 3.95809e-11 kg; data quality (3,1,1,1,4)
- NITROGLYCERIN: 2.52602e-10 kg; data quality (5,1,1,1,4)
- cadmium: 8.94681e-11 kg; data quality (3,2,1,1,5)
- Ethene, chloro-: 2.55931e-10 kg; data quality (3,2,1,1,4)
- pyrene: 1.12119e-11 kg; data quality (3,2,1,4,1)
- Methane, difluoro-, HFC-32: 9.02638e-8 kg; data quality (4,2,1,4,1)
- phenol: 3.27345e-13 kg; data quality (3,1,1,1,4)
- 2,2,4-trimethylpentane: 2.50791e-8 kg; data quality (3,2,1,2,3)
- ALLYL ALCOHOL: 4.52343e-10 kg; data quality (4,1,1,1,5)
- AZIRIDINE: 9.95708e-13 kg; data quality (4,2,1,1,4)
- 1,2,4-trichlorobenzene: 7.81118e-11 kg; data quality (4,2,1,1,5)
- 1-Methyl-2-pyrrolidinone: 6.58208e-9 kg; data quality (5,1,1,1,5)
- PHTHALIC ANHYDRIDE: 5.71318e-14 kg; data quality (3,1,1,1,4)
- 1,1,2,2-tetrachloroethane: 1.15091e-12 kg; data quality (3,2,1,1,4)
- methanol: 7.42879e-10, 5.17626e-9 kg (2 entries, compartments not in this file); data quality (3,1,1,1,5)
- catechol: 1.51057e-11 kg; data quality (2,1,1,1,4)
- methyl isobutyl ketone: 9.969e-9 kg; data quality (4,2,1,1,5)
- cyanide: 5.8195e-9 kg; data quality (3,2,1,1,5)
- antimony: 5.71318e-14, 9.31706e-11 kg (2 entries, compartments not in this file); data quality (2,1,1,1,4)
- NITRIC ACID: 1.99961e-11 kg; data quality (3,1,1,1,4)
- Propane, 1,2-dichloro-: 4.09064e-14 kg; data quality (5,1,1,1,4)
- propylene oxide: 4.94151e-9 kg; data quality (3,2,1,1,5)
- Triethyl amine: 1.48199e-9 kg; data quality (4,2,1,1,5)
- hydroquinone: 8.55379e-12 kg; data quality (3,2,1,1,5)
- Propane, 1,1,1,3,3,3-hexafluoro-, HCFC-236fa: 1.79158e-9 kg; data quality (4,2,1,4,1)
- Propene, 1,3-dichloro-: 3.74999e-11 kg; data quality (3,2,1,1,5)
- Nitrilotriacetic acid: 2.34241e-13 kg; data quality (5,1,1,1,4)
- toluene: 9.71498e-8 kg; data quality (3,2,1,2,3)
- PENTOBARBITAL SODIUM: 5.59653e-14 kg; data quality (2,1,1,1,5)
- ETHENE: 1.16092e-10 kg; data quality (3,1,1,1,4)
- selenium: 5.55148e-10 kg; data quality (2,2,1,1,5)
- formic acid: 7.04795e-10 kg; data quality (3,1,1,1,5)
- chlorine: 1.27583e-10 kg; data quality (2,1,1,1,4)
- phosgene: 3.39358e-14 kg; data quality (5,2,1,1,4)
- Methane, dichloro-, HCC-30: 1.99514e-12 kg; data quality (5,1,1,1,4)
- anthracene: 7.97542e-12 kg; data quality (3,2,1,3,2)
- phenol: 8.1214e-9 kg; data quality (4,2,1,1,4)
- Ethane, pentafluoro-, HFC-125: 1.54998e-7 kg; data quality (4,2,1,4,1)
- Dichlorvos: 2.95461e-12 kg; data quality (3,2,1,1,5)
- 2-PHENOXYETHANOL: 2.58817e-11 kg; data quality (5,2,1,1,4)
- 1,1-DICHLOROETHYLENE: 3.82689e-14 kg; data quality (3,2,1,1,4)
- 1,2-DICHLOROETHYLENE: 2.03389e-13 kg; data quality (5,1,1,1,4)
- Hexane: 3.04524e-11 kg; data quality (4,1,1,1,5)
- m-xylene: 6.34861e-9 kg; data quality (3,2,1,4,2)
- acetonitrile: 5.31519e-9 kg; data quality (3,2,1,1,5)
- bromine: 9.34456e-12 kg; data quality (5,1,1,1,5)
- QUINOLINE: 1.80991e-12 kg; data quality (3,2,1,1,4)
- 3-methylcholanthrene: 8.6875e-16 kg; data quality (2,2,1,1,5)
- Cyanide: 7.11202e-12 kg; data quality (3,1,1,1,5)
- fluoranthene: 2.16482e-11 kg; data quality (3,2,1,4,1)
- 4-nitrophenol: 1.82712e-13 kg; data quality (3,2,1,1,5)
- Formic acid: 9.35931e-12 kg; data quality (3,1,1,1,4)
- 2,4/2,6-toluenediisocyanate (mixture): 2.22407e-11 kg; data quality (3,1,1,1,5)
- sulfur dioxide: 7.88506e-6 kg; data quality (2,2,1,1,5)
- Chromium VI: 1.42917e-10 kg; data quality (3,2,1,1,5)
- o-Xylene: 4.72433e-9 kg; data quality (4,1,1,2,4)
- ethylbenzene: 2.80518e-9 kg; data quality (4,1,1,1,5)
- nitric acid: 4.37831e-9 kg; data quality (3,1,1,1,5)
- Methyl acrylate: 3.42791e-14 kg; data quality (3,1,1,1,4)
- NITROUS ACID: 2.10445e-10 kg; data quality (5,1,1,1,5)
- PHENYTOIN: 1.09913e-10 kg; data quality (5,1,1,1,5)
- acrylic acid: 8.84613e-9 kg; data quality (4,2,1,1,5)
- Sulfuric acid: 1.02162e-8 kg; data quality (2,1,1,1,5)
- CHLOROPRENE: 6.78716e-14 kg; data quality (2,2,1,1,4)
- HCFC-225ca: 6.2845e-13 kg; data quality (5,1,1,1,4)
- ETHYLENETHIOUREA: 1.49685e-12 kg; data quality (2,1,1,1,4)
- 1,4-DIOXANE: 1.2709e-12 kg; data quality (4,1,1,1,5)
- chloroform: 8.62978e-10 kg; data quality (4,2,1,1,5)
- methanol: 8.28654e-8 kg; data quality (4,2,1,1,5)
- Xylene: 8.34247e-11 kg; data quality (4,1,1,1,4)
- 2,4-Diaminotoluene: 2.23976e-12 kg; data quality (2,2,1,1,4)
- Cumene: 2.39223e-12 kg; data quality (3,1,1,1,5)
- ethyl acrylate: 2.69789e-9 kg; data quality (3,2,1,1,5)
- 1,4-dioxane: 6.35448e-15 kg; data quality (4,1,1,1,5)
- antimony: 7.51137e-11 kg; data quality (3,2,1,1,4)
- ALLYL CHLORIDE: 5.26311e-10 kg; data quality (3,2,1,1,5)
- ethylene glycol: 6.00354e-9 kg; data quality (5,2,1,1,5)
- Bis(2-chloroethyl)ether: 1.14264e-14 kg; data quality (2,1,1,1,4)
- methane, bromo-, halon 1001: 2.18982e-10 kg; data quality (3,2,1,1,5)
- Ethylene glycol: 1.05087e-10 kg; data quality (5,1,1,1,4)
- acrolein: 3.30235e-9 kg; data quality (3,2,1,4,1)
- Polychlorinated biphenyls: 9.00728e-14 kg; data quality (3,1,1,1,5)
- 1,2,4-trimethylbenzene: 5.16744e-11 kg; data quality (5,1,1,1,4)
- vinyl acetate: 2.12763e-9 kg; data quality (4,2,1,1,5)
- nickel: 3.08486e-11 kg; data quality (4,1,1,1,5)
- Permethrin: 1.88535e-12 kg; data quality (2,1,1,1,4)
- 2-Mercaptobenzothiazole: 1.32089e-11 kg; data quality (3,1,1,1,4)
- ethane, 1,2-dibromo-: 1.35469e-10 kg; data quality (2,2,1,1,5)
- manganese: 9.63527e-10 kg; data quality (3,2,1,1,5)
- SULFURYL FLUORIDE: 6.80383e-10 kg; data quality (4,1,1,1,4)
- Butanol: 8.49679e-12 kg; data quality (5,1,1,1,4)
- Nitrogen: 1.31623e-7 kg; data quality (3,2,1,1,5)
- acetamide: 1.14264e-14 kg; data quality (4,1,1,1,4)
- methylene diphenyl diisocyanate: 7.59742e-11 kg; data quality (4,2,1,1,5)
- acenaphthene: 7.3499e-11 kg; data quality (3,2,1,4,1)
- Cobalt: 9.74736e-11 kg; data quality (3,2,1,1,5)
- naphthalene: 4.17627e-9 kg; data quality (3,2,1,2,4)
- METHACRYLONITRILE: 1.14264e-14 kg; data quality (5,1,1,1,4)
- AMMONIA: 8.20795e-9 kg; data quality (3,1,1,1,5)
- Dimethylamine: 1.40438e-10 kg; data quality (3,1,1,1,4)
- Triethyl amine: 7.0615e-12 kg; data quality (5,1,1,1,4)
- fluorene: 7.60886e-11 kg; data quality (3,2,1,4,1)
- para-xylene: 1.01397e-8 kg; data quality (4,2,1,1,5)
- ALUMINUM OXIDE: 1.62483e-11 kg; data quality (5,1,1,1,4)
- 3-Iodo-2-propynyl butylcarbamate: 6.35448e-12 kg; data quality (4,1,1,1,5)
- methane, dichloro-, hcc-30: 2.77723e-8 kg; data quality (4,2,1,1,5)
- Chloroacetic acid: 3.93823e-10 kg; data quality (3,2,1,1,5)
- acenaphthylene: 8.30727e-11 kg; data quality (3,2,1,4,1)
- Methane: 1.5429e-6 kg; data quality (4,2,1,4,1)
- tertiary-Butyl Acetate: 2.06029e-9 kg; data quality (3,2,1,1,5)
- diisocyanates: 5.79105e-12 kg; data quality (4,1,1,1,4)
- toluene: 7.47178e-11 kg; data quality (5,1,1,1,4)
- phenanthrene: 1.87383e-10 kg; data quality (3,2,1,4,1)
- Benzene, ethyl-: 6.36591e-12 kg; data quality (4,1,1,1,5)
- hydrogen fluoride: 2.59446e-8 kg; data quality (2,2,1,1,5)
- Methyl iodide: 1.13884e-10 kg; data quality (4,2,1,1,5)
- carbon monoxide: 7.639e-5 kg; data quality (3,2,1,1,1)
- Chromium, ion: 9.94168e-10 kg; data quality (2,2,1,1,5)
- THIOUREA: 2.86688e-15 kg; data quality (3,1,1,1,4)
- M-CRESOL: 4.70766e-13 kg; data quality (3,1,1,1,4)
- Benzo(b)fluoranthene: 1.39481e-12 kg; data quality (3,2,1,4,1)
- bis(2-chloroethyl)ether: 1.93489e-12 kg; data quality (2,1,1,1,4)
- t-butyl methyl ether: 7.0919e-10 kg; data quality (3,2,1,1,5)
- Tetracycline hydrochloride: 1.55818e-11 kg; data quality (5,1,1,1,5)
- toluene, 2,4-dinitro-: 6.01886e-11 kg; data quality (5,2,1,1,4)
- arsenic: 5.03139e-10 kg; data quality (3,2,1,1,5)
- acetophenone: 6.26938e-11 kg; data quality (4,2,1,1,5)
- phthalic anhydride: 1.02851e-9 kg; data quality (2,2,1,1,4)
- Propene: 1.78839e-9 kg; data quality (3,1,1,1,5)
- HCFC-225cb: 8.9697e-13 kg; data quality (2,1,1,1,4)
- HYDROQUINONE: 2.84642e-12 kg; data quality (2,1,1,1,4)
- methane, monochloro-, r-40: 9.43496e-9 kg; data quality (3,2,1,1,5)
- Methane, trichlorofluoro-, CFC-11: 6.98271e-11 kg; data quality (2,1,1,1,5)
- PHOSPHORUS: 1.84088e-11 kg; data quality (2,2,1,1,5)
- lead: 1.58686e-9 kg; data quality (3,2,1,1,5)
- carbon disulfide: 7.92659e-10 kg; data quality (4,2,1,1,4)
- particulates, < 2.5 um: 3.74381e-6 kg; data quality (3,2,1,1,4)
- phthalate, dioctyl-: 3.17645e-10 kg; data quality (3,2,1,1,5)
- monochloroethane: 4.13028e-11 kg; data quality (3,2,1,1,5)
- ethane, 1,1,2-trichloro-: 2.42739e-12 kg; data quality (4,2,1,1,4)
- Benzoyl chloride: 1.75214e-12 kg; data quality (2,1,1,1,5)
- ethylene oxide: 1.46695e-8 kg; data quality (3,2,1,1,5)
- Nitrobenzene: 8.43416e-11 kg; data quality (4,2,1,1,5)
- pentachlorophenol: 1.2143e-15 kg; data quality (3,2,1,1,5)
- Acetonitrile: 4.48704e-11 kg; data quality (3,1,1,1,5)
- propanal: 9.42822e-9 kg; data quality (3,2,1,4,1)
- Cresol: 1.30513e-10 kg; data quality (4,2,1,1,5)
- 4-nitroaniline: 4.74194e-13 kg; data quality (5,1,1,1,4)
- 2-METHOXYETHANOL: 1.19375e-10 kg; data quality (4,2,1,1,4)
- Phosphine: 4.17954e-11 kg; data quality (4,2,1,1,5)
- hexachlorobenzene: 3.84606e-19 kg; data quality (3,2,1,1,4)
- Methane, dibromo-: 1.16483e-11 kg; data quality (5,1,1,1,4)
- Ethane, 1,1,1-trifluoro-, HFC-143a: 6.63174e-8 kg; data quality (4,2,1,4,1)
- cobalt: 1.60336e-13 kg; data quality (4,1,1,1,5)
- hydrogen chloride: 4.04079e-7 kg; data quality (2,2,1,1,5)
- ammonia: 2.81076e-7 kg; data quality (3,2,1,2,4)
- styrene: 1.29386e-8 kg; data quality (4,2,1,1,4)
- Water, saline: 0.00013649 m3; data quality (4,2,1,4,2)
- 4,4'-METHYLENEBIS(2-CHLOROANALINE): 1.52756e-11 kg; data quality (5,2,1,1,4)
- Butanol: 2.43411e-11 kg; data quality (5,1,1,1,5)
- Benzene, ethyl-: 2.11738e-11 kg; data quality (4,1,1,1,4)
- Xylene: 3.55076e-11 kg; data quality (4,1,1,1,5)
- hydrogen sulfide: 2.54001e-10 kg; data quality (3,1,1,1,5)
- Styrene: 1.14264e-14 kg; data quality (3,1,1,1,4)
- 2-METHYLPYRIDINE: 1.8625e-15 kg; data quality (3,1,1,1,4)
- PERACETIC ACID: 1.40628e-10 kg; data quality (4,1,1,1,5)
- Water, fresh: 0.00388137 m3; data quality (4,2,1,4,2)
- nickel: 6.85582e-14 kg; data quality (4,1,1,1,4)
- CATECHOL: 1.37116e-13 kg; data quality (2,1,1,1,4)
- Ethane, 1,1,1,2-tetrafluoro-, HFC-134a: 5.84208e-7 kg; data quality (4,2,1,4,1)
- diethanolamine: 3.29764e-9 kg; data quality (3,2,1,1,5)
- Chrysene: 9.45947e-11 kg; data quality (2,2,1,1,5)
- 1,4-BENZOQUINONE: 1.05201e-13 kg; data quality (3,2,1,1,4)
- Benzene, 1,2,4-trimethyl-: 2.89578e-11 kg; data quality (5,1,1,1,5)
- Formaldehyde: 2.21515e-11 kg; data quality (2,1,1,1,5)
- Aniline: 5.11858e-12 kg; data quality (3,1,1,1,5)
- Methane, dichloro-, HCC-30: 7.45986e-12 kg; data quality (5,1,1,1,5)
- 2,6-Dinitrotoluene: 1.82822e-11 kg; data quality (5,1,1,1,4)

## Inventory method
Input-output

## Modelling constants
The reference unit of all processes is 1 USD2013 of the good or service. The technosphere inputs are based on the US BEA detailed input-output tables for 2007. The IO tables are combined to develop a commodity-by-commodity model based on the the industry-technology assumption (see Suh et al., 2010), which assumes all commodities produced by a given industry have the same input structure, but that multiple industries can produce the same commodity. Thus, model technosphere flows represent commodity outputs (and not industry outputs) from other processes in the model. There are no by-products included in these processes. All commodity production is based on US-conditions, despite in reality that some goods and services are produced overseas, as USEEIO v1.1 is a single-region IO model.

## Completeness
The input-output approach assures that all purchased inputs associated with the sectors making these commodities as reported in the US census for 2007 are included. The direct resources extracted including minerals, energy sources, water and land occupied are included. Emissions to air include all critieria air pollutants, greenhouse gases, and hazardous and toxic air pollutants as defined by US EPA. Releases to water include toxics, total nitrogen and total phosphorus, and water discharges. Releases to soil or groundwater include toxics and agriculutural pesticides. Some metal releases to air, water and soil are not included because they could not be speciated. Solid hazardous and non-hazardous wastes generated are not included as an elementary flows although purchases of waste services are included.

## Data treatment
Greenhouse gases are primarily from the US Greenhouse Gas Emission Inventory (USEPA 2016a). Biogenic C uptake is not included (change from version 1.0), as biogenic C emission are not included. Toxic releases to air, water and soil (except pesticides) are from the 2013 Toxic Release Inventory (USEPA 2015a). Criteria air pollutants and hazardous air pollutants are from the 2011 National Emissions Inventory (USEPA 2015b). All estimates are normalized by industry based on sector output in the data year, then converted to 2013 USD using relative sector-specific CPIs (if data year is not 2013). Energy use represent raw renewables or fossil fuel energies and is based on EIA data for 2014. See Table 1 in Yang, Ingwersen et al. 2017 and Supporting Information 1, and the v1.1 data update notes (Ingwersen et al. 2017) for all details on environmental data sources used.Land occupation associated with manufacturing buildings was estimated based on the building floorspace data provided by the U.S. Energy Information Administration in the 2010 Manufacturing Energy Consumption Survey (EIA 2013). Portions of total renewable energy (EIA 2016) based on EIA-923 reports for 2014 (EIA 2017) are included. Nitrogen and Phosphorus releases are modeled in total N and total P equivalents as estimated by the Discharge Monitoring Report Nutrient Loading tool (USEPA 2016b). Self-supplied withdrawals were assigned to industrial sectors based on water use statistics for Canadian industries by NAICS 3-digit sector scaled to US production levels based on gross domestic product by industry (BEA 2015; Statistics Canada 2010), and further disaggregated to the manufacturing sectors based on compensation of employees as provided by the 2007 IO tables (BEA 2015). Water withdrawals associated with public supply were allocated to sectors based on their use of water, sewage, and other services in USD based on the IO tables (BEA 2015). Portions of total renewable energy (EIA 2016) by type are assigned to sectors (hydro, wind, solar, or) based on EIA-923 reports for 2014 (EIA 2017).

## Data collection
2015-2016

## Sampling procedure
US federal government sources, including surveys and US EPA emissions databases are used as the primary sources. From these sources, data for US reporting establishments/facilities are aggregated by the NAICS sector as defined in the BEA detailed 2007 input-output tables. When level of sector aggregation differs, or when direct emissions are not reported but modeled, additional sources are used to make allocations and estimates.

## Review details
In regard to quality assurance and peer-review, each dataset created went through Quality Assurance as defined in a quality assurance project plans at US EPA, CSRA or ERG. The model was assembled with the IO model builder model (USEPA 2016c). Validation functions were used to check that all the model components were properly assembled and harmonized. Bayou Demeke and Santosh Ghimire provided internal peer review of the model methodology and the manuscript underwent standard EPA management review. An editor and two anonymous reviewers at the Journal of Cleaner Production reviewed the model. In regard to data quality evaluation, data quality assessment was performed at the flow and process levels according to the updated US EPA data quality assessment guidelines as defined in US EPA (2016b).

## Intended application
The primary application is for use in the US Environmentally-Extended Input-Ouput model, USEEIO, version 1.1. This model is being used by the US EPA for supporting tools that prioritize goods and services based on potential environmental impacts, resource use or emissions for large regions, including the US and US states, and as a strealined tool for organizations as a starting point to consider sustainable materials management. Model results are designed to provide meso/macro-level decision support.

## Project
USEEIO v1.1 was developed by the US EPA with CSRA and ERG with Wesley W. Ingwersen and David E. Meyer as research leads. Yi Yang was the technical lead on the work for CSRA (contract EP-C-15-012); Troy Hawkins was lead for ERG (contract EP-C-12-021).

## Sources
- EIA 2015
- Edelen and Ingwersen 2017
- USGS 2016
- Maupin et al. 2014
- USEPA 2016b
- Statistics Canada 2010
- EIA 2016
- USEPA 2016a
- EIA 2013
- Ingwersen et al. DRAFT
- Goebes et al. 2003
- Nickerson et al. 2011
- USDA 2016
- BEA 2015
- USEPA 2015b
- USGS 2015
- Macknick et al. 2011
- EIA 2017
- Blackhurst et al. 2010
- Ingwersen et al. 2017
- USEPA 2016c
- USEPA 2015a
- Yienger et al. 1995
- Kim et el. 2013
- USDA 2009a
- Lovelace 2009
- USDA 2014
- USDA 2009b
- BLM 2008
- USDA 2006
- Torcellini et al. 2003
