# Electronic equipment repair and maintenance

Dataset: openLCA process, unit process
Category: 8112: Electronic and Precision Equipment Repair and Maintenance
Geography: United States
Time period: 2017-01-01 to 2017-12-31
Data quality: US EPA - Process Pedigree Matrix (1;1)
Exchange data quality scheme: US EPA - Flow Pedigree Matrix
Generated by: US EPA with CSRA and ERG
Owner: US EPA
Published in: Yang, Ingwersen et al. 2017
restrictionsDescription: This model shold be appropriately cited (see Yang, Ingwersen et al. 2017 source or Publication field) when used. Any changes or derivations of this model by the user should be documented. The model itself and any results from use of this model shall not be construed to consitute US EPA opinion or policy.
copyright: false

## General comment
BEA Code & Name is '811200:Electronic and precision equipment repair and maintenance'. Description of the primary industry producing this good or service, adapted from the Census Bureau NAICS 2007 descriptions: This industry group comprises establishments primarily engaged in repairing electronic equipment, such as computers and communications equipment, and highly specialized precision instruments. Establishments in this industry group typically have staff skilled in repairing items having complex, electronic components.

## Technology
The process describes the average US production of this good or service within this NAICS-based grouping defined in the BEA 2007 detailed input-output tables (BEA 2015). Distribution, wholesale and retailing of this good or service, use, and final disposal are not included. Creation of a product system with this process will enable modeling of all upstream (supply-chain) activities.

## Geography
Data represent the 50 US states

## Time period
2017 was the year in which this version of USEEIO was released and is the target date for the model

## Reference product
- Electronic equipment repair and maintenance: 1 USD

## Inputs from technosphere
All rows: data quality (1,3,1,1,1)
- Computer storage device readers; at manufacturer: 0.000253781 USD
- Household goods repair: 0.000888768 USD
- Promoters and agents: 2.6007e-5 USD
- Investigation and security: 0.000279579 USD
- Electronic capacitors, resistors, coils, transformers, connectors and other components (except semiconductors and printed circuit assemblies); at manufacturer: 0.0137042 USD
- Commercial equipment rental: 0.000894945 USD
- Hotels and campgrounds: 0.000533569 USD
- Metal windows, doors, and architectural products; at manufacturer: 0.000126891 USD
- Directory, mailing list, and other publishers; at publisher: 2.53781e-5 USD
- Switchgear and switchboards; at manufacturer: 5.07562e-5 USD
- Environmental and other technical consulting services: 0.00053376 USD
- Vehicles and parts sales: 0.000126891 USD
- Accounting, tax preparation, bookkeeping, and payroll: 0.00304905 USD
- Performances: 1.90554e-8 USD
- Lessors of nonfinancial intangible assets: 0.000146937 USD
- Automatic controls for HVAC and refrigeration equipment; at manufacturer: 0.000862856 USD
- Unrefined oil and gas; at extraction site: 0.000126948 USD
- Waste management and remediation: 0.000203368 USD
- Chemicals (except basic chemicals, agrichemicals, polymers, paints, pharmaceuticals,soaps, cleaning compounds); at manufacturer: 5.07753e-5 USD
- Natural gas; at consumer: 0.000863314 USD
- Advertising and public relations: 0.00665939 USD
- Ball and roller bearings; at manufacturer: 0.000710587 USD
- Other vehicle parts; at manufacturer: 0.000634453 USD
- Other engine equipment; at manufacturer: 0.00131966 USD
- Wholesale trade: 0.012106 USD
- Cutlery and handtools; at manufacturer: 0.000228403 USD
- Vehicle engines and engine parts; at manufacturer: 0.000279159 USD
- Golf courses, marinas, ski resorts, fitness and other rec centers and industries: 0.000101627 USD
- Primary iron, steel, and ferroalloy products; at manufacturer: 0.000330144 USD
- Paper; at manufacturer: 0.000101512 USD
- Architectural, engineering, and related services: 0.000101703 USD
- Lids, jars, bottle caps, other metal closures and crowns; at manufacturer: 0.00149731 USD
- Electricity; at consumer: 0.00226332 USD
- Warehousing: 0.000761992 USD
- Photography and photocopying equipment; at manufacturer: 7.61344e-5 USD
- Air conditioning, refrigeration, and warm air heating equipment; at manufacturer: 7.61725e-5 USD
- Metal coatings, engravings, and heat treatments; at manufacturer: 0.00053355 USD
- Motor vehicle steering, suspension components (except spring), and brake systems; at manufacturer: 0.000558319 USD
- Glass and glass products; at manufacturer: 5.07562e-5 USD
- Used and secondhand goods: 1.90554e-8 USD
- Software: 0.000177742 USD
- Wooden windows, door, and flooring; at manufacturer: 2.78553e-5 USD
- Scenic and sightseeing transportation and support activities for transportation: 0.00104052 USD
- Other basic organic chemicals; at manufacturer: 0.000101512 USD
- Securities and commodities brokerage and exchanges: 0.000558452 USD
- Transmission and power train parts; at manufacturer: 0.000685247 USD
- Books, newspapers, magazines, and other print media; at manufacturer: 0.000329916 USD
- Business support: 0.000330735 USD
- Company and enterprise management: 0.0252621 USD
- Plastic bags, films, and sheets; at manufacturer: 0.000126891 USD
- Electronic equipment repair and maintenance: 0.00175166 USD
- Computer terminals and other computer peripheral equipment; at manufacturer: 0.00035537 USD
- other miscellaneous electrical equipment and components; at manufacturer: 0.000710587 USD
- Other rubber products; at manufacturer: 0.000101512 USD
- Consumer goods and general rental centers: 0.000203406 USD
- Semiconductors; at manufacturer: 0.0242107 USD
- Civic, social, professional, and similar organizations: 0.000964407 USD
- Internet publishing and broadcasting: 0.000406069 USD
- Monetary authorities and depository credit intermediation: 0.00802014 USD
- Watches, clocks, and other measuring and controlling devices; at manufacturer: 2.53781e-5 USD
- Relay and industrial controls; at manufacturer: 0.000152269 USD
- Wireless telecommunications: 0.000357676 USD
- Dry-cleaning and laundry: 0.00982133 USD
- External hard drives, CDs, other storage media; at manufacturer: 7.61534e-5 USD
- Vehicle metal stamping; at manufacturer: 0.000126891 USD
- Insurance carriers: 0.00398475 USD
- Printed circuit and electronic assembly; at manufacturer: 0.0238047 USD
- Magazines and journals; at publisher: 7.61534e-5 USD
- Employment services: 0.00936899 USD
- Passenger ground transport: 0.000203273 USD
- Legal services: 0.00533343 USD
- Rail transport: 5.07753e-5 USD
- Metal pipe fittings, ball and roller bearings, industrial patterns, metal bath fixtures, other misc. fabricated metals; at manufacturer: 0.000152288 USD
- Office administration: 0.000965283 USD
- Nondepository credit intermediation and related activities: 0.000964616 USD
- Cardboard; at manufacturer: 7.61534e-5 USD
- Wiring devices; at manufacturer: 0.000837478 USD
- Buildings and dwellings services: 0.00304671 USD
- Metal hinges, keys, lock, and other hardware; at manufacturer: 5.07562e-5 USD
- Data processing and hosting: 0.00144749 USD
- Springs and wires; at manufacturer: 5.07562e-5 USD
- Gasoline, fuels, and by-products of petroleum refining; at manufacturer: 0.0016504 USD
- Other transportation equipment; at manufacturer: 2.53781e-5 USD
- Stationery; at manufacturer: 2.53781e-5 USD
- Urethane and other foam products; at manufacturer: 2.53781e-5 USD
- Other plastic products; at manufacturer: 0.00246174 USD
- Plastic pipe, fittings, and sausage casings; at manufacturer: 5.07562e-5 USD
- Independent artists, writers, and performers: 7.64583e-5 USD
- Telecommunications: 0.00906567 USD
- Cardboard containers; at manufacturer: 0.000177647 USD
- Other petroleum and coal products; at manufacturer: 0.000101512 USD
- Investment advice, portfolio management, and other financial advising services: 0.0002538 USD
- Couriers and messengers: 0.00144655 USD
- Vehicle repair: 0.00170129 USD
- Marketing research and all other miscellaneous professional, scientific, and technical services: 0.000864057 USD
- Truck transport: 0.00215735 USD
- Drinking water and wastewater treatment; at consumer: 7.69347e-5 USD
- Water transport (boats, ships, ferries): 2.53972e-5 USD
- Insurance agencies and brokerages: 0.000177761 USD
- Paints and coatings; at manufacturer: 0.000177704 USD
- Motors and generators; at manufacturer: 0.00147193 USD
- Nonresidential building repair and maintanence: 0.000812691 USD
- Facilities support: 0.000457283 USD
- Other real estate: 0.037098 USD
- Rubber tires; at manufacturer: 5.07562e-5 USD
- Other retail: 0.000685209 USD
- Newspapers; at publisher: 2.53781e-5 USD
- Gaskets, seals, musical instruments, fasteners, brooms, brushes, mop and other misc. goods; at manufacturer: 2.53781e-5 USD
- Postal service: 0.00129428 USD
- Other computer related services, including facilities management: 0.00167557 USD
- Plastic bottles; at manufacturer: 5.07562e-5 USD
- Vehicle rental and leasing: 0.00183064 USD
- State and local government enterprises: 0.000330068 USD
- Secondary copper products; at manufacturer: 2.53781e-5 USD
- Copper, nickel, lead, and zinc; at mine: 0.000558719 USD
- Noncomparable imports: 0.00028318 USD
- Air transport: 0.00114293 USD
- Specialized design: 2.54734e-5 USD
- Valve and fittings (except for plumbing); at manufacturer: 5.07562e-5 USD
- Commercial machinery repair: 0.00335178 USD
- Speed changers, industrial high-speed drives, and gears; at manufacturer: 0.000380672 USD
- Semiconductor machinery; at manufacturer: 5.14495e-7 USD
- All other food and drinking places: 5.08134e-5 USD
- Other secondary nonferrous metal products; at manufacturer: 2.53781e-5 USD
- Sand, gravel, clay, phosphate, other nonmetallic minerals; at mine: 2.53781e-5 USD
- Other concrete products; at manufacturer: 5.08325e-5 USD
- Sports: 0.00016547 USD
- Aluminum; at manufacturer: 2.28664e-7 USD
- Coal; at mine: 2.53781e-5 USD
- Veneer, plywood, and engineered wood; at manufacturer: 7.61344e-5 USD
- Computer systems design: 0.00182793 USD
- Industrial process variable instruments; at manufacturer: 0.000101512 USD
- Radio and television: 0.000120087 USD
- News syndicates, libraries, archives, Internet publishing and all other information services: 0.000380862 USD
- Communication and energy wire and cable; at manufacturer: 0.0008121 USD
- Limited-service restaurants: 0.000330087 USD
- Vehicle electrical and electronic equipment; at manufacturer: 0.000177647 USD
- Audio and video equipment; at manufacturer: 0.000177647 USD
- Paper bags and coated paper; at manufacturer: 0.000101512 USD
- Satellite, telecommunications resellers, and all other telecommunications: 0.000964902 USD
- Screws, nuts, and bolts; at manufacturer: 0.0002538 USD
- Wireless communications; at manufacturer: 0.0110408 USD
- Food and beverage stores: 5.07562e-5 USD
- Sound recording: 2.83925e-6 USD
- Polystyrene foam products; at manufacturer: 2.53781e-5 USD
- Movies and film: 3.54584e-5 USD
- General merchandise stores: 0.000126891 USD
- Storage batteries; at manufacturer: 0.000101512 USD
- Machine shops; at manufacturer: 0.000329916 USD
- Full-service restaurants: 0.000660422 USD
- Management consulting: 0.0022622 USD
- Vehicle seating and interior trim (upholstery); at manufacturer: 5.07562e-5 USD

## Inputs from nature
- Energy, solar: 1.58518e-6 MJ; data quality (3,1,1,1,1)
- Water, fresh: 9.75279e-5, 5.6355e-5 m3 (2 entries, compartments not in this file); data quality (1,2,1,4,2)
- Occupation, urban, discontinuously built: 0.00131957 m2*a; data quality (4,2,1,1,1)

## Emissions to nature
- 2,2,4-trimethylpentane: 4.89096e-8 kg; data quality (3,2,1,4,1)
- Benzo(g,h,i)perylene: 1.03331e-11 kg; data quality (3,2,1,4,1)
- nickel: 5.53939e-11 kg; data quality (3,2,1,2,4)
- carbon monoxide: 5.23361e-5 kg; data quality (3,2,1,1,1)
- pyrene: 4.37941e-11 kg; data quality (3,2,1,4,1)
- ethane, 1,2-dichloro-: 1.99751e-14 kg; data quality (3,2,1,1,5)
- benzene: 8.72763e-8 kg; data quality (3,2,1,4,1)
- ethene, tetrachloro-: 6.38955e-9 kg; data quality (3,2,1,1,5)
- benzene, ethyl-: 2.54058e-6 kg; data quality (3,2,1,1,5)
- Dibenz(a,h)anthracene: 3.09943e-14 kg; data quality (3,2,1,3,2)
- formaldehyde: 6.47732e-8 kg; data quality (3,2,1,3,2)
- Water, fresh: 0.000130295 m3; data quality (1,2,1,4,2)
- fluoranthene: 3.48497e-11 kg; data quality (3,2,1,4,1)
- cadmium: 6.70162e-12 kg; data quality (3,2,1,1,5)
- hydrogen chloride: 5.86326e-8 kg; data quality (2,2,1,1,5)
- m-xylene: 4.70035e-6 kg; data quality (3,2,1,1,5)
- trichloroethylene: 3.79243e-9 kg; data quality (3,2,1,1,5)
- benz[a]anthracene: 3.80561e-12 kg; data quality (3,2,1,4,1)
- cumene: 1.23947e-8 kg; data quality (4,2,1,1,5)
- nitrogen oxides: 3.43505e-6 kg; data quality (3,2,1,1,2)
- Ethylene glycol monoethyl ether: 9.99101e-10 kg; data quality (3,2,1,1,5)
- Cobalt: 4.34506e-13 kg; data quality (3,2,1,1,5)
- beryllium: 6.20724e-14 kg; data quality (2,2,1,1,5)
- methane, dichloro-, hcc-30: 3.15759e-8 kg; data quality (3,2,1,1,5)
- Ethane, pentafluoro-, HFC-125: 3.76986e-8 kg; data quality (4,2,1,4,1)
- selenium: 1.24144e-13 kg; data quality (2,2,1,1,5)
- VOC, volatile organic compounds: 0.000384949 kg; data quality (3,2,1,1,5)
- 2-methylnaphthalene: 2.26292e-16 kg; data quality (2,2,1,1,5)
- anthracene: 2.61279e-11 kg; data quality (3,2,1,4,1)
- Ethane, 1,1,1,2-tetrafluoro-, HFC-134a: 1.42091e-7 kg; data quality (4,2,1,4,1)
- o-Xylene: 2.06835e-6 kg; data quality (3,2,1,1,5)
- manganese: 7.37197e-11 kg; data quality (3,2,1,1,5)
- Triethyl amine: 2.77111e-7 kg; data quality (3,2,1,1,5)
- acenaphthylene: 1.30866e-10 kg; data quality (3,2,1,4,1)
- Xylene: 1.43937e-6 kg; data quality (4,2,1,1,5)
- benzo(a)pyrene: 3.63607e-12 kg; data quality (3,2,1,4,1)
- ethane, 1,2-dibromo-: 1.73539e-15 kg; data quality (2,2,1,1,5)
- ammonia: 4.0364e-8 kg; data quality (3,2,1,2,4)
- Benzo(k)fluoranthene: 3.84332e-12 kg; data quality (3,2,1,4,1)
- Phthalate, dibutyl-: 1.29645e-8 kg; data quality (3,2,1,1,5)
- acetaldehyde: 2.23971e-8 kg; data quality (3,2,1,4,1)
- methanol: 2.60967e-7 kg; data quality (3,2,1,1,5)
- Dinitrogen monoxide: 2.45399e-8 kg; data quality (4,2,1,4,1)
- Hydrocarbons, aromatic: 9.60052e-10 kg; data quality (3,2,1,4,1)
- propanal: 6.38393e-9 kg; data quality (3,2,1,3,2)
- phthalate, dioctyl-: 1.67167e-11 kg; data quality (3,2,1,1,5)
- arsenic: 1.10534e-11 kg; data quality (3,2,1,4,2)
- methyl isobutyl ketone: 1.45538e-5 kg; data quality (3,2,1,1,5)
- hexane: 8.6417e-5 kg; data quality (3,2,1,1,5)
- 3-methylcholanthrene: 1.69707e-17 kg; data quality (2,2,1,1,5)
- butadiene: 1.4117e-8 kg; data quality (3,2,1,4,1)
- ethylene glycol: 6.42749e-7 kg; data quality (3,2,1,1,5)
- Chromium, ion: 1.22676e-11 kg; data quality (2,2,1,3,3)
- 1,1,1-trichloroethane: 2.25132e-7 kg; data quality (3,2,1,1,5)
- isophorone: 1.74041e-8 kg; data quality (3,2,1,1,5)
- acetophenone: 1.97146e-9 kg; data quality (3,2,1,1,5)
- Diethylene glycol butyl ether: 1.48672e-8 kg; data quality (4,2,1,1,5)
- Phosphorus: 1.3309e-10 kg; data quality (2,1,1,1,5)
- Carbon dioxide: 0.00992091 kg; data quality (4,2,1,4,1)
- naphthalene: 8.1261e-8 kg; data quality (3,2,1,1,5)
- acrolein: 1.87793e-9 kg; data quality (3,2,1,4,1)
- mercury: 1.45395e-12 kg; data quality (2,2,1,1,5)
- 1,1,2,2-tetrachloroethane: 1.31388e-8 kg; data quality (3,2,1,1,5)
- Methane, difluoro-, HFC-32: 2.19539e-8 kg; data quality (4,2,1,4,1)
- Benzo(a)anthracene: 1.50877e-16 kg; data quality (2,2,1,1,5)
- Methane: 8.97592e-7 kg; data quality (4,2,1,4,1)
- lead: 2.21488e-10 kg; data quality (3,2,1,1,5)
- para-xylene: 2.09524e-6 kg; data quality (3,2,1,1,5)
- Benzo(b)fluoranthene: 3.91001e-12 kg; data quality (3,2,1,4,1)
- sulfur dioxide: 4.51753e-8 kg; data quality (2,2,1,1,4)
- Propane, 1,1,1,3,3,3-hexafluoro-, HCFC-236fa: 4.35747e-10 kg; data quality (4,2,1,4,1)
- nitric acid: 2.87026e-9 kg; data quality (3,1,1,1,5)
- acenaphthene: 3.37122e-11 kg; data quality (3,2,1,4,1)
- particulates, < 2.5 um: 1.02573e-6 kg; data quality (3,2,1,2,4)
- Ethane, 1,1,1-trifluoro-, HFC-143a: 1.61297e-8 kg; data quality (4,2,1,4,1)
- toluene: 4.46267e-5 kg; data quality (3,2,1,1,5)
- Chromium VI: 1.64797e-11 kg; data quality (3,2,1,1,5)
- phenol: 2.44463e-7 kg; data quality (4,2,1,1,5)
- Indeno(1,2,3-cd)pyrene: 3.1725e-12 kg; data quality (3,2,1,4,1)
- styrene: 1.58212e-9 kg; data quality (3,2,1,4,2)
- tertiary-Butyl Acetate: 9.1299e-6 kg; data quality (3,2,1,1,5)
- fluorene: 6.19651e-11 kg; data quality (3,2,1,4,1)
- Nitrogen: 2.03303e-9 kg; data quality (5,2,1,1,5)
- phenanthrene: 1.11165e-10 kg; data quality (3,2,1,4,1)
- particulates, < 10 um: 1.84776e-7 kg; data quality (3,2,1,1,5)
- Chrysene: 3.6369e-12 kg; data quality (3,2,1,4,1)

## Inventory method
Input-output

## Modelling constants
The reference unit of all processes is 1 USD2013 of the good or service. The technosphere inputs are based on the US BEA detailed input-output tables for 2007. The IO tables are combined to develop a commodity-by-commodity model based on the the industry-technology assumption (see Suh et al., 2010), which assumes all commodities produced by a given industry have the same input structure, but that multiple industries can produce the same commodity. Thus, model technosphere flows represent commodity outputs (and not industry outputs) from other processes in the model. There are no by-products included in these processes. All commodity production is based on US-conditions, despite in reality that some goods and services are produced overseas, as USEEIO v1.1 is a single-region IO model.

## Completeness
The input-output approach assures that all purchased inputs associated with the sectors making these commodities as reported in the US census for 2007 are included. The direct resources extracted including minerals, energy sources, water and land occupied are included. Emissions to air include all critieria air pollutants, greenhouse gases, and hazardous and toxic air pollutants as defined by US EPA. Releases to water include toxics, total nitrogen and total phosphorus, and water discharges. Releases to soil or groundwater include toxics and agriculutural pesticides. Some metal releases to air, water and soil are not included because they could not be speciated. Solid hazardous and non-hazardous wastes generated are not included as an elementary flows although purchases of waste services are included.

## Data treatment
Greenhouse gases are primarily from the US Greenhouse Gas Emission Inventory (USEPA 2016a). Biogenic C uptake is not included (change from version 1.0), as biogenic C emission are not included. Toxic releases to air, water and soil (except pesticides) are from the 2013 Toxic Release Inventory (USEPA 2015a). Criteria air pollutants and hazardous air pollutants are from the 2011 National Emissions Inventory (USEPA 2015b). All estimates are normalized by industry based on sector output in the data year, then converted to 2013 USD using relative sector-specific CPIs (if data year is not 2013). Energy use represent raw renewables or fossil fuel energies and is based on EIA data for 2014. See Table 1 in Yang, Ingwersen et al. 2017 and Supporting Information 1, and the v1.1 data update notes (Ingwersen et al. 2017) for all details on environmental data sources used.Land occupation for commercial buildings was estimated based on the building floorspace data provided by the U.S. Energy Information Administration 2012 Commercial Building Energy Consumption Survey (CBECS) (EIA 2015). Total commercial public supply water use is reported by USGS (Maupin et al. 2014). Water use is allocated across commercial sectors based on their use of water, sewage, and other services in USD based on the 2007 Benchmark Use Table before redefinitions (BEA 2015).

## Data collection
2015-2016

## Sampling procedure
US federal government sources, including surveys and US EPA emissions databases are used as the primary sources. From these sources, data for US reporting establishments/facilities are aggregated by the NAICS sector as defined in the BEA detailed 2007 input-output tables. When level of sector aggregation differs, or when direct emissions are not reported but modeled, additional sources are used to make allocations and estimates.

## Review details
In regard to quality assurance and peer-review, each dataset created went through Quality Assurance as defined in a quality assurance project plans at US EPA, CSRA or ERG. The model was assembled with the IO model builder model (USEPA 2016c). Validation functions were used to check that all the model components were properly assembled and harmonized. Bayou Demeke and Santosh Ghimire provided internal peer review of the model methodology and the manuscript underwent standard EPA management review. An editor and two anonymous reviewers at the Journal of Cleaner Production reviewed the model. In regard to data quality evaluation, data quality assessment was performed at the flow and process levels according to the updated US EPA data quality assessment guidelines as defined in US EPA (2016b).

## Intended application
The primary application is for use in the US Environmentally-Extended Input-Ouput model, USEEIO, version 1.1. This model is being used by the US EPA for supporting tools that prioritize goods and services based on potential environmental impacts, resource use or emissions for large regions, including the US and US states, and as a strealined tool for organizations as a starting point to consider sustainable materials management. Model results are designed to provide meso/macro-level decision support.

## Project
USEEIO v1.1 was developed by the US EPA with CSRA and ERG with Wesley W. Ingwersen and David E. Meyer as research leads. Yi Yang was the technical lead on the work for CSRA (contract EP-C-15-012); Troy Hawkins was lead for ERG (contract EP-C-12-021).

## Sources
- USDA 2016
- USEPA 2016b
- USEPA 2016c
- Maupin et al. 2014
- EIA 2016
- Ingwersen et al. DRAFT
- Macknick et al. 2011
- Edelen and Ingwersen 2017
- Yienger et al. 1995
- Nickerson et al. 2011
- Kim et el. 2013
- Goebes et al. 2003
- EIA 2015
- USDA 2014
- USGS 2015
- USDA 2009a
- Blackhurst et al. 2010
- USEPA 2016a
- EIA 2013
- Statistics Canada 2010
- USDA 2009b
- BLM 2008
- EIA 2017
- Lovelace 2009
- Ingwersen et al. 2017
- USEPA 2015a
- BEA 2015
- USEPA 2015b
- USGS 2016
- Torcellini et al. 2003
- USDA 2006
