# All other food and drinking places

Dataset: openLCA process, unit process
Category: 72: Accommodation and Food Services
Geography: United States
Time period: 2017-01-01 to 2017-12-31
Data quality: US EPA - Process Pedigree Matrix (1;1)
Exchange data quality scheme: US EPA - Flow Pedigree Matrix
Generated by: US EPA with CSRA and ERG
Owner: US EPA
Published in: Yang, Ingwersen et al. 2017
restrictionsDescription: This model shold be appropriately cited (see Yang, Ingwersen et al. 2017 source or Publication field) when used. Any changes or derivations of this model by the user should be documented. The model itself and any results from use of this model shall not be construed to consitute US EPA opinion or policy.
copyright: false

## General comment
BEA Code & Name is '722A00:All other food and drinking places'. Description of the primary industry producing this good or service, adapted from the Census Bureau NAICS 2007 descriptions: The Accommodation and Food Services sector comprises establishments providing customers with lodging and/or preparing meals, snacks, and beverages for immediate consumption. The sector includes both accommodation and food services establishments because the two activities are often combined at the same establishment. Excluded from this sector are civic and social organizations; amusement and recreation parks; theaters; and other recreation or entertainment facilities providing food and beverage services. Related NAICS codes are: 7223-4

## Technology
The process describes the average US production of this good or service within this NAICS-based grouping defined in the BEA 2007 detailed input-output tables (BEA 2015). Distribution, wholesale and retailing of this good or service, use, and final disposal are not included. Creation of a product system with this process will enable modeling of all upstream (supply-chain) activities.

## Geography
Data represent the 50 US states

## Time period
2017 was the year in which this version of USEEIO was released and is the target date for the model

## Reference product
- All other food and drinking places: 1 USD

## Inputs from technosphere
All rows: data quality (1,3,1,1,1)
- Welding and Soldering Equipment, Scales and Balances, and other general purpose machinery; at manufacturer: 1.92838e-8 USD
- Software: 2.89257e-8 USD
- other miscellaneous electrical equipment and components; at manufacturer: 4.82096e-8 USD
- Curtains and linens; at manufacturer: 0.000959233 USD
- Cardboard; at manufacturer: 0.000121712 USD
- Paper bags and coated paper; at manufacturer: 0.000168232 USD
- Air and gas compressors; at manufacturer: 0.000863955 USD
- Monetary authorities and depository credit intermediation: 0.000858185 USD
- Audio and video equipment; at manufacturer: 1.92838e-7 USD
- Distilleries and spirits; at manufacturer: 0.00898096 USD
- Cardboard containers; at manufacturer: 0.000265438 USD
- All other food and drinking places: 9.72204e-5 USD
- Breweries and beer; at manufacturer: 0.00527808 USD
- Other vehicle parts; at manufacturer: 0.00024031 USD
- Other transportation equipment; at manufacturer: 1.34987e-7 USD
- Environmental and other technical consulting services: 0.000120618 USD
- Books; at publisher: 1.41654e-7 USD
- Lessors of nonfinancial intangible assets: 0.00815599 USD
- Computer systems design: 0.000252213 USD
- Gaskets, seals, musical instruments, fasteners, brooms, brushes, mop and other misc. goods; at manufacturer: 0.000611704 USD
- Screws, nuts, and bolts; at manufacturer: 4.9003e-5 USD
- Industrial process variable instruments; at manufacturer: 9.64192e-9 USD
- Storage batteries; at manufacturer: 3.59712e-5 USD
- Seasonings and dressings; at manufacturer: 0.00189564 USD
- Secondary steel products; at manufacturer: 1.19904e-5 USD
- Management consulting: 0.000506663 USD
- Advertising and public relations: 0.00963295 USD
- Passenger ground transport: 0.000181311 USD
- Laminated plastic plates and shapes; at manufacturer: 2.39808e-5 USD
- Other real estate: 0.0685667 USD
- Snack foods; at manufacturer: 0.00153491 USD
- Household goods repair: 0.000361679 USD
- Air purification and ventilation equipment; at manufacturer: 3.65705e-6 USD
- Magazines and journals; at publisher: 6.0492e-5 USD
- Ice cream and frozen desserts; at manufacturer: 0.00335846 USD
- Wild-caught fish and game; at place of capture: 0.00167923 USD
- Investigation and security: 0.000397931 USD
- Concrete pipe, bricks, and blocks; at manufacturer: 0.00172662 USD
- Computer storage device readers; at manufacturer: 9.64192e-9 USD
- Power tools; at manufacturer: 4.79616e-5 USD
- Plywood and veneer; at manufacturer: 0.00173861 USD
- Fresh soybeans, canola, flaxseeds, and other oilseeds; at farm: 2.39808e-5 USD
- Metal structural products; at manufacturer: 0.000959233 USD
- Air transport: 0.000865483 USD
- Sporting and athletic goods; at manufacturer: 7.19425e-5 USD
- Light bulbs; at manufacturer: 3.59712e-5 USD
- Pipeline transport: 1.21158e-5 USD
- Paints and coatings; at manufacturer: 2.42122e-5 USD
- Other basic organic chemicals; at manufacturer: 0.000409455 USD
- Relay and industrial controls; at manufacturer: 2.89257e-8 USD
- All other forging, stamping, and sintering; at manufacturer: 0.000971223 USD
- Machinery for the paper, textile, food or other industries (except semiconductor machinery); at manufacturer: 0.000107914 USD
- Watches, clocks, and other measuring and controlling devices; at manufacturer: 2.89257e-8 USD
- Other support activities for mining: 4.21352e-6 USD
- Flours and malts; at manufacturer: 3.78127e-5 USD
- Sound recording: 0.000429863 USD
- Facilities support: 0.0002403 USD
- Golf courses, marinas, ski resorts, fitness and other rec centers and industries: 0.00148729 USD
- Vehicle repair: 0.00288969 USD
- Pumps and pumping equipment; at manufacturer: 1.83196e-7 USD
- Hotels and campgrounds: 0.0020332 USD
- Plastic bottles; at manufacturer: 5.9952e-5 USD
- Cast iron and steel; at manufacturer: 1.45593e-6 USD
- Company and enterprise management: 0.0611887 USD
- Fresh fruits and tree nuts; at farm: 4.79616e-5 USD
- Switchgear and switchboards; at manufacturer: 0.000239808 USD
- Electronic capacitors, resistors, coils, transformers, connectors and other components (except semiconductors and printed circuit assemblies); at manufacturer: 9.64192e-9 USD
- Other retail: 0.00652323 USD
- Ball and roller bearings; at manufacturer: 7.46836e-7 USD
- All other foods; at manufacturer: 0.00100748 USD
- Railroad rolling stock; at manufacturer: 1.74221e-6 USD
- Amusement parks and arcades: 0.00028777 USD
- Photographers: 1.19904e-5 USD
- Insurance agencies and brokerages: 0.00017483 USD
- Dry-cleaning and laundry: 0.000879137 USD
- Sugar, candy, and chocolate; at manufacturer: 0.000995346 USD
- Employment services: 0.0147668 USD
- Sports: 4.83962e-5 USD
- Plastic bags, films, and sheets; at manufacturer: 0.000168271 USD
- External hard drives, CDs, other storage media; at manufacturer: 2.39905e-5 USD
- Fabric; at manufacturer: 1.19904e-5 USD
- Securities and commodities brokerage and exchanges: 0.0139006 USD
- Warehousing: 0.00449312 USD
- News syndicates, libraries, archives, Internet publishing and all other information services: 1.24154e-5 USD
- Electronic equipment repair and maintenance: 0.000757081 USD
- Scientific research and development: 3.85677e-8 USD
- Veneer, plywood, and engineered wood; at manufacturer: 6.03703e-5 USD
- Used and secondhand goods: 1.60056e-6 USD
- Metal pipe fittings, ball and roller bearings, industrial patterns, metal bath fixtures, other misc. fabricated metals; at manufacturer: 0.000336985 USD
- Insurance carriers: 0.00538162 USD
- Aircraft; at manufacturer: 9.64192e-9 USD
- Commercial equipment rental: 0.000521995 USD
- Internet publishing and broadcasting: 0.000191866 USD
- Other aircraft parts; at manufacturer: 2.01516e-6 USD
- Telecommunications: 0.000999233 USD
- Other textiles; at manufacturer: 1.22863e-5 USD
- Vegetable oils and by-products; at manufacturer: 0.0335731 USD
- Other plastic products; at manufacturer: 0.0014288 USD
- Office supplies (not paper); at manufacturer: 1.63913e-7 USD
- Limited-service restaurants: 0.000565658 USD
- Cheese; at manufacturer: 0.0262855 USD
- Books, newspapers, magazines, and other print media; at manufacturer: 0.00140387 USD
- Nonferrous metal casts; at manufacturer: 1.20001e-5 USD
- Metal coatings, engravings, and heat treatments; at manufacturer: 2.12122e-6 USD
- Clay and ceramic products; at manufacturer: 0.000899281 USD
- Heating equipment other than warm air furnaces; at manufacturer: 0.000143885 USD
- Nondepository credit intermediation and related activities: 0.00843472 USD
- Noncomparable imports: 0.00273895 USD
- Soap and cleaning compounds; at manufacturer: 8.39618e-5 USD
- Cutting and machine tool accessory, rolling mill, and other metalworking machines; at manufacturer: 1.06061e-7 USD
- Hydraulic pumps, motors, cylinders and actuators; at manufacturer: 9.64192e-9 USD
- Rail transport: 0.00279436 USD
- Radio and television: 1.41654e-7 USD
- Rubber tires; at manufacturer: 3.61448e-5 USD
- Wireless communications; at manufacturer: 0.000263789 USD
- Vehicles and parts sales: 1.22025e-5 USD
- Vehicle rental and leasing: 0.00113509 USD
- Travel arrangement and reservation: 0.000120434 USD
- Clothing; at manufacturer: 1.36903e-5 USD
- Dry, condensed, and evaporated dairy; at manufacturer: 0.000779518 USD
- Light fixtures; at manufacturer: 7.19425e-5 USD
- Other computer related services, including facilities management: 0.000208021 USD
- Jewelry and silverware; at manufacturer: 5.9952e-5 USD
- Wireless telecommunications: 0.00180169 USD
- Ships and ship repair; at manufacturer: 2.12122e-7 USD
- Colleges, universities, junior colleges, and professional schools: 7.71353e-8 USD
- Glass and glass products; at manufacturer: 0.000503665 USD
- Business support: 0.000412616 USD
- Flavored drink concentrates; at manufacturer: 0.00434095 USD
- Promoters and agents: 4.86655e-5 USD
- Stationery; at manufacturer: 1.20001e-5 USD
- Lids, jars, bottle caps, other metal closures and crowns; at manufacturer: 2.83307e-7 USD
- Data processing and hosting: 0.000521289 USD
- Soft drinks, bottled water, and ice; at manufacturer: 0.0058399 USD
- Scenic and sightseeing transportation and support activities for transportation: 0.000125338 USD
- Motors and generators; at manufacturer: 1.15703e-7 USD
- Water transport (boats, ships, ferries): 0.000444121 USD
- Copper, nickel, lead, and zinc; at mine: 4.79616e-5 USD
- Packaged meat (except poultry); at manufacturer: 0.00792021 USD
- Vending, commercial laundry, and other commercial and service industry machinery; at manufacturer: 9.64192e-9 USD
- Mattresses, blinds and shades; at manufacturer: 1.06061e-7 USD
- Speed changers, industrial high-speed drives, and gears; at manufacturer: 8.67772e-8 USD
- Other secondary nonferrous metal products; at manufacturer: 7.19425e-5 USD
- Other animal food; at manufacturer: 0.0113189 USD
- Wood kitchen cabinets and countertops; at manufacturer: 0.000719425 USD
- Commercial machinery repair: 0.00607974 USD
- Coal; at mine: 0.000107923 USD
- Metal hinges, keys, lock, and other hardware; at manufacturer: 0.000491616 USD
- Wholesale trade: 0.0328974 USD
- Legal services: 0.00259182 USD
- Fresh vegetables, melons, and potatoes; at farm: 0.000108065 USD
- Cement; at manufacturer: 0.000239808 USD
- Motor vehicle steering, suspension components (except spring), and brake systems; at manufacturer: 2.42411e-5 USD
- Unrefined oil and gas; at extraction site: 6.57598e-5 USD
- Material handling equipment; at manufacturer: 3.66393e-7 USD
- Specialized design: 9.78943e-5 USD
- Urethane and other foam products; at manufacturer: 0.00130701 USD
- Consumer goods and general rental centers: 0.000120753 USD
- Animal farms and aquaculture ponds (except cattle and poultry): 0.000468166 USD
- General merchandise stores: 0.00059954 USD
- Lime and gypsum products; at manufacturer: 0.00157074 USD
- Full-service restaurants: 0.000624741 USD
- Other rubber products; at manufacturer: 0.000191847 USD
- Vehicle electrical and electronic equipment; at manufacturer: 1.27232e-5 USD
- Light gauge metal cans, boxes, and containers; at manufacturer: 2.89257e-8 USD
- Paper; at manufacturer: 0.000156685 USD
- Fluid milk and butter; at manufacturer: 0.00160728 USD
- Accounting, tax preparation, bookkeeping, and payroll: 0.00804459 USD
- Secondary copper products; at manufacturer: 5.9952e-5 USD
- Compressed Gases; at manufacturer: 1.83196e-6 USD
- Frozen food; at manufacturer: 0.000854152 USD
- Bread and other baked goods; at manufacturer: 0.00299862 USD
- Corn products; at manufacturer: 0.013741 USD
- Lumber and treated lumber; at manufacturer: 0.000347722 USD
- Independent artists, writers, and performers: 4.81611e-5 USD
- Wooden windows, door, and flooring; at manufacturer: 0.00101918 USD
- Office furniture and custom architectural woodwork and millwork; at manufacturer: 2.69142e-6 USD
- Wiring devices; at manufacturer: 0.000107914 USD
- Cut stone and stone products; at manufacturer: 0.00131894 USD
- Other petroleum and coal products; at manufacturer: 0.000444397 USD
- Movies and film: 0.000167952 USD
- Air conditioning, refrigeration, and warm air heating equipment; at manufacturer: 0.000827338 USD
- Investment advice, portfolio management, and other financial advising services: 7.20389e-5 USD
- Gasoline, fuels, and by-products of petroleum refining; at manufacturer: 0.000762311 USD
- Other concrete products; at manufacturer: 0.00133094 USD
- Pickup trucks, vans, and SUVs; at manufacturer: 4.82096e-8 USD
- Chemicals (except basic chemicals, agrichemicals, polymers, paints, pharmaceuticals,soaps, cleaning compounds); at manufacturer: 1.30028e-5 USD
- Nonresidential building repair and maintanence: 0.00343057 USD
- Aluminum products; at manufacturer: 0.000311751 USD
- Food and beverage stores: 9.64192e-9 USD
- Cutlery and handtools; at manufacturer: 0.000157005 USD
- Seafood; at manufacturer: 0.00389774 USD
- Marketing research and all other miscellaneous professional, scientific, and technical services: 0.000288454 USD
- Carbon and graphite products; at manufacturer: 6.74934e-8 USD
- Directory, mailing list, and other publishers; at publisher: 4.90797e-5 USD
- Plastic pipe, fittings, and sausage casings; at manufacturer: 0.00106715 USD
- Postal service: 0.000220144 USD
- Architectural, engineering, and related services: 0.00067977 USD
- Packaged poultry; at manufacturer: 0.0203252 USD
- Couriers and messengers: 0.000137567 USD
- Fresh wheat, corn, rice, and other grains; at farm: 1.19904e-5 USD
- Synthetic dyes and pigments; at manufacturer: 3.18183e-7 USD
- Power boilers and heat exchangers; at manufacturer: 0.000671463 USD
- Other support services: 0.00012226 USD
- Communications equipment; at manufacturer: 3.59712e-5 USD
- Polystyrene foam products; at manufacturer: 0.00513293 USD
- Natural gas; at consumer: 0.00043306 USD
- Primary iron, steel, and ferroalloy products; at manufacturer: 0.000168251 USD
- Fruit and vegetable preservation; at manufacturer: 0.00296575 USD
- Tobacco, cotton, sugarcane, peanuts, sugar beets, herbs and spices, and other crops; at farm: 1.19904e-5 USD
- Electricity; at consumer: 0.0129989 USD
- State and local government enterprises: 0.000239818 USD
- Vehicle seating and interior trim (upholstery); at manufacturer: 5.39947e-7 USD
- Metal plumbing drains, faucets, valves, and other fittings; at manufacturer: 0.000515588 USD
- Buildings and dwellings services: 0.00115644 USD
- Vehicle engines and engine parts; at manufacturer: 2.43858e-5 USD
- Refined vegetable, olive, and seed oils; at manufacturer: 0.000215827 USD
- Fluid meters and counting devices; at manufacturer: 9.64192e-9 USD
- Drinking water and wastewater treatment; at consumer: 0.000220959 USD
- Communication and energy wire and cable; at manufacturer: 0.0020024 USD
- Metal windows, doors, and architectural products; at manufacturer: 0.00182254 USD
- Wineries and wine; at manufacturer: 0.018789 USD
- Civic, social, professional, and similar organizations: 0.00013833 USD
- Machine shops; at manufacturer: 3.13362e-6 USD
- Computer terminals and other computer peripheral equipment; at manufacturer: 0.000204579 USD
- Waste management and remediation: 0.000656806 USD
- Satellite, telecommunications resellers, and all other telecommunications: 0.000111847 USD
- Semiconductors; at manufacturer: 9.64192e-9 USD
- Coffee and tea; at manufacturer: 0.000875876 USD
- Truck transport: 0.00522784 USD
- Performances: 0.000347731 USD
- Cookies, crackers, pastas, and tortillas; at manufacturer: 0.000695869 USD
- All other converted paper products; at manufacturer: 0.000455732 USD
- Other basic inorganic chemicals; at manufacturer: 4.62812e-7 USD
- Transmission and power train parts; at manufacturer: 1.39958e-5 USD
- Office administration: 0.000228329 USD
- Office machinery; at manufacturer: 1.2708e-5 USD
- Petrochemicals; at manufacturer: 9.64192e-9 USD

## Inputs from nature
- Occupation, urban, discontinuously built: 0.000892954 m2*a; data quality (4,2,1,1,1)
- Water, fresh: 0.000195321, 0.000338022 m3 (2 entries, compartments not in this file); data quality (1,2,1,4,2)

## Emissions to nature
- manganese: 2.21744e-12, 3.57532e-14 kg (2 entries, compartments not in this file); data quality (4,1,1,1,5)
- phenanthrene: 1.47337e-10 kg; data quality (3,2,1,2,2)
- Hexachlorocyclopentadiene: 7.03298e-16 kg; data quality (3,2,1,1,5)
- acenaphthene: 4.1437e-11 kg; data quality (3,2,1,2,2)
- 1,1,2,2-tetrachloroethane: 2.16005e-12 kg; data quality (3,2,1,1,3)
- ethane, 1,2-dichloro-: 3.76289e-13 kg; data quality (3,2,1,1,5)
- trichloroethylene: 5.09522e-11 kg; data quality (3,2,1,1,3)
- CHLORONAPHTHALENE: 2.21713e-21 kg; data quality (1,2,1,1,5)
- t-butyl methyl ether: 1.51347e-11 kg; data quality (3,2,1,1,4)
- PHOSPHORUS: 2.05233e-12 kg; data quality (2,2,1,1,5)
- propylene oxide: 1.78454e-12 kg; data quality (3,2,1,1,3)
- cyclohexane: 1.82867e-16 kg; data quality (4,1,1,1,5)
- carbonyl sulfide: 1.43137e-14 kg; data quality (4,2,1,1,5)
- Propane sultone: 3.57173e-17 kg; data quality (5,2,1,1,5)
- 1-Methyl-2-pyrrolidinone: 1.42087e-13, 1.89027e-12 kg (2 entries, compartments not in this file); data quality (5,1,1,1,5)
- aniline: 1.25935e-16 kg; data quality (4,2,1,1,3)
- benzene, chloro-: 3.65165e-14 kg; data quality (4,2,1,1,5)
- Propoxur: 3.57173e-17 kg; data quality (5,2,1,1,5)
- Toluene, 2,4-dinitro-: 3.65733e-16 kg; data quality (5,1,1,1,5)
- naphthalene: 5.30437e-9 kg; data quality (3,2,1,2,2)
- Xylene: 1.855e-14, 6.76606e-16 kg (2 entries, compartments not in this file); data quality (4,1,1,1,5)
- 2,4,5-trichlorophenol: 3.57173e-17 kg; data quality (2,2,1,1,5)
- Indeno(1,2,3-cd)pyrene: 4.22616e-12 kg; data quality (2,2,1,2,2)
- copper: 3.67808e-12, 3.72788e-13, 7.92222e-10 kg (3 entries, compartments not in this file); data quality (4,1,1,1,5)
- monochloroethane: 2.16367e-13 kg; data quality (3,2,1,1,5)
- methane, monochloro-, r-40: 7.67841e-14 kg; data quality (3,2,1,1,5)
- methane, dichloro-, hcc-30: 2.21935e-10 kg; data quality (4,2,1,1,3)
- Dimethyl sulfate: 5.56058e-15 kg; data quality (2,2,1,1,5)
- Asbestos: 4.42186e-16 kg; data quality (5,2,1,1,5)
- ammonia: 8.14068e-7 kg; data quality (3,2,1,1,5)
- nickel: 7.79011e-17, 4.15637e-12 kg (2 entries, compartments not in this file); data quality (4,1,1,1,5)
- butanol: 1.47445e-11 kg; data quality (5,1,1,1,5)
- acenaphthylene: 2.1138e-10 kg; data quality (3,2,1,2,2)
- lead: 2.13018e-9 kg; data quality (3,2,1,1,3)
- Chromium VI: 9.11882e-12 kg; data quality (3,2,1,1,5)
- Hexane: 1.855e-18 kg; data quality (4,1,1,1,5)
- 2,2,4-trimethylpentane: 2.66618e-8 kg; data quality (3,2,1,4,1)
- 3-methylcholanthrene: 7.47247e-18 kg; data quality (2,2,1,1,3)
- Propane, 1,1,1,3,3,3-hexafluoro-, HCFC-236fa: 1.12077e-8 kg; data quality (4,2,1,4,1)
- Dinitrogen monoxide: 1.32111e-8 kg; data quality (4,2,1,4,1)
- ethylene glycol: 5.94316e-14 kg; data quality (5,1,1,1,5)
- ammonia: 4.66227e-13 kg; data quality (3,1,1,1,5)
- 1,2,4-trimethylbenzene: 5.58573e-13 kg; data quality (5,1,1,1,5)
- CHLOROPRENE: 3.85721e-16 kg; data quality (2,2,1,1,3)
- 2-methylnaphthalene: 4.05595e-10 kg; data quality (2,2,1,1,3)
- bis(2-chloroethyl)ether: 4.78612e-20 kg; data quality (3,2,1,1,5)
- bromoform: 2.85227e-15 kg; data quality (3,2,1,1,5)
- Urethane: 4.57976e-17 kg; data quality (5,2,1,1,4)
- methylene diphenyl diisocyanate: 1.606e-12 kg; data quality (4,2,1,1,4)
- 1,4-dichlorobenzene: 7.94742e-14 kg; data quality (2,2,1,1,5)
- 7-OXABICYCLO[2,2,1]HEPTANE-2,3-DICARBOXYLIC ACID, DIPOTASSIUM SALT: 2.92861e-12 kg; data quality (5,1,1,1,5)
- hydroquinone: 5.79926e-14 kg; data quality (3,2,1,1,5)
- lead: 2.94922e-14, 3.1911e-10 kg (2 entries, compartments not in this file); data quality (3,1,1,1,5)
- toluene: 1.855e-14 kg; data quality (5,1,1,1,5)
- Hydrocarbons, aromatic: 5.28776e-10 kg; data quality (3,2,1,4,1)
- 2-(2-BUTOXYETHOXY) ETHYL ACETATE: 7.87937e-14 kg; data quality (5,2,1,1,5)
- hydrogen chloride: 6.36681e-7 kg; data quality (2,2,1,1,5)
- acrylic acid: 5.63995e-14 kg; data quality (4,2,1,1,3)
- benzidine: 5.4555e-14 kg; data quality (2,2,1,1,3)
- AZIRIDINE: 1.12261e-15 kg; data quality (5,2,1,1,3)
- Hydrazine, methyl-: 1.11934e-14 kg; data quality (2,2,1,1,5)
- nitric acid: 5.21571e-11, 1.82867e-16 kg (2 entries, compartments not in this file); data quality (3,1,1,1,5)
- chromium: 2.85725e-15, 1.24134e-13, 2.76403e-12 kg (3 entries, compartments not in this file); data quality (4,1,1,1,5)
- 1,2,4-trichlorobenzene: 2.42374e-15 kg; data quality (4,2,1,1,5)
- BUTYL ISOCYANATE: 2.59449e-12 kg; data quality (4,2,1,1,3)
- naphthalene: 1.855e-15 kg; data quality (4,1,1,1,5)
- ethene, tetrachloro-: 1.13276e-11 kg; data quality (3,2,1,1,4)
- benzo(a)pyrene: 5.46536e-12 kg; data quality (2,2,1,2,3)
- 1,4-BENZOQUINONE: 8.00479e-19 kg; data quality (3,2,1,1,5)
- 2-chloro-1-phenylethanone: 5.06967e-16 kg; data quality (2,2,1,1,5)
- 2-NITROPROPANE: 9.14333e-16 kg; data quality (5,1,1,1,5)
- vinyl acetate: 1.75194e-11 kg; data quality (4,2,1,1,3)
- Carbon dioxide: 0.0056839 kg; data quality (4,2,1,4,1)
- 2,4-dinitrophenol: 2.89757e-17 kg; data quality (5,2,1,1,5)
- acetonitrile: 5.04207e-14 kg; data quality (3,2,1,1,5)
- Propene: 7.02912e-13 kg; data quality (3,1,1,1,5)
- PYRENE, 1-NITRO-: 2.56889e-18 kg; data quality (2,2,1,1,5)
- Ethane, 1,1,1-trifluoro-, HFC-143a: 4.14866e-7 kg; data quality (4,2,1,4,1)
- ethylene glycol: 6.39366e-12 kg; data quality (5,2,1,1,5)
- cumene: 1.59335e-11 kg; data quality (4,2,1,1,3)
- 2,4-D: 2.21722e-13 kg; data quality (3,2,1,1,5)
- hydrogen fluoride: 6.11414e-12 kg; data quality (2,2,1,1,5)
- benzene: 5.18555e-8 kg; data quality (3,2,1,4,1)
- toluene: 7.62467e-8 kg; data quality (3,2,1,4,1)
- dibenzofuran: 5.01607e-15 kg; data quality (4,2,1,1,5)
- Ethene, chloro-: 1.37489e-12 kg; data quality (3,2,1,1,4)
- anthracene: 4.19058e-11 kg; data quality (3,2,1,2,2)
- acrylonitrile: 1.98615e-13 kg; data quality (4,2,1,1,5)
- isophorone: 1.22997e-13 kg; data quality (2,2,1,1,5)
- methane, bromo-, halon 1001: 2.96039e-13 kg; data quality (3,2,1,1,5)
- fluoranthene: 4.84449e-11 kg; data quality (2,2,1,2,2)
- ethyl acrylate: 4.17812e-13 kg; data quality (4,2,1,1,5)
- n-nitrosodimethylamine: 7.23226e-17 kg; data quality (5,2,1,1,3)
- Chrysene: 5.70063e-12 kg; data quality (2,2,1,2,3)
- dimethyl formamide: 1.29719e-12 kg; data quality (4,2,1,1,4)
- Methane: 4.90393e-7 kg; data quality (4,2,1,4,1)
- Dinitrotoluene, technical grade (2,4 (77%)- and 2,6 (19%)-): 1.82867e-16, 1.7122e-11 kg (2 entries, compartments not in this file); data quality (5,1,1,1,5)
- mercury: 2.84084e-12 kg; data quality (2,2,1,1,5)
- ALLYL CHLORIDE: 1.56535e-12 kg; data quality (3,2,1,1,3)
- benz[a]anthracene: 5.46394e-12 kg; data quality (2,2,1,2,2)
- epichlorohydrin: 3.38225e-14 kg; data quality (3,2,1,1,3)
- 2-ethoxyethyl acetate: 6.99218e-14 kg; data quality (5,2,1,1,5)
- Diethylene glycol butyl ether: 7.1176e-13 kg; data quality (4,2,1,1,5)
- Benzo(b)fluoranthene: 5.91547e-12 kg; data quality (2,2,1,2,2)
- 2-METHOXYETHANOL: 4.01417e-14 kg; data quality (4,2,1,1,3)
- cyanide: 1.71124e-12 kg; data quality (2,2,1,1,5)
- carbon disulfide: 3.93093e-14 kg; data quality (4,2,1,1,5)
- methyl methacrylate: 4.72449e-12 kg; data quality (4,2,1,1,3)
- Ethane, pentafluoro-, HFC-125: 9.69634e-7 kg; data quality (4,2,1,4,1)
- ethylbenzene: 1.75009e-12 kg; data quality (4,1,1,1,5)
- Aluminum: 4.84596e-14 kg; data quality (4,1,1,1,5)
- Bis-(chloromethyl)ether: 4.01792e-19 kg; data quality (5,2,1,1,3)
- phenol: 1.44249e-9 kg; data quality (4,2,1,1,3)
- hydrogen sulfide: 9.75838e-13 kg; data quality (3,2,1,1,3)
- 1-METHYLNAPTHALENE: 4.86241e-10 kg; data quality (2,2,1,1,3)
- antimony: 1.74207e-13 kg; data quality (3,2,1,1,5)
- Phosphorus: 4.0688e-8, 1.81038e-13 kg (2 entries, compartments not in this file); data quality (4,1,1,1,5)
- diethanolamine: 8.50928e-14 kg; data quality (3,2,1,1,5)
- Phthalate, dimethyl-: 2.14862e-14 kg; data quality (4,2,1,1,4)
- acetamide: 3.57173e-17 kg; data quality (5,2,1,1,5)
- 2-nitropropane: 4.93273e-13 kg; data quality (5,2,1,1,3)
- pyrene: 6.3588e-11 kg; data quality (2,2,1,2,2)
- benzene, ethyl-: 1.96176e-8 kg; data quality (3,2,1,4,1)
- 2-Acetylaminofluorene: 3.57173e-15 kg; data quality (5,2,1,1,5)
- Triethylene glycol: 2.56808e-17 kg; data quality (5,2,1,1,5)
- Benzo(a)anthracene: 4.41295e-17 kg; data quality (2,2,1,1,4)
- Chromium, ion: 6.29681e-11 kg; data quality (2,2,1,1,5)
- para-xylene: 5.27373e-11 kg; data quality (3,2,1,4,1)
- formic acid: 6.34547e-14 kg; data quality (3,1,1,1,5)
- arsenic: 3.24093e-11 kg; data quality (3,2,1,1,5)
- chlorine: 7.51838e-12 kg; data quality (4,2,1,1,5)
- Phthalate, dibutyl-: 7.43821e-12 kg; data quality (4,2,1,1,3)
- carbon tetrachloride: 6.68735e-13 kg; data quality (4,2,1,1,4)
- fluorene: 8.22181e-11 kg; data quality (2,2,1,2,2)
- o-Xylene: 1.34657e-9 kg; data quality (3,2,1,3,2)
- toluene, 2,4-dinitro-: 2.92798e-17 kg; data quality (5,2,1,1,5)
- NITROGLYCERIN: 6.76666e-12, 1.05799e-11, 2.57297e-11 kg (3 entries, compartments not in this file); data quality (5,1,1,1,5)
- p-phenylenediamine: 3.57173e-15 kg; data quality (5,2,1,1,5)
- Hydrazine: 8.83636e-15 kg; data quality (4,2,1,1,5)
- 1,1,1-trichloroethane: 4.42766e-11 kg; data quality (3,2,1,1,3)
- Benzo(g,h,i)perylene: 1.4725e-11 kg; data quality (3,2,1,2,2)
- Cobalt: 6.83129e-13 kg; data quality (3,2,1,1,5)
- pentachlorophenol: 2.22678e-19 kg; data quality (3,2,1,1,5)
- m-xylene: 3.30785e-9 kg; data quality (3,2,1,3,2)
- manganese: 1.11046e-10 kg; data quality (3,2,1,1,5)
- Ethylene glycol monoethyl ether: 1.06485e-12 kg; data quality (3,2,1,1,3)
- Triethyl amine: 7.06626e-12 kg; data quality (4,2,1,1,3)
- polychlorinated biphenyls: 3.93057e-20 kg; data quality (3,2,1,1,5)
- benzyl chloride: 5.06964e-14 kg; data quality (2,2,1,1,5)
- Nickel, ion: 6.53676e-14 kg; data quality (3,2,1,1,3)
- CHLOROMETHYL METHYL ETHER: 4.53342e-15 kg; data quality (5,2,1,1,3)
- ETHYLENETHIOUREA: 5.71477e-17 kg; data quality (5,2,1,1,5)
- methanol: 3.52178e-9 kg; data quality (4,2,1,1,3)
- Dimethylcarbamyl chloride: 2.7797e-19 kg; data quality (5,2,1,1,5)
- Nitrogen: 1.19762e-7 kg; data quality (3,2,1,1,5)
- benzene: 1.04234e-16 kg; data quality (3,1,1,1,5)
- Nitrobenzene: 3.70253e-16 kg; data quality (4,2,1,1,5)
- Cresol: 3.46452e-14 kg; data quality (4,2,1,1,4)
- nickel: 6.7417e-11 kg; data quality (3,2,1,1,5)
- Phthalate, dibutyl-: 6.27891e-12 kg; data quality (4,1,1,1,5)
- Propane, 1,2-dichloro-: 2.27469e-13 kg; data quality (4,2,1,1,3)
- ethane, 1,2-dibromo-: 2.87587e-15 kg; data quality (2,2,1,1,4)
- NITROUS ACID: 1.82867e-16 kg; data quality (5,1,1,1,5)
- propanal: 4.37867e-9 kg; data quality (3,2,1,3,2)
- beryllium: 5.67807e-12 kg; data quality (2,2,1,1,5)
- Xylene: 6.29668e-8 kg; data quality (3,2,1,4,1)
- ethylene oxide: 2.75081e-15 kg; data quality (3,2,1,1,5)
- hexachlorobenzene: 8.72069e-15 kg; data quality (3,2,1,1,5)
- Methane, difluoro-, HFC-32: 5.64669e-7 kg; data quality (4,2,1,4,1)
- hexachloroethane: 1.78587e-16 kg; data quality (4,2,1,1,5)
- ethane, 1,1,2-trichloro-: 2.34602e-15 kg; data quality (4,2,1,1,5)
- butadiene: 1.12556e-8 kg; data quality (3,2,1,3,2)
- nitrogen oxides: 1.38851e-5 kg; data quality (2,2,1,1,5)
- chlorine: 2.63328e-14 kg; data quality (2,1,1,1,5)
- NITRIC ACID: 1.35906e-13 kg; data quality (3,1,1,1,5)
- Ethane, 1,1,1,2-tetrafluoro-, HFC-134a: 3.65467e-6 kg; data quality (4,2,1,4,1)
- 1,4-dioxane: 6.18222e-15 kg; data quality (4,2,1,1,4)
- hexachloro-1,3-butadiene: 3.19822e-15 kg; data quality (4,2,1,1,5)
- Benzo(g,h,i)perylene: 3.70999e-17 kg; data quality (2,1,1,1,5)
- Chrysene, 5-methyl-: 1.30327e-18 kg; data quality (2,2,1,1,5)
- Naphthalene: 2.16252e-13 kg; data quality (4,1,1,1,5)
- o-cresol: 2.61276e-17 kg; data quality (4,2,1,1,5)
- acrolein: 5.88911e-9 kg; data quality (2,2,1,2,3)
- methyl isobutyl ketone: 1.96949e-10 kg; data quality (4,2,1,1,3)
- Ethylene glycol: 6.17193e-12 kg; data quality (5,1,1,1,5)
- chloroform: 6.62434e-12 kg; data quality (4,2,1,1,3)
- barium: 4.58392e-16 kg; data quality (4,1,1,1,5)
- Chloramben: 2.22191e-16 kg; data quality (2,2,1,1,3)
- maleic anhydride: 4.49445e-15 kg; data quality (2,2,1,1,3)
- formaldehyde: 5.23316e-8 kg; data quality (2,2,1,2,2)
- Benzo(k)fluoranthene: 5.86073e-12 kg; data quality (2,2,1,2,2)
- hexane: 1.81813e-8 kg; data quality (3,2,1,4,2)
- 4-nitrophenol: 2.51138e-17 kg; data quality (2,2,1,1,5)
- sulfur dioxide: 2.65045e-5 kg; data quality (2,2,1,1,5)
- acetaldehyde: 2.11493e-8 kg; data quality (3,2,1,3,2)
- 1,2-BUTYLENE OXIDE: 2.64538e-14 kg; data quality (4,2,1,1,5)
- Methyl iodide: 2.86478e-15 kg; data quality (4,2,1,1,3)
- cadmium: 7.35381e-12 kg; data quality (3,2,1,1,5)
- acetophenone: 1.10243e-15 kg; data quality (4,2,1,1,5)
- 1,1-DICHLOROETHYLENE: 1.03703e-14 kg; data quality (3,2,1,1,5)
- VOC, volatile organic compounds: 4.03611e-6 kg; data quality (3,2,1,1,4)
- selenium: 6.27795e-12 kg; data quality (2,2,1,1,5)
- particulates, < 2.5 um: 1.66663e-6 kg; data quality (3,2,1,1,5)
- styrene: 1.53206e-9 kg; data quality (4,2,1,2,2)
- Dibenz(a,h)anthracene: 2.02202e-14 kg; data quality (3,2,1,3,2)
- carbon monoxide: 3.23844e-5 kg; data quality (3,2,1,1,1)
- Propene, 1,3-dichloro-: 1.54514e-14 kg; data quality (3,2,1,1,5)
- Water, fresh: 0.000451589 m3; data quality (1,2,1,4,2)
- toluene-2,4-diisocyante: 3.91808e-14 kg; data quality (3,2,1,1,3)
- particulates, < 10 um: 7.22468e-8 kg; data quality (3,2,1,1,5)
- phenol: 2.1944e-15 kg; data quality (3,1,1,1,5)
- Sulfuric acid: 2.77089e-11 kg; data quality (2,1,1,1,5)
- phthalate, dioctyl-: 5.4453e-12 kg; data quality (3,2,1,1,3)
- 3,3'-dimethylbenzidine: 4.25463e-17 kg; data quality (1,2,1,1,5)
- biphenyl: 6.74589e-14 kg; data quality (4,2,1,1,5)

## Inventory method
Input-output

## Modelling constants
The reference unit of all processes is 1 USD2013 of the good or service. The technosphere inputs are based on the US BEA detailed input-output tables for 2007. The IO tables are combined to develop a commodity-by-commodity model based on the the industry-technology assumption (see Suh et al., 2010), which assumes all commodities produced by a given industry have the same input structure, but that multiple industries can produce the same commodity. Thus, model technosphere flows represent commodity outputs (and not industry outputs) from other processes in the model. There are no by-products included in these processes. All commodity production is based on US-conditions, despite in reality that some goods and services are produced overseas, as USEEIO v1.1 is a single-region IO model.

## Completeness
The input-output approach assures that all purchased inputs associated with the sectors making these commodities as reported in the US census for 2007 are included. The direct resources extracted including minerals, energy sources, water and land occupied are included. Emissions to air include all critieria air pollutants, greenhouse gases, and hazardous and toxic air pollutants as defined by US EPA. Releases to water include toxics, total nitrogen and total phosphorus, and water discharges. Releases to soil or groundwater include toxics and agriculutural pesticides. Some metal releases to air, water and soil are not included because they could not be speciated. Solid hazardous and non-hazardous wastes generated are not included as an elementary flows although purchases of waste services are included.

## Data treatment
Greenhouse gases are primarily from the US Greenhouse Gas Emission Inventory (USEPA 2016a). Biogenic C uptake is not included (change from version 1.0), as biogenic C emission are not included. Toxic releases to air, water and soil (except pesticides) are from the 2013 Toxic Release Inventory (USEPA 2015a). Criteria air pollutants and hazardous air pollutants are from the 2011 National Emissions Inventory (USEPA 2015b). All estimates are normalized by industry based on sector output in the data year, then converted to 2013 USD using relative sector-specific CPIs (if data year is not 2013). Energy use represent raw renewables or fossil fuel energies and is based on EIA data for 2014. See Table 1 in Yang, Ingwersen et al. 2017 and Supporting Information 1, and the v1.1 data update notes (Ingwersen et al. 2017) for all details on environmental data sources used.Land occupation for commercial buildings was estimated based on the building floorspace data provided by the U.S. Energy Information Administration 2012 Commercial Building Energy Consumption Survey (CBECS) (EIA 2015). Total commercial public supply water use is reported by USGS (Maupin et al. 2014). Water use is allocated across commercial sectors based on their use of water, sewage, and other services in USD based on the 2007 Benchmark Use Table before redefinitions (BEA 2015).

## Data collection
2015-2016

## Sampling procedure
US federal government sources, including surveys and US EPA emissions databases are used as the primary sources. From these sources, data for US reporting establishments/facilities are aggregated by the NAICS sector as defined in the BEA detailed 2007 input-output tables. When level of sector aggregation differs, or when direct emissions are not reported but modeled, additional sources are used to make allocations and estimates.

## Review details
In regard to quality assurance and peer-review, each dataset created went through Quality Assurance as defined in a quality assurance project plans at US EPA, CSRA or ERG. The model was assembled with the IO model builder model (USEPA 2016c). Validation functions were used to check that all the model components were properly assembled and harmonized. Bayou Demeke and Santosh Ghimire provided internal peer review of the model methodology and the manuscript underwent standard EPA management review. An editor and two anonymous reviewers at the Journal of Cleaner Production reviewed the model. In regard to data quality evaluation, data quality assessment was performed at the flow and process levels according to the updated US EPA data quality assessment guidelines as defined in US EPA (2016b).

## Intended application
The primary application is for use in the US Environmentally-Extended Input-Ouput model, USEEIO, version 1.1. This model is being used by the US EPA for supporting tools that prioritize goods and services based on potential environmental impacts, resource use or emissions for large regions, including the US and US states, and as a strealined tool for organizations as a starting point to consider sustainable materials management. Model results are designed to provide meso/macro-level decision support.

## Project
USEEIO v1.1 was developed by the US EPA with CSRA and ERG with Wesley W. Ingwersen and David E. Meyer as research leads. Yi Yang was the technical lead on the work for CSRA (contract EP-C-15-012); Troy Hawkins was lead for ERG (contract EP-C-12-021).

## Sources
- USEPA 2015b
- Kim et el. 2013
- Macknick et al. 2011
- USDA 2016
- EIA 2017
- USEPA 2016a
- Ingwersen et al. DRAFT
- EIA 2015
- EIA 2013
- Blackhurst et al. 2010
- USEPA 2016b
- Yienger et al. 1995
- USDA 2014
- Maupin et al. 2014
- Nickerson et al. 2011
- BEA 2015
- BLM 2008
- Statistics Canada 2010
- EIA 2016
- Lovelace 2009
- Edelen and Ingwersen 2017
- Torcellini et al. 2003
- USDA 2009a
- Ingwersen et al. 2017
- USDA 2009b
- USEPA 2015a
- USGS 2015
- Goebes et al. 2003
- USGS 2016
- USEPA 2016c
- USDA 2006
