# Monetary authorities and depository credit intermediation

Dataset: openLCA process, unit process
Category: 52: Finance and Insurance
Geography: United States
Time period: 2017-01-01 to 2017-12-31
Data quality: US EPA - Process Pedigree Matrix (1;1)
Exchange data quality scheme: US EPA - Flow Pedigree Matrix
Generated by: US EPA with CSRA and ERG
Owner: US EPA
Published in: Yang, Ingwersen et al. 2017
restrictionsDescription: This model shold be appropriately cited (see Yang, Ingwersen et al. 2017 source or Publication field) when used. Any changes or derivations of this model by the user should be documented. The model itself and any results from use of this model shall not be construed to consitute US EPA opinion or policy.
copyright: false

## General comment
BEA Code & Name is '52A000:Monetary authorities and depository credit intermediation'. Description of the primary industry producing this good or service, adapted from the Census Bureau NAICS 2007 descriptions: The Finance and Insurance sector comprises establishments primarily engaged in financial transactions (transactions involving the creation, liquidation, or change in ownership of financial assets) and/or in facilitating financial transactions. Three principal types of activities are identified: 1. Raising funds by taking deposits and/or issuing securities and, in the process, incurring liabilities. Establishments engaged in this activity use raised funds to acquire financial assets by making loans and/or purchasing securities. Putting themselves at risk, they channel funds from lenders to borrowers and transform or repackage the funds with respect to maturity, scale, and risk. This activity is known as financial intermediation. 2. Pooling of risk by underwriting insurance and annuities. Establishments engaged in this activity collect fees, insurance premiums, or annuity considerations; build up reserves; invest those reserves; and make contractual payments. Fees are based on the expected incidence of the insured risk and the expected return on investment. 3. Providing specialized services facilitating or supporting financial intermediation, insurance, and employee benefit programs. In addition, monetary authorities charged with monetary control are included in this sector. The subsectors, industry groups, and industries within the NAICS Finance and Insurance sector are defined on the basis of their unique production processes. As with all industries, the production processes are distinguished by their use of specialized human resources and specialized physical capital. In addition, the way in which these establishments acquire and allocate financial capital, their source of funds, and the use of those funds provides a third basis for distinguishing characteristics of the production process. For instance, the production process in raising funds through deposit-taking is different from the process of raising funds in bond or money markets. The process of making loans to individuals also requires different production processes than does the creation of investment pools or the underwriting of securities. Most of the Finance and Insurance subsectors contain one or more industry groups of (1) intermediaries with similar patterns of raising and using funds and (2) establishments engaged in activities that facilitate, or are otherwise related to, that type of financial or insurance intermediation. Industries within this sector are defined in terms of activities for which a production process can be specified, and many of these activities are not exclusive to a particular type of financial institution. To deal with the varied activities taking place within existing financial institutions, the approach is to split these institutions into components performing specialized services. This requires defining the units engaged in providing those services and developing procedures that allow for their delineation. These units are the equivalents for finance and insurance of the establishments defined for other industries. The output of many financial services, as well as the inputs and the processes by which they are combined, cannot be observed at a single location and can only be defined at a higher level of the organizational structure of the enterprise. Additionally, a number of independent activities that represent separate and distinct production processes may take place at a single location belonging to a multilocation financial firm. Activities are more likely to be homogeneous with respect to production characteristics than are locations, at least in financial services. The classification defines activities broadly enough that it can be used both by those classifying by location and by those employing a more top-down approach to the delineation of the establishment. Establishments engaged in activities that facilitate, or are otherwise related to, the various types of intermediation have been included in individual subsectors, rather than in a separate subsector dedicated to services alone because these services are performed by intermediaries, as well as by specialist establishments, the extent to which the activity of the intermediaries can be separately identified is not clear. The Finance and Insurance sector has been defined to encompass establishments primarily engaged in financial transactions; that is, transactions involving the creation, liquidation, change in ownership of financial assets; or in facilitating financial transactions. Financial industries are extensive users of electronic means for facilitating the verification of financial balances, authorizing transactions, transferring funds to and from transactors accounts, notifying banks (or credit card issuers) of the individual transactions, and providing daily summaries. Since these transaction processing activities are integral to the production of finance and insurance services, establishments that principally provide a financial transaction processing service are classified to this sector, rather than to the data processing industry in the Information sector. Legal entities that hold portfolios of assets on behalf of others are significant and data on them are required for a variety of purposes. Thus for NAICS, these funds, trusts, and other financial vehicles are the fifth subsector of the Finance and Insurance sector. These entities earn interest, dividends, and other property income, but have little or no employment and no revenue from the sale of services. Separate establishments and employees devoted to the management of funds are classified in Industry Group 5239, Other Financial Investment Activities. Related NAICS codes are: 521, 5221

## Technology
The process describes the average US production of this good or service within this NAICS-based grouping defined in the BEA 2007 detailed input-output tables (BEA 2015). Distribution, wholesale and retailing of this good or service, use, and final disposal are not included. Creation of a product system with this process will enable modeling of all upstream (supply-chain) activities.

## Geography
Data represent the 50 US states

## Time period
2017 was the year in which this version of USEEIO was released and is the target date for the model

## Reference product
- Monetary authorities and depository credit intermediation: 1 USD

## Inputs from technosphere
All rows: data quality (1,3,1,1,1)
- Signs; at manufacturer: 6.28211e-5 USD
- Food and beverage stores: 1.01169e-5 USD
- Data processing and hosting: 0.00397734 USD
- Gasoline, fuels, and by-products of petroleum refining; at manufacturer: 0.00173224 USD
- Photography and photocopying equipment; at manufacturer: 3.01718e-9 USD
- Natural gas; at consumer: 0.00063725 USD
- Limited-service restaurants: 0.0064885 USD
- Wireless telecommunications: 0.00114003 USD
- External hard drives, CDs, other storage media; at manufacturer: 8.09122e-5 USD
- Fluid meters and counting devices; at manufacturer: 4.76563e-9 USD
- Other support services: 9.78545e-5 USD
- Marketing research and all other miscellaneous professional, scientific, and technical services: 0.00402112 USD
- Printed circuit and electronic assembly; at manufacturer: 6.51407e-9 USD
- Other plastic products; at manufacturer: 6.18364e-6 USD
- Petrochemicals; at manufacturer: 2.03905e-6 USD
- Company and enterprise management: 0.00560641 USD
- Hotels and campgrounds: 0.00482205 USD
- Jewelry and silverware; at manufacturer: 1.82194e-5 USD
- Full-service restaurants: 0.00915659 USD
- Passenger ground transport: 0.00200613 USD
- Insurance carriers: 0.00245813 USD
- Other real estate: 0.00350332 USD
- Machine shops; at manufacturer: 4.07636e-6 USD
- Securities and commodities brokerage and exchanges: 0.0425236 USD
- Air transport: 0.00447512 USD
- Chemicals (except basic chemicals, agrichemicals, polymers, paints, pharmaceuticals,soaps, cleaning compounds); at manufacturer: 0.000180482 USD
- Cardboard containers; at manufacturer: 0.000222624 USD
- Metal pipe fittings, ball and roller bearings, industrial patterns, metal bath fixtures, other misc. fabricated metals; at manufacturer: 6.87786e-5 USD
- Cutlery and handtools; at manufacturer: 2.02602e-6 USD
- Rubber tires; at manufacturer: 2.23748e-5 USD
- Wireless communications; at manufacturer: 3.49992e-7 USD
- Storage batteries; at manufacturer: 7.90315e-5 USD
- Lessors of nonfinancial intangible assets: 0.00121395 USD
- Air conditioning, refrigeration, and warm air heating equipment; at manufacturer: 4.06364e-6 USD
- Telephones; at manufacturer: 0.000105387 USD
- Funds, trusts, and financial vehicles: 7.22312e-6 USD
- Waste management and remediation: 2.16543e-5 USD
- Noncomparable imports: 0.00290337 USD
- Transmission and power train parts; at manufacturer: 7.7129e-5 USD
- Environmental and other technical consulting services: 5.89642e-6 USD
- Other engine equipment; at manufacturer: 2.02928e-6 USD
- Civic, social, professional, and similar organizations: 0.00745317 USD
- Other computer related services, including facilities management: 0.00185333 USD
- Unrefined oil and gas; at extraction site: 1.25484e-8 USD
- Communication and energy wire and cable; at manufacturer: 4.52576e-9 USD
- Electricity; at consumer: 0.000459474 USD
- Pipeline transport: 1.01171e-5 USD
- Dry-cleaning and laundry: 1.01266e-5 USD
- Software: 0.000169229 USD
- All other food and drinking places: 0.000578925 USD
- Soap and cleaning compounds; at manufacturer: 2.02277e-6 USD
- Satellite, telecommunications resellers, and all other telecommunications: 0.000200439 USD
- Commercial equipment rental: 8.07997e-6 USD
- Vehicle electrical and electronic equipment; at manufacturer: 1.22129e-5 USD
- Drinking water and wastewater treatment; at consumer: 0.000150233 USD
- Specialized design: 0.00105136 USD
- Nonresidential building repair and maintanence: 0.00958755 USD
- Coal; at mine: 1.21381e-5 USD
- Welding and Soldering Equipment, Scales and Balances, and other general purpose machinery; at manufacturer: 4.04553e-6 USD
- Veneer, plywood, and engineered wood; at manufacturer: 9.10275e-5 USD
- Paper bags and coated paper; at manufacturer: 0.000175998 USD
- Office administration: 4.83024e-6 USD
- Advertising and public relations: 0.0285625 USD
- Architectural, engineering, and related services: 0.00220473 USD
- Management consulting: 2.54329e-5 USD
- Investment advice, portfolio management, and other financial advising services: 0.0805763 USD
- Cutting and machine tool accessory, rolling mill, and other metalworking machines; at manufacturer: 3.25704e-9 USD
- Buildings and dwellings services: 0.0124953 USD
- Warehousing: 1.81749e-6 USD
- Sporting and athletic goods; at manufacturer: 2.02602e-6 USD
- Performances: 0.000137655 USD
- Computer storage device readers; at manufacturer: 5.46147e-5 USD
- Communications equipment; at manufacturer: 6.18521e-8 USD
- Scientific research and development: 0.000103161 USD
- Business support: 0.000260061 USD
- Independent artists, writers, and performers: 0.00154658 USD
- Heating equipment other than warm air furnaces; at manufacturer: 3.25704e-9 USD
- Water transport (boats, ships, ferries): 4.04879e-6 USD
- Other textiles; at manufacturer: 6.03435e-9 USD
- Vehicle engines and engine parts; at manufacturer: 1.62212e-5 USD
- Household goods repair: 0.000949562 USD
- Telecommunications: 0.000994782 USD
- Investigation and security: 0.00202431 USD
- Cardboard; at manufacturer: 0.000344414 USD
- Vehicle repair: 0.00309647 USD
- Paper; at manufacturer: 0.000297353 USD
- News syndicates, libraries, archives, Internet publishing and all other information services: 5.29434e-5 USD
- Motor vehicle steering, suspension components (except spring), and brake systems; at manufacturer: 1.21837e-5 USD
- Golf courses, marinas, ski resorts, fitness and other rec centers and industries: 0.000945368 USD
- Consumer goods and general rental centers: 3.68707e-5 USD
- Vehicle rental and leasing: 2.24985e-5 USD
- Monetary authorities and depository credit intermediation: 0.0710772 USD
- Computer terminals and other computer peripheral equipment; at manufacturer: 0.000993616 USD
- Electronic equipment repair and maintenance: 0.00166774 USD
- Adhesives; at manufacturer: 4.04553e-6 USD
- Postal service: 0.00151781 USD
- Magazines and journals; at publisher: 0.000267232 USD
- Legal services: 0.00566696 USD
- Glass and glass products; at manufacturer: 4.45921e-5 USD
- Facilities support: 0.00216767 USD
- Insurance agencies and brokerages: 3.58088e-5 USD
- Stationery; at manufacturer: 5.05707e-5 USD
- Internet publishing and broadcasting: 0.000165001 USD
- Light fixtures; at manufacturer: 6.07958e-6 USD
- Other retail: 0.000271147 USD
- Truck transport: 0.00013885 USD
- Metal hinges, keys, lock, and other hardware; at manufacturer: 8.1415e-6 USD
- Scenic and sightseeing transportation and support activities for transportation: 0.000468086 USD
- Travel arrangement and reservation: 3.32009e-5 USD
- Vehicles and parts sales: 2.84207e-5 USD
- Nondepository credit intermediation and related activities: 0.0398891 USD
- Other vehicle parts; at manufacturer: 4.05774e-5 USD
- Sports: 0.000388681 USD
- Wholesale trade: 0.000784634 USD
- Computer systems design: 0.000852571 USD
- Electronic capacitors, resistors, coils, transformers, connectors and other components (except semiconductors and printed circuit assemblies); at manufacturer: 5.06779e-5 USD
- Rail transport: 3.44179e-5 USD
- Promoters and agents: 2.37785e-6 USD
- State and local government enterprises: 6.95207e-5 USD
- Audio and video equipment; at manufacturer: 4.04553e-6 USD
- Accounting, tax preparation, bookkeeping, and payroll: 0.00462583 USD
- Other petroleum and coal products; at manufacturer: 2.2286e-5 USD
- Books, newspapers, magazines, and other print media; at manufacturer: 0.000643075 USD
- Pet care, photofinishing, parking and other sundry services: 0.00016819 USD
- Gaskets, seals, musical instruments, fasteners, brooms, brushes, mop and other misc. goods; at manufacturer: 4.25951e-5 USD
- Directory, mailing list, and other publishers; at publisher: 4.27929e-6 USD
- Books; at publisher: 3.23996e-5 USD
- General merchandise stores: 4.04707e-5 USD
- Federal government enterprises: 0.000379421 USD
- Other educational services: 2.02565e-5 USD
- Couriers and messengers: 0.00069448 USD
- Employment services: 0.00273114 USD
- Movies and film: 2.63126e-5 USD
- Paints and coatings; at manufacturer: 4.04879e-6 USD
- Plastic bags, films, and sheets; at manufacturer: 3.25704e-9 USD
- Commercial machinery repair: 0.00562247 USD
- Office supplies (not paper); at manufacturer: 3.84569e-5 USD

## Inputs from nature
- Water, fresh: 4.9963e-5, 8.64659e-5 m3 (2 entries, compartments not in this file); data quality (1,2,1,4,2)
- Occupation, urban, discontinuously built: 0.000516242 m2*a; data quality (4,2,1,1,1)

## Emissions to nature
- fluorene: 3.07522e-11 kg; data quality (3,2,1,4,1)
- o-Xylene: 7.95944e-10 kg; data quality (3,2,1,4,1)
- toluene: 6.39705e-8 kg; data quality (3,2,1,4,1)
- acenaphthylene: 6.35482e-11 kg; data quality (3,2,1,4,1)
- Ethane, 1,1,1-trifluoro-, HFC-143a: 3.76182e-10 kg; data quality (4,2,1,4,1)
- benzene, chloro-: 3.2481e-21 kg; data quality (4,2,1,1,5)
- acenaphthene: 1.64027e-11 kg; data quality (3,2,1,4,1)
- benz[a]anthracene: 1.88033e-12 kg; data quality (3,2,1,4,1)
- Hydrocarbons, aromatic: 4.64487e-10 kg; data quality (3,2,1,4,1)
- anthracene: 1.2691e-11 kg; data quality (3,2,1,4,1)
- acrolein: 8.66536e-10 kg; data quality (3,2,1,4,1)
- acetaldehyde: 1.07885e-8 kg; data quality (3,2,1,4,1)
- sulfur dioxide: 5.86678e-9 kg; data quality (3,2,1,3,3)
- Chromium VI: 8.49796e-13 kg; data quality (3,2,1,5,1)
- Xylene: 5.39679e-8 kg; data quality (3,2,1,4,1)
- carbon monoxide: 2.503e-5 kg; data quality (3,2,1,1,1)
- 3-methylcholanthrene: 5.42777e-17 kg; data quality (2,2,1,1,5)
- Methane: 3.3578e-7 kg; data quality (4,2,1,4,1)
- manganese: 7.43035e-12 kg; data quality (3,2,1,2,4)
- beryllium: 3.12957e-14 kg; data quality (2,2,1,1,5)
- arsenic: 3.55547e-12 kg; data quality (3,2,1,5,1)
- particulates, < 2.5 um: 9.79362e-8 kg; data quality (3,2,1,4,1)
- Propane, 1,1,1,3,3,3-hexafluoro-, HCFC-236fa: 1.01627e-11 kg; data quality (4,2,1,4,1)
- styrene: 6.45368e-10 kg; data quality (3,2,1,4,1)
- Water, fresh: 0.000115516 m3; data quality (1,2,1,4,2)
- pyrene: 2.13268e-11 kg; data quality (3,2,1,4,1)
- selenium: 1.00093e-13 kg; data quality (2,2,1,1,5)
- Benzo(k)fluoranthene: 1.85963e-12 kg; data quality (3,2,1,4,1)
- Dibenz(a,h)anthracene: 2.64066e-14 kg; data quality (2,2,1,2,3)
- VOC, volatile organic compounds: 1.10967e-6 kg; data quality (3,2,1,1,1)
- propanal: 2.35053e-9 kg; data quality (3,2,1,4,1)
- phenanthrene: 5.49256e-11 kg; data quality (3,2,1,4,1)
- mercury: 1.47188e-13 kg; data quality (2,2,1,2,4)
- naphthalene: 1.44857e-9 kg; data quality (3,2,1,4,1)
- Benzo(g,h,i)perylene: 5.00997e-12 kg; data quality (3,2,1,4,1)
- Cobalt: 1.13503e-14 kg; data quality (3,2,1,1,5)
- Indeno(1,2,3-cd)pyrene: 1.54091e-12 kg; data quality (3,2,1,4,1)
- hydrogen chloride: 1.96256e-11 kg; data quality (2,2,1,1,5)
- particulates, < 10 um: 5.43946e-9 kg; data quality (3,2,1,4,2)
- nickel: 8.22625e-12 kg; data quality (3,2,1,4,2)
- Dinitrogen monoxide: 9.91972e-9 kg; data quality (4,2,1,4,1)
- Ethane, 1,1,1,2-tetrafluoro-, HFC-134a: 3.31389e-9 kg; data quality (4,2,1,4,1)
- Methane, difluoro-, HFC-32: 5.12017e-10 kg; data quality (4,2,1,4,1)
- fluoranthene: 1.7076e-11 kg; data quality (3,2,1,4,1)
- m-xylene: 2.21767e-9 kg; data quality (3,2,1,4,1)
- benzene: 4.21148e-8 kg; data quality (3,2,1,4,1)
- benzene, ethyl-: 1.65309e-8 kg; data quality (3,2,1,4,1)
- Chrysene: 1.78511e-12 kg; data quality (3,2,1,4,1)
- Ethane, pentafluoro-, HFC-125: 8.7922e-10 kg; data quality (4,2,1,4,1)
- hexane: 1.38239e-8 kg; data quality (3,2,1,4,1)
- 2-methylnaphthalene: 1.12006e-15 kg; data quality (2,2,1,1,5)
- butadiene: 6.83113e-9 kg; data quality (3,2,1,4,1)
- 1,1,1-trichloroethane: 2.4927e-10 kg; data quality (4,2,1,1,5)
- cadmium: 2.62514e-13 kg; data quality (3,2,1,1,5)
- Carbon dioxide: 0.00368548 kg; data quality (4,2,1,4,1)
- ammonia: 4.66445e-9 kg; data quality (3,2,1,3,2)
- benzo(a)pyrene: 1.75999e-12 kg; data quality (3,2,1,4,1)
- nitrogen oxides: 1.30538e-6 kg; data quality (3,2,1,1,1)
- 2,2,4-trimethylpentane: 2.35166e-8 kg; data quality (3,2,1,4,1)
- Benzo(b)fluoranthene: 1.90529e-12 kg; data quality (3,2,1,4,1)
- lead: 5.84991e-13 kg; data quality (3,2,1,1,5)
- Benzo(a)anthracene: 4.82566e-16 kg; data quality (2,2,1,1,5)
- formaldehyde: 2.31113e-8 kg; data quality (3,2,1,4,1)
- Chromium, ion: 2.75906e-12 kg; data quality (3,2,1,5,1)
- para-xylene: 4.15049e-11 kg; data quality (3,2,1,4,1)

## Inventory method
Input-output

## Modelling constants
The reference unit of all processes is 1 USD2013 of the good or service. The technosphere inputs are based on the US BEA detailed input-output tables for 2007. The IO tables are combined to develop a commodity-by-commodity model based on the the industry-technology assumption (see Suh et al., 2010), which assumes all commodities produced by a given industry have the same input structure, but that multiple industries can produce the same commodity. Thus, model technosphere flows represent commodity outputs (and not industry outputs) from other processes in the model. There are no by-products included in these processes. All commodity production is based on US-conditions, despite in reality that some goods and services are produced overseas, as USEEIO v1.1 is a single-region IO model.

## Completeness
The input-output approach assures that all purchased inputs associated with the sectors making these commodities as reported in the US census for 2007 are included. The direct resources extracted including minerals, energy sources, water and land occupied are included. Emissions to air include all critieria air pollutants, greenhouse gases, and hazardous and toxic air pollutants as defined by US EPA. Releases to water include toxics, total nitrogen and total phosphorus, and water discharges. Releases to soil or groundwater include toxics and agriculutural pesticides. Some metal releases to air, water and soil are not included because they could not be speciated. Solid hazardous and non-hazardous wastes generated are not included as an elementary flows although purchases of waste services are included.

## Data treatment
Greenhouse gases are primarily from the US Greenhouse Gas Emission Inventory (USEPA 2016a). Biogenic C uptake is not included (change from version 1.0), as biogenic C emission are not included. Toxic releases to air, water and soil (except pesticides) are from the 2013 Toxic Release Inventory (USEPA 2015a). Criteria air pollutants and hazardous air pollutants are from the 2011 National Emissions Inventory (USEPA 2015b). All estimates are normalized by industry based on sector output in the data year, then converted to 2013 USD using relative sector-specific CPIs (if data year is not 2013). Energy use represent raw renewables or fossil fuel energies and is based on EIA data for 2014. See Table 1 in Yang, Ingwersen et al. 2017 and Supporting Information 1, and the v1.1 data update notes (Ingwersen et al. 2017) for all details on environmental data sources used.Land occupation for commercial buildings was estimated based on the building floorspace data provided by the U.S. Energy Information Administration 2012 Commercial Building Energy Consumption Survey (CBECS) (EIA 2015). Total commercial public supply water use is reported by USGS (Maupin et al. 2014). Water use is allocated across commercial sectors based on their use of water, sewage, and other services in USD based on the 2007 Benchmark Use Table before redefinitions (BEA 2015).

## Data collection
2015-2016

## Sampling procedure
US federal government sources, including surveys and US EPA emissions databases are used as the primary sources. From these sources, data for US reporting establishments/facilities are aggregated by the NAICS sector as defined in the BEA detailed 2007 input-output tables. When level of sector aggregation differs, or when direct emissions are not reported but modeled, additional sources are used to make allocations and estimates.

## Review details
In regard to quality assurance and peer-review, each dataset created went through Quality Assurance as defined in a quality assurance project plans at US EPA, CSRA or ERG. The model was assembled with the IO model builder model (USEPA 2016c). Validation functions were used to check that all the model components were properly assembled and harmonized. Bayou Demeke and Santosh Ghimire provided internal peer review of the model methodology and the manuscript underwent standard EPA management review. An editor and two anonymous reviewers at the Journal of Cleaner Production reviewed the model. In regard to data quality evaluation, data quality assessment was performed at the flow and process levels according to the updated US EPA data quality assessment guidelines as defined in US EPA (2016b).

## Intended application
The primary application is for use in the US Environmentally-Extended Input-Ouput model, USEEIO, version 1.1. This model is being used by the US EPA for supporting tools that prioritize goods and services based on potential environmental impacts, resource use or emissions for large regions, including the US and US states, and as a strealined tool for organizations as a starting point to consider sustainable materials management. Model results are designed to provide meso/macro-level decision support.

## Project
USEEIO v1.1 was developed by the US EPA with CSRA and ERG with Wesley W. Ingwersen and David E. Meyer as research leads. Yi Yang was the technical lead on the work for CSRA (contract EP-C-15-012); Troy Hawkins was lead for ERG (contract EP-C-12-021).

## Sources
- USEPA 2015a
- Nickerson et al. 2011
- EIA 2013
- Blackhurst et al. 2010
- Statistics Canada 2010
- Ingwersen et al. DRAFT
- EIA 2017
- USGS 2016
- USDA 2016
- USDA 2006
- USEPA 2015b
- EIA 2016
- USEPA 2016c
- EIA 2015
- Maupin et al. 2014
- BEA 2015
- Goebes et al. 2003
- USEPA 2016a
- USDA 2014
- USEPA 2016b
- USGS 2015
- Lovelace 2009
- Ingwersen et al. 2017
- Yienger et al. 1995
- BLM 2008
- Kim et el. 2013
- Macknick et al. 2011
- Edelen and Ingwersen 2017
- Torcellini et al. 2003
- USDA 2009b
- USDA 2009a
