# Lumber and treated lumber; at manufacturer

Dataset: openLCA process, unit process
Category: 3211: Sawmills and Wood Preservation
Geography: United States
Time period: 2017-01-01 to 2017-12-31
Data quality: US EPA - Process Pedigree Matrix (1;1)
Exchange data quality scheme: US EPA - Flow Pedigree Matrix
Generated by: US EPA with CSRA and ERG
Owner: US EPA
Published in: Yang, Ingwersen et al. 2017
restrictionsDescription: This model shold be appropriately cited (see Yang, Ingwersen et al. 2017 source or Publication field) when used. Any changes or derivations of this model by the user should be documented. The model itself and any results from use of this model shall not be construed to consitute US EPA opinion or policy.
copyright: false

## General comment
BEA Code & Name is '321100:Sawmills and wood preservation'. Description of the primary industry producing this good or service, adapted from the Census Bureau NAICS 2007 descriptions: This industry group comprises establishments whose primary production process begins with logs or bolts that are transformed into boards, dimension lumber, beams, timbers, poles, ties, shingles, shakes, siding, and wood chips. Establishments that cut and treat round wood and/or treat wood products made in other establishments to prevent rotting by impregnation with creosote or other chemical compounds are also included in this industry group.

## Technology
The process describes the average US production of this good or service within this NAICS-based grouping defined in the BEA 2007 detailed input-output tables (BEA 2015). Distribution, wholesale and retailing of this good or service, use, and final disposal are not included. Creation of a product system with this process will enable modeling of all upstream (supply-chain) activities.

## Geography
Data represent the 50 US states

## Time period
2017 was the year in which this version of USEEIO was released and is the target date for the model

## Reference product
- Lumber and treated lumber; at manufacturer: 1 USD

## Inputs from technosphere
All rows: data quality (1,3,1,1,1)
- Nondepository credit intermediation and related activities: 0.0032026 USD
- Rail transport: 0.00949304 USD
- Gaskets, seals, musical instruments, fasteners, brooms, brushes, mop and other misc. goods; at manufacturer: 1.22057e-5 USD
- Cardboard; at manufacturer: 0.00060656 USD
- Business support: 0.000953371 USD
- Sand, gravel, clay, phosphate, other nonmetallic minerals; at mine: 4.14279e-6 USD
- Screws, nuts, and bolts; at manufacturer: 0.000745526 USD
- Rubber tires; at manufacturer: 0.000565179 USD
- Watches, clocks, and other measuring and controlling devices; at manufacturer: 1.26342e-5 USD
- Aluminum products; at manufacturer: 8.95813e-5 USD
- Metal pipe fittings, ball and roller bearings, industrial patterns, metal bath fixtures, other misc. fabricated metals; at manufacturer: 0.000602693 USD
- Glass and glass products; at manufacturer: 0.00100899 USD
- Clay and ceramic products; at manufacturer: 5.84639e-6 USD
- Major home appliances (except ovens, stoves, refrigerators and laundry machines); at manufacturer: 3.36912e-5 USD
- Semiconductors; at manufacturer: 0.00138458 USD
- Golf courses, marinas, ski resorts, fitness and other rec centers and industries: 0.000269774 USD
- Vehicle electrical and electronic equipment; at manufacturer: 9.12967e-5 USD
- Metal windows, doors, and architectural products; at manufacturer: 0.00183701 USD
- Food and beverage stores: 1.19183e-6 USD
- Compressed Gases; at manufacturer: 6.06912e-6 USD
- Independent artists, writers, and performers: 0.000546554 USD
- Coal; at mine: 0.0001185 USD
- Air transport: 0.00249675 USD
- Other basic organic chemicals; at manufacturer: 0.0067245 USD
- Office supplies (not paper); at manufacturer: 3.38714e-6 USD
- Unrefined oil and gas; at extraction site: 0.000169705 USD
- Special tools, dies, jigs, and fixtures; at manufacturer: 1.27172e-7 USD
- Metal hinges, keys, lock, and other hardware; at manufacturer: 0.00190958 USD
- Plastics and rubber industry machinery; at manufacturer: 1.64463e-7 USD
- Veneer, plywood, and engineered wood; at manufacturer: 0.00169135 USD
- Communications equipment; at manufacturer: 3.50284e-5 USD
- Electromedical appartuses; at manufacturer: 1.76125e-6 USD
- Noncomparable imports: 0.00224213 USD
- Ball and roller bearings; at manufacturer: 5.18277e-6 USD
- Shelving and lockers; at manufacturer: 7.07729e-5 USD
- Vehicles and parts sales: 0.000377572 USD
- Motors and generators; at manufacturer: 1.84859e-6 USD
- Plywood and veneer; at manufacturer: 0.00452992 USD
- Motor vehicle steering, suspension components (except spring), and brake systems; at manufacturer: 8.16574e-5 USD
- All other forging, stamping, and sintering; at manufacturer: 6.86827e-6 USD
- Natural gas; at consumer: 0.0075647 USD
- Vegetable oils and by-products; at manufacturer: 6.64948e-6 USD
- Wireless telecommunications: 0.00076022 USD
- Copper, nickel, lead, and zinc; at mine: 7.27791e-8 USD
- Electronic capacitors, resistors, coils, transformers, connectors and other components (except semiconductors and printed circuit assemblies); at manufacturer: 0.000275089 USD
- Mechanical power transmission equipment; at manufacturer: 3.94259e-5 USD
- Carbon and graphite products; at manufacturer: 9.97933e-6 USD
- Legal services: 0.00311065 USD
- Stationery; at manufacturer: 1.3678e-8 USD
- Sports: 8.29936e-5 USD
- Home cooking appliances; at manufacturer: 4.2114e-6 USD
- Paper bags and coated paper; at manufacturer: 3.49703e-5 USD
- Machinery for the paper, textile, food or other industries (except semiconductor machinery); at manufacturer: 1.22235e-5 USD
- Lids, jars, bottle caps, other metal closures and crowns; at manufacturer: 3.38794e-5 USD
- Iron, gold, silver, and other metal ores; at mine: 8.47813e-9 USD
- Travel arrangement and reservation: 5.83731e-5 USD
- Vehicle engines and engine parts; at manufacturer: 4.61597e-5 USD
- Performances: 3.54673e-5 USD
- Welding and Soldering Equipment, Scales and Balances, and other general purpose machinery; at manufacturer: 3.52202e-6 USD
- Custom metal rolls; at manufacturer: 6.02406e-6 USD
- Other computer related services, including facilities management: 0.000666167 USD
- Metal coatings, engravings, and heat treatments; at manufacturer: 0.00205718 USD
- Office furniture and custom architectural woodwork and millwork; at manufacturer: 8.22354e-6 USD
- Surgical appliance and supplies; at manufacturer: 1.26431e-5 USD
- Water transport (boats, ships, ferries): 0.000152885 USD
- Custom computer programming: 2.18337e-8 USD
- Other transportation equipment; at manufacturer: 2.164e-5 USD
- Warehousing: 0.00217231 USD
- Adhesives; at manufacturer: 0.000897005 USD
- Monetary authorities and depository credit intermediation: 0.00305149 USD
- Springs and wires; at manufacturer: 1.53077e-6 USD
- Wood pulp; at manufacturer: 6.17828e-5 USD
- Cast iron and steel; at manufacturer: 6.5611e-6 USD
- Passenger ground transport: 0.00058607 USD
- Advertising and public relations: 0.00382317 USD
- Full-service restaurants: 0.00165688 USD
- Plastic bags, films, and sheets; at manufacturer: 0.000984217 USD
- Ground or treated minerals and earth; at manufacturer: 3.31378e-7 USD
- Home furniture - upholstered; at manufacturer: 8.1982e-5 USD
- Other plastic products; at manufacturer: 0.000219153 USD
- Wood kitchen cabinets and countertops; at manufacturer: 7.36312e-5 USD
- Machine shops; at manufacturer: 0.00206239 USD
- Relay and industrial controls; at manufacturer: 0.000230526 USD
- Fabric; at manufacturer: 7.96937e-5 USD
- Truck transport: 0.0236467 USD
- Plastics; at manufacturer: 0.000513456 USD
- Gasoline, fuels, and by-products of petroleum refining; at manufacturer: 0.00639923 USD
- Securities and commodities brokerage and exchanges: 0.000422566 USD
- Management consulting: 0.000987368 USD
- Insurance agencies and brokerages: 0.000238104 USD
- Laminated plastic plates and shapes; at manufacturer: 0.000107744 USD
- Polystyrene foam products; at manufacturer: 2.91486e-7 USD
- Synthetic rubber and artificial and synthetic fibers; at manufacturer: 0.000682107 USD
- Civic, social, professional, and similar organizations: 0.000906837 USD
- Household goods repair: 0.000381023 USD
- Chemicals (except basic chemicals, agrichemicals, polymers, paints, pharmaceuticals,soaps, cleaning compounds); at manufacturer: 0.000311989 USD
- Carpets and rugs; at manufacturer: 1.7018e-5 USD
- Cardboard containers; at manufacturer: 0.00252743 USD
- Drinking water and wastewater treatment; at consumer: 0.00034505 USD
- Other secondary nonferrous metal products; at manufacturer: 7.56902e-7 USD
- Analytical laboratory instruments; at manufacturer: 1.24452e-6 USD
- Metal plumbing drains, faucets, valves, and other fittings; at manufacturer: 1.31957e-5 USD
- Wooden windows, door, and flooring; at manufacturer: 0.00375767 USD
- Accounting, tax preparation, bookkeeping, and payroll: 0.00498283 USD
- Wiring devices; at manufacturer: 1.61857e-5 USD
- Cutting and machine tool accessory, rolling mill, and other metalworking machines; at manufacturer: 5.51153e-5 USD
- Nonferrous metal casts; at manufacturer: 3.21862e-6 USD
- Printed circuit and electronic assembly; at manufacturer: 0.000522967 USD
- Data processing and hosting: 0.00377396 USD
- Other basic inorganic chemicals; at manufacturer: 0.00957895 USD
- Other real estate: 0.000485335 USD
- Surgical and medical instruments; at manufacturer: 4.83253e-6 USD
- Institutional furniture; at manufacturer: 6.47614e-6 USD
- Heating equipment other than warm air furnaces; at manufacturer: 2.56029e-5 USD
- Industrial molds; at manufacturer: 2.11953e-8 USD
- Lessors of nonfinancial intangible assets: 0.000897753 USD
- Aluminum; at manufacturer: 2.85106e-5 USD
- Paper; at manufacturer: 4.30404e-6 USD
- Urethane and other foam products; at manufacturer: 2.13832e-5 USD
- Dimensional stone; at mine: 4.48348e-6 USD
- External hard drives, CDs, other storage media; at manufacturer: 3.36912e-6 USD
- Investment advice, portfolio management, and other financial advising services: 0.000685493 USD
- Facilities support: 1.42078e-5 USD
- other miscellaneous electrical equipment and components; at manufacturer: 1.45558e-8 USD
- Light gauge metal cans, boxes, and containers; at manufacturer: 5.5681e-6 USD
- Metal structural products; at manufacturer: 0.000203303 USD
- Scenic and sightseeing transportation and support activities for transportation: 0.000950092 USD
- Software: 3.97644e-5 USD
- Fiber, yarn, and thread; at manufacturer: 1.91627e-6 USD
- Fertilizers; at manufacturer: 2.8117e-7 USD
- Investigation and security: 0.000282309 USD
- Electricity; at consumer: 0.0106502 USD
- All other food and drinking places: 0.000110976 USD
- Secondary steel products; at manufacturer: 3.07957e-6 USD
- Ink and ink cartridges; at manufacturer: 4.6505e-7 USD
- Material handling equipment; at manufacturer: 6.70185e-5 USD
- Plastic pipe, fittings, and sausage casings; at manufacturer: 0.000129382 USD
- Transmission and power train parts; at manufacturer: 8.98157e-5 USD
- Primary iron, steel, and ferroalloy products; at manufacturer: 0.000237352 USD
- Architectural, engineering, and related services: 0.00501816 USD
- Vehicle repair: 0.00111031 USD
- Switchgear and switchboards; at manufacturer: 3.63895e-8 USD
- Electronic equipment repair and maintenance: 0.000641785 USD
- Pipeline transport: 3.68301e-5 USD
- Power boilers and heat exchangers; at manufacturer: 3.41949e-7 USD
- Commercial machinery repair: 0.00218415 USD
- Corn products; at manufacturer: 1.1059e-5 USD
- Satellite, telecommunications resellers, and all other telecommunications: 0.000147617 USD
- Storage batteries; at manufacturer: 1.74071e-5 USD
- Home furniture - Cabinets and non-wood, nonupholstered; at manufacturer: 7.8778e-6 USD
- Paints and coatings; at manufacturer: 0.000180505 USD
- Vending, commercial laundry, and other commercial and service industry machinery; at manufacturer: 7.27791e-9 USD
- Company and enterprise management: 0.0275208 USD
- Other petroleum and coal products; at manufacturer: 0.000444518 USD
- Petrochemicals; at manufacturer: 3.51227e-6 USD
- Light bulbs; at manufacturer: 1.31307e-7 USD
- Mineral wool; at manufacturer: 0.00186571 USD
- Office administration: 0.000404181 USD
- Buildings and dwellings services: 0.00503653 USD
- Other textiles; at manufacturer: 8.62582e-5 USD
- Primary copper; at manufacturer: 1.71264e-5 USD
- Other rubber products; at manufacturer: 1.39116e-5 USD
- Insurance carriers: 0.000706613 USD
- Limited-service restaurants: 0.00287299 USD
- Ophthalmic goods; at manufacturer: 4.32637e-6 USD
- Other support services: 0.000933892 USD
- Waste management and remediation: 0.00157754 USD
- Industrial process variable instruments; at manufacturer: 6.24201e-8 USD
- Wholesale trade: 0.0893124 USD
- Air and gas compressors; at manufacturer: 1.40989e-6 USD
- Home furniture - wood, nonupholstered; at manufacturer: 0.000143749 USD
- Books, newspapers, magazines, and other print media; at manufacturer: 7.29976e-6 USD
- Commercial equipment rental: 0.000682729 USD
- Specialty transformers; at manufacturer: 0.00111536 USD
- Optical instruments and lenses; at manufacturer: 2.46721e-6 USD
- Other retail: 7.56435e-5 USD
- Other vehicle parts; at manufacturer: 0.00183335 USD
- Rubber and plastic belts and hoses; at manufacturer: 2.49266e-6 USD
- Vaccines and other biological medical products; at manufacturer: 1.88109e-5 USD
- Lumber and treated lumber; at manufacturer: 0.174006 USD
- Dental laboratories; at manufacturer: 7.27791e-8 USD
- Timber and raw forest products; at forest: 0.276455 USD
- Computer systems design: 0.00137604 USD
- Lime and gypsum products; at manufacturer: 4.65576e-5 USD
- Vehicle rental and leasing: 0.00139277 USD
- Synthetic dyes and pigments; at manufacturer: 3.80986e-6 USD
- Magazines and journals; at publisher: 7.66546e-8 USD
- Finished and coated fabric; at manufacturer: 0.000231754 USD
- General merchandise stores: 6.5272e-6 USD
- Dental equipment and supplies; at manufacturer: 1.45558e-8 USD
- Promoters and agents: 0.000134965 USD
- Hotels and campgrounds: 0.00113692 USD
- Nonresidential building repair and maintanence: 0.0029818 USD
- Abrasive products; at manufacturer: 0.000604735 USD
- Cutlery and handtools; at manufacturer: 0.000247513 USD
- Communication and energy wire and cable; at manufacturer: 8.0057e-8 USD
- Speed changers, industrial high-speed drives, and gears; at manufacturer: 1.34765e-5 USD
- Air conditioning, refrigeration, and warm air heating equipment; at manufacturer: 0.0004266 USD
- Home refrigerators and freezers; at manufacturer: 1.06689e-5 USD
- Light fixtures; at manufacturer: 1.75636e-5 USD
- Valve and fittings (except for plumbing); at manufacturer: 4.56207e-5 USD
- Scientific research and development: 0.000156675 USD
- Telecommunications: 0.00261 USD
- Soap and cleaning compounds; at manufacturer: 1.73469e-5 USD
- All other converted paper products; at manufacturer: 7.65347e-6 USD
- Environmental and other technical consulting services: 0.000146313 USD
- Consumer goods and general rental centers: 0.000140086 USD
- Computer terminals and other computer peripheral equipment; at manufacturer: 0.000558442 USD
- Employment services: 0.000250206 USD
- Specialized design: 0.000385384 USD
- Marketing research and all other miscellaneous professional, scientific, and technical services: 0.00127188 USD
- Other engine equipment; at manufacturer: 1.4038e-6 USD
- State and local government enterprises: 0.00038439 USD
- Wireless communications; at manufacturer: 3.16485e-5 USD
- Dry-cleaning and laundry: 7.01483e-5 USD

## Inputs from nature
- Water, fresh: 0.0016058 m3; data quality (4,2,1,4,2)
- Water, fresh: 0.000472001 m3; data quality (3,2,1,4,2)
- Occupation, industrial area: 0.00105678 m2*a; data quality (4,2,1,1,1)
- Energy, hydraulic potential: 4.03171e-5 MJ; data quality (3,1,1,1,1)
- Energy, biomass: 4.78571 MJ; data quality (3,1,1,1,1)
- Occupation, urban, discontinuously built: 0.00014093 m2*a; data quality (4,2,1,1,1)
- Water, saline: 0.000109981 m3; data quality (4,2,1,4,2)
- Occupation, industrial area, built up: 0.00035226 m2*a; data quality (4,2,1,1,1)

## Emissions to nature
- nickel: 2.45649e-12, 5.04559e-13 kg (2 entries, compartments not in this file); data quality (4,1,1,1,5)
- Hydrocarbons, aromatic: 7.13222e-7 kg; data quality (4,2,1,1,5)
- toluene: 2.26845e-6 kg; data quality (4,2,1,1,5)
- 1,1,1-trichloroethane: 2.29265e-7 kg; data quality (3,2,1,1,5)
- 2-nitropropane: 1.28222e-13 kg; data quality (3,2,1,1,5)
- HYDROGEN SULFIDE: 2.23174e-9 kg; data quality (3,1,1,1,1)
- 1-Methyl-2-pyrrolidinone: 1.78944e-11 kg; data quality (5,1,1,1,4)
- ETHYLENETHIOUREA: 8.07459e-13 kg; data quality (5,2,1,1,3)
- Creosol: 1.29925e-8, 1.47141e-10, 3.25662e-6 kg (3 entries, compartments not in this file); data quality (5,1,1,1,5)
- cobalt: 1.58482e-14 kg; data quality (4,1,1,1,5)
- catechol: 4.06441e-14 kg; data quality (5,2,1,1,1)
- 2-METHOXYETHANOL: 5.2995e-9 kg; data quality (4,2,1,1,5)
- vinyl acetate: 2.73054e-8 kg; data quality (4,2,1,1,5)
- acetaldehyde: 7.593e-6 kg; data quality (3,2,1,1,5)
- Cobalt: 8.20011e-9 kg; data quality (3,2,1,1,5)
- barium: 7.26738e-13 kg; data quality (4,1,1,1,2)
- Styrene: 5.69269e-13 kg; data quality (3,1,1,1,1)
- 2,4,5-trichlorophenol: 5.57433e-13 kg; data quality (2,2,1,1,1)
- Diethylene glycol butyl ether: 9.54931e-9 kg; data quality (3,2,1,1,5)
- ammonia: 1.07813e-8 kg; data quality (3,1,1,1,2)
- methylene diphenyl diisocyanate: 1.70173e-8 kg; data quality (4,2,1,1,5)
- ethylene glycol: 4.51088e-11 kg; data quality (5,1,1,1,2)
- Triethylene glycol: 7.6987e-11 kg; data quality (3,2,1,1,5)
- Xylene: 4.79798e-6 kg; data quality (3,2,1,1,5)
- CATECHOL: 3.35268e-11, 1.35817e-13 kg (2 entries, compartments not in this file); data quality (2,1,1,1,2)
- para-xylene: 2.52375e-9 kg; data quality (4,2,1,1,4)
- Aluminum: 7.2589e-10 kg; data quality (4,1,1,1,2)
- CARBAZOLE: 8.86153e-12 kg; data quality (2,2,1,1,5)
- 1,1-DICHLOROETHYLENE: 4.83619e-13 kg; data quality (3,2,1,1,4)
- Nitrogen: 1.79891e-5 kg; data quality (2,2,1,1,5)
- phenanthrene: 1.68708e-9 kg; data quality (3,2,1,1,5)
- carbon monoxide: 0.00107787 kg; data quality (2,2,1,1,5)
- hydroquinone: 1.03148e-11 kg; data quality (3,2,1,1,4)
- Ethylene glycol monoethyl ether: 5.35292e-8, 5.47852e-12 kg (2 entries, compartments not in this file); data quality (5,1,1,1,5)
- PCB-1: 1.39562e-15 kg; data quality (2,2,1,1,5)
- dibenzofuran: 2.17682e-8 kg; data quality (4,2,1,1,5)
- monochloroethane: 2.2536e-11 kg; data quality (3,2,1,1,5)
- 2,4-dinitrophenol: 2.22951e-10 kg; data quality (5,2,1,1,5)
- methane, bromo-, halon 1001: 2.45252e-8 kg; data quality (3,2,1,1,5)
- dimethyl formamide: 1.98439e-11 kg; data quality (4,2,1,1,5)
- chromium: 1.07864e-10, 4.41635e-11, 2.80632e-12 kg (3 entries, compartments not in this file); data quality (4,1,1,1,5)
- isophorone: 4.31539e-9 kg; data quality (3,2,1,1,5)
- p-cresol: 4.39147e-12 kg; data quality (4,2,1,1,1)
- Benzo(k)fluoranthene: 9.39526e-12 kg; data quality (2,2,1,1,5)
- hydrogen fluoride: 2.78896e-8 kg; data quality (2,2,1,1,4)
- 2,4,5,2',5'-PENTACHLOROBIPHENYL: 2.77288e-14 kg; data quality (2,2,1,1,5)
- acenaphthylene: 1.30329e-9 kg; data quality (3,2,1,1,5)
- Propane, 1,1,1,3,3,3-hexafluoro-, HCFC-236fa: 1.26353e-9 kg; data quality (4,2,1,4,1)
- ethane, 1,1,2-trichloro-: 1.71394e-9 kg; data quality (4,2,1,1,4)
- Phenol: 4.12184e-12 kg; data quality (3,1,1,1,4)
- biphenyl: 1.68832e-8 kg; data quality (4,2,1,1,5)
- naphthalene: 3.10434e-11 kg; data quality (4,1,1,1,5)
- ethane, 1,2-dibromo-: 7.35114e-10 kg; data quality (2,2,1,1,5)
- Dimethipin: 2.32272e-12 kg; data quality (5,1,1,1,4)
- Chrysene: 2.48867e-11 kg; data quality (2,2,1,1,5)
- naphthalene: 1.45326e-6 kg; data quality (3,2,1,1,5)
- CHLORONAPHTHALENE: 2.95949e-13 kg; data quality (1,2,1,1,5)
- formic acid: 1.52575e-9 kg; data quality (3,1,1,1,5)
- 3,3'-dimethylbenzidine: 9.48269e-16 kg; data quality (1,2,1,1,5)
- CHLORINE: 3.50619e-14 kg; data quality (2,1,1,1,2)
- toluene, 2,4-dinitro-: 4.34849e-11 kg; data quality (5,2,1,1,5)
- methane, dichloro-, hcc-30: 6.35517e-7 kg; data quality (4,2,1,1,5)
- Water, saline: 5.57271e-5 m3; data quality (4,2,1,4,2)
- Ethane, pentafluoro-, HFC-125: 1.09314e-7 kg; data quality (4,2,1,4,1)
- Chromium, ion: 6.05098e-9 kg; data quality (2,2,1,1,5)
- phthalic anhydride: 3.39425e-10 kg; data quality (3,1,1,1,5)
- 1,2,4-trichlorobenzene: 3.07691e-9 kg; data quality (4,2,1,1,3)
- 4,4'-METHYLENEBIS(2-CHLOROANALINE): 3.55519e-12, 6.38749e-14 kg (2 entries, compartments not in this file); data quality (1,1,1,1,4)
- benzene, ethyl-: 1.45723e-7 kg; data quality (4,2,1,1,5)
- carbonyl sulfide: 2.64895e-10 kg; data quality (4,2,1,1,1)
- epichlorohydrin: 1.51215e-11 kg; data quality (3,2,1,1,1)
- Carbon dioxide: 0.0305778 kg; data quality (4,2,1,4,1)
- manganese: 5.46434e-9, 8.71806e-13 kg (2 entries, compartments not in this file); data quality (4,1,1,1,5)
- Propene: 1.31195e-13 kg; data quality (3,1,1,1,2)
- acrylonitrile: 5.1085e-11 kg; data quality (3,2,1,1,5)
- hexachloroethane: 1.16256e-9 kg; data quality (4,2,1,1,1)
- particulates, < 10 um: 0.000109932 kg; data quality (3,2,1,1,5)
- Cobalt: 1.54029e-13 kg; data quality (4,1,1,1,5)
- copper: 1.20898e-11 kg; data quality (4,1,1,1,5)
- propylene oxide: 2.88741e-11 kg; data quality (3,2,1,1,4)
- formaldehyde: 1.22575e-9 kg; data quality (2,1,1,1,2)
- styrene: 2.18939e-6 kg; data quality (4,2,1,1,5)
- CARBAMODITHIOIC ACID, DIMETHYL-, POTASSIUM SALT: 4.24581e-12 kg; data quality (2,1,1,1,3)
- formaldehyde: 1.07642e-5 kg; data quality (2,2,1,1,5)
- propanal: 2.30384e-7 kg; data quality (3,2,1,1,5)
- ethane, 1,2-dichloro-: 4.44097e-8 kg; data quality (3,2,1,1,5)
- AMMONIA: 2.825e-10 kg; data quality (3,1,1,1,5)
- benzo(a)pyrene: 9.3828e-10 kg; data quality (2,2,1,1,5)
- 1,4-dioxane: 5.49997e-9 kg; data quality (3,2,1,1,5)
- toluene-2,4-diisocyante: 3.94534e-10 kg; data quality (3,2,1,1,5)
- Benzene, hexachloro-: 2.94281e-15 kg; data quality (4,1,1,1,5)
- styrene: 6.55537e-11 kg; data quality (3,1,1,1,5)
- 3-methylcholanthrene: 1.39725e-14 kg; data quality (2,2,1,1,4)
- fluorene: 8.60695e-10 kg; data quality (2,2,1,1,5)
- 1,1,2,2-tetrachloroethane: 4.85048e-12 kg; data quality (3,2,1,1,4)
- Cresol: 5.94667e-9 kg; data quality (4,2,1,1,1)
- Captan: 1.0385e-13 kg; data quality (5,2,1,1,5)
- toluene-2,4-diisocyante: 6.16233e-13 kg; data quality (2,1,1,1,4)
- 1,3-PHENYLENEDIAMINE: 1.8961e-15 kg; data quality (4,1,1,1,4)
- DIETHANOLAMINE: 5.92531e-12 kg; data quality (4,1,1,1,4)
- Dinitrogen monoxide: 1.19123e-7 kg; data quality (4,2,1,4,1)
- Formic acid: 2.11727e-9 kg; data quality (3,1,1,1,2)
- phthalate, dioctyl-: 2.92715e-9 kg; data quality (3,2,1,1,5)
- o-cresol: 3.00717e-10 kg; data quality (4,2,1,1,1)
- Cresol, o-: 7.44617e-15 kg; data quality (2,1,1,1,3)
- 2-(2-BUTOXYETHOXY) ETHYL ACETATE: 1.64634e-9 kg; data quality (5,2,1,1,5)
- m-xylene: 4.2253e-8 kg; data quality (3,2,1,1,5)
- chloroform: 4.9452e-8 kg; data quality (4,2,1,1,5)
- acetaldehyde: 2.28681e-9 kg; data quality (3,1,1,1,1)
- Phenol, pentachloro-: 5.53264e-9 kg; data quality (5,1,1,1,5)
- 2,4/2,6-toluenediisocyanate (mixture): 5.92531e-12 kg; data quality (1,1,1,1,4)
- silver: 9.24177e-15 kg; data quality (4,1,1,1,5)
- Benzo(b,j,k)fluoranthene: 3.64648e-16 kg; data quality (5,2,1,1,5)
- 2-PHENYLPHENOL, SODIUM SALT: 7.44617e-15 kg; data quality (2,1,1,1,3)
- methyl methacrylate: 9.55009e-9 kg; data quality (4,2,1,1,5)
- phenol: 6.92816e-7 kg; data quality (4,2,1,1,5)
- QUINOLINE: 3.43884e-8 kg; data quality (3,2,1,1,5)
- hexane: 4.16844e-7 kg; data quality (3,2,1,1,5)
- Dimethyl sulfate: 7.82029e-12 kg; data quality (3,2,1,1,1)
- Propane, 1,2-dichloro-: 4.93471e-8 kg; data quality (4,2,1,1,5)
- nitric acid: 3.08059e-15, 2.02208e-11 kg (2 entries, compartments not in this file); data quality (3,1,1,1,5)
- ACRYLAMIDE: 1.01355e-10 kg; data quality (4,2,1,1,4)
- Propene, 1,3-dichloro-: 4.96863e-15 kg; data quality (3,2,1,1,5)
- Cresol: 6.56065e-13, 2.93754e-12 kg (2 entries, compartments not in this file); data quality (2,1,1,1,1)
- cyclohexane: 5.39156e-10 kg; data quality (4,1,1,1,4)
- Chloroform: 5.37046e-14, 4.52193e-12 kg (2 entries, compartments not in this file); data quality (3,1,1,1,1)
- Methane, dichloro-, HCC-30: 9.95453e-12 kg; data quality (5,1,1,1,4)
- diisocyanates: 4.35115e-9 kg; data quality (4,1,1,1,5)
- Phthalate, dibutyl-: 7.3575e-9 kg; data quality (3,2,1,1,5)
- 2-METHYLANTHRACENE: 5.97978e-11 kg; data quality (2,2,1,1,5)
- 2-PHENOXYETHANOL: 8.76828e-10 kg; data quality (3,2,1,1,5)
- acrolein: 4.2439e-6 kg; data quality (2,2,1,1,5)
- Benzo(g,h,i)perylene: 1.52968e-10 kg; data quality (3,2,1,1,5)
- polychlorinated biphenyls: 7.01624e-13 kg; data quality (3,2,1,1,5)
- hydrogen sulfide: 1.31977e-8 kg; data quality (3,2,1,1,1)
- 2-methylnaphthalene: 3.45151e-11 kg; data quality (2,2,1,1,3)
- phenol: 4.58997e-11 kg; data quality (3,1,1,1,1)
- toluene: 4.46243e-13 kg; data quality (5,1,1,1,2)
- lead: 6.76438e-8 kg; data quality (3,2,1,1,5)
- manganese: 1.29744e-6 kg; data quality (3,2,1,1,5)
- nickel: 2.46935e-8 kg; data quality (3,2,1,1,5)
- Dimethoxy methane: 4.56774e-13 kg; data quality (2,2,1,1,1)
- 1,2-DICHLOROETHYLENE: 5.5935e-12 kg; data quality (5,1,1,1,4)
- Methyl iodide: 1.94857e-11 kg; data quality (4,2,1,1,1)
- 1,4-dichlorobenzene: 1.82432e-9 kg; data quality (2,2,1,1,5)
- pentachlorophenol: 4.57298e-9 kg; data quality (3,2,1,1,5)
- Phthalate, dimethyl-: 1.52605e-8 kg; data quality (4,2,1,1,5)
- Phosphorus: 2.18113e-5 kg; data quality (2,1,1,1,5)
- Methane, difluoro-, HFC-32: 6.36593e-8 kg; data quality (4,2,1,4,1)
- Nitrobenzene: 9.63502e-14 kg; data quality (4,2,1,1,5)
- Benzo(b)fluoranthene: 1.93863e-11 kg; data quality (2,2,1,1,5)
- cumene: 4.13856e-8 kg; data quality (4,2,1,1,5)
- acrylic acid: 2.27315e-10 kg; data quality (3,2,1,1,5)
- tertiary-Butyl Acetate: 4.85764e-9 kg; data quality (3,2,1,1,4)
- ethylene oxide: 2.75781e-9 kg; data quality (3,2,1,1,5)
- lead: 2.0555e-8, 2.27677e-10 kg (2 entries, compartments not in this file); data quality (3,1,1,1,5)
- DMTT (DAZOMET): 3.31495e-13, 1.95709e-12 kg (2 entries, compartments not in this file); data quality (4,1,1,1,2)
- Hydrazine, methyl-: 2.83159e-12 kg; data quality (2,2,1,1,1)
- carbon disulfide: 1.2098e-8 kg; data quality (4,2,1,1,5)
- pyrene: 7.64309e-10 kg; data quality (2,2,1,1,5)
- Chromium VI: 5.45964e-9 kg; data quality (3,2,1,1,5)
- VOC, volatile organic compounds: 0.000913235 kg; data quality (3,2,1,1,5)
- arsenic: 4.04637e-10 kg; data quality (2,1,1,1,5)
- o-Xylene: 2.17388e-8 kg; data quality (3,2,1,1,5)
- 2,4/2,6-toluenediisocyanate (mixture): 3.63277e-10 kg; data quality (3,1,1,1,4)
- 1,2,4-trimethylbenzene: 9.28368e-8 kg; data quality (5,1,1,1,5)
- Indeno(1,2,3-cd)pyrene: 1.63569e-11 kg; data quality (2,2,1,1,5)
- 2,3,4'-TRICHLOROBIPHENYL: 1.6493e-14 kg; data quality (2,2,1,1,5)
- anthracene: 6.09486e-10 kg; data quality (3,2,1,1,5)
- Chrysene, 5-methyl-: 1.39156e-16 kg; data quality (2,2,1,1,1)
- ETHENE: 5.40951e-13 kg; data quality (3,1,1,1,5)
- fluoranthene: 2.73712e-10 kg; data quality (2,2,1,1,5)
- antimony: 3.07489e-9 kg; data quality (3,2,1,1,5)
- barium: 2.03319e-13 kg; data quality (4,1,1,1,5)
- Propanal: 2.05897e-11 kg; data quality (2,1,1,1,4)
- PCB-15: 1.69265e-17 kg; data quality (2,2,1,1,1)
- particulates, < 2.5 um: 0.000238027 kg; data quality (3,2,1,1,5)
- mercury: 2.03787e-9 kg; data quality (2,2,1,1,5)
- Butanol: 3.78031e-12 kg; data quality (5,1,1,1,2)
- methane, monochloro-, r-40: 5.29275e-8 kg; data quality (3,2,1,1,5)
- Hexachlorocyclopentadiene: 2.34746e-10 kg; data quality (3,2,1,1,1)
- Ethane, 1,1,1,2-tetrafluoro-, HFC-134a: 4.12018e-7 kg; data quality (4,2,1,4,1)
- methanol: 2.51759e-8 kg; data quality (3,1,1,1,1)
- Ethane, 1,1,1-trifluoro-, HFC-143a: 4.67709e-8 kg; data quality (4,2,1,4,1)
- CHLOROPRENE: 4.80298e-13 kg; data quality (2,2,1,1,1)
- 2,2,4-trimethylpentane: 2.94134e-7 kg; data quality (3,2,1,1,5)
- 2-ethoxyethyl acetate: 3.01911e-9 kg; data quality (3,2,1,1,5)
- hexachlorobenzene: 1.93749e-10 kg; data quality (3,2,1,1,5)
- 1-METHYLNAPTHALENE: 6.81854e-14 kg; data quality (2,2,1,1,3)
- 2,4,6-trichlorophenol: 6.7155e-12 kg; data quality (2,2,1,1,5)
- Ethene, chloro-: 2.37182e-8 kg; data quality (3,2,1,1,5)
- maleic anhydride: 5.80666e-16 kg; data quality (3,2,1,1,5)
- Dibenz(a,h)anthracene: 1.36617e-12 kg; data quality (2,2,1,1,5)
- 2-chloro-1-phenylethanone: 1.91445e-13 kg; data quality (2,2,1,1,1)
- benzene, chloro-: 4.04457e-8 kg; data quality (4,2,1,1,5)
- PHOSPHORUS: 4.72998e-8 kg; data quality (2,2,1,1,5)
- ethene, tetrachloro-: 7.17449e-8 kg; data quality (3,2,1,1,5)
- Formaldehyde: 8.23145e-11 kg; data quality (2,1,1,1,5)
- DNOC: 1.11527e-11 kg; data quality (2,2,1,1,5)
- benz[a]anthracene: 1.88643e-11 kg; data quality (2,2,1,1,5)
- mercury: 6.26122e-14 kg; data quality (3,1,1,1,5)
- methanol: 3.52605e-5 kg; data quality (4,2,1,1,5)
- cyanide: 5.02239e-11 kg; data quality (3,2,1,1,2)
- 1,2-BUTYLENE OXIDE: 7.24627e-11 kg; data quality (3,2,1,1,5)
- Benzo(g,h,i)perylene: 3.04004e-12, 2.10687e-11 kg (2 entries, compartments not in this file); data quality (2,1,1,1,5)
- Methane: 9.38921e-6 kg; data quality (4,2,1,4,1)
- 4-nitrophenol: 1.42075e-10 kg; data quality (2,2,1,1,5)
- trichloroethylene: 4.8468e-8 kg; data quality (4,2,1,1,5)
- sulfur dioxide: 3.04456e-5 kg; data quality (2,2,1,1,5)
- Water, fresh: 0.00179234 m3; data quality (3,2,1,4,2)
- butanol: 1.4167e-8 kg; data quality (5,1,1,1,5)
- 4,4'-METHYLENEDIANILINE: 5.46311e-13 kg; data quality (4,2,1,1,5)
- Methane, monochloro-, R-40: 3.18745e-14, 8.71352e-15 kg (2 entries, compartments not in this file); data quality (3,1,1,1,2)
- t-butyl methyl ether: 4.5045e-9 kg; data quality (3,2,1,1,5)
- ethylene glycol: 3.34817e-7 kg; data quality (3,2,1,1,5)
- acenaphthene: 2.59297e-10 kg; data quality (3,2,1,2,4)
- hydrogen chloride: 1.41262e-5 kg; data quality (2,2,1,1,5)
- ethylbenzene: 2.11481e-8 kg; data quality (4,1,1,1,5)
- Formic acid: 7.1223e-13 kg; data quality (3,1,1,1,1)
- acetophenone: 1.29348e-9 kg; data quality (4,2,1,1,3)
- ethyl acrylate: 1.28691e-9 kg; data quality (3,2,1,1,5)
- benzyl chloride: 1.09215e-10 kg; data quality (2,2,1,1,1)
- BUTYL ISOCYANATE: 8.48002e-11 kg; data quality (5,2,1,1,5)
- Acetaldehyde: 2.10977e-11 kg; data quality (3,1,1,1,4)
- HYDROGEN SULFIDE: 9.73933e-11 kg; data quality (3,1,1,1,2)
- TOXAPHENE (EXAMPLE ISOMER SHOWN BELOW): 2.18539e-12 kg; data quality (4,2,1,1,5)
- Benzo(a)anthracene: 3.98569e-14 kg; data quality (2,2,1,1,5)
- chlorine: 1.96913e-10 kg; data quality (2,1,1,1,1)
- ammonia: 7.95794e-6 kg; data quality (3,2,1,1,5)
- cadmium: 4.46284e-9 kg; data quality (3,2,1,1,5)
- 2,4/2,6-toluenediisocyanate (mixture): 1.84633e-11 kg; data quality (4,1,1,1,4)
- Sulfuric acid: 2.15676e-8 kg; data quality (2,1,1,1,2)
- benzene: 4.68155e-6 kg; data quality (3,2,1,1,5)
- mercury: 6.7321e-15 kg; data quality (3,1,1,1,2)
- m-cresol: 1.11377e-11 kg; data quality (4,2,1,1,1)
- nitrogen oxides: 0.000309005 kg; data quality (2,2,1,1,5)
- Ethylene glycol monoethyl ether: 2.2935e-11 kg; data quality (5,1,1,1,2)
- carbon tetrachloride: 4.97359e-8 kg; data quality (4,2,1,1,5)
- chlorine: 7.26745e-7 kg; data quality (4,2,1,1,5)
- Polychlorinated biphenyls: 2.90695e-13, 1.97622e-15 kg (2 entries, compartments not in this file); data quality (3,1,1,1,2)
- bromoform: 3.93423e-13 kg; data quality (3,2,1,1,1)
- butadiene: 4.99187e-9 kg; data quality (3,2,1,4,1)
- selenium: 3.08059e-15 kg; data quality (4,1,1,1,5)
- methyl isobutyl ketone: 2.90092e-7 kg; data quality (4,2,1,1,5)
- aniline: 2.73396e-13 kg; data quality (4,2,1,1,2)
- Triethyl amine: 1.5706e-9 kg; data quality (4,2,1,1,5)
- diethanolamine: 3.18011e-10 kg; data quality (3,2,1,1,4)
- selenium: 2.52064e-8 kg; data quality (2,2,1,1,5)
- beryllium: 1.20768e-9 kg; data quality (2,2,1,1,5)
- BENZ(A)ACRIDINE: 1.04671e-19 kg; data quality (2,2,1,1,3)
- arsenic: 1.11867e-8 kg; data quality (3,2,1,1,5)
- methanol: 1.10283e-9 kg; data quality (3,1,1,1,4)
- acetonitrile: 6.91192e-18 kg; data quality (3,2,1,1,1)
- N,N-DIMETHYLANILINE: 1.85001e-11 kg; data quality (5,2,1,1,5)
- Ethylene glycol: 6.37489e-15 kg; data quality (5,1,1,1,2)

## Inventory method
Input-output

## Modelling constants
The reference unit of all processes is 1 USD2013 of the good or service. The technosphere inputs are based on the US BEA detailed input-output tables for 2007. The IO tables are combined to develop a commodity-by-commodity model based on the the industry-technology assumption (see Suh et al., 2010), which assumes all commodities produced by a given industry have the same input structure, but that multiple industries can produce the same commodity. Thus, model technosphere flows represent commodity outputs (and not industry outputs) from other processes in the model. There are no by-products included in these processes. All commodity production is based on US-conditions, despite in reality that some goods and services are produced overseas, as USEEIO v1.1 is a single-region IO model.

## Completeness
The input-output approach assures that all purchased inputs associated with the sectors making these commodities as reported in the US census for 2007 are included. The direct resources extracted including minerals, energy sources, water and land occupied are included. Emissions to air include all critieria air pollutants, greenhouse gases, and hazardous and toxic air pollutants as defined by US EPA. Releases to water include toxics, total nitrogen and total phosphorus, and water discharges. Releases to soil or groundwater include toxics and agriculutural pesticides. Some metal releases to air, water and soil are not included because they could not be speciated. Solid hazardous and non-hazardous wastes generated are not included as an elementary flows although purchases of waste services are included.

## Data treatment
Greenhouse gases are primarily from the US Greenhouse Gas Emission Inventory (USEPA 2016a). Biogenic C uptake is not included (change from version 1.0), as biogenic C emission are not included. Toxic releases to air, water and soil (except pesticides) are from the 2013 Toxic Release Inventory (USEPA 2015a). Criteria air pollutants and hazardous air pollutants are from the 2011 National Emissions Inventory (USEPA 2015b). All estimates are normalized by industry based on sector output in the data year, then converted to 2013 USD using relative sector-specific CPIs (if data year is not 2013). Energy use represent raw renewables or fossil fuel energies and is based on EIA data for 2014. See Table 1 in Yang, Ingwersen et al. 2017 and Supporting Information 1, and the v1.1 data update notes (Ingwersen et al. 2017) for all details on environmental data sources used.Land occupation associated with manufacturing buildings was estimated based on the building floorspace data provided by the U.S. Energy Information Administration in the 2010 Manufacturing Energy Consumption Survey (EIA 2013). Portions of total renewable energy (EIA 2016) based on EIA-923 reports for 2014 (EIA 2017) are included. Nitrogen and Phosphorus releases are modeled in total N and total P equivalents as estimated by the Discharge Monitoring Report Nutrient Loading tool (USEPA 2016b). Self-supplied withdrawals were assigned to industrial sectors based on water use statistics for Canadian industries by NAICS 3-digit sector scaled to US production levels based on gross domestic product by industry (BEA 2015; Statistics Canada 2010), and further disaggregated to the manufacturing sectors based on compensation of employees as provided by the 2007 IO tables (BEA 2015). Water withdrawals associated with public supply were allocated to sectors based on their use of water, sewage, and other services in USD based on the IO tables (BEA 2015). Portions of total renewable energy (EIA 2016) by type are assigned to sectors (hydro, wind, solar, or) based on EIA-923 reports for 2014 (EIA 2017).

## Data collection
2015-2016

## Sampling procedure
US federal government sources, including surveys and US EPA emissions databases are used as the primary sources. From these sources, data for US reporting establishments/facilities are aggregated by the NAICS sector as defined in the BEA detailed 2007 input-output tables. When level of sector aggregation differs, or when direct emissions are not reported but modeled, additional sources are used to make allocations and estimates.

## Review details
In regard to quality assurance and peer-review, each dataset created went through Quality Assurance as defined in a quality assurance project plans at US EPA, CSRA or ERG. The model was assembled with the IO model builder model (USEPA 2016c). Validation functions were used to check that all the model components were properly assembled and harmonized. Bayou Demeke and Santosh Ghimire provided internal peer review of the model methodology and the manuscript underwent standard EPA management review. An editor and two anonymous reviewers at the Journal of Cleaner Production reviewed the model. In regard to data quality evaluation, data quality assessment was performed at the flow and process levels according to the updated US EPA data quality assessment guidelines as defined in US EPA (2016b).

## Intended application
The primary application is for use in the US Environmentally-Extended Input-Ouput model, USEEIO, version 1.1. This model is being used by the US EPA for supporting tools that prioritize goods and services based on potential environmental impacts, resource use or emissions for large regions, including the US and US states, and as a strealined tool for organizations as a starting point to consider sustainable materials management. Model results are designed to provide meso/macro-level decision support.

## Project
USEEIO v1.1 was developed by the US EPA with CSRA and ERG with Wesley W. Ingwersen and David E. Meyer as research leads. Yi Yang was the technical lead on the work for CSRA (contract EP-C-15-012); Troy Hawkins was lead for ERG (contract EP-C-12-021).

## Sources
- USEPA 2015a
- Macknick et al. 2011
- USGS 2015
- Statistics Canada 2010
- Blackhurst et al. 2010
- USDA 2006
- Ingwersen et al. DRAFT
- USDA 2014
- Ingwersen et al. 2017
- USEPA 2016c
- Yienger et al. 1995
- Torcellini et al. 2003
- BLM 2008
- USEPA 2016b
- USDA 2016
- Edelen and Ingwersen 2017
- BEA 2015
- USDA 2009b
- USGS 2016
- EIA 2013
- Nickerson et al. 2011
- EIA 2017
- USEPA 2016a
- Maupin et al. 2014
- USDA 2009a
- USEPA 2015b
- Goebes et al. 2003
- Kim et el. 2013
- Lovelace 2009
- EIA 2016
- EIA 2015
