# All other converted paper products; at manufacturer

Dataset: openLCA process, unit process
Category: 3222: Converted Paper Product Manufacturing
Geography: United States
Time period: 2017-01-01 to 2017-12-31
Data quality: US EPA - Process Pedigree Matrix (1;1)
Exchange data quality scheme: US EPA - Flow Pedigree Matrix
Generated by: US EPA with CSRA and ERG
Owner: US EPA
Published in: Yang, Ingwersen et al. 2017
restrictionsDescription: This model shold be appropriately cited (see Yang, Ingwersen et al. 2017 source or Publication field) when used. Any changes or derivations of this model by the user should be documented. The model itself and any results from use of this model shall not be construed to consitute US EPA opinion or policy.
copyright: false

## General comment
BEA Code & Name is '322299:All other converted paper product manufacturing'. Description of the primary industry producing this good or service, adapted from the Census Bureau NAICS 2007 descriptions: This U.S. industry comprises establishments primarily engaged in converting paper or paperboard into products (except containers, bags, coated and treated paper, stationery products, and sanitary paper products) or converting pulp into pulp products, such as egg cartons, food trays, and other food containers from molded pulp.

## Technology
The process describes the average US production of this good or service within this NAICS-based grouping defined in the BEA 2007 detailed input-output tables (BEA 2015). Distribution, wholesale and retailing of this good or service, use, and final disposal are not included. Creation of a product system with this process will enable modeling of all upstream (supply-chain) activities.

## Geography
Data represent the 50 US states

## Time period
2017 was the year in which this version of USEEIO was released and is the target date for the model

## Reference product
- All other converted paper products; at manufacturer: 1 USD

## Inputs from technosphere
All rows: data quality (1,3,1,1,1)
- Plastic pipe, fittings, and sausage casings; at manufacturer: 0.000724492 USD
- Other nonmetallic mineral products; at manufacturer: 5.86117e-7 USD
- Industrial process variable instruments; at manufacturer: 1.39376e-5 USD
- Special tools, dies, jigs, and fixtures; at manufacturer: 7.93339e-6 USD
- Hotels and campgrounds: 0.00107522 USD
- Heating equipment other than warm air furnaces; at manufacturer: 9.69113e-5 USD
- Paper; at manufacturer: 0.0857659 USD
- Accounting, tax preparation, bookkeeping, and payroll: 0.00330865 USD
- Company and enterprise management: 0.0400768 USD
- Laminated plastic plates and shapes; at manufacturer: 0.000458856 USD
- Fertilizers; at manufacturer: 3.1189e-6 USD
- Navigation instruments; at manufacturer: 4.47914e-5 USD
- Other plastic products; at manufacturer: 0.000728547 USD
- Performances: 1.43912e-6 USD
- Paints and coatings; at manufacturer: 6.78649e-5 USD
- Clay and ceramic products; at manufacturer: 5.53704e-6 USD
- Custom metal rolls; at manufacturer: 2.92754e-6 USD
- Drinking water and wastewater treatment; at consumer: 0.00062702 USD
- Employment services: 0.00107677 USD
- Wholesale trade: 0.04931 USD
- Couriers and messengers: 4.13898e-6 USD
- External hard drives, CDs, other storage media; at manufacturer: 1.72654e-6 USD
- Fabricated pipe and pipe fittings; at manufacturer: 7.90436e-6 USD
- State and local government enterprises: 0.000825033 USD
- Sand, gravel, clay, phosphate, other nonmetallic minerals; at mine: 4.47796e-5 USD
- Rubber tires; at manufacturer: 7.42469e-7 USD
- Metal plumbing drains, faucets, valves, and other fittings; at manufacturer: 1.79973e-6 USD
- Nondepository credit intermediation and related activities: 0.00413912 USD
- Air transport: 0.00235017 USD
- Vehicle repair: 0.000862357 USD
- Cement; at manufacturer: 4.17467e-6 USD
- Soap and cleaning compounds; at manufacturer: 7.71313e-6 USD
- Lumber and treated lumber; at manufacturer: 1.8267e-5 USD
- Stationery; at manufacturer: 4.56229e-5 USD
- Paper bags and coated paper; at manufacturer: 0.00385884 USD
- Computer terminals and other computer peripheral equipment; at manufacturer: 0.000206517 USD
- Chemicals (except basic chemicals, agrichemicals, polymers, paints, pharmaceuticals,soaps, cleaning compounds); at manufacturer: 0.00292075 USD
- Food and beverage stores: 6.84602e-6 USD
- Other basic organic chemicals; at manufacturer: 0.00590953 USD
- General merchandise stores: 2.15986e-5 USD
- Automatic controls for HVAC and refrigeration equipment; at manufacturer: 0.000106855 USD
- Warehousing: 0.00210109 USD
- Aluminum products; at manufacturer: 0.000628611 USD
- Tobacco products; at manufacturer: 0.00103285 USD
- Satellite, telecommunications resellers, and all other telecommunications: 0.000206985 USD
- Travel arrangement and reservation: 0.000394763 USD
- Independent artists, writers, and performers: 0.000217903 USD
- Software: 2.36556e-6 USD
- Wood pulp; at manufacturer: 0.0746127 USD
- Electricity; at consumer: 0.0113751 USD
- Metal pipe fittings, ball and roller bearings, industrial patterns, metal bath fixtures, other misc. fabricated metals; at manufacturer: 0.00405657 USD
- Watches, clocks, and other measuring and controlling devices; at manufacturer: 2.60163e-6 USD
- Metal coatings, engravings, and heat treatments; at manufacturer: 0.0099462 USD
- Power boilers and heat exchangers; at manufacturer: 1.15211e-5 USD
- Industrial molds; at manufacturer: 2.70927e-7 USD
- Lime and gypsum products; at manufacturer: 4.55252e-6 USD
- Other textiles; at manufacturer: 4.62633e-6 USD
- Other vehicle parts; at manufacturer: 0.000198547 USD
- Machine shops; at manufacturer: 0.0121648 USD
- Vehicle seating and interior trim (upholstery); at manufacturer: 5.51864e-8 USD
- Asphalt pavement; at manufacturer: 6.57965e-7 USD
- other miscellaneous electrical equipment and components; at manufacturer: 1.75653e-6 USD
- Plastics; at manufacturer: 0.00197824 USD
- Corn products; at manufacturer: 6.73073e-5 USD
- Metal structural products; at manufacturer: 2.82565e-5 USD
- Leather; at manufacturer: 3.20633e-5 USD
- Printing support; at manufacturer: 0.000114677 USD
- Securities and commodities brokerage and exchanges: 0.000279098 USD
- Dimensional stone; at mine: 7.346e-5 USD
- Vehicle electrical and electronic equipment; at manufacturer: 1.46739e-6 USD
- Data processing and hosting: 0.00314987 USD
- Coal; at mine: 0.00255287 USD
- Water transport (boats, ships, ferries): 0.000231542 USD
- Other concrete products; at manufacturer: 3.95932e-6 USD
- All other forging, stamping, and sintering; at manufacturer: 9.27075e-6 USD
- Carbon and graphite products; at manufacturer: 1.82114e-6 USD
- Management consulting: 0.000666459 USD
- All other food and drinking places: 6.30938e-6 USD
- Petrochemicals; at manufacturer: 8.14813e-6 USD
- Other support services: 0.000840597 USD
- Ball and roller bearings; at manufacturer: 4.42059e-5 USD
- Specialized design: 0.0014513 USD
- Cast iron and steel; at manufacturer: 8.72408e-5 USD
- Veneer, plywood, and engineered wood; at manufacturer: 2.75257e-5 USD
- Buildings and dwellings services: 0.00364335 USD
- Tobacco, cotton, sugarcane, peanuts, sugar beets, herbs and spices, and other crops; at farm: 0.000389464 USD
- Truck transport: 0.0156825 USD
- Insurance agencies and brokerages: 0.001423 USD
- Cutting and machine tool accessory, rolling mill, and other metalworking machines; at manufacturer: 0.00062085 USD
- Waste management and remediation: 0.0020827 USD
- Welding and Soldering Equipment, Scales and Balances, and other general purpose machinery; at manufacturer: 8.4868e-6 USD
- Fabric; at manufacturer: 0.000846691 USD
- Hydraulic pumps, motors, cylinders and actuators; at manufacturer: 1.77148e-5 USD
- Commercial equipment rental: 0.000638569 USD
- Promoters and agents: 6.37005e-6 USD
- Scientific research and development: 0.00020416 USD
- Passenger ground transport: 0.00043125 USD
- Books, newspapers, magazines, and other print media; at manufacturer: 5.33426e-5 USD
- Specialty transformers; at manufacturer: 2.64446e-6 USD
- Gaskets, seals, musical instruments, fasteners, brooms, brushes, mop and other misc. goods; at manufacturer: 2.65985e-5 USD
- Compressed Gases; at manufacturer: 8.65792e-6 USD
- Secondary steel products; at manufacturer: 2.14553e-5 USD
- Other real estate: 0.00343489 USD
- Electronic capacitors, resistors, coils, transformers, connectors and other components (except semiconductors and printed circuit assemblies); at manufacturer: 0.00126986 USD
- Screws, nuts, and bolts; at manufacturer: 0.0025436 USD
- Relay and industrial controls; at manufacturer: 0.00196323 USD
- Other retail: 0.000137648 USD
- Wiring devices; at manufacturer: 3.72088e-5 USD
- Cardboard; at manufacturer: 0.0959125 USD
- Unrefined oil and gas; at extraction site: 9.46244e-7 USD
- Motors and generators; at manufacturer: 0.000378531 USD
- Limited-service restaurants: 0.00191062 USD
- Civic, social, professional, and similar organizations: 0.000429573 USD
- Monetary authorities and depository credit intermediation: 0.00273869 USD
- Vehicle rental and leasing: 0.00107171 USD
- Transmission and power train parts; at manufacturer: 0.000205144 USD
- Air conditioning, refrigeration, and warm air heating equipment; at manufacturer: 0.00108327 USD
- Concrete pipe, bricks, and blocks; at manufacturer: 2.5738e-6 USD
- Light gauge metal cans, boxes, and containers; at manufacturer: 0.000100481 USD
- Pipeline transport: 2.12712e-6 USD
- Wireless telecommunications: 0.000840405 USD
- Dry-cleaning and laundry: 4.28514e-8 USD
- Lessors of nonfinancial intangible assets: 0.00557988 USD
- Material handling equipment; at manufacturer: 0.00123183 USD
- Communication and energy wire and cable; at manufacturer: 2.02529e-5 USD
- Advertising and public relations: 0.00772576 USD
- Valve and fittings (except for plumbing); at manufacturer: 0.000114157 USD
- Synthetic dyes and pigments; at manufacturer: 0.000175956 USD
- Vending, commercial laundry, and other commercial and service industry machinery; at manufacturer: 2.92754e-7 USD
- Surgical appliance and supplies; at manufacturer: 1.75835e-6 USD
- Office supplies (not paper); at manufacturer: 5.61468e-7 USD
- Vehicle engines and engine parts; at manufacturer: 3.08662e-6 USD
- Noncomparable imports: 0.00343142 USD
- Scenic and sightseeing transportation and support activities for transportation: 0.0159873 USD
- Switchgear and switchboards; at manufacturer: 2.0513e-6 USD
- Other petroleum and coal products; at manufacturer: 1.36473e-5 USD
- Timber and raw forest products; at forest: 8.61453e-6 USD
- Custom computer programming: 2.60163e-6 USD
- Small electrical appliances; at manufacturer: 7.93429e-7 USD
- Books; at publisher: 5.51864e-7 USD
- Communications equipment; at manufacturer: 4.05585e-7 USD
- Plastic bottles; at manufacturer: 1.41231e-5 USD
- Primary iron, steel, and ferroalloy products; at manufacturer: 0.000336651 USD
- Nonferrous metal casts; at manufacturer: 3.60088e-5 USD
- Office administration: 0.000207437 USD
- Abrasive products; at manufacturer: 1.39592e-5 USD
- Electronic equipment repair and maintenance: 0.000631627 USD
- Secondary copper products; at manufacturer: 0.000485077 USD
- Adhesives; at manufacturer: 0.00792962 USD
- Urethane and other foam products; at manufacturer: 5.84583e-6 USD
- Ink and ink cartridges; at manufacturer: 0.00197382 USD
- Semiconductors; at manufacturer: 0.00893517 USD
- Light fixtures; at manufacturer: 5.61182e-6 USD
- Printed circuit and electronic assembly; at manufacturer: 0.00374068 USD
- Rubber and plastic belts and hoses; at manufacturer: 2.80602e-5 USD
- Telecommunications: 0.0027182 USD
- Synthetic rubber and artificial and synthetic fibers; at manufacturer: 0.0221958 USD
- Business support: 0.00188834 USD
- Magazines and journals; at publisher: 2.02035e-6 USD
- Vegetable oils and by-products; at manufacturer: 4.33265e-6 USD
- Environmental and other technical consulting services: 0.000214 USD
- Air and gas compressors; at manufacturer: 9.71743e-7 USD
- Vehicles and parts sales: 1.01574e-5 USD
- Computer storage device readers; at manufacturer: 2.20745e-7 USD
- Wooden windows, door, and flooring; at manufacturer: 4.37645e-6 USD
- Ready-mix concrete; at manufacturer: 8.70836e-8 USD
- Storage batteries; at manufacturer: 8.32521e-6 USD
- Rail transport: 0.00936261 USD
- Sports: 5.43089e-6 USD
- Finished and coated fabric; at manufacturer: 0.00835493 USD
- Plywood and veneer; at manufacturer: 7.2815e-6 USD
- Ground or treated minerals and earth; at manufacturer: 6.83803e-5 USD
- Speed changers, industrial high-speed drives, and gears; at manufacturer: 7.28456e-6 USD
- Natural gas; at consumer: 0.00872554 USD
- Other basic inorganic chemicals; at manufacturer: 0.00540844 USD
- Sanitary paper (tissues, napkins, diapers, etc.); at manufacturer: 4.47357e-6 USD
- Glass and glass products; at manufacturer: 6.39105e-6 USD
- Other educational services: 2.75932e-7 USD
- Facilities support: 0.000423794 USD
- Architectural, engineering, and related services: 0.00571731 USD
- Metal cutting and forming machine tools; at manufacturer: 3.79838e-7 USD
- Metal windows, doors, and architectural products; at manufacturer: 1.3462e-5 USD
- Primary copper; at manufacturer: 7.52041e-5 USD
- Cutlery and handtools; at manufacturer: 0.000208281 USD
- Marketing research and all other miscellaneous professional, scientific, and technical services: 0.000674758 USD
- Nonresidential building repair and maintanence: 0.00236485 USD
- Air purification and ventilation equipment; at manufacturer: 6.57171e-5 USD
- Full-service restaurants: 0.00106685 USD
- Motor vehicle steering, suspension components (except spring), and brake systems; at manufacturer: 1.55857e-6 USD
- Golf courses, marinas, ski resorts, fitness and other rec centers and industries: 0.000214185 USD
- Audio and video equipment; at manufacturer: 8.82982e-7 USD
- Wood kitchen cabinets and countertops; at manufacturer: 3.61881e-6 USD
- Clothing; at manufacturer: 2.26264e-5 USD
- Plastics and rubber industry machinery; at manufacturer: 2.35126e-6 USD
- Wireless communications; at manufacturer: 3.40723e-7 USD
- Commercial machinery repair: 0.00171904 USD
- Other computer related services, including facilities management: 0.000426292 USD
- Other engine equipment; at manufacturer: 7.80488e-7 USD
- Insurance carriers: 0.0040771 USD
- Mineral wool; at manufacturer: 4.6646e-5 USD
- Other rubber products; at manufacturer: 1.22945e-5 USD
- Investment advice, portfolio management, and other financial advising services: 0.000420942 USD
- Light bulbs; at manufacturer: 1.93519e-8 USD
- Plastic bags, films, and sheets; at manufacturer: 0.0086185 USD
- Metal hinges, keys, lock, and other hardware; at manufacturer: 3.08092e-5 USD
- Cardboard containers; at manufacturer: 0.0214425 USD
- Mechanical power transmission equipment; at manufacturer: 6.50407e-6 USD
- Aluminum; at manufacturer: 1.44096e-5 USD
- Investigation and security: 0.000840661 USD
- Postal service: 1.33672e-5 USD
- Gasoline, fuels, and by-products of petroleum refining; at manufacturer: 0.00356822 USD
- Fiber, yarn, and thread; at manufacturer: 1.14504e-5 USD
- Machinery for the paper, textile, food or other industries (except semiconductor machinery); at manufacturer: 5.5938e-5 USD
- Computer systems design: 0.000857767 USD
- All other converted paper products; at manufacturer: 0.0021776 USD
- Household goods repair: 0.000223138 USD
- Legal services: 0.00230518 USD
- Lids, jars, bottle caps, other metal closures and crowns; at manufacturer: 9.02328e-5 USD
- Colleges, universities, junior colleges, and professional schools: 2.48339e-6 USD
- Polystyrene foam products; at manufacturer: 4.06602e-6 USD
- Springs and wires; at manufacturer: 0.000129114 USD
- Other secondary nonferrous metal products; at manufacturer: 2.95779e-5 USD
- Shelving and lockers; at manufacturer: 0.000196939 USD
- Consumer goods and general rental centers: 0.000206357 USD

## Inputs from nature
- Occupation, urban, discontinuously built: 0.000123424 m2*a; data quality (4,2,1,1,1)
- Occupation, industrial area: 0.000780202 m2*a; data quality (4,2,1,1,1)
- Water, fresh: 0.0324699, 0.0079387 m3 (2 entries, compartments not in this file); data quality (4,2,1,4,2)
- Water, saline: 0.00261116 m3; data quality (4,2,1,4,2)
- Energy, hydraulic potential: 0.00159754 MJ; data quality (3,1,1,1,1)
- Energy, wind: 1.80925e-6 MJ; data quality (3,1,1,1,1)
- Occupation, industrial area, built up: 0.000260067 m2*a; data quality (4,2,1,1,1)
- Energy, biomass: 0.0288934 MJ; data quality (3,1,1,1,1)

## Emissions to nature
- cumene: 1.01527e-8 kg; data quality (4,2,1,1,5)
- Formic acid: 5.24702e-10 kg; data quality (3,1,1,1,2)
- m-xylene: 4.7778e-7 kg; data quality (3,2,1,1,5)
- copper: 2.65683e-11, 3.57233e-10, 2.03591e-11 kg (3 entries, compartments not in this file); data quality (4,1,1,1,5)
- ammonia: 2.70174e-6 kg; data quality (3,2,1,1,5)
- toluene-2,4-diisocyante: 1.10617e-11 kg; data quality (3,2,1,1,5)
- maleic anhydride: 4.26851e-12 kg; data quality (2,2,1,1,5)
- 2,4,5-trichlorophenol: 1.69031e-13 kg; data quality (2,2,1,1,1)
- 1,4-dichlorobenzene: 1.00746e-11 kg; data quality (2,2,1,1,3)
- Phosphorus: 3.17304e-7 kg; data quality (2,1,1,1,5)
- nickel: 6.6314e-12, 6.33147e-12 kg (2 entries, compartments not in this file); data quality (4,1,1,1,5)
- 2-nitropropane: 2.04125e-13 kg; data quality (3,2,1,1,5)
- 1-Methyl-2-pyrrolidinone: 3.12852e-6 kg; data quality (5,1,1,1,5)
- ethane, 1,2-dibromo-: 6.37455e-12 kg; data quality (2,2,1,1,3)
- N,N-DIMETHYLANILINE: 7.4456e-12 kg; data quality (5,2,1,1,5)
- anthracene: 4.28727e-12 kg; data quality (3,2,1,4,1)
- Triethyl amine: 2.08329e-8 kg; data quality (3,2,1,1,5)
- phthalate, dioctyl-: 7.25654e-12 kg; data quality (3,2,1,1,4)
- ethylene glycol: 1.3893e-11 kg; data quality (5,1,1,1,2)
- pyrene: 9.97179e-12 kg; data quality (3,2,1,3,2)
- Propane, 1,2-dichloro-: 1.02416e-11 kg; data quality (4,2,1,1,1)
- diethanolamine: 2.25701e-10 kg; data quality (3,2,1,1,5)
- Xylene: 7.67848e-7 kg; data quality (4,2,1,1,5)
- 2,2,4-trimethylpentane: 6.13433e-9 kg; data quality (3,2,1,4,1)
- Phthalate, dimethyl-: 3.27241e-10 kg; data quality (4,2,1,1,5)
- chloroform: 1.45469e-7 kg; data quality (4,2,1,1,5)
- ACRYLAMIDE: 1.24607e-9 kg; data quality (4,1,1,1,5)
- mercury: 1.882e-15 kg; data quality (3,1,1,1,2)
- Cresol: 9.60442e-10 kg; data quality (4,2,1,1,1)
- VOC, volatile organic compounds: 0.000160553 kg; data quality (3,2,1,1,5)
- Chrysene, 5-methyl-: 4.14658e-17 kg; data quality (2,2,1,1,1)
- Ethane, 2,2-dichloro-1,1,1-trifluoro-, HCFC-123: 4.3285e-9 kg; data quality (4,1,1,1,5)
- Benzo(a)anthracene: 6.80845e-14 kg; data quality (2,2,1,1,5)
- Sulfuric acid: 2.62178e-8 kg; data quality (2,1,1,1,4)
- Benzo(b)fluoranthene: 7.70917e-13 kg; data quality (3,2,1,4,1)
- beryllium: 2.24075e-11 kg; data quality (2,2,1,1,5)
- Propene: 1.64218e-11 kg; data quality (3,1,1,1,5)
- 2-(2-ETHOXYETHOXY) ETHYL ACETATE: 1.14799e-12 kg; data quality (5,2,1,1,4)
- CHLORONAPHTHALENE: 1.2196e-16 kg; data quality (1,2,1,1,1)
- Ethane, pentafluoro-, HFC-125: 2.10668e-7 kg; data quality (4,2,1,4,1)
- fluoranthene: 1.41455e-11 kg; data quality (3,2,1,3,2)
- nitrogen oxides: 6.74904e-5 kg; data quality (2,2,1,1,4)
- AZIRIDINE: 1.9286e-14 kg; data quality (5,2,1,1,5)
- Polychlorinated biphenyls: 5.99251e-16 kg; data quality (3,1,1,1,2)
- isophorone: 2.6674e-10 kg; data quality (2,2,1,1,5)
- Aluminum: 4.45507e-9, 5.79178e-8 kg (2 entries, compartments not in this file); data quality (4,1,1,1,5)
- CATECHOL: 4.6874e-12, 2.42048e-14 kg (2 entries, compartments not in this file); data quality (2,1,1,1,2)
- methyl methacrylate: 9.71757e-10 kg; data quality (4,2,1,1,5)
- benzene, ethyl-: 2.72116e-7 kg; data quality (3,2,1,1,5)
- lead: 3.22195e-11, 1.24265e-8 kg (2 entries, compartments not in this file); data quality (3,1,1,1,5)
- Nitrogen: 8.68811e-7 kg; data quality (2,2,1,1,5)
- Ethylene glycol monoethyl ether: 6.69698e-12 kg; data quality (5,1,1,1,2)
- HYDROGEN SULFIDE: 2.84375e-11, 8.29243e-11 kg (2 entries, compartments not in this file); data quality (3,1,1,1,2)
- hydrogen fluoride: 1.89557e-8 kg; data quality (2,2,1,1,4)
- chromium: 5.99664e-12, 9.5468e-11, 3.13485e-11 kg (3 entries, compartments not in this file); data quality (4,1,1,1,5)
- methane, monochloro-, r-40: 1.14855e-9 kg; data quality (3,2,1,1,2)
- phenanthrene: 1.19851e-10 kg; data quality (3,2,1,4,1)
- nickel: 2.02592e-8 kg; data quality (3,2,1,1,5)
- manganese: 1.20571e-12, 4.44786e-12 kg (2 entries, compartments not in this file); data quality (4,1,1,1,5)
- 4,4'-METHYLENEDIANILINE: 5.72091e-13 kg; data quality (4,2,1,1,5)
- CHLORINE: 1.06319e-14 kg; data quality (2,1,1,1,2)
- Formaldehyde: 8.69428e-13 kg; data quality (2,1,1,1,2)
- Hydrocarbons, aromatic: 2.16756e-9 kg; data quality (3,2,1,3,2)
- ethane, 1,1,2-trichloro-: 2.95331e-11 kg; data quality (4,2,1,1,1)
- ethene, tetrachloro-: 3.77923e-10 kg; data quality (3,2,1,1,4)
- epichlorohydrin: 1.57192e-11 kg; data quality (3,2,1,1,4)
- Propene, 1,3-dichloro-: 3.39783e-14 kg; data quality (3,2,1,1,5)
- methanol: 2.46016e-6 kg; data quality (4,2,1,1,5)
- Ethylene glycol: 1.93307e-15 kg; data quality (5,1,1,1,2)
- ethylbenzene: 7.13118e-9 kg; data quality (4,1,1,1,5)
- Phenol: 5.13055e-13 kg; data quality (3,1,1,1,2)
- aniline: 1.66922e-11 kg; data quality (4,2,1,1,5)
- 3-methylcholanthrene: 7.66641e-15 kg; data quality (2,2,1,1,5)
- PCB-1: 4.2781e-18 kg; data quality (2,2,1,1,1)
- benz[a]anthracene: 3.81257e-10 kg; data quality (2,2,1,1,4)
- toluene, 2,4-dinitro-: 4.69463e-14 kg; data quality (5,2,1,1,1)
- Xylene: 3.16422e-14 kg; data quality (4,1,1,1,5)
- methane, chlorodifluoro-, hcfc-22: 3.66536e-10 kg; data quality (4,1,1,1,5)
- Ethane, 1,1,1,2-tetrafluoro-, HFC-134a: 7.94035e-7 kg; data quality (4,2,1,4,1)
- hexachloroethane: 2.34352e-10 kg; data quality (4,2,1,1,1)
- arsenic: 6.32175e-10 kg; data quality (3,2,1,1,5)
- Methane: 3.64364e-6 kg; data quality (4,2,1,4,1)
- acetaldehyde: 5.7088e-8 kg; data quality (3,2,1,3,3)
- butanol: 1.63739e-8 kg; data quality (5,1,1,1,5)
- Benzo(g,h,i)perylene: 1.14438e-14, 6.64589e-14 kg (2 entries, compartments not in this file); data quality (2,1,1,1,2)
- naphthalene: 4.8982e-13 kg; data quality (4,1,1,1,2)
- BUTYL ACRYLATE: 3.21231e-10 kg; data quality (4,1,1,1,5)
- 4,4'-METHYLENEBIS(2-CHLOROANALINE): 2.3037e-14 kg; data quality (5,2,1,1,5)
- toluene: 1.35315e-13 kg; data quality (5,1,1,1,2)
- 2-PHENOXYETHANOL: 1.26149e-11 kg; data quality (5,2,1,1,5)
- 2,2-BIS(4-HYDROXY-3,5-DIBROMOPHENYL)PROPANE: 1.66437e-13 kg; data quality (5,1,1,1,5)
- 2,4/2,6-toluenediisocyanate (mixture): 1.04984e-12 kg; data quality (3,1,1,1,5)
- naphthalene: 1.45657e-7 kg; data quality (3,2,1,1,5)
- styrene: 9.21807e-12 kg; data quality (3,1,1,1,5)
- hexachlorobenzene: 2.56415e-14 kg; data quality (3,2,1,1,1)
- dimethyl formamide: 3.26953e-8 kg; data quality (4,1,1,1,5)
- Cresol: 6.51888e-14, 1.54645e-14 kg (2 entries, compartments not in this file); data quality (2,1,1,1,2)
- Acetaldehyde: 1.74923e-13 kg; data quality (3,1,1,1,2)
- Butanol: 1.14631e-12 kg; data quality (5,1,1,1,2)
- o-Xylene: 2.0862e-7 kg; data quality (3,2,1,1,5)
- Triethylene glycol: 1.50924e-11 kg; data quality (5,2,1,1,5)
- DNOC: 8.75977e-14 kg; data quality (2,2,1,1,1)
- methane, bromo-, halon 1001: 1.91105e-11 kg; data quality (3,2,1,1,2)
- pentachlorophenol: 1.77883e-13 kg; data quality (3,2,1,1,1)
- biphenyl: 4.61613e-9 kg; data quality (4,2,1,1,4)
- m-cresol: 2.04566e-12 kg; data quality (4,2,1,1,1)
- propylene oxide: 6.71709e-13 kg; data quality (3,2,1,1,1)
- benzene: 2.15055e-8 kg; data quality (3,2,1,4,1)
- PCB-15: 5.13263e-18 kg; data quality (2,2,1,1,1)
- mercury: 5.20228e-12 kg; data quality (3,1,1,1,4)
- formic acid: 5.82243e-11 kg; data quality (3,1,1,1,5)
- hydroquinone: 4.89421e-9 kg; data quality (3,2,1,1,5)
- acrolein: 4.81299e-9 kg; data quality (2,2,1,2,3)
- Ethanol, 2-butoxy-: 1.91279e-13 kg; data quality (5,2,1,1,5)
- ozone: 3.28104e-8 kg; data quality (4,1,1,1,5)
- styrene: 9.19718e-8 kg; data quality (4,2,1,1,5)
- o-toluidine: 4.60739e-22 kg; data quality (4,2,1,1,5)
- methanol: 2.75903e-9, 6.08182e-11 kg (2 entries, compartments not in this file); data quality (3,1,1,1,2)
- 2-ethoxyethyl acetate: 2.59199e-10 kg; data quality (5,2,1,1,5)
- Carbon dioxide: 0.0606404 kg; data quality (4,2,1,4,1)
- acetonitrile: 2.16447e-10 kg; data quality (3,2,1,1,5)
- 1,2,4-trimethylbenzene: 1.69963e-9 kg; data quality (5,1,1,1,5)
- Ethane, 1,1,1-trifluoro-, HFC-143a: 9.01362e-8 kg; data quality (4,2,1,4,1)
- dibenzofuran: 9.79798e-14 kg; data quality (4,2,1,1,1)
- formaldehyde: 1.53501e-6 kg; data quality (2,2,1,1,5)
- particulates, < 10 um: 6.73188e-6 kg; data quality (3,2,1,1,5)
- ethylene glycol: 6.64587e-8 kg; data quality (4,2,1,1,5)
- Cobalt: 1.44436e-9 kg; data quality (3,2,1,1,5)
- sulfur dioxide: 5.36714e-5 kg; data quality (2,2,1,1,5)
- cadmium: 8.21719e-10 kg; data quality (3,2,1,1,5)
- benzyl chloride: 2.82129e-10 kg; data quality (2,2,1,1,4)
- ethane, 1,2-dichloro-: 2.19435e-11 kg; data quality (3,2,1,1,1)
- 2-(2-BUTOXYETHOXY) ETHYL ACETATE: 2.14992e-14 kg; data quality (5,2,1,1,5)
- acrylic acid: 1.07134e-7 kg; data quality (4,2,1,1,5)
- 2,4,5,2',5'-PENTACHLOROBIPHENYL: 8.45479e-17 kg; data quality (2,2,1,1,1)
- PHOSPHORUS: 9.21897e-11 kg; data quality (2,2,1,1,2)
- NICOTINE: 2.25994e-8, 2.40844e-11, 1.21067e-8 kg (3 entries, compartments not in this file); data quality (2,1,1,1,4)
- BUTYL ISOCYANATE: 5.5472e-10 kg; data quality (5,2,1,1,5)
- acetaldehyde: 1.97764e-10 kg; data quality (3,1,1,1,2)
- 2-METHOXYETHANOL: 6.29574e-10 kg; data quality (4,2,1,1,4)
- Indeno(1,2,3-cd)pyrene: 4.92522e-13 kg; data quality (3,2,1,3,2)
- para-xylene: 2.1174e-7 kg; data quality (3,2,1,1,5)
- 4,4'-isopropylidenediphenol: 5.44555e-11 kg; data quality (4,1,1,1,5)
- DMTT (DAZOMET): 1.0052e-13, 5.93452e-13 kg (2 entries, compartments not in this file); data quality (4,1,1,1,2)
- phenol: 4.43967e-8 kg; data quality (4,2,1,1,5)
- Nickel, ion: 1.55023e-12 kg; data quality (3,2,1,1,3)
- Methane, difluoro-, HFC-32: 1.22683e-7 kg; data quality (4,2,1,4,1)
- Hydrazine: 2.99753e-13 kg; data quality (4,2,1,1,4)
- 1,2,4-trichlorobenzene: 1.83727e-10 kg; data quality (4,2,1,1,1)
- 1,1,2,2-tetrachloroethane: 3.65362e-13 kg; data quality (3,2,1,1,1)
- selenium: 2.31935e-10 kg; data quality (2,2,1,1,4)
- Propane, 1,1,1,3,3,3-hexafluoro-, HCFC-236fa: 2.43505e-9 kg; data quality (4,2,1,4,1)
- carbon monoxide: 7.2392e-5 kg; data quality (3,2,1,1,3)
- Dimethoxy methane: 1.35639e-13 kg; data quality (2,2,1,1,1)
- antimony: 7.09047e-12 kg; data quality (3,2,1,1,3)
- Methane, monochloro-, R-40: 9.66534e-15, 1.93307e-15 kg (2 entries, compartments not in this file); data quality (3,1,1,1,2)
- acenaphthene: 4.89087e-11 kg; data quality (3,2,1,3,2)
- Dibenz(a,h)anthracene: 1.96202e-14 kg; data quality (2,2,1,1,5)
- carbonyl sulfide: 1.09697e-10 kg; data quality (4,2,1,1,3)
- Propanal: 1.69917e-12 kg; data quality (2,1,1,1,2)
- catechol: 9.60404e-15 kg; data quality (5,2,1,1,1)
- bromoform: 1.65953e-12 kg; data quality (3,2,1,1,3)
- 2-methylnaphthalene: 1.50472e-11 kg; data quality (2,2,1,1,4)
- Benzo(g,h,i)perylene: 4.42728e-10 kg; data quality (3,2,1,1,4)
- cyanide: 1.48776e-10 kg; data quality (3,2,1,1,3)
- Dinitrogen monoxide: 1.9191e-7 kg; data quality (4,2,1,4,1)
- 2,4,6-trichlorophenol: 7.86871e-15 kg; data quality (2,2,1,1,1)
- ethylene oxide: 2.23813e-11 kg; data quality (3,2,1,1,4)
- Cumene hydroperoxide: 2.68049e-11 kg; data quality (2,1,1,1,5)
- 2-chloro-1-phenylethanone: 3.3965e-13 kg; data quality (2,2,1,1,3)
- 2,4-dinitrophenol: 1.18315e-13 kg; data quality (5,2,1,1,1)
- lead: 1.14946e-9 kg; data quality (3,2,1,1,5)
- Hydrazine, methyl-: 7.56375e-12 kg; data quality (2,2,1,1,3)
- vinyl acetate: 2.46925e-7 kg; data quality (4,2,1,1,5)
- carbon disulfide: 2.1224e-8 kg; data quality (4,2,1,1,5)
- QUINOLINE: 1.31351e-10 kg; data quality (3,2,1,1,3)
- hydrogen sulfide: 2.44869e-8 kg; data quality (3,1,1,1,4)
- phenol: 4.93631e-12 kg; data quality (3,1,1,1,2)
- trichloroethylene: 3.3714e-9 kg; data quality (4,2,1,1,5)
- acenaphthylene: 7.35294e-11 kg; data quality (3,2,1,3,1)
- 1,4-dioxane: 2.06807e-11 kg; data quality (4,2,1,1,5)
- Zinc: 1.05437e-12, 7.91012e-11 kg (2 entries, compartments not in this file); data quality (5,1,1,1,4)
- diisocyanates: 5.14082e-10 kg; data quality (4,1,1,1,5)
- 1,1-DICHLOROETHYLENE: 5.5884e-14 kg; data quality (3,2,1,1,1)
- chlorine: 5.57308e-10 kg; data quality (4,2,1,1,2)
- 2,3,4'-TRICHLOROBIPHENYL: 5.05538e-17 kg; data quality (2,2,1,1,1)
- Water, fresh: 0.0353048 m3; data quality (4,2,1,4,2)
- dicyclopentadiene: 2.16582e-11 kg; data quality (4,1,1,1,5)
- carbon tetrachloride: 1.00464e-10 kg; data quality (4,2,1,1,2)
- Diethylene glycol butyl ether: 2.44115e-9 kg; data quality (4,2,1,1,5)
- Decabromodiphenyl oxide: 1.09251e-12 kg; data quality (4,1,1,1,5)
- HYDROCHLORIC ACID: 1.54203e-8 kg; data quality (2,1,1,1,4)
- AMMONIA: 1.54543e-9 kg; data quality (3,1,1,1,4)
- nitric acid: 1.1509e-10 kg; data quality (3,1,1,1,5)
- Chrysene: 6.4631e-11 kg; data quality (2,2,1,1,4)
- fluorene: 4.4121e-11 kg; data quality (3,2,1,4,1)
- formaldehyde: 1.33617e-10 kg; data quality (2,1,1,1,2)
- acrylonitrile: 2.6021e-11 kg; data quality (4,2,1,1,4)
- Water, saline: 0.00132307 m3; data quality (4,2,1,4,2)
- ammonia: 2.06393e-9 kg; data quality (3,1,1,1,3)
- toluene: 8.50054e-6 kg; data quality (3,2,1,1,5)
- Phthalate, dibutyl-: 8.00063e-11 kg; data quality (4,2,1,1,4)
- TERT-BUTYL ALCOHOL: 2.19356e-12 kg; data quality (4,1,1,1,5)
- hexane: 9.48327e-6 kg; data quality (3,2,1,1,5)
- phthalic anhydride: 1.09727e-11 kg; data quality (2,2,1,1,5)
- Styrene: 2.15515e-12 kg; data quality (3,1,1,1,5)
- Hexachlorocyclopentadiene: 4.54072e-11 kg; data quality (3,2,1,1,1)
- tertiary-Butyl Acetate: 9.74472e-7 kg; data quality (3,2,1,1,5)
- barium: 2.2037e-13 kg; data quality (4,1,1,1,2)
- t-butyl methyl ether: 1.71726e-12 kg; data quality (3,2,1,1,3)
- benzo(a)pyrene: 9.31463e-13 kg; data quality (3,2,1,3,1)
- chlorine: 7.50417e-12 kg; data quality (2,1,1,1,2)
- Methyl iodide: 5.61192e-12 kg; data quality (4,2,1,1,1)
- monochloroethane: 2.20948e-12 kg; data quality (3,2,1,1,3)
- acetophenone: 1.64159e-10 kg; data quality (4,2,1,1,1)
- CARBAZOLE: 4.24013e-14 kg; data quality (2,2,1,1,1)
- Ethene, chloro-: 3.56422e-11 kg; data quality (3,2,1,1,4)
- methane, dichloro-, hcc-30: 2.82135e-9 kg; data quality (4,2,1,1,4)
- polychlorinated biphenyls: 1.00129e-16 kg; data quality (3,2,1,1,2)
- n-nitrosomorpholine: 4.10194e-20 kg; data quality (4,2,1,1,4)
- butadiene: 2.9304e-9 kg; data quality (3,2,1,4,1)
- Polychlorinated biphenyls: 5.52238e-12 kg; data quality (3,1,1,1,5)
- Chromium VI: 2.35897e-10 kg; data quality (3,2,1,1,4)
- Ethylene glycol monoethyl ether: 2.53994e-6 kg; data quality (5,1,1,1,5)
- particulates, < 2.5 um: 3.16757e-5 kg; data quality (3,2,1,1,5)
- propanal: 5.82936e-9 kg; data quality (3,2,1,4,1)
- cyclohexane: 8.71319e-10 kg; data quality (4,1,1,1,5)
- ethyl acrylate: 6.24334e-10 kg; data quality (4,2,1,1,4)
- Benzo(k)fluoranthene: 6.11116e-13 kg; data quality (3,2,1,4,1)
- 1,1,1-trichloroethane: 5.45687e-8 kg; data quality (3,2,1,1,5)
- CHLOROPRENE: 2.37995e-10 kg; data quality (2,2,1,1,4)
- Vinyl acetate: 4.54605e-13 kg; data quality (4,1,1,1,4)
- silver: 2.13381e-13 kg; data quality (4,1,1,1,5)
- methylene diphenyl diisocyanate: 3.76687e-10 kg; data quality (4,2,1,1,5)
- p-cresol: 7.92192e-13 kg; data quality (3,2,1,1,4)
- Chromium, ion: 8.42844e-9 kg; data quality (2,2,1,1,5)
- Phosphine: 6.62211e-11 kg; data quality (4,2,1,1,4)
- mercury: 1.17326e-10 kg; data quality (2,2,1,1,4)
- o-cresol: 3.24023e-11 kg; data quality (4,2,1,1,1)
- Dimethyl sulfate: 2.94534e-12 kg; data quality (2,2,1,1,2)
- benzene, chloro-: 8.20702e-11 kg; data quality (4,2,1,1,4)
- hydrogen chloride: 4.08618e-7 kg; data quality (2,2,1,1,4)
- methyl isobutyl ketone: 1.86142e-6 kg; data quality (3,2,1,1,5)
- manganese: 1.69613e-9 kg; data quality (3,2,1,1,4)
- 4-nitrophenol: 1.51713e-12 kg; data quality (3,2,1,1,4)

## Inventory method
Input-output

## Modelling constants
The reference unit of all processes is 1 USD2013 of the good or service. The technosphere inputs are based on the US BEA detailed input-output tables for 2007. The IO tables are combined to develop a commodity-by-commodity model based on the the industry-technology assumption (see Suh et al., 2010), which assumes all commodities produced by a given industry have the same input structure, but that multiple industries can produce the same commodity. Thus, model technosphere flows represent commodity outputs (and not industry outputs) from other processes in the model. There are no by-products included in these processes. All commodity production is based on US-conditions, despite in reality that some goods and services are produced overseas, as USEEIO v1.1 is a single-region IO model.

## Completeness
The input-output approach assures that all purchased inputs associated with the sectors making these commodities as reported in the US census for 2007 are included. The direct resources extracted including minerals, energy sources, water and land occupied are included. Emissions to air include all critieria air pollutants, greenhouse gases, and hazardous and toxic air pollutants as defined by US EPA. Releases to water include toxics, total nitrogen and total phosphorus, and water discharges. Releases to soil or groundwater include toxics and agriculutural pesticides. Some metal releases to air, water and soil are not included because they could not be speciated. Solid hazardous and non-hazardous wastes generated are not included as an elementary flows although purchases of waste services are included.

## Data treatment
Greenhouse gases are primarily from the US Greenhouse Gas Emission Inventory (USEPA 2016a). Biogenic C uptake is not included (change from version 1.0), as biogenic C emission are not included. Toxic releases to air, water and soil (except pesticides) are from the 2013 Toxic Release Inventory (USEPA 2015a). Criteria air pollutants and hazardous air pollutants are from the 2011 National Emissions Inventory (USEPA 2015b). All estimates are normalized by industry based on sector output in the data year, then converted to 2013 USD using relative sector-specific CPIs (if data year is not 2013). Energy use represent raw renewables or fossil fuel energies and is based on EIA data for 2014. See Table 1 in Yang, Ingwersen et al. 2017 and Supporting Information 1, and the v1.1 data update notes (Ingwersen et al. 2017) for all details on environmental data sources used.Land occupation associated with manufacturing buildings was estimated based on the building floorspace data provided by the U.S. Energy Information Administration in the 2010 Manufacturing Energy Consumption Survey (EIA 2013). Portions of total renewable energy (EIA 2016) based on EIA-923 reports for 2014 (EIA 2017) are included. Nitrogen and Phosphorus releases are modeled in total N and total P equivalents as estimated by the Discharge Monitoring Report Nutrient Loading tool (USEPA 2016b). Self-supplied withdrawals were assigned to industrial sectors based on water use statistics for Canadian industries by NAICS 3-digit sector scaled to US production levels based on gross domestic product by industry (BEA 2015; Statistics Canada 2010), and further disaggregated to the manufacturing sectors based on compensation of employees as provided by the 2007 IO tables (BEA 2015). Water withdrawals associated with public supply were allocated to sectors based on their use of water, sewage, and other services in USD based on the IO tables (BEA 2015). Portions of total renewable energy (EIA 2016) by type are assigned to sectors (hydro, wind, solar, or) based on EIA-923 reports for 2014 (EIA 2017).

## Data collection
2015-2016

## Sampling procedure
US federal government sources, including surveys and US EPA emissions databases are used as the primary sources. From these sources, data for US reporting establishments/facilities are aggregated by the NAICS sector as defined in the BEA detailed 2007 input-output tables. When level of sector aggregation differs, or when direct emissions are not reported but modeled, additional sources are used to make allocations and estimates.

## Review details
In regard to quality assurance and peer-review, each dataset created went through Quality Assurance as defined in a quality assurance project plans at US EPA, CSRA or ERG. The model was assembled with the IO model builder model (USEPA 2016c). Validation functions were used to check that all the model components were properly assembled and harmonized. Bayou Demeke and Santosh Ghimire provided internal peer review of the model methodology and the manuscript underwent standard EPA management review. An editor and two anonymous reviewers at the Journal of Cleaner Production reviewed the model. In regard to data quality evaluation, data quality assessment was performed at the flow and process levels according to the updated US EPA data quality assessment guidelines as defined in US EPA (2016b).

## Intended application
The primary application is for use in the US Environmentally-Extended Input-Ouput model, USEEIO, version 1.1. This model is being used by the US EPA for supporting tools that prioritize goods and services based on potential environmental impacts, resource use or emissions for large regions, including the US and US states, and as a strealined tool for organizations as a starting point to consider sustainable materials management. Model results are designed to provide meso/macro-level decision support.

## Project
USEEIO v1.1 was developed by the US EPA with CSRA and ERG with Wesley W. Ingwersen and David E. Meyer as research leads. Yi Yang was the technical lead on the work for CSRA (contract EP-C-15-012); Troy Hawkins was lead for ERG (contract EP-C-12-021).

## Sources
- USDA 2009b
- Kim et el. 2013
- USDA 2014
- Yienger et al. 1995
- Maupin et al. 2014
- EIA 2013
- Ingwersen et al. DRAFT
- USEPA 2015b
- BLM 2008
- USGS 2016
- EIA 2015
- USEPA 2016a
- USDA 2009a
- Nickerson et al. 2011
- USDA 2006
- Statistics Canada 2010
- USGS 2015
- Goebes et al. 2003
- Edelen and Ingwersen 2017
- Lovelace 2009
- Torcellini et al. 2003
- Macknick et al. 2011
- BEA 2015
- EIA 2016
- EIA 2017
- USEPA 2016c
- USDA 2016
- Blackhurst et al. 2010
- USEPA 2015a
- USEPA 2016b
- Ingwersen et al. 2017
