# Welding and Soldering Equipment, Scales and Balances, and other general purpose machinery; at manufacturer

Dataset: openLCA process, unit process
Category: 3339: Other General Purpose Machinery Manufacturing
Geography: United States
Time period: 2017-01-01 to 2017-12-31
Data quality: US EPA - Process Pedigree Matrix (1;1)
Exchange data quality scheme: US EPA - Flow Pedigree Matrix
Generated by: US EPA with CSRA and ERG
Owner: US EPA
Published in: Yang, Ingwersen et al. 2017
restrictionsDescription: This model shold be appropriately cited (see Yang, Ingwersen et al. 2017 source or Publication field) when used. Any changes or derivations of this model by the user should be documented. The model itself and any results from use of this model shall not be construed to consitute US EPA opinion or policy.
copyright: false

## General comment
BEA Code & Name is '33399A:Other general purpose machinery manufacturing'. Description of the primary industry producing this good or service, adapted from the Census Bureau NAICS 2007 descriptions: This U.S. industry comprises establishments primarily engaged in (1) manufacturing welding and soldering equipment and accessories (except transformers), such as arc, resistance, gas, plasma, laser, electron beam, and ultrasonic welding equipment; welding electrodes; coated or cored welding wire; and soldering equipment (except handheld); (2) manufacturing scales and balances, including those used in laboratories; and (3) manufacturing general purpose machinery (except ventilating, heating, air-conditioning, and commercial refrigeration equipment; metal working machinery; engines, turbines, and power transmission equipment; pumps and compressors; material handling equipment; power-driven handtools; welding and soldering equipment; packaging machinery; industrial process furnaces and ovens; fluid power cylinders and actuators; fluid power pumps and motors; and scales and balances). Related NAICS codes are: 333992, 333997, 333999

## Technology
The process describes the average US production of this good or service within this NAICS-based grouping defined in the BEA 2007 detailed input-output tables (BEA 2015). Distribution, wholesale and retailing of this good or service, use, and final disposal are not included. Creation of a product system with this process will enable modeling of all upstream (supply-chain) activities.

## Geography
Data represent the 50 US states

## Time period
2017 was the year in which this version of USEEIO was released and is the target date for the model

## Reference product
- Welding and Soldering Equipment, Scales and Balances, and other general purpose machinery; at manufacturer: 1 USD

## Inputs from technosphere
All rows: data quality (1,3,1,1,1)
- Lumber and treated lumber; at manufacturer: 7.91956e-6 USD
- Fabricated pipe and pipe fittings; at manufacturer: 0.000189747 USD
- Investment advice, portfolio management, and other financial advising services: 0.000293846 USD
- Concrete pipe, bricks, and blocks; at manufacturer: 5.23981e-6 USD
- Electricity; at consumer: 0.00513161 USD
- Ball and roller bearings; at manufacturer: 0.000900884 USD
- Other plastic products; at manufacturer: 0.021661 USD
- Unrefined oil and gas; at extraction site: 8.80715e-5 USD
- Limited-service restaurants: 0.00199383 USD
- Air purification and ventilation equipment; at manufacturer: 7.24942e-5 USD
- Computer systems design: 0.00151472 USD
- Other aircraft parts; at manufacturer: 2.03159e-5 USD
- Water transport (boats, ships, ferries): 0.00013791 USD
- Abrasive products; at manufacturer: 0.0038443 USD
- Petrochemicals; at manufacturer: 3.33369e-5 USD
- Warehousing: 0.0021173 USD
- Buildings and dwellings services: 0.00268011 USD
- Adhesives; at manufacturer: 1.85464e-5 USD
- Vehicle engines and engine parts; at manufacturer: 0.000317762 USD
- Vehicle rental and leasing: 0.00101935 USD
- Welding and Soldering Equipment, Scales and Balances, and other general purpose machinery; at manufacturer: 0.0233215 USD
- Metal structural products; at manufacturer: 0.00173317 USD
- Other basic inorganic chemicals; at manufacturer: 0.000114609 USD
- Carbon and graphite products; at manufacturer: 1.53725e-5 USD
- Accounting, tax preparation, bookkeeping, and payroll: 0.00279835 USD
- Mattresses, blinds and shades; at manufacturer: 2.09511e-5 USD
- Full-service restaurants: 0.00117331 USD
- Metal hinges, keys, lock, and other hardware; at manufacturer: 0.000134323 USD
- Navigation instruments; at manufacturer: 1.59145e-5 USD
- Other rubber products; at manufacturer: 0.00224056 USD
- Sports: 0.000117062 USD
- Pumps and pumping equipment; at manufacturer: 0.00363598 USD
- Truck trailers; at manufacturer: 6.40907e-7 USD
- Plastic pipe, fittings, and sausage casings; at manufacturer: 0.00128832 USD
- Other basic organic chemicals; at manufacturer: 0.000647369 USD
- Legal services: 0.00387208 USD
- Noncomparable imports: 0.00359534 USD
- Fiber, yarn, and thread; at manufacturer: 7.20827e-6 USD
- Switchgear and switchboards; at manufacturer: 4.4216e-6 USD
- Wood kitchen cabinets and countertops; at manufacturer: 2.85195e-5 USD
- Vehicle metal stamping; at manufacturer: 0.000242079 USD
- Iron, gold, silver, and other metal ores; at mine: 0.000151595 USD
- Cement; at manufacturer: 2.23114e-6 USD
- Other concrete products; at manufacturer: 6.3142e-6 USD
- Synthetic rubber and artificial and synthetic fibers; at manufacturer: 0.0316522 USD
- Wholesale trade: 0.0539048 USD
- Promoters and agents: 5.82001e-5 USD
- Wiring devices; at manufacturer: 0.000466748 USD
- Surgical appliance and supplies; at manufacturer: 0.000504581 USD
- Vehicle repair: 0.000603322 USD
- Securities and commodities brokerage and exchanges: 0.0116727 USD
- Aircraft; at manufacturer: 1.46657e-7 USD
- Company and enterprise management: 0.0341386 USD
- Cardboard; at manufacturer: 0.00275993 USD
- Cutting and machine tool accessory, rolling mill, and other metalworking machines; at manufacturer: 0.00459745 USD
- Dental laboratories; at manufacturer: 5.75027e-8 USD
- Rubber and plastic belts and hoses; at manufacturer: 9.5909e-5 USD
- Other secondary nonferrous metal products; at manufacturer: 0.00132646 USD
- Other nonmetallic mineral products; at manufacturer: 1.53608e-5 USD
- Plywood and veneer; at manufacturer: 2.21435e-5 USD
- Signal testing instruments; at manufacturer: 4.64186e-5 USD
- Custom computer programming: 0.00206658 USD
- Aluminum products; at manufacturer: 0.00290631 USD
- Marketing research and all other miscellaneous professional, scientific, and technical services: 0.00443583 USD
- Lime and gypsum products; at manufacturer: 1.79315e-5 USD
- Cast iron and steel; at manufacturer: 0.00910208 USD
- Civic, social, professional, and similar organizations: 0.000408196 USD
- Employment services: 0.000938138 USD
- Packaged meat (except poultry); at manufacturer: 1.13334e-7 USD
- Mechanical power transmission equipment; at manufacturer: 0.000209467 USD
- Primary copper; at manufacturer: 0.000119319 USD
- Material handling equipment; at manufacturer: 0.000306942 USD
- Electromedical appartuses; at manufacturer: 9.74139e-6 USD
- Screws, nuts, and bolts; at manufacturer: 0.0149031 USD
- Commercial equipment rental: 0.0005407 USD
- Semiconductor machinery; at manufacturer: 0.000235414 USD
- Optical instruments and lenses; at manufacturer: 5.64812e-5 USD
- Hydraulic pumps, motors, cylinders and actuators; at manufacturer: 0.0076835 USD
- Sand, gravel, clay, phosphate, other nonmetallic minerals; at mine: 1.82002e-5 USD
- Drinking water and wastewater treatment; at consumer: 0.000527175 USD
- Architectural, engineering, and related services: 0.00440763 USD
- Specialty transformers; at manufacturer: 0.000355074 USD
- Independent artists, writers, and performers: 0.000234921 USD
- Commercial machinery repair: 0.001205 USD
- Fabric; at manufacturer: 0.0266301 USD
- Railroad rolling stock; at manufacturer: 7.72002e-7 USD
- Electronic capacitors, resistors, coils, transformers, connectors and other components (except semiconductors and printed circuit assemblies); at manufacturer: 0.00674766 USD
- Machinery for the paper, textile, food or other industries (except semiconductor machinery); at manufacturer: 0.000379044 USD
- Ready-mix concrete; at manufacturer: 8.23399e-7 USD
- Data processing and hosting: 0.00502431 USD
- Metal windows, doors, and architectural products; at manufacturer: 0.00234995 USD
- Primary iron, steel, and ferroalloy products; at manufacturer: 0.0485426 USD
- Veneer, plywood, and engineered wood; at manufacturer: 3.5171e-5 USD
- Pipeline transport: 3.97943e-6 USD
- Plastic bags, films, and sheets; at manufacturer: 0.00964246 USD
- Paper; at manufacturer: 0.0107778 USD
- Analytical laboratory instruments; at manufacturer: 1.6661e-6 USD
- Fertilizers; at manufacturer: 9.85821e-6 USD
- Vehicle seating and interior trim (upholstery); at manufacturer: 2.80112e-6 USD
- Specialized design: 0.00155145 USD
- Wireless communications; at manufacturer: 2.51471e-5 USD
- Magazines and journals; at publisher: 5.976e-6 USD
- Custom metal rolls; at manufacturer: 0.00165638 USD
- Computer storage device readers; at manufacturer: 1.20261e-5 USD
- Business support: 0.00148614 USD
- Vehicle bodies; at manufacturer: 6.7004e-7 USD
- Software: 0.000117686 USD
- Aluminum; at manufacturer: 0.00879396 USD
- Storage batteries; at manufacturer: 9.81824e-6 USD
- Facilities support: 0.000326821 USD
- Secondary copper products; at manufacturer: 0.0143287 USD
- Ammunition, arms, ordnance, and related accessories; at manufacturer: 4.26011e-5 USD
- Plastics; at manufacturer: 0.000164744 USD
- Industrial molds; at manufacturer: 7.12456e-5 USD
- Household goods repair: 0.000238423 USD
- Clay and ceramic products; at manufacturer: 3.80782e-5 USD
- Travel trailer and campers; at manufacturer: 7.53337e-7 USD
- Scenic and sightseeing transportation and support activities for transportation: 7.60229e-6 USD
- Valve and fittings (except for plumbing); at manufacturer: 0.0206533 USD
- Other real estate: 0.000618325 USD
- State and local government enterprises: 0.000528854 USD
- Ink and ink cartridges; at manufacturer: 4.64736e-6 USD
- Truck transport: 0.00966395 USD
- Rubber tires; at manufacturer: 5.78572e-5 USD
- Chemicals (except basic chemicals, agrichemicals, polymers, paints, pharmaceuticals,soaps, cleaning compounds); at manufacturer: 0.00516633 USD
- Motors and generators; at manufacturer: 0.00573062 USD
- Insurance carriers: 0.00193286 USD
- General merchandise stores: 0.000225226 USD
- Special tools, dies, jigs, and fixtures; at manufacturer: 0.000143068 USD
- Performances: 5.65258e-5 USD
- Books, newspapers, magazines, and other print media; at manufacturer: 0.000170179 USD
- Industrial process furnaces and ovens; at manufacturer: 4.50681e-6 USD
- Soap and cleaning compounds; at manufacturer: 5.78932e-6 USD
- Heating equipment other than warm air furnaces; at manufacturer: 3.42872e-5 USD
- All other forging, stamping, and sintering; at manufacturer: 0.00325976 USD
- Compressed Gases; at manufacturer: 3.72718e-5 USD
- Laminated plastic plates and shapes; at manufacturer: 0.00013545 USD
- Light bulbs; at manufacturer: 1.80205e-5 USD
- Nondepository credit intermediation and related activities: 0.00191094 USD
- Stationery; at manufacturer: 2.82847e-6 USD
- Gasoline, fuels, and by-products of petroleum refining; at manufacturer: 0.00142452 USD
- Heavy duty trucks; at manufacturer: 1.77706e-6 USD
- Natural gas; at consumer: 0.00350732 USD
- Environmental and other technical consulting services: 0.000469306 USD
- Paints and coatings; at manufacturer: 0.00802959 USD
- Wireless telecommunications: 0.00111893 USD
- Paper bags and coated paper; at manufacturer: 0.000853393 USD
- Rail transport: 0.00155634 USD
- Other petroleum and coal products; at manufacturer: 0.00148578 USD
- Transmission and power train parts; at manufacturer: 0.000177533 USD
- Vehicles and parts sales: 0.00116033 USD
- Construction machinery; at manufacturer: 2.75299e-6 USD
- Industrial process variable instruments; at manufacturer: 0.00114783 USD
- Mineral wool; at manufacturer: 3.62101e-5 USD
- Ophthalmic goods; at manufacturer: 3.17265e-7 USD
- Urethane and other foam products; at manufacturer: 6.66576e-5 USD
- Gaskets, seals, musical instruments, fasteners, brooms, brushes, mop and other misc. goods; at manufacturer: 0.000910883 USD
- Wooden windows, door, and flooring; at manufacturer: 2.25645e-5 USD
- Satellite, telecommunications resellers, and all other telecommunications: 0.000234855 USD
- other miscellaneous electrical equipment and components; at manufacturer: 0.00672963 USD
- Nonferrous metal casts; at manufacturer: 0.00518615 USD
- Insurance agencies and brokerages: 0.000364869 USD
- Packaging machinery; at manufacturer: 2.79291e-6 USD
- Investigation and security: 0.000686484 USD
- Glass and glass products; at manufacturer: 5.44896e-5 USD
- Irradiation apparatuses; at manufacturer: 5.57469e-5 USD
- Monetary authorities and depository credit intermediation: 0.00519849 USD
- Management consulting: 0.00182033 USD
- Metal coatings, engravings, and heat treatments; at manufacturer: 0.00145282 USD
- Heavy gauge metal tanks; at manufacturer: 0.000595786 USD
- Communications equipment; at manufacturer: 1.81115e-7 USD
- Asphalt pavement; at manufacturer: 1.49709e-6 USD
- Air conditioning, refrigeration, and warm air heating equipment; at manufacturer: 0.000605576 USD
- Printed circuit and electronic assembly; at manufacturer: 0.0011247 USD
- Primary batteries; at manufacturer: 3.48974e-7 USD
- Advertising and public relations: 0.00617784 USD
- Lessors of nonfinancial intangible assets: 0.0083376 USD
- All other food and drinking places: 0.000117411 USD
- Travel arrangement and reservation: 1.1434e-6 USD
- Coal; at mine: 0.000303433 USD
- Relay and industrial controls; at manufacturer: 0.0135816 USD
- Electronic equipment repair and maintenance: 0.000419406 USD
- Audio and video equipment; at manufacturer: 3.47758e-7 USD
- Golf courses, marinas, ski resorts, fitness and other rec centers and industries: 0.000292079 USD
- Nonresidential building repair and maintanence: 0.00162799 USD
- Other engine equipment; at manufacturer: 0.00037524 USD
- Communication and energy wire and cable; at manufacturer: 0.000435506 USD
- Aircraft engines and parts; at manufacturer: 4.39972e-6 USD
- Power boilers and heat exchangers; at manufacturer: 0.000601863 USD
- Machine shops; at manufacturer: 0.00404812 USD
- Computer terminals and other computer peripheral equipment; at manufacturer: 0.00120669 USD
- Motor vehicle steering, suspension components (except spring), and brake systems; at manufacturer: 0.000280338 USD
- Ground or treated minerals and earth; at manufacturer: 1.65841e-5 USD
- Light fixtures; at manufacturer: 1.79493e-5 USD
- Polystyrene foam products; at manufacturer: 3.02305e-6 USD
- Cutlery and handtools; at manufacturer: 0.000290762 USD
- Metal pipe fittings, ball and roller bearings, industrial patterns, metal bath fixtures, other misc. fabricated metals; at manufacturer: 0.0107022 USD
- Dental equipment and supplies; at manufacturer: 1.15005e-8 USD
- Dry-cleaning and laundry: 4.18183e-6 USD
- Other retail: 0.00140877 USD
- Speed changers, industrial high-speed drives, and gears; at manufacturer: 0.0104184 USD
- Other primary nonferrous metals; at manufacturer: 0.000181706 USD
- Springs and wires; at manufacturer: 0.00222253 USD
- Other support services: 0.000752612 USD
- Postal service: 0.00318452 USD
- Watches, clocks, and other measuring and controlling devices; at manufacturer: 2.52699e-6 USD
- Office supplies (not paper); at manufacturer: 1.52927e-6 USD
- Plastics and rubber industry machinery; at manufacturer: 8.69672e-6 USD
- Semiconductors; at manufacturer: 0.00127484 USD
- Light gauge metal cans, boxes, and containers; at manufacturer: 0.000634151 USD
- Consumer goods and general rental centers: 0.000118489 USD
- Hotels and campgrounds: 0.00123235 USD
- Cardboard containers; at manufacturer: 0.00457158 USD
- Air and gas compressors; at manufacturer: 0.000465033 USD
- Finished and coated fabric; at manufacturer: 2.87604e-5 USD
- Other textiles; at manufacturer: 8.15891e-7 USD
- Metal cutting and forming machine tools; at manufacturer: 0.00494838 USD
- Telecommunications: 0.00325454 USD
- Food and beverage stores: 5.65779e-5 USD
- External hard drives, CDs, other storage media; at manufacturer: 2.39534e-6 USD
- Vending, commercial laundry, and other commercial and service industry machinery; at manufacturer: 0.00103521 USD
- Office administration: 0.000235307 USD
- Surgical and medical instruments; at manufacturer: 3.81818e-6 USD
- Scientific research and development: 5.90337e-5 USD
- Copper, nickel, lead, and zinc; at mine: 1.9002e-5 USD
- Home furniture - Cabinets and non-wood, nonupholstered; at manufacturer: 1.45333e-6 USD
- Waste management and remediation: 0.00168922 USD
- Other computer related services, including facilities management: 0.000580702 USD
- Metal plumbing drains, faucets, valves, and other fittings; at manufacturer: 2.11111e-5 USD
- Other transportation equipment; at manufacturer: 0.00016293 USD
- Other vehicle parts; at manufacturer: 0.00578337 USD
- Lids, jars, bottle caps, other metal closures and crowns; at manufacturer: 0.000456389 USD
- Vehicle electrical and electronic equipment; at manufacturer: 2.10774e-5 USD
- Secondary steel products; at manufacturer: 0.0233718 USD
- Automatic controls for HVAC and refrigeration equipment; at manufacturer: 3.81009e-5 USD
- Synthetic dyes and pigments; at manufacturer: 1.96595e-5 USD
- Passenger ground transport: 0.000644144 USD
- Air transport: 0.00275756 USD

## Inputs from nature
- Water, fresh: 0.00038698, 0.000197796 m3 (2 entries, compartments not in this file); data quality (1,2,1,4,2)
- Energy, wind: 4.94945e-6 MJ; data quality (3,1,1,1,1)
- Occupation, industrial area, built up: 0.000239125 m2*a; data quality (4,2,1,1,1)
- Occupation, industrial area: 0.000717374 m2*a; data quality (4,2,1,1,1)
- Water, saline: 6.22768e-6 m3; data quality (4,2,1,4,2)
- Occupation, urban, discontinuously built: 0.000123479 m2*a; data quality (4,2,1,1,1)

## Emissions to nature
- Pentachloroethane: 1.23355e-11 kg; data quality (2,1,1,1,3)
- acrolein: 9.60807e-10 kg; data quality (2,2,1,2,3)
- 1,1-DICHLOROETHYLENE: 1.63301e-13 kg; data quality (4,1,1,1,3)
- Phthalate, dimethyl-: 2.65379e-9 kg; data quality (4,2,1,1,5)
- BENZOIC TRICHLORIDE (BENZOTRICHLORIDE): 1.25304e-13 kg; data quality (3,2,1,1,4)
- arsenic: 8.43533e-11 kg; data quality (3,2,1,1,5)
- Methyl iodide: 5.39835e-11 kg; data quality (4,2,1,1,5)
- nitric acid: 1.78775e-12 kg; data quality (3,1,1,1,5)
- ethane, 1,2-dichloro-: 2.81248e-9 kg; data quality (3,2,1,1,4)
- phenol: 1.74101e-8 kg; data quality (4,2,1,1,5)
- Methane, difluoro-, HFC-32: 6.65914e-8 kg; data quality (4,2,1,4,1)
- 1,1-DICHLOROETHANE: 1.63301e-12 kg; data quality (4,1,1,1,3)
- Cadmium: 1.6417e-14 kg; data quality (3,1,1,1,5)
- butadiene: 8.01712e-10 kg; data quality (3,2,1,4,1)
- 1,2-DICHLOROETHYLENE: 8.22627e-11, 1.02063e-13 kg (2 entries, compartments not in this file); data quality (5,1,1,1,3)
- CHLORONAPHTHALENE: 1.93408e-19 kg; data quality (1,2,1,1,5)
- methyl methacrylate: 1.11565e-8 kg; data quality (4,2,1,1,5)
- 4,4'-METHYLENEBIS(2-CHLOROANALINE): 1.34677e-13 kg; data quality (5,2,1,1,5)
- 2,2,4-trimethylpentane: 3.74271e-9 kg; data quality (3,2,1,2,4)
- Hexachlorocyclopentadiene: 6.7045e-12 kg; data quality (3,2,1,1,4)
- Phenol, pentachloro-: 1.92294e-13 kg; data quality (5,1,1,1,5)
- 2-Chloro-1,1,1-trifluoroethane: 4.49077e-10, 8.98153e-13 kg (2 entries, compartments not in this file); data quality (2,1,1,1,3)
- Ethylene glycol monoethyl ether: 4.08102e-11, 7.31686e-14 kg (2 entries, compartments not in this file); data quality (5,1,1,1,5)
- Nickel, ion: 1.30597e-11 kg; data quality (3,2,1,1,4)
- Hexachlorocyclopentadiene: 1.02063e-14 kg; data quality (5,1,1,1,3)
- benzene, chloro-: 1.50938e-10 kg; data quality (3,2,1,1,5)
- Methane, tetrachloro-, R-10: 4.08252e-14 kg; data quality (3,1,1,1,3)
- NITRIC ACID: 7.85716e-11 kg; data quality (3,1,1,1,5)
- carbonyl sulfide: 1.17502e-8 kg; data quality (4,2,1,1,4)
- Phosphine: 1.10811e-10 kg; data quality (4,2,1,1,4)
- particulates, < 2.5 um: 5.0385e-6 kg; data quality (3,2,1,1,5)
- Decabromodiphenyl oxide: 2.46203e-16 kg; data quality (4,1,1,1,5)
- Hydrazine: 3.01259e-11 kg; data quality (4,2,1,1,4)
- Triethyl amine: 1.23777e-8 kg; data quality (3,2,1,1,5)
- Carbon disulfide: 2.14332e-13 kg; data quality (4,1,1,1,3)
- Dinitrotoluene, technical grade (2,4 (77%)- and 2,6 (19%)-): 5.75866e-17 kg; data quality (5,1,1,1,5)
- MCPA - SODIUM SALT: 1.02063e-13 kg; data quality (5,1,1,1,3)
- p-cresol: 5.00915e-12 kg; data quality (4,2,1,1,4)
- Benzo(g,h,i)perylene: 2.22013e-13, 1.80243e-13 kg (2 entries, compartments not in this file); data quality (2,1,1,1,3)
- HYDROFLUORIC ACID: 4.76686e-10 kg; data quality (3,1,1,1,3)
- naphthalene: 3.71185e-9 kg; data quality (3,2,1,1,5)
- benz[a]anthracene: 1.75361e-10 kg; data quality (2,2,1,1,5)
- dibenzofuran: 1.75353e-11 kg; data quality (4,2,1,1,4)
- Benzo(g,h,i)perylene: 2.26604e-8 kg; data quality (3,2,1,1,5)
- ethylene glycol: 1.16252e-11 kg; data quality (5,1,1,1,3)
- PCB-1: 1.77332e-20 kg; data quality (2,2,1,1,5)
- barium: 3.01251e-12, 6.19951e-12 kg (2 entries, compartments not in this file); data quality (4,1,1,1,4)
- toluene-2,4-diisocyante: 2.49249e-10 kg; data quality (3,2,1,1,5)
- chlorine: 7.82581e-9 kg; data quality (4,2,1,1,4)
- 1,4-dioxane: 4.0982e-8 kg; data quality (4,2,1,1,5)
- NITRATE: 1.56443e-11 kg; data quality (5,1,1,1,5)
- tertiary-Butyl Acetate: 5.84264e-7 kg; data quality (3,2,1,1,5)
- 2-(2-ETHOXYETHOXY) ETHYL ACETATE: 3.23113e-12 kg; data quality (5,2,1,1,5)
- HYDROCHLORIC ACID: 6.08703e-12 kg; data quality (2,1,1,1,3)
- HCFC-142b: 6.73615e-12, 2.50666e-9 kg (2 entries, compartments not in this file); data quality (2,1,1,1,3)
- 2-chloro-1-phenylethanone: 1.58443e-12 kg; data quality (2,2,1,1,4)
- hexane: 5.50392e-6 kg; data quality (3,2,1,1,5)
- mercury: 1.116e-8 kg; data quality (3,1,1,1,5)
- sulfur dioxide: 5.87233e-6 kg; data quality (2,2,1,1,4)
- 2,4/2,6-toluenediisocyanate (mixture): 9.96494e-10 kg; data quality (4,1,1,1,5)
- Ethane, 1,1-dichloro-1-fluoro-, HCFC-141b: 3.67426e-12, 1.94736e-10 kg (2 entries, compartments not in this file); data quality (2,1,1,1,3)
- Methane: 1.05971e-6 kg; data quality (3,1,1,2,1)
- Ethane, 2-chloro-1,1,1,2-tetrafluoro-, HCFC-124: 9.98481e-11 kg; data quality (4,1,1,1,5)
- methanol: 5.20362e-7 kg; data quality (4,2,1,1,5)
- Carbon dioxide: 0.0162601 kg; data quality (4,2,1,4,1)
- toluene, 2,4-dinitro-: 2.15853e-15 kg; data quality (5,2,1,1,4)
- DIETHANOLAMINE: 7.32014e-10 kg; data quality (4,1,1,1,4)
- hydrogen chloride: 5.46744e-8 kg; data quality (2,2,1,1,4)
- 2,4/2,6-toluenediisocyanate (mixture): 1.43656e-12 kg; data quality (3,1,1,1,5)
- Dinitrogen monoxide: 3.68486e-8 kg; data quality (4,2,1,4,1)
- Sodium formate: 1.059e-9 kg; data quality (3,1,1,1,5)
- Benzene, chloro-: 1.02063e-13 kg; data quality (3,1,1,1,3)
- Ethane, 1,1,1-trichloro-, HCFC-140: 2.77815e-11 kg; data quality (3,1,1,1,3)
- Sulfuric acid: 1.3557e-8 kg; data quality (2,1,1,1,3)
- antimony: 3.08059e-12, 4.93311e-13 kg (2 entries, compartments not in this file); data quality (2,1,1,1,5)
- nickel: 5.66765e-9 kg; data quality (3,2,1,1,5)
- bromoform: 2.42325e-10 kg; data quality (3,2,1,1,4)
- epichlorohydrin: 5.88453e-11 kg; data quality (3,2,1,1,4)
- catechol: 8.62446e-12 kg; data quality (5,2,1,1,4)
- monochloroethane: 3.98425e-10 kg; data quality (3,2,1,1,4)
- ammonia: 3.258e-7 kg; data quality (3,2,1,1,4)
- mercury: 1.87055e-10 kg; data quality (2,2,1,1,4)
- Dimethylamine: 1.0934e-10 kg; data quality (3,1,1,1,3)
- 2-Mercaptobenzothiazole: 1.63301e-15 kg; data quality (3,1,1,1,3)
- benzene: 1.01229e-8 kg; data quality (3,2,1,3,2)
- o-toluidine: 5.7449e-13 kg; data quality (4,2,1,1,5)
- ethane, 1,1,2-trichloro-: 2.18747e-10 kg; data quality (4,2,1,1,4)
- 1,4-BENZOQUINONE: 6.76872e-14 kg; data quality (3,2,1,1,5)
- 3,3'-Dichlorobenzidine: 2.46691e-14 kg; data quality (3,2,1,1,4)
- ACRYLAMIDE: 9.81091e-12 kg; data quality (4,2,1,1,4)
- benzal chloride: 8.16503e-15 kg; data quality (5,1,1,1,3)
- Methane, dichloro-, HCC-30: 8.98153e-13 kg; data quality (5,1,1,1,3)
- silver: 8.11643e-14 kg; data quality (4,1,1,1,5)
- maleic anhydride: 4.73119e-12 kg; data quality (2,2,1,1,4)
- Chrysene: 2.23253e-10 kg; data quality (2,2,1,1,5)
- toluene: 3.50444e-6 kg; data quality (3,2,1,1,5)
- formic acid: 4.39746e-8 kg; data quality (3,1,1,1,5)
- acetophenone: 1.26326e-10 kg; data quality (3,2,1,1,5)
- 2,4,5,2',5'-PENTACHLOROBIPHENYL: 3.69616e-19 kg; data quality (2,2,1,1,5)
- Zinc: 1.40374e-9 kg; data quality (5,1,1,1,4)
- Chloroform: 9.79804e-13 kg; data quality (3,1,1,1,3)
- benzidine: 5.53645e-13 kg; data quality (2,2,1,1,5)
- cobalt: 3.78829e-11 kg; data quality (4,1,1,1,5)
- phenol: 5.72136e-11 kg; data quality (3,1,1,1,4)
- HYDROGEN SULFIDE: 2.1425e-11 kg; data quality (3,1,1,1,4)
- acrylic acid: 1.20365e-10 kg; data quality (3,2,1,1,5)
- HCFC-132b: 5.01537e-10, 3.26601e-13 kg (2 entries, compartments not in this file); data quality (2,1,1,1,3)
- pyrene: 2.13159e-11 kg; data quality (2,2,1,1,4)
- 1,1,1-trichloroethane: 3.62946e-7 kg; data quality (3,2,1,1,5)
- NITROUS ACID: 1.27313e-8 kg; data quality (5,1,1,1,4)
- NITROMETHANE: 9.81845e-12 kg; data quality (5,1,1,1,3)
- ALUMINUM OXIDE: 1.85055e-12, 2.09103e-11 kg (2 entries, compartments not in this file); data quality (5,1,1,1,5)
- Ethane, 1,2-dichloro-: 2.4291e-13, 5.30952e-12 kg (2 entries, compartments not in this file); data quality (4,1,1,1,3)
- NITROGLYCERIN: 7.47015e-12 kg; data quality (5,1,1,1,5)
- 1,2,4-trichlorobenzene: 1.95312e-11 kg; data quality (4,2,1,1,4)
- BUTYL ACRYLATE: 5.27018e-13 kg; data quality (4,1,1,1,5)
- Water, fresh: 0.000480994 m3; data quality (1,2,1,4,2)
- Propene, 1,3-dichloro-: 1.67478e-11 kg; data quality (3,2,1,1,4)
- m-xylene: 3.17116e-7 kg; data quality (3,2,1,1,5)
- ethylene oxide: 8.14389e-11 kg; data quality (3,2,1,1,5)
- Propene: 1.10252e-9 kg; data quality (3,1,1,1,5)
- Ethane, 2,2-dichloro-1,1,1-trifluoro-, HCFC-123: 1.71194e-9 kg; data quality (4,1,1,1,5)
- biphenyl: 8.96677e-11 kg; data quality (4,2,1,1,4)
- TERT-BUTYL ALCOHOL: 4.28722e-10 kg; data quality (4,1,1,1,4)
- fluoranthene: 8.18286e-10 kg; data quality (2,2,1,1,5)
- Creosol: 1.58095e-10, 1.95552e-11 kg (2 entries, compartments not in this file); data quality (5,1,1,1,3)
- Phthalate, dibutyl-: 1.43937e-9 kg; data quality (3,2,1,1,5)
- NITROGEN TRIFLUORIDE: 1.29428e-10 kg; data quality (3,1,1,1,3)
- ETHYLENETHIOUREA: 1.28046e-16 kg; data quality (5,2,1,1,5)
- Methane, dibromo-: 5.77064e-11 kg; data quality (5,1,1,1,3)
- 1,3-dichlorobenzene: 5.48929e-15 kg; data quality (2,1,1,1,3)
- bis(2-chloroethyl)ether: 3.42012e-13 kg; data quality (3,2,1,1,4)
- antimony: 2.06916e-10 kg; data quality (3,2,1,1,5)
- 1-Methyl-2-pyrrolidinone: 3.78879e-8 kg; data quality (5,1,1,1,5)
- MOLYBDENUM(VI): 7.77344e-10 kg; data quality (3,1,1,1,3)
- HALON 1211: 5.61126e-13 kg; data quality (5,1,1,1,5)
- Ethene, tetrachloro-: 1.16352e-12 kg; data quality (3,1,1,1,3)
- Chrysene, 5-methyl-: 1.63768e-16 kg; data quality (2,2,1,1,4)
- manganese: 1.60659e-9, 1.61173e-9 kg (2 entries, compartments not in this file); data quality (4,1,1,1,5)
- 3-methylcholanthrene: 1.38217e-14 kg; data quality (2,2,1,1,5)
- phosgene: 1.09069e-11 kg; data quality (5,2,1,1,4)
- hydrogen fluoride: 1.81584e-8 kg; data quality (2,2,1,1,5)
- Phosphorus: 1.89069e-7 kg; data quality (2,1,1,1,1)
- Chloroacetic acid: 4.95907e-12 kg; data quality (3,2,1,1,4)
- CFC-114: 1.1575e-9 kg; data quality (5,1,1,1,3)
- vinyl acetate: 5.65354e-10 kg; data quality (4,2,1,1,4)
- arsenic: 2.48669e-12 kg; data quality (2,1,1,1,5)
- methylene diphenyl diisocyanate: 2.10867e-8 kg; data quality (4,2,1,1,5)
- ALLYL CHLORIDE: 2.11548e-11 kg; data quality (3,2,1,1,4)
- ALLYL ALCOHOL: 4.82349e-11 kg; data quality (4,1,1,1,3)
- Triethylene glycol: 1.5931e-11 kg; data quality (3,2,1,1,5)
- 4-nitrophenol: 7.59423e-14 kg; data quality (2,2,1,1,4)
- copper: 4.63519e-9, 1.66931e-9, 5.04132e-10 kg (3 entries, compartments not in this file); data quality (4,1,1,1,5)
- fluorene: 2.10809e-11 kg; data quality (3,2,1,3,3)
- bromine: 1.45027e-9 kg; data quality (5,1,1,1,3)
- dicyclopentadiene: 1.6342e-13 kg; data quality (4,1,1,1,5)
- propanal: 2.38567e-9 kg; data quality (3,2,1,3,2)
- 1,1,2,2-tetrachloroethane: 6.43011e-11 kg; data quality (3,2,1,1,4)
- cyclohexane: 3.45455e-10, 1.56525e-12 kg (2 entries, compartments not in this file); data quality (4,1,1,1,5)
- Hexane: 6.02503e-14 kg; data quality (4,1,1,1,4)
- polychlorinated biphenyls: 8.03278e-14 kg; data quality (3,1,1,1,4)
- ethylbenzene: 3.47984e-9 kg; data quality (4,1,1,1,5)
- diethanolamine: 1.60194e-10 kg; data quality (3,2,1,1,4)
- 2,2-BIS(4-HYDROXY-3,5-DIBROMOPHENYL)PROPANE: 1.0647e-10 kg; data quality (5,1,1,1,3)
- 1,2,4-trimethylbenzene: 7.59725e-9 kg; data quality (5,1,1,1,5)
- Sodium formate: 2.23269e-11 kg; data quality (3,1,1,1,4)
- DICHLOROBENZENE: 1.20434e-12 kg; data quality (4,1,1,1,3)
- phthalate, dioctyl-: 1.60918e-8 kg; data quality (3,2,1,1,5)
- benzene, ethyl-: 3.80439e-7 kg; data quality (4,2,1,1,5)
- silver: 9.18939e-11 kg; data quality (4,1,1,1,3)
- benzyl chloride: 5.5642e-11 kg; data quality (2,2,1,1,5)
- Urethane: 2.46203e-16 kg; data quality (4,1,1,1,5)
- mercury: 6.32201e-13 kg; data quality (3,1,1,1,4)
- trichloroethylene: 6.30058e-8 kg; data quality (3,2,1,1,5)
- cadmium: 2.43947e-10 kg; data quality (3,2,1,1,4)
- Ethane, pentafluoro-, HFC-125: 1.14349e-7 kg; data quality (4,2,1,4,1)
- vanadium: 6.53472e-12 kg; data quality (5,1,1,1,3)
- PHOSPHORUS: 6.7351e-11 kg; data quality (2,2,1,1,4)
- Dibenz(a,h)anthracene: 2.06717e-13 kg; data quality (2,2,1,1,4)
- diisocyanates: 1.3901e-8 kg; data quality (4,1,1,1,5)
- 1,1-DICHLOROETHYLENE: 4.20715e-10 kg; data quality (3,2,1,1,4)
- nitric acid: 1.1945e-8 kg; data quality (3,1,1,1,4)
- methane, chlorodifluoro-, hcfc-22: 2.26436e-9 kg; data quality (4,1,1,1,3)
- Styrene: 1.07844e-12 kg; data quality (3,1,1,1,5)
- fluorine: 3.57628e-11 kg; data quality (4,1,1,1,3)
- 4,4'-METHYLENEDIANILINE: 4.35386e-14 kg; data quality (4,2,1,1,5)
- m-cresol: 1.12952e-11 kg; data quality (4,2,1,1,4)
- manganese: 2.29656e-8 kg; data quality (3,2,1,1,5)
- chromium: 4.71532e-10, 2.15313e-10, 1.18581e-8 kg (3 entries, compartments not in this file); data quality (4,1,1,1,5)
- MOLYBDENUM(VI): 2.33884e-11, 8.70322e-11 kg (2 entries, compartments not in this file); data quality (3,1,1,1,4)
- butanol: 6.91461e-9 kg; data quality (5,1,1,1,5)
- 2,4-dimethylphenol: 3.07276e-12 kg; data quality (4,1,1,1,4)
- PYRIDINE: 1.45897e-11 kg; data quality (4,1,1,1,4)
- t-butyl methyl ether: 4.32781e-10 kg; data quality (3,2,1,1,4)
- Ethylene glycol monoethyl ether: 2.55999e-8 kg; data quality (4,1,1,1,4)
- 2-PHENOXYETHANOL: 1.81443e-10 kg; data quality (3,2,1,1,5)
- hydroquinone: 5.02018e-12 kg; data quality (3,2,1,1,4)
- Chromium, ion: 1.18361e-8 kg; data quality (2,2,1,1,5)
- ETHENE: 4.03269e-9 kg; data quality (3,1,1,1,4)
- 2,4-dinitrophenol: 3.94179e-15 kg; data quality (5,2,1,1,5)
- o-Xylene: 1.34907e-7 kg; data quality (3,2,1,1,5)
- phenanthrene: 3.67426e-14 kg; data quality (3,1,1,1,3)
- Propane, 1,1,1,3,3,3-hexafluoro-, HCFC-236fa: 1.32172e-9 kg; data quality (4,2,1,4,1)
- M-DINITROBENZENE: 2.04126e-14 kg; data quality (5,1,1,1,3)
- 4,4'-isopropylidenediphenol: 4.03704e-10 kg; data quality (4,1,1,1,5)
- carbon monoxide: 3.21242e-5 kg; data quality (3,2,1,1,3)
- phthalic anhydride: 9.44079e-11 kg; data quality (2,2,1,1,4)
- lead: 3.47267e-9 kg; data quality (3,2,1,1,5)
- DIETHANOLAMINE: 8.39096e-9 kg; data quality (4,1,1,1,3)
- Chromium VI: 1.41356e-9 kg; data quality (3,2,1,1,5)
- Hydrazine, methyl-: 1.34074e-12 kg; data quality (2,2,1,1,4)
- Ethylene glycol: 2.87817e-10 kg; data quality (5,1,1,1,3)
- styrene: 2.53547e-8 kg; data quality (4,2,1,1,5)
- 1,4-dinitrobenzene: 2.04126e-14 kg; data quality (5,1,1,1,3)
- methane, tetrachloro-, R-10: 1.27753e-11 kg; data quality (3,1,1,1,5)
- HALON 1301: 2.81449e-12 kg; data quality (5,1,1,1,5)
- ethyl acrylate: 2.7231e-10 kg; data quality (3,2,1,1,5)
- isophorone: 1.26854e-9 kg; data quality (3,2,1,1,5)
- Benzene, 1,2,4-trimethyl-: 1.62313e-13 kg; data quality (5,1,1,1,3)
- ethylene glycol: 1.71166e-7 kg; data quality (4,2,1,1,5)
- Propane, 1,2-dichloro-: 1.11078e-11 kg; data quality (4,2,1,1,4)
- methyl isobutyl ketone: 9.97428e-7 kg; data quality (3,2,1,1,5)
- chloroform: 1.87837e-9 kg; data quality (4,2,1,1,4)
- 2-(2-BUTOXYETHOXY) ETHYL ACETATE: 8.29588e-11 kg; data quality (3,2,1,1,5)
- carbon disulfide: 1.43429e-8 kg; data quality (4,2,1,1,4)
- anthracene: 8.22569e-12 kg; data quality (3,2,1,1,4)
- Cobalt: 2.35322e-10 kg; data quality (3,2,1,1,5)
- lead: 3.40847e-11 kg; data quality (3,1,1,1,4)
- toluene: 2.5374e-13 kg; data quality (5,1,1,1,4)
- 1,2-BUTYLENE OXIDE: 1.21696e-10 kg; data quality (4,2,1,1,4)
- Benzene, hexachloro-: 2.04126e-15 kg; data quality (4,1,1,1,3)
- cumene: 1.18982e-8 kg; data quality (4,2,1,1,5)
- Aluminum: 7.30356e-10 kg; data quality (4,1,1,1,5)
- Chloropicrin: 1.60035e-11 kg; data quality (3,1,1,1,3)
- Phthalate, dioctyl-: 3.37292e-14 kg; data quality (4,1,1,1,5)
- ozone: 4.57242e-12 kg; data quality (4,1,1,1,3)
- acetaldehyde: 1.08812e-8 kg; data quality (3,2,1,3,2)
- chlorine: 5.5058e-10 kg; data quality (3,1,1,1,3)
- hydrogen sulfide: 8.41148e-9 kg; data quality (3,2,1,1,4)
- Indeno(1,2,3-cd)pyrene: 1.33425e-13 kg; data quality (3,2,1,3,2)
- DIMETHYLAMINOAZOBENZENE: 4.30311e-16 kg; data quality (5,2,1,1,5)
- N,N-DIMETHYLANILINE: 1.59254e-15 kg; data quality (5,2,1,1,5)
- Phenol: 6.83403e-12 kg; data quality (3,1,1,1,5)
- Xylene: 1.29283e-6 kg; data quality (4,2,1,1,5)
- Xylene: 1.94883e-13 kg; data quality (4,1,1,1,5)
- acenaphthene: 1.16342e-11 kg; data quality (3,2,1,4,1)
- Anthracene: 3.67426e-14 kg; data quality (4,1,1,1,3)
- p-phenylenediamine: 1.53084e-18 kg; data quality (5,2,1,1,4)
- hexachloro-1,3-butadiene: 1.18232e-11 kg; data quality (4,2,1,1,4)
- ammonia: 4.90518e-9 kg; data quality (3,1,1,1,3)
- o-cresol: 1.14448e-11 kg; data quality (4,2,1,1,4)
- QUINOLINE: 3.81928e-12 kg; data quality (3,2,1,1,4)
- aniline: 9.80287e-12 kg; data quality (4,2,1,1,4)
- 1,4-dichlorobenzene: 4.30283e-13 kg; data quality (2,2,1,1,4)
- Diethylene glycol butyl ether: 3.36301e-9 kg; data quality (4,2,1,1,5)
- IRON PENTACARBONYL: 5.76043e-10 kg; data quality (5,1,1,1,3)
- 2-methylnaphthalene: 6.26833e-13 kg; data quality (2,2,1,1,5)
- naphthalene: 7.00961e-12 kg; data quality (4,1,1,1,3)
- methane, bromo-, halon 1001: 1.22165e-9 kg; data quality (3,2,1,1,4)
- Benzo(k)fluoranthene: 2.06444e-12 kg; data quality (2,2,1,1,4)
- Ethane, 1,1,2-trichloro-: 6.55448e-13 kg; data quality (4,1,1,1,3)
- nickel: 3.01584e-10, 5.31905e-10 kg (2 entries, compartments not in this file); data quality (4,1,1,1,5)
- Benzo(a)anthracene: 1.21881e-13 kg; data quality (2,2,1,1,5)
- beryllium: 4.49402e-12 kg; data quality (2,2,1,1,4)
- Methane, monochloro-, R-40: 2.04126e-13 kg; data quality (3,1,1,1,3)
- cyanide: 5.60053e-9 kg; data quality (2,2,1,1,4)
- 2-METHOXYETHANOL: 4.35277e-11 kg; data quality (4,2,1,1,5)
- Benzo(b)fluoranthene: 2.8241e-12 kg; data quality (2,2,1,1,4)
- Sulfuric acid: 7.31197e-13 kg; data quality (2,1,1,1,5)
- Ethene, trichloro-: 1.49259e-12 kg; data quality (5,1,1,1,3)
- Dimethyl sulfate: 6.9547e-13 kg; data quality (2,2,1,1,4)
- Ethane, 1,1,1,2-tetrafluoro-, HFC-134a: 4.30995e-7 kg; data quality (4,2,1,4,1)
- SEC-BUTYL ALCOHOL: 2.06126e-9 kg; data quality (5,1,1,1,5)
- acetonitrile: 7.45402e-10 kg; data quality (3,2,1,1,5)
- Metaldehyde (tetramer): 2.04126e-15 kg; data quality (3,1,1,1,3)
- Zinc: 4.19162e-10 kg; data quality (5,1,1,1,5)
- methanol: 1.02063e-13 kg; data quality (3,1,1,1,3)
- Hydrocarbons, aromatic: 5.80024e-10 kg; data quality (3,2,1,4,1)
- Cresol: 4.20214e-11 kg; data quality (4,2,1,1,4)
- Nitrobenzene: 1.83876e-11 kg; data quality (4,2,1,1,4)
- hexachloroethane: 7.73427e-12 kg; data quality (4,2,1,1,4)
- 1,2-dibromo-3-chloropropane: 1.33031e-14 kg; data quality (4,2,1,1,4)
- phenanthrene: 9.22098e-11 kg; data quality (3,2,1,2,3)
- Ethene, chloro-: 9.41849e-10 kg; data quality (3,2,1,1,4)
- 1,3-PHENYLENEDIAMINE: 1.12679e-10 kg; data quality (4,1,1,1,5)
- methane, monochloro-, r-40: 3.1743e-10 kg; data quality (3,2,1,1,4)
- dimethyl formamide: 7.65359e-8 kg; data quality (4,2,1,1,5)
- selenium: 1.89033e-10 kg; data quality (2,2,1,1,4)
- 2,4-Diaminotoluene: 8.35361e-12 kg; data quality (2,2,1,1,4)
- hexachlorobenzene: 1.76115e-13 kg; data quality (3,2,1,1,4)
- acrylonitrile: 4.56021e-11 kg; data quality (4,2,1,1,4)
- Asbestos: 1.96606e-13 kg; data quality (5,2,1,1,4)
- NITROUS ACID: 2.70204e-10 kg; data quality (5,1,1,1,3)
- 1,2-dinitrobenzene: 2.04126e-14 kg; data quality (5,1,1,1,3)
- acenaphthylene: 2.84487e-11 kg; data quality (3,2,1,2,3)
- ethene, tetrachloro-: 1.30676e-6 kg; data quality (3,2,1,1,5)
- BIS (2-ETHOXY ETHYL) ETHER: 6.13244e-12 kg; data quality (5,2,1,1,5)
- AMMONIA: 8.93458e-10 kg; data quality (3,1,1,1,3)
- Water, saline: 3.15555e-6 m3; data quality (4,2,1,4,2)
- 2,3,4'-TRICHLOROBIPHENYL: 2.09546e-19 kg; data quality (2,2,1,1,5)
- benzene: 1.23727e-12 kg; data quality (3,1,1,1,3)
- pentachlorophenol: 3.93826e-13 kg; data quality (5,1,1,1,5)
- CHLOROPRENE: 6.34752e-13 kg; data quality (2,2,1,1,5)
- Diuron: 2.04126e-13 kg; data quality (2,1,1,1,3)
- para-xylene: 1.39766e-7 kg; data quality (3,2,1,1,5)
- benzo(a)pyrene: 9.09861e-11 kg; data quality (2,2,1,1,4)
- Nitrogen: 2.46456e-6 kg; data quality (5,2,1,1,5)
- BUTYL ISOCYANATE: 2.66035e-9 kg; data quality (4,2,1,1,5)
- Titanium: 3.49435e-10 kg; data quality (5,2,1,1,4)
- particulates, < 10 um: 6.84105e-7 kg; data quality (3,2,1,1,5)
- 1,1,1,2-Tetrachloroethane: 1.89837e-11 kg; data quality (3,1,1,1,3)
- carbon tetrachloride: 7.99112e-10 kg; data quality (4,2,1,1,4)
- propylene oxide: 1.12953e-10 kg; data quality (3,2,1,1,4)
- lead: 2.77979e-10 kg; data quality (3,1,1,1,5)
- Ethane, 1,1,1-trifluoro-, HFC-143a: 4.8925e-8 kg; data quality (4,2,1,4,1)
- 2,4-D, ISOOCTYL ESTER: 2.04126e-13 kg; data quality (5,1,1,1,3)
- VOC, volatile organic compounds: 4.75027e-5 kg; data quality (3,2,1,1,5)
- Bis(2-chloroethyl)ether: 3.06189e-15 kg; data quality (2,1,1,1,3)
- ethane, 1,2-dibromo-: 1.21259e-12 kg; data quality (2,2,1,1,4)
- 2-nitropropane: 2.12258e-13 kg; data quality (5,2,1,1,4)
- nitrogen oxides: 9.7294e-6 kg; data quality (2,2,1,1,4)
- 2,4,6-trichlorophenol: 5.63868e-16 kg; data quality (2,2,1,1,4)
- PERACETIC ACID: 1.89225e-11 kg; data quality (4,1,1,1,3)
- formaldehyde: 1.66308e-7 kg; data quality (2,2,1,1,5)
- methane, dichloro-, hcc-30: 9.58638e-8 kg; data quality (4,2,1,1,5)
- 2-ethoxyethyl acetate: 3.10213e-9 kg; data quality (3,2,1,1,5)

## Inventory method
Input-output

## Modelling constants
The reference unit of all processes is 1 USD2013 of the good or service. The technosphere inputs are based on the US BEA detailed input-output tables for 2007. The IO tables are combined to develop a commodity-by-commodity model based on the the industry-technology assumption (see Suh et al., 2010), which assumes all commodities produced by a given industry have the same input structure, but that multiple industries can produce the same commodity. Thus, model technosphere flows represent commodity outputs (and not industry outputs) from other processes in the model. There are no by-products included in these processes. All commodity production is based on US-conditions, despite in reality that some goods and services are produced overseas, as USEEIO v1.1 is a single-region IO model.

## Completeness
The input-output approach assures that all purchased inputs associated with the sectors making these commodities as reported in the US census for 2007 are included. The direct resources extracted including minerals, energy sources, water and land occupied are included. Emissions to air include all critieria air pollutants, greenhouse gases, and hazardous and toxic air pollutants as defined by US EPA. Releases to water include toxics, total nitrogen and total phosphorus, and water discharges. Releases to soil or groundwater include toxics and agriculutural pesticides. Some metal releases to air, water and soil are not included because they could not be speciated. Solid hazardous and non-hazardous wastes generated are not included as an elementary flows although purchases of waste services are included.

## Data treatment
Greenhouse gases are primarily from the US Greenhouse Gas Emission Inventory (USEPA 2016a). Biogenic C uptake is not included (change from version 1.0), as biogenic C emission are not included. Toxic releases to air, water and soil (except pesticides) are from the 2013 Toxic Release Inventory (USEPA 2015a). Criteria air pollutants and hazardous air pollutants are from the 2011 National Emissions Inventory (USEPA 2015b). All estimates are normalized by industry based on sector output in the data year, then converted to 2013 USD using relative sector-specific CPIs (if data year is not 2013). Energy use represent raw renewables or fossil fuel energies and is based on EIA data for 2014. See Table 1 in Yang, Ingwersen et al. 2017 and Supporting Information 1, and the v1.1 data update notes (Ingwersen et al. 2017) for all details on environmental data sources used.Land occupation associated with manufacturing buildings was estimated based on the building floorspace data provided by the U.S. Energy Information Administration in the 2010 Manufacturing Energy Consumption Survey (EIA 2013). Portions of total renewable energy (EIA 2016) based on EIA-923 reports for 2014 (EIA 2017) are included. Nitrogen and Phosphorus releases are modeled in total N and total P equivalents as estimated by the Discharge Monitoring Report Nutrient Loading tool (USEPA 2016b). Self-supplied withdrawals were assigned to industrial sectors based on water use statistics for Canadian industries by NAICS 3-digit sector scaled to US production levels based on gross domestic product by industry (BEA 2015; Statistics Canada 2010), and further disaggregated to the manufacturing sectors based on compensation of employees as provided by the 2007 IO tables (BEA 2015). Water withdrawals associated with public supply were allocated to sectors based on their use of water, sewage, and other services in USD based on the IO tables (BEA 2015). Portions of total renewable energy (EIA 2016) by type are assigned to sectors (hydro, wind, solar, or) based on EIA-923 reports for 2014 (EIA 2017).

## Data collection
2015-2016

## Sampling procedure
US federal government sources, including surveys and US EPA emissions databases are used as the primary sources. From these sources, data for US reporting establishments/facilities are aggregated by the NAICS sector as defined in the BEA detailed 2007 input-output tables. When level of sector aggregation differs, or when direct emissions are not reported but modeled, additional sources are used to make allocations and estimates.

## Review details
In regard to quality assurance and peer-review, each dataset created went through Quality Assurance as defined in a quality assurance project plans at US EPA, CSRA or ERG. The model was assembled with the IO model builder model (USEPA 2016c). Validation functions were used to check that all the model components were properly assembled and harmonized. Bayou Demeke and Santosh Ghimire provided internal peer review of the model methodology and the manuscript underwent standard EPA management review. An editor and two anonymous reviewers at the Journal of Cleaner Production reviewed the model. In regard to data quality evaluation, data quality assessment was performed at the flow and process levels according to the updated US EPA data quality assessment guidelines as defined in US EPA (2016b).

## Intended application
The primary application is for use in the US Environmentally-Extended Input-Ouput model, USEEIO, version 1.1. This model is being used by the US EPA for supporting tools that prioritize goods and services based on potential environmental impacts, resource use or emissions for large regions, including the US and US states, and as a strealined tool for organizations as a starting point to consider sustainable materials management. Model results are designed to provide meso/macro-level decision support.

## Project
USEEIO v1.1 was developed by the US EPA with CSRA and ERG with Wesley W. Ingwersen and David E. Meyer as research leads. Yi Yang was the technical lead on the work for CSRA (contract EP-C-15-012); Troy Hawkins was lead for ERG (contract EP-C-12-021).

## Sources
- Nickerson et al. 2011
- Edelen and Ingwersen 2017
- Goebes et al. 2003
- USDA 2009a
- Yienger et al. 1995
- USDA 2006
- EIA 2016
- EIA 2013
- Torcellini et al. 2003
- Lovelace 2009
- USDA 2014
- Kim et el. 2013
- USEPA 2016b
- EIA 2017
- Maupin et al. 2014
- USEPA 2015a
- EIA 2015
- USDA 2016
- USEPA 2016c
- BEA 2015
- Ingwersen et al. DRAFT
- Macknick et al. 2011
- USEPA 2015b
- BLM 2008
- USDA 2009b
- USGS 2016
- Blackhurst et al. 2010
- USEPA 2016a
- Ingwersen et al. 2017
- USGS 2015
- Statistics Canada 2010
