# Other support activities for mining

Dataset: openLCA process, unit process
Category: 2131: Support Activities for Mining
Geography: United States
Time period: 2017-01-01 to 2017-12-31
Data quality: US EPA - Process Pedigree Matrix (1;1)
Exchange data quality scheme: US EPA - Flow Pedigree Matrix
Generated by: US EPA with CSRA and ERG
Owner: US EPA
Published in: Yang, Ingwersen et al. 2017
restrictionsDescription: This model shold be appropriately cited (see Yang, Ingwersen et al. 2017 source or Publication field) when used. Any changes or derivations of this model by the user should be documented. The model itself and any results from use of this model shall not be construed to consitute US EPA opinion or policy.
copyright: false

## General comment
BEA Code & Name is '21311A:Other support activities for mining'. Description of the primary industry producing this good or service, adapted from the Census Bureau NAICS 2007 descriptions: This industry comprises establishments primarily engaged in providing support services, on a contract or fee basis, required for the mining and quarrying of minerals and for the extraction of oil and gas. Drilling, taking core samples, and making geological observations at prospective sites (except geophysical surveying and mapping) for minerals, on a contract or fee basis, are included in this industry. Related NAICS codes are: 213112-5

## Technology
The process describes the average US production of this good or service within this NAICS-based grouping defined in the BEA 2007 detailed input-output tables (BEA 2015). Distribution, wholesale and retailing of this good or service, use, and final disposal are not included. Creation of a product system with this process will enable modeling of all upstream (supply-chain) activities.

## Geography
Data represent the 50 US states

## Time period
2017 was the year in which this version of USEEIO was released and is the target date for the model

## Reference product
- Other support activities for mining: 1 USD

## Inputs from technosphere
All rows: data quality (1,3,1,1,1)
- Mineral wool; at manufacturer: 1.64677e-7 USD
- Glass and glass products; at manufacturer: 1.42397e-7 USD
- Relay and industrial controls; at manufacturer: 4.6497e-8 USD
- Limited-service restaurants: 0.00818876 USD
- Independent artists, writers, and performers: 1.06556e-8 USD
- Accounting, tax preparation, bookkeeping, and payroll: 0.00427267 USD
- Dimensional stone; at mine: 0.000106876 USD
- Metal coatings, engravings, and heat treatments; at manufacturer: 0.000426886 USD
- Dry-cleaning and laundry: 4.84344e-9 USD
- Storage batteries; at manufacturer: 0.000162691 USD
- Food and beverage stores: 2.13614e-8 USD
- Springs and wires; at manufacturer: 9.77068e-5 USD
- Rubber and plastic belts and hoses; at manufacturer: 4.26517e-6 USD
- Management consulting: 0.000926778 USD
- Veneer, plywood, and engineered wood; at manufacturer: 0.000213224 USD
- Legal services: 0.00566376 USD
- Concrete pipe, bricks, and blocks; at manufacturer: 1.92253e-7 USD
- Motors and generators; at manufacturer: 3.26116e-7 USD
- Printed circuit and electronic assembly; at manufacturer: 6.58707e-8 USD
- Custom computer programming: 7.9202e-7 USD
- Mining and oil/gas field machinery; at manufacturer: 0.0117726 USD
- Vehicle engines and engine parts; at manufacturer: 0.000180537 USD
- Employment services: 0.00580964 USD
- State and local government enterprises: 2.03424e-8 USD
- Cardboard; at manufacturer: 0.000131208 USD
- Company and enterprise management: 0.0116555 USD
- Metal hinges, keys, lock, and other hardware; at manufacturer: 3.18153e-7 USD
- Lumber and treated lumber; at manufacturer: 9.827e-5 USD
- Other real estate: 0.00065229 USD
- Welding and Soldering Equipment, Scales and Balances, and other general purpose machinery; at manufacturer: 0.000944806 USD
- Iron, gold, silver, and other metal ores; at mine: 1.23093e-5 USD
- Noncomparable imports: 0.0018184 USD
- Metal structural products; at manufacturer: 0.000295309 USD
- Other concrete products; at manufacturer: 4.55786e-8 USD
- Cutting and machine tool accessory, rolling mill, and other metalworking machines; at manufacturer: 0.00832178 USD
- Asphalt pavement; at manufacturer: 0.000113822 USD
- Used and secondhand goods: 1.94242e-6 USD
- Monetary authorities and depository credit intermediation: 0.00574644 USD
- Compressed Gases; at manufacturer: 0.00152392 USD
- Material handling equipment; at manufacturer: 0.00401645 USD
- Vehicle repair: 0.00020077 USD
- Paper; at manufacturer: 8.16844e-5 USD
- Ground or treated minerals and earth; at manufacturer: 0.000554663 USD
- Pipeline transport: 0.000163616 USD
- Business support: 0.000909402 USD
- Wholesale trade: 0.0127979 USD
- Electronic equipment repair and maintenance: 0.000873028 USD
- Abrasive products; at manufacturer: 5.52152e-8 USD
- Facilities support: 9.68687e-10 USD
- Machine shops; at manufacturer: 0.000131479 USD
- Full-service restaurants: 0.000421301 USD
- Other vehicle parts; at manufacturer: 0.000377801 USD
- Performances: 1.6183e-5 USD
- Insurance carriers: 0.00459984 USD
- Advertising and public relations: 0.00125094 USD
- Petrochemicals; at manufacturer: 0.00055119 USD
- Electricity; at consumer: 0.00195923 USD
- Commercial equipment rental: 0.0197991 USD
- Gasoline, fuels, and by-products of petroleum refining; at manufacturer: 0.0211751 USD
- Unrefined oil and gas; at extraction site: 5.33159e-5 USD
- Fabric; at manufacturer: 1.06807e-7 USD
- Waste management and remediation: 0.00080272 USD
- Nondepository credit intermediation and related activities: 0.00106757 USD
- Copper, nickel, lead, and zinc; at mine: 6.36916e-6 USD
- Fluid meters and counting devices; at manufacturer: 2.13614e-7 USD
- Nonresidential building repair and maintanence: 0.00758962 USD
- Other plastic products; at manufacturer: 0.00207615 USD
- Cardboard containers; at manufacturer: 8.28037e-5 USD
- Air transport: 0.00162146 USD
- Scenic and sightseeing transportation and support activities for transportation: 3.65955e-5 USD
- Electronic capacitors, resistors, coils, transformers, connectors and other components (except semiconductors and printed circuit assemblies); at manufacturer: 1.62062e-5 USD
- Construction machinery; at manufacturer: 0.0043953 USD
- Magazines and journals; at publisher: 3.87475e-9 USD
- Data processing and hosting: 8.14628e-5 USD
- Screws, nuts, and bolts; at manufacturer: 0.000282184 USD
- Securities and commodities brokerage and exchanges: 0.000556591 USD
- Radio and television: 2.13614e-8 USD
- Paper bags and coated paper; at manufacturer: 9.942e-5 USD
- General merchandise stores: 4.46602e-8 USD
- Sports: 6.473e-5 USD
- Wireless telecommunications: 0.000990304 USD
- Air conditioning, refrigeration, and warm air heating equipment; at manufacturer: 2.90606e-9 USD
- Synthetic dyes and pigments; at manufacturer: 6.58707e-8 USD
- Specialized design: 0.000259869 USD
- Software: 1.6182e-5 USD
- Natural gas; at consumer: 0.00156609 USD
- Other basic organic chemicals; at manufacturer: 0.00263724 USD
- Primary iron, steel, and ferroalloy products; at manufacturer: 0.00366492 USD
- Office administration: 0.000113573 USD
- Computer systems design: 0.000195242 USD
- Pumps and pumping equipment; at manufacturer: 0.00133573 USD
- Satellite, telecommunications resellers, and all other telecommunications: 0.000211156 USD
- Postal service: 1.9861e-7 USD
- Commercial machinery repair: 6.63901e-5 USD
- Metal windows, doors, and architectural products; at manufacturer: 0.0025906 USD
- Ready-mix concrete; at manufacturer: 5.39395e-7 USD
- Household goods repair: 3.69573e-5 USD
- Passenger ground transport: 0.000372697 USD
- Light fixtures; at manufacturer: 0.000292852 USD
- Other basic inorganic chemicals; at manufacturer: 0.000249775 USD
- Other support activities for mining: 0.00408819 USD
- Insurance agencies and brokerages: 0.000215446 USD
- Lessors of nonfinancial intangible assets: 0.00543096 USD
- Chemicals (except basic chemicals, agrichemicals, polymers, paints, pharmaceuticals,soaps, cleaning compounds); at manufacturer: 0.00859406 USD
- Rail transport: 0.000701266 USD
- Other support services: 0.000229827 USD
- Other computer related services, including facilities management: 9.75923e-5 USD
- Clay and ceramic products; at manufacturer: 6.68394e-8 USD
- Wooden windows, door, and flooring; at manufacturer: 6.50503e-5 USD
- Environmental and other technical consulting services: 0.000148903 USD
- Golf courses, marinas, ski resorts, fitness and other rec centers and industries: 0.000194433 USD
- Tobacco, cotton, sugarcane, peanuts, sugar beets, herbs and spices, and other crops; at farm: 0.00013094 USD
- Civic, social, professional, and similar organizations: 0.000406905 USD
- Promoters and agents: 2.90606e-9 USD
- Telecommunications: 0.00318454 USD
- Valve and fittings (except for plumbing); at manufacturer: 0.000244218 USD
- Books, newspapers, magazines, and other print media; at manufacturer: 1.28169e-7 USD
- Secondary steel products; at manufacturer: 0.000149297 USD
- News syndicates, libraries, archives, Internet publishing and all other information services: 4.87385e-5 USD
- Hotels and campgrounds: 0.000777805 USD
- Vehicle rental and leasing: 0.00112194 USD
- Cement; at manufacturer: 0.00235822 USD
- Lime and gypsum products; at manufacturer: 1.12203e-6 USD
- Marketing research and all other miscellaneous professional, scientific, and technical services: 0.000505474 USD
- Vehicle electrical and electronic equipment; at manufacturer: 6.62292e-5 USD
- Investigation and security: 0.000342824 USD
- Plastic pipe, fittings, and sausage casings; at manufacturer: 9.76408e-5 USD
- Consumer goods and general rental centers: 8.71819e-9 USD
- Warehousing: 4.77314e-6 USD
- All other food and drinking places: 6.4731e-5 USD
- Wireless communications; at manufacturer: 1.6181e-5 USD
- Travel arrangement and reservation: 0.000762613 USD
- Metal pipe fittings, ball and roller bearings, industrial patterns, metal bath fixtures, other misc. fabricated metals; at manufacturer: 0.000276879 USD
- Other nonmetallic mineral products; at manufacturer: 6.10273e-8 USD
- Communications equipment; at manufacturer: 1.6182e-5 USD
- Motor vehicle steering, suspension components (except spring), and brake systems; at manufacturer: 0.000311775 USD
- Watches, clocks, and other measuring and controlling devices; at manufacturer: 0.00319604 USD
- Investment advice, portfolio management, and other financial advising services: 0.0184648 USD
- Paints and coatings; at manufacturer: 0.000502205 USD
- Railroad rolling stock; at manufacturer: 3.20421e-7 USD
- Other petroleum and coal products; at manufacturer: 0.00512112 USD
- Computer terminals and other computer peripheral equipment; at manufacturer: 0.000146642 USD
- Rubber tires; at manufacturer: 0.000114397 USD
- Vehicles and parts sales: 0.000163687 USD
- Scientific research and development: 3.87475e-9 USD
- Gaskets, seals, musical instruments, fasteners, brooms, brushes, mop and other misc. goods; at manufacturer: 8.20627e-5 USD
- Other rubber products; at manufacturer: 1.80416e-6 USD
- Fertilizers; at manufacturer: 1.9541e-7 USD
- Timber and raw forest products; at forest: 1.28169e-6 USD
- Architectural, engineering, and related services: 0.0275945 USD
- Sand, gravel, clay, phosphate, other nonmetallic minerals; at mine: 0.000254603 USD
- Plastic bags, films, and sheets; at manufacturer: 4.05867e-7 USD
- Truck transport: 0.00419411 USD
- Water transport (boats, ships, ferries): 0.000428811 USD
- Transmission and power train parts; at manufacturer: 0.000312837 USD
- Other retail: 1.83164e-5 USD
- Coal; at mine: 0.000339905 USD
- Cutlery and handtools; at manufacturer: 3.06809e-7 USD
- Drinking water and wastewater treatment; at consumer: 8.35123e-5 USD
- Buildings and dwellings services: 0.00172604 USD
- Semiconductors; at manufacturer: 1.63708e-7 USD

## Inputs from nature
- Boron: 0.000236538 kg; data quality (1,1,1,1,1)
- Zeolites: 3.88107e-6 kg; data quality (1,1,1,1,1)
- Perlite: 2.73068e-5 kg; data quality (1,1,1,1,1)
- Gypsum: 0.000666019 kg; data quality (1,1,1,1,1)
- Stone: 0.03522 kg; data quality (1,1,1,1,1)
- Sodium carbonate: 0.000708402 kg; data quality (1,1,1,1,1)
- Fluorspar: 6.90238e-6 kg; data quality (1,1,1,1,1)
- Water, fresh: 0.00200427, 0.00195228 m3 (2 entries, compartments not in this file); data quality (4,2,1,4,2)
- Barite: 4.01428e-5 kg; data quality (1,1,1,1,1)
- Occupation, mineral extraction site: 0.000157875 m2*a; data quality (1,3,1,1,1)
- Kyanite: 6.66019e-6 kg; data quality (1,1,1,1,1)
- Pumice: 1.68321e-5 kg; data quality (1,1,1,1,1)
- Sodium chloride: 0.00274279 kg; data quality (1,1,1,1,1)
- Phosphate ore: 0.00153184 kg; data quality (1,1,1,1,1)
- Copper: 3.67991e-5 kg; data quality (1,1,1,1,1)
- Talc: 3.69338e-5 kg; data quality (1,1,1,1,1)
- Lead: 9.53552e-6 kg; data quality (1,1,1,1,1)
- Feldspar: 3.209e-5 kg; data quality (1,1,1,1,1)
- Occupation, urban, discontinuously built: 0.000172694 m2*a; data quality (4,2,1,1,1)
- Kaolin: 0.000382053 kg; data quality (1,1,1,1,1)
- Occupation, industrial area, built up: 8.29408e-9 m2*a; data quality (4,2,1,1,1)
- Clay, bentonite: 0.000290626 kg; data quality (1,1,1,1,1)
- Lithium: 5.2676e-8 kg; data quality (1,1,1,1,1)
- Nickel: 9.66983e-8 kg; data quality (1,1,1,1,1)
- Vermiculite: 6.05472e-6 kg; data quality (1,1,1,1,1)
- Potassium: 4.27236e-5 kg; data quality (1,1,1,1,1)
- Zinc: 2.2348e-5 kg; data quality (1,1,1,1,1)
- Coal: 0.283722 MJ; data quality (1,1,1,1,1)
- Peat: 2.83361e-5 kg; data quality (1,1,1,1,1)
- Mica: 2.78517e-6 kg; data quality (1,1,1,1,1)
- Limestone: 0.000548348 kg; data quality (1,1,1,1,1)
- Diatomite: 5.4553e-5 kg; data quality (1,1,1,1,1)
- Sand and gravel: 0.0285141 kg; data quality (1,1,1,1,1)
- Garnet: 1.94962e-6 kg; data quality (1,1,1,1,1)
- Occupation, industrial area: 2.48823e-8 m2*a; data quality (4,2,1,1,1)
- Water, saline: 0.00528163 m3; data quality (4,2,1,4,2)
- Clay, unspecified: 0.000898338 kg; data quality (1,1,1,1,1)

## Emissions to nature
- AMMONIA: 3.14516e-9 kg; data quality (3,1,1,1,5)
- ethane, 1,2-dibromo-: 4.13975e-10 kg; data quality (2,2,1,1,5)
- Ethane, pentafluoro-, HFC-125: 9.71166e-13 kg; data quality (4,2,1,4,1)
- isophorone: 3.1471e-14 kg; data quality (2,2,1,1,3)
- naphthalene: 1.95052e-8 kg; data quality (3,2,1,1,5)
- phthalate, dioctyl-: 8.16153e-11 kg; data quality (3,2,1,1,1)
- benzene, chloro-: 4.23134e-11 kg; data quality (4,2,1,1,5)
- nickel: 6.76273e-14 kg; data quality (4,1,1,1,3)
- 2-methylnaphthalene: 4.88094e-11 kg; data quality (2,2,1,1,5)
- ammonia: 3.35422e-7 kg; data quality (3,2,1,1,5)
- PHOSPHORUS: 5.15813e-10 kg; data quality (2,2,1,1,5)
- bromoform: 1.6795e-15 kg; data quality (3,2,1,1,4)
- manganese: 6.76273e-14 kg; data quality (4,1,1,1,3)
- acrylonitrile: 3.43432e-11 kg; data quality (4,2,1,1,1)
- Sulfuric acid: 8.3921e-9 kg; data quality (2,1,1,1,3)
- lead: 7.45578e-10, 4.79833e-15 kg (2 entries, compartments not in this file); data quality (3,1,1,1,5)
- p-cresol: 2.1365e-13 kg; data quality (4,2,1,1,3)
- ethyl acrylate: 4.82277e-12 kg; data quality (4,2,1,1,3)
- carbon tetrachloride: 5.08095e-11 kg; data quality (4,2,1,1,5)
- pyrene: 1.41329e-11 kg; data quality (2,2,1,2,4)
- propanal: 1.92398e-8 kg; data quality (3,2,1,4,1)
- Triethyl amine: 6.50615e-14 kg; data quality (4,2,1,1,3)
- m-xylene: 1.29575e-12 kg; data quality (3,2,1,1,3)
- fluorene: 1.21039e-10 kg; data quality (3,2,1,3,2)
- vinyl acetate: 8.28363e-11 kg; data quality (4,2,1,1,3)
- ETHENE: 4.29765e-10 kg; data quality (3,1,1,1,5)
- Dimethyl sulfate: 2.07138e-15 kg; data quality (2,2,1,1,4)
- Ethylene glycol: 9.60647e-9 kg; data quality (5,1,1,1,5)
- chromium: 3.46319e-12, 7.30443e-10 kg (2 entries, compartments not in this file); data quality (4,1,1,1,3)
- acetaldehyde: 1.81594e-6 kg; data quality (3,2,1,1,5)
- Methane: 4.15729e-5 kg; data quality (2,1,1,1,1)
- methylene diphenyl diisocyanate: 4.624e-12 kg; data quality (4,2,1,1,1)
- 2-chloro-1-phenylethanone: 3.02309e-16 kg; data quality (2,2,1,1,4)
- Asbestos: 3.11639e-14 kg; data quality (5,2,1,1,1)
- lead: 5.39185e-10 kg; data quality (3,2,1,1,3)
- methane, dichloro-, hcc-30: 6.7151e-9 kg; data quality (4,2,1,1,3)
- hydrogen chloride: 1.07793e-8 kg; data quality (2,2,1,1,3)
- beryllium: 1.99647e-11 kg; data quality (2,2,1,1,5)
- Carbon dioxide: 0.116804 kg; data quality (4,2,1,4,1)
- 1,4-BENZOQUINONE: 1.21723e-11 kg; data quality (3,2,1,1,2)
- 3-methylcholanthrene: 6.49109e-16 kg; data quality (2,2,1,1,5)
- chloroform: 4.348e-11 kg; data quality (4,2,1,1,5)
- biphenyl: 2.76152e-8 kg; data quality (4,2,1,1,5)
- dimethyl formamide: 9.42309e-13 kg; data quality (4,2,1,1,3)
- methane, monochloro-, r-40: 9.8085e-13 kg; data quality (3,2,1,1,1)
- m-cresol: 3.52573e-13 kg; data quality (4,2,1,1,3)
- Benzo(k)fluoranthene: 7.80861e-12 kg; data quality (2,2,1,1,5)
- acrolein: 1.04227e-6 kg; data quality (2,2,1,1,5)
- ethylene glycol: 6.49541e-12 kg; data quality (5,2,1,1,3)
- benz[a]anthracene: 8.76322e-12 kg; data quality (2,2,1,1,5)
- selenium: 1.42152e-11 kg; data quality (2,2,1,1,2)
- carbon monoxide: 0.000103907 kg; data quality (2,2,1,1,5)
- hydrogen fluoride: 7.47429e-10 kg; data quality (2,2,1,1,1)
- Phthalate, dibutyl-: 6.07103e-13 kg; data quality (4,2,1,1,2)
- mercury: 1.61137e-11 kg; data quality (2,2,1,1,4)
- hydrogen sulfide: 1.43384e-6 kg; data quality (3,2,1,1,5)
- Cresol: 3.38137e-12, 3.38571e-12 kg (2 entries, compartments not in this file); data quality (2,1,1,1,3)
- Ethane, 1,1,1,2-tetrafluoro-, HFC-134a: 3.66045e-12 kg; data quality (4,2,1,4,1)
- Methyl iodide: 9.55104e-14 kg; data quality (4,2,1,1,1)
- Nickel, ion: 3.35899e-15 kg; data quality (3,2,1,1,4)
- methanol: 7.28518e-7 kg; data quality (4,2,1,1,5)
- methyl isobutyl ketone: 1.34244e-9 kg; data quality (4,2,1,1,1)
- ethane, 1,1,2-trichloro-: 4.40213e-11 kg; data quality (4,2,1,1,5)
- Chromium, ion: 8.06301e-11 kg; data quality (2,2,1,1,2)
- cadmium: 1.59198e-10 kg; data quality (3,2,1,1,5)
- phenol: 1.61532e-8 kg; data quality (4,2,1,1,3)
- phenanthrene: 2.84815e-10 kg; data quality (3,2,1,4,1)
- mercury: 6.02066e-19, 9.17545e-12 kg (2 entries, compartments not in this file); data quality (3,1,1,1,5)
- 1,1,2,2-tetrachloroethane: 3.72988e-10 kg; data quality (3,2,1,1,5)
- Cobalt: 3.3825e-11 kg; data quality (3,2,1,1,3)
- cumene: 3.85671e-9 kg; data quality (4,2,1,1,5)
- nitrogen oxides: 0.000124525 kg; data quality (2,2,1,1,5)
- hexane: 8.11274e-7 kg; data quality (3,2,1,1,5)
- ethene, tetrachloro-: 3.93765e-10 kg; data quality (3,2,1,1,5)
- antimony: 8.94015e-12 kg; data quality (3,2,1,1,3)
- chlorine: 2.21994e-11 kg; data quality (4,2,1,1,3)
- Chromium VI: 2.62009e-11 kg; data quality (3,2,1,1,3)
- styrene: 2.3476e-7 kg; data quality (4,2,1,1,5)
- 2,4-Diaminotoluene: 1.69354e-9 kg; data quality (2,2,1,1,5)
- 1,2,4-trimethylbenzene: 5.31142e-10 kg; data quality (5,1,1,1,5)
- 1,4-dichlorobenzene: 8.15988e-14 kg; data quality (2,2,1,1,2)
- benzene: 6.9628e-7 kg; data quality (3,2,1,1,5)
- MOLYBDENUM(VI): 2.43458e-10 kg; data quality (3,1,1,1,3)
- Xylene: 8.65272e-7 kg; data quality (4,2,1,1,5)
- particulates, < 10 um: 1.17562e-5 kg; data quality (3,2,1,1,3)
- Zinc: 1.80822e-10 kg; data quality (5,1,1,1,3)
- sulfur dioxide: 2.1239e-5 kg; data quality (2,2,1,1,5)
- acetophenone: 1.92285e-11 kg; data quality (4,2,1,1,1)
- Water, saline: 0.00463749 m3; data quality (4,2,1,1,2)
- Chrysene: 1.07598e-11 kg; data quality (2,2,1,2,4)
- trichloroethylene: 4.22729e-13 kg; data quality (4,2,1,1,1)
- dibenzofuran: 3.03089e-10 kg; data quality (4,2,1,1,1)
- monochloroethane: 2.89513e-10 kg; data quality (3,2,1,1,5)
- acetonitrile: 1.05555e-12 kg; data quality (3,2,1,1,3)
- Propene, 1,3-dichloro-: 3.65473e-11 kg; data quality (3,2,1,1,5)
- Water, fresh: 0.00236554 m3; data quality (4,2,1,1,2)
- aniline: 2.09466e-13 kg; data quality (4,2,1,1,3)
- Dinitrogen monoxide: 4.39588e-7 kg; data quality (4,2,1,4,1)
- ethane, 1,2-dichloro-: 6.73064e-11 kg; data quality (3,2,1,1,5)
- copper: 1.02794e-10 kg; data quality (4,1,1,1,3)
- o-toluidine: 2.09466e-13 kg; data quality (4,2,1,1,3)
- hexachloro-1,3-butadiene: 1.72678e-14 kg; data quality (4,2,1,1,1)
- propylene oxide: 1.21881e-9 kg; data quality (3,2,1,1,5)
- ammonia: 1.08666e-9 kg; data quality (3,1,1,1,5)
- 1,1,1-trichloroethane: 1.96707e-12 kg; data quality (4,2,1,1,1)
- Hydrazine, methyl-: 7.3338e-15 kg; data quality (2,2,1,1,4)
- polychlorinated biphenyls: 5.60959e-13 kg; data quality (3,2,1,1,1)
- Ethene, chloro-: 2.30193e-9 kg; data quality (3,2,1,1,5)
- Dibenz(a,h)anthracene: 7.48246e-12 kg; data quality (2,2,1,1,5)
- methane, bromo-, halon 1001: 8.9697e-13 kg; data quality (3,2,1,1,1)
- Cadmium: 2.12485e-11 kg; data quality (3,1,1,1,3)
- acenaphthylene: 9.71007e-11 kg; data quality (3,2,1,4,2)
- Indeno(1,2,3-cd)pyrene: 7.55761e-12 kg; data quality (2,2,1,1,5)
- nickel: 2.22525e-9 kg; data quality (3,2,1,1,5)
- toluene: 9.19668e-7 kg; data quality (4,2,1,1,5)
- arsenic: 1.90723e-10 kg; data quality (3,2,1,2,4)
- acenaphthene: 1.06348e-10 kg; data quality (3,2,1,4,1)
- Benzo(b)fluoranthene: 8.32358e-12 kg; data quality (2,2,1,1,5)
- ethylbenzene: 2.37269e-10 kg; data quality (4,1,1,1,5)
- Methane, difluoro-, HFC-32: 5.65562e-13 kg; data quality (4,2,1,4,1)
- benzyl chloride: 3.81784e-14 kg; data quality (2,2,1,1,3)
- 2,2,4-trimethylpentane: 1.88723e-7 kg; data quality (3,2,1,1,5)
- carbon disulfide: 2.30707e-10 kg; data quality (4,2,1,1,1)
- Nitrogen: 3.73023e-7 kg; data quality (5,2,1,1,5)
- t-butyl methyl ether: 3.24798e-12 kg; data quality (3,2,1,1,1)
- anthracene: 8.51991e-12 kg; data quality (3,2,1,1,5)
- butanol: 2.14987e-12 kg; data quality (5,1,1,1,5)
- particulates, < 2.5 um: 7.67431e-6 kg; data quality (3,2,1,2,4)
- Benzo(a)anthracene: 1.99896e-14 kg; data quality (2,2,1,1,2)
- Nitrobenzene: 4.80387e-13 kg; data quality (4,2,1,1,3)
- formaldehyde: 5.10157e-6 kg; data quality (2,2,1,1,5)
- carbonyl sulfide: 3.64316e-5 kg; data quality (4,2,1,1,5)
- Propane, 1,1,1,3,3,3-hexafluoro-, HCFC-236fa: 1.12254e-14 kg; data quality (4,2,1,4,1)
- para-xylene: 5.92745e-15 kg; data quality (3,2,1,4,1)
- Propene: 2.20188e-11 kg; data quality (3,1,1,1,5)
- benzene, ethyl-: 1.61814e-7 kg; data quality (4,2,1,1,5)
- methyl methacrylate: 2.56148e-12 kg; data quality (4,2,1,1,3)
- VOC, volatile organic compounds: 5.09644e-5 kg; data quality (3,2,1,1,5)
- Hydrocarbons, aromatic: 1.6117e-9 kg; data quality (4,2,1,1,5)
- Propane, 1,2-dichloro-: 3.78612e-11 kg; data quality (4,2,1,1,5)
- o-Xylene: 1.88461e-13 kg; data quality (3,2,1,2,1)
- HYDROCHLORIC ACID: 4.65515e-12 kg; data quality (2,1,1,1,5)
- cyanide: 1.35285e-13 kg; data quality (3,2,1,1,4)
- Ethane, 1,1,1-trifluoro-, HFC-143a: 4.15522e-13 kg; data quality (4,2,1,4,1)
- benzo(a)pyrene: 8.58136e-12 kg; data quality (2,2,1,1,5)
- butadiene: 6.46572e-8 kg; data quality (2,2,1,1,4)
- manganese: 3.35814e-10 kg; data quality (3,2,1,1,1)
- Benzo(g,h,i)perylene: 8.23674e-12 kg; data quality (3,2,1,1,5)
- Phosphorus: 6.0343e-8 kg; data quality (3,1,1,1,5)
- fluoranthene: 2.92562e-11 kg; data quality (3,2,1,3,3)

## Inventory method
Input-output

## Modelling constants
The reference unit of all processes is 1 USD2013 of the good or service. The technosphere inputs are based on the US BEA detailed input-output tables for 2007. The IO tables are combined to develop a commodity-by-commodity model based on the the industry-technology assumption (see Suh et al., 2010), which assumes all commodities produced by a given industry have the same input structure, but that multiple industries can produce the same commodity. Thus, model technosphere flows represent commodity outputs (and not industry outputs) from other processes in the model. There are no by-products included in these processes. All commodity production is based on US-conditions, despite in reality that some goods and services are produced overseas, as USEEIO v1.1 is a single-region IO model.

## Completeness
The input-output approach assures that all purchased inputs associated with the sectors making these commodities as reported in the US census for 2007 are included. The direct resources extracted including minerals, energy sources, water and land occupied are included. Emissions to air include all critieria air pollutants, greenhouse gases, and hazardous and toxic air pollutants as defined by US EPA. Releases to water include toxics, total nitrogen and total phosphorus, and water discharges. Releases to soil or groundwater include toxics and agriculutural pesticides. Some metal releases to air, water and soil are not included because they could not be speciated. Solid hazardous and non-hazardous wastes generated are not included as an elementary flows although purchases of waste services are included.

## Data treatment
Greenhouse gases are primarily from the US Greenhouse Gas Emission Inventory (USEPA 2016a). Biogenic C uptake is not included (change from version 1.0), as biogenic C emission are not included. Toxic releases to air, water and soil (except pesticides) are from the 2013 Toxic Release Inventory (USEPA 2015a). Criteria air pollutants and hazardous air pollutants are from the 2011 National Emissions Inventory (USEPA 2015b). All estimates are normalized by industry based on sector output in the data year, then converted to 2013 USD using relative sector-specific CPIs (if data year is not 2013). Energy use represent raw renewables or fossil fuel energies and is based on EIA data for 2014. See Table 1 in Yang, Ingwersen et al. 2017 and Supporting Information 1, and the v1.1 data update notes (Ingwersen et al. 2017) for all details on environmental data sources used.

## Data collection
2015-2016

## Sampling procedure
US federal government sources, including surveys and US EPA emissions databases are used as the primary sources. From these sources, data for US reporting establishments/facilities are aggregated by the NAICS sector as defined in the BEA detailed 2007 input-output tables. When level of sector aggregation differs, or when direct emissions are not reported but modeled, additional sources are used to make allocations and estimates.

## Review details
In regard to quality assurance and peer-review, each dataset created went through Quality Assurance as defined in a quality assurance project plans at US EPA, CSRA or ERG. The model was assembled with the IO model builder model (USEPA 2016c). Validation functions were used to check that all the model components were properly assembled and harmonized. Bayou Demeke and Santosh Ghimire provided internal peer review of the model methodology and the manuscript underwent standard EPA management review. An editor and two anonymous reviewers at the Journal of Cleaner Production reviewed the model. In regard to data quality evaluation, data quality assessment was performed at the flow and process levels according to the updated US EPA data quality assessment guidelines as defined in US EPA (2016b).

## Intended application
The primary application is for use in the US Environmentally-Extended Input-Ouput model, USEEIO, version 1.1. This model is being used by the US EPA for supporting tools that prioritize goods and services based on potential environmental impacts, resource use or emissions for large regions, including the US and US states, and as a strealined tool for organizations as a starting point to consider sustainable materials management. Model results are designed to provide meso/macro-level decision support.

## Project
USEEIO v1.1 was developed by the US EPA with CSRA and ERG with Wesley W. Ingwersen and David E. Meyer as research leads. Yi Yang was the technical lead on the work for CSRA (contract EP-C-15-012); Troy Hawkins was lead for ERG (contract EP-C-12-021).

## Sources
- USDA 2006
- Torcellini et al. 2003
- USEPA 2015b
- Ingwersen et al. DRAFT
- USEPA 2016c
- EIA 2016
- Yienger et al. 1995
- Lovelace 2009
- Blackhurst et al. 2010
- Statistics Canada 2010
- Edelen and Ingwersen 2017
- USDA 2009b
- USEPA 2016a
- BLM 2008
- EIA 2017
- BEA 2015
- Goebes et al. 2003
- USDA 2016
- USEPA 2016b
- USDA 2014
- Kim et el. 2013
- USDA 2009a
- USGS 2016
- USGS 2015
- EIA 2013
- USEPA 2015a
- Maupin et al. 2014
- Macknick et al. 2011
- Ingwersen et al. 2017
- EIA 2015
- Nickerson et al. 2011
