# Rest of the world adjustment

Dataset: openLCA process, unit process
Category: Other Activities
Geography: United States
Time period: 2017-01-01 to 2017-12-31
Data quality: US EPA - Process Pedigree Matrix (1;1)
Exchange data quality scheme: US EPA - Flow Pedigree Matrix
Generated by: US EPA with CSRA and ERG
Owner: US EPA
Published in: Yang, Ingwersen et al. 2017
restrictionsDescription: This model shold be appropriately cited (see Yang, Ingwersen et al. 2017 source or Publication field) when used. Any changes or derivations of this model by the user should be documented. The model itself and any results from use of this model shall not be construed to consitute US EPA opinion or policy.
copyright: false

## General comment
BEA Code & Name is 'S00900:Rest of the world adjustment'. We DO NOT recommend this be used for individual analysis - this is only used for model completeness.

## Technology
The process describes the average US production of this good or service within this NAICS-based grouping defined in the BEA 2007 detailed input-output tables (BEA 2015). Distribution, wholesale and retailing of this good or service, use, and final disposal are not included. Creation of a product system with this process will enable modeling of all upstream (supply-chain) activities.

## Geography
Data represent the 50 US states

## Time period
2017 was the year in which this version of USEEIO was released and is the target date for the model

## Reference product
- Rest of the world adjustment: 1 USD

## Inputs from technosphere
All rows: data quality (1,3,1,1,1)
- Noncomparable imports: 0.01133 USD
- Rail transport: 0.000992512 USD
- Vaccines and other biological medical products; at manufacturer: 0.000926831 USD
- Soap and cleaning compounds; at manufacturer: 0.00055099 USD
- Vehicle seating and interior trim (upholstery); at manufacturer: 3.64894e-6 USD
- Golf courses, marinas, ski resorts, fitness and other rec centers and industries: 1.45958e-5 USD
- Metal coatings, engravings, and heat treatments; at manufacturer: 1.82447e-5 USD
- Electronic equipment repair and maintenance: 0.000824661 USD
- Welding and Soldering Equipment, Scales and Balances, and other general purpose machinery; at manufacturer: 7.29789e-6 USD
- Ball and roller bearings; at manufacturer: 3.64894e-6 USD
- Dentists: 0.00010217 USD
- Light bulbs; at manufacturer: 0.000974268 USD
- Drinking water and wastewater treatment; at consumer: 0.000842906 USD
- Lime and gypsum products; at manufacturer: 6.2032e-5 USD
- Movies and film: 9.48725e-5 USD
- Vehicle electrical and electronic equipment; at manufacturer: 5.83831e-5 USD
- Other basic inorganic chemicals; at manufacturer: 0.000142309 USD
- Power boilers and heat exchangers; at manufacturer: 0.000193394 USD
- News syndicates, libraries, archives, Internet publishing and all other information services: 8.39257e-5 USD
- Directory, mailing list, and other publishers; at publisher: 0.000259075 USD
- Vehicle repair: 0.00027732 USD
- Other textiles; at manufacturer: 0.000189745 USD
- Management consulting: 0.000682352 USD
- Surgical appliance and supplies; at manufacturer: 0.00048166 USD
- Residential building repair and maintanence: 0.00189015 USD
- Couriers and messengers: 3.64894e-6 USD
- Natural gas; at consumer: 0.00126983 USD
- Books, newspapers, magazines, and other print media; at manufacturer: 0.00556829 USD
- Satellite, telecommunications resellers, and all other telecommunications: 0.000419628 USD
- Primary copper; at manufacturer: 0.000186096 USD
- Computer systems design: 0.0518916 USD
- Propulsion units and parts for space vehicles and guided missiles; at manufacturer: 0.000740735 USD
- Environmental and other technical consulting services: 0.00099981 USD
- Fabric; at manufacturer: 0.000142309 USD
- Books; at publisher: 0.000124064 USD
- Specialty transformers; at manufacturer: 0.000149607 USD
- Scenic and sightseeing transportation and support activities for transportation: 2.55426e-5 USD
- Petrochemicals; at manufacturer: 4.74363e-5 USD
- Paints and coatings; at manufacturer: 2.91915e-5 USD
- Air conditioning, refrigeration, and warm air heating equipment; at manufacturer: 0.000131362 USD
- Fluid milk and butter; at manufacturer: -0.00125159 USD
- Healthcare practitioners (except physicians and dentists): 3.64894e-6 USD
- Watches, clocks, and other measuring and controlling devices; at manufacturer: 0.000744384 USD
- Hydraulic pumps, motors, cylinders and actuators; at manufacturer: 2.18937e-5 USD
- Buildings and dwellings services: 0.00089764 USD
- Dog and cat food; at manufacturer: 7.29789e-6 USD
- Motors and generators; at manufacturer: 0.000135011 USD
- Outpatient healthcare: 0.000941427 USD
- Sand, gravel, clay, phosphate, other nonmetallic minerals; at mine: 9.48725e-5 USD
- Carpets and rugs; at manufacturer: 3.28405e-5 USD
- Other real estate: 0.0224155 USD
- other miscellaneous electrical equipment and components; at manufacturer: 0.000503554 USD
- Nursing and community care facilities: 0.00504284 USD
- Aluminum; at manufacturer: 5.47341e-5 USD
- Air transport: 0.00594413 USD
- Glass and glass products; at manufacturer: 0.000780874 USD
- Wireless communications; at manufacturer: 0.000470714 USD
- Aluminum products; at manufacturer: 3.64894e-6 USD
- Lumber and treated lumber; at manufacturer: 7.29789e-5 USD
- Nonresidential building repair and maintanence: 0.00503554 USD
- Data processing and hosting: 0.0241706 USD
- Screws, nuts, and bolts; at manufacturer: 1.45958e-5 USD
- Water transport (boats, ships, ferries): 0.000186096 USD
- Other educational services: 0.000394086 USD
- Synthetic dyes and pigments; at manufacturer: 5.83831e-5 USD
- Other retail: 3.28405e-5 USD
- Radio and television: 1.09468e-5 USD
- Other plastic products; at manufacturer: 0.000605724 USD
- Waste management and remediation: 0.000401384 USD
- Household goods repair: 6.5681e-5 USD
- Dolls, toys, and games; at manufacturer: 5.47341e-5 USD
- Paper bags and coated paper; at manufacturer: 0.000135011 USD
- Sporting and athletic goods; at manufacturer: 1.09468e-5 USD
- Clothing; at manufacturer: 1.45958e-5 USD
- Wholesale trade: 0.005696 USD
- Other computer related services, including facilities management: 0.00254696 USD
- Chemicals (except basic chemicals, agrichemicals, polymers, paints, pharmaceuticals,soaps, cleaning compounds); at manufacturer: 0.00220031 USD
- Nondepository credit intermediation and related activities: 7.29789e-6 USD
- Monetary authorities and depository credit intermediation: 0.000135011 USD
- Plastic bags, films, and sheets; at manufacturer: 0.000299213 USD
- Paper; at manufacturer: 0.000357596 USD
- Stationery; at manufacturer: 0.00338622 USD
- Sanitary paper (tissues, napkins, diapers, etc.); at manufacturer: 0.000762629 USD
- Gasoline, fuels, and by-products of petroleum refining; at manufacturer: 0.00783428 USD
- Limited-service restaurants: 0.000456118 USD
- Ammunition, arms, ordnance, and related accessories; at manufacturer: 4.01384e-5 USD
- Audio and video equipment; at manufacturer: 0.00161648 USD
- Pharmaceutical products (pills, powders, solutions, etc.); at manufacturer: 6.5681e-5 USD
- Metal hinges, keys, lock, and other hardware; at manufacturer: 1.82447e-5 USD
- Medical laboratories: 3.64894e-6 USD
- Surgical and medical instruments; at manufacturer: 0.000175149 USD
- Truck transport: 0.00167486 USD
- Nonferrous metal casts; at manufacturer: 3.28405e-5 USD
- Cardboard containers; at manufacturer: 0.000459767 USD
- Metal structural products; at manufacturer: 0.000353947 USD
- Independent artists, writers, and performers: 0.000226234 USD
- Vehicle rental and leasing: 0.000222585 USD
- Seasonings and dressings; at manufacturer: 0.000105819 USD
- Electronic capacitors, resistors, coils, transformers, connectors and other components (except semiconductors and printed circuit assemblies); at manufacturer: 0.000883044 USD
- Pipeline transport: 5.10852e-5 USD
- Secondary copper products; at manufacturer: 0.000178798 USD
- Plastics; at manufacturer: 3.64894e-6 USD
- Industrial process variable instruments; at manufacturer: 4.37873e-5 USD
- Leather; at manufacturer: 1.09468e-5 USD
- Pesticides; at manufacturer: 5.10852e-5 USD
- Plywood and veneer; at manufacturer: 3.64894e-6 USD
- Travel arrangement and reservation: 0.00209814 USD
- Advertising and public relations: 0.00572154 USD
- Printing support; at manufacturer: 5.83831e-5 USD
- Electromedical appartuses; at manufacturer: 0.00024083 USD
- Fresh wheat, corn, rice, and other grains; at farm: -0.00233532 USD
- Wooden windows, door, and flooring; at manufacturer: 3.64894e-6 USD
- Other basic organic chemicals; at manufacturer: 0.000671405 USD
- State and local government enterprises: 0.000923182 USD
- Investigation and security: 0.00116766 USD
- Commercial machinery repair: 0.000189745 USD
- Jewelry and silverware; at manufacturer: 3.64894e-6 USD
- Other rubber products; at manufacturer: 0.000375841 USD
- Postal service: 0.000711544 USD
- Urethane and other foam products; at manufacturer: 3.64894e-6 USD
- Hotels and campgrounds: 0.00178068 USD
- Dry-cleaning and laundry: 0.000135011 USD
- All other food and drinking places: 9.85214e-5 USD
- Architectural, engineering, and related services: 0.0633894 USD
- Industrial process furnaces and ovens; at manufacturer: 6.5681e-5 USD
- Passenger ground transport: 1.45958e-5 USD
- Finished and coated fabric; at manufacturer: 1.45958e-5 USD
- Springs and wires; at manufacturer: 3.64894e-6 USD
- All other forging, stamping, and sintering; at manufacturer: 2.18937e-5 USD
- Newspapers; at publisher: 4.01384e-5 USD
- Relay and industrial controls; at manufacturer: 0.000937778 USD
- All other converted paper products; at manufacturer: 4.37873e-5 USD
- Wireless telecommunications: 0.00415979 USD
- Veneer, plywood, and engineered wood; at manufacturer: 3.28405e-5 USD
- Clay and ceramic products; at manufacturer: 3.64894e-6 USD
- Business support: 0.000343001 USD
- Commercial equipment rental: 8.02767e-5 USD
- Curtains and linens; at manufacturer: 0.000131362 USD
- Metal windows, doors, and architectural products; at manufacturer: 0.000120415 USD
- Telecommunications: 0.00348474 USD
- Other residential structures: 0.00139754 USD
- Office supplies (not paper); at manufacturer: 0.000412331 USD
- Employment services: 9.85214e-5 USD
- General merchandise stores: 3.64894e-6 USD
- Software: 0.00184636 USD
- Communication and energy wire and cable; at manufacturer: 3.64894e-6 USD
- Magazines and journals; at publisher: 0.000145958 USD
- Fresh soybeans, canola, flaxseeds, and other oilseeds; at farm: -0.00181352 USD
- Specialized design: 3.64894e-6 USD
- Compressed Gases; at manufacturer: 7.66278e-5 USD
- Computer terminals and other computer peripheral equipment; at manufacturer: 0.000164202 USD
- Wiring devices; at manufacturer: 0.000478011 USD
- Coal; at mine: 0.0019084 USD
- Lids, jars, bottle caps, other metal closures and crowns; at manufacturer: 0.000244479 USD
- Computer storage device readers; at manufacturer: 2.91915e-5 USD
- Transmission and power train parts; at manufacturer: 7.29789e-6 USD
- Abrasive products; at manufacturer: 9.12236e-5 USD
- Heating equipment other than warm air furnaces; at manufacturer: 7.29789e-6 USD
- Community food, housing, and other relief services, including rehabilitation services: 4.37873e-5 USD
- Other secondary nonferrous metal products; at manufacturer: 0.000116766 USD
- Other support services: 0.000671405 USD
- Tobacco, cotton, sugarcane, peanuts, sugar beets, herbs and spices, and other crops; at farm: -0.00157999 USD
- Rubber tires; at manufacturer: 0.000244479 USD
- Polystyrene foam products; at manufacturer: 7.29789e-6 USD
- Electricity; at consumer: 0.000529097 USD
- Facilities support: 0.00621415 USD
- Valve and fittings (except for plumbing); at manufacturer: 3.64894e-6 USD
- Full-service restaurants: 0.000215288 USD
- Secondary steel products; at manufacturer: 3.64894e-5 USD
- Ground or treated minerals and earth; at manufacturer: 7.29789e-6 USD
- External hard drives, CDs, other storage media; at manufacturer: 0.000120415 USD
- Warehousing: 0.000372192 USD
- Semiconductors; at manufacturer: 0.00010217 USD
- Gaskets, seals, musical instruments, fasteners, brooms, brushes, mop and other misc. goods; at manufacturer: 6.2032e-5 USD
- Physicians: 0.000441522 USD
- Insurance carriers: 0.0120853 USD
- Legal services: 0.00207625 USD
- Telephones; at manufacturer: 0.000390437 USD
- Fiber, yarn, and thread; at manufacturer: 1.82447e-5 USD
- Aircraft engines and parts; at manufacturer: 0.000317458 USD
- Office administration: 0.000280969 USD
- Vending, commercial laundry, and other commercial and service industry machinery; at manufacturer: 3.64894e-6 USD
- Cutlery and handtools; at manufacturer: 0.000306511 USD
- Accounting, tax preparation, bookkeeping, and payroll: 8.39257e-5 USD
- Fluid meters and counting devices; at manufacturer: 8.02767e-5 USD
- Switchgear and switchboards; at manufacturer: 0.000109468 USD
- Sound recording: 0.000547341 USD
- Fertilizers; at manufacturer: 0.000189745 USD
- Other vehicle parts; at manufacturer: 0.00010217 USD
- Heavy gauge metal tanks; at manufacturer: 0.00133916 USD

## Inputs from nature
- Water, fresh: 0.000366281, 0.000211649 m3 (2 entries, compartments not in this file); data quality (1,2,1,4,2)
- Occupation, urban, discontinuously built: 0.000346297 m2*a; data quality (4,2,1,1,1)

## Emissions to nature
- Propane, 1,1,1,3,3,3-hexafluoro-, HCFC-236fa: 2.45252e-10 kg; data quality (4,2,1,4,1)
- toluene-2,4-diisocyante: 1.44081e-12 kg; data quality (3,2,1,1,5)
- beryllium: 5.11273e-12 kg; data quality (2,2,1,1,5)
- methylene diphenyl diisocyanate: 8.55001e-10 kg; data quality (4,2,1,1,5)
- t-butyl methyl ether: 3.97392e-9 kg; data quality (3,2,1,1,5)
- cyclohexane: 1.36175e-13 kg; data quality (4,1,1,1,5)
- Diethylene glycol butyl ether: 5.28971e-10 kg; data quality (4,2,1,1,5)
- ethane, 1,1,2-trichloro-: 1.6982e-12 kg; data quality (4,2,1,1,5)
- 3,3'-dimethylbenzidine: 3.16199e-14 kg; data quality (1,2,1,1,5)
- Propene: 6.80876e-12 kg; data quality (3,1,1,1,5)
- carbonyl sulfide: 1.06377e-11 kg; data quality (4,2,1,1,5)
- acetamide: 2.65447e-14 kg; data quality (5,2,1,1,5)
- copper: 2.73896e-9, 2.77604e-10, 5.89944e-7 kg (3 entries, compartments not in this file); data quality (4,1,1,1,5)
- 3-methylcholanthrene: 1.11369e-15 kg; data quality (2,2,1,1,5)
- Chromium VI: 1.61763e-10 kg; data quality (3,2,1,1,5)
- anthracene: 4.39535e-11 kg; data quality (3,2,1,4,1)
- 1,1,1-trichloroethane: 2.72837e-10 kg; data quality (4,2,1,1,5)
- Phosphorus: 6.01639e-7 kg; data quality (2,1,1,1,5)
- selenium: 8.59494e-11 kg; data quality (2,2,1,1,5)
- antimony: 1.22679e-10 kg; data quality (3,2,1,1,5)
- 1,2,4-trichlorobenzene: 1.8013e-12 kg; data quality (4,2,1,1,5)
- Asbestos: 3.28627e-13 kg; data quality (5,2,1,1,5)
- acrylonitrile: 1.45709e-10 kg; data quality (4,2,1,1,5)
- nickel: 7.63621e-10 kg; data quality (3,2,1,1,5)
- benz[a]anthracene: 5.64883e-11 kg; data quality (2,2,1,1,5)
- methyl isobutyl ketone: 7.36009e-9 kg; data quality (4,2,1,1,5)
- m-xylene: 7.72818e-9 kg; data quality (3,2,1,4,1)
- particulates, < 10 um: 9.5124e-7 kg; data quality (3,2,1,1,5)
- 7-OXABICYCLO[2,2,1]HEPTANE-2,3-DICARBOXYLIC ACID, DIPOTASSIUM SALT: 2.18085e-9 kg; data quality (5,1,1,1,5)
- fluoranthene: 7.44861e-11 kg; data quality (3,2,1,3,2)
- ethyl acrylate: 3.05878e-10 kg; data quality (4,2,1,1,5)
- Indeno(1,2,3-cd)pyrene: 5.27042e-12 kg; data quality (3,2,1,4,1)
- manganese: 2.66244e-11, 1.65126e-9 kg (2 entries, compartments not in this file); data quality (4,1,1,1,5)
- 1,4-BENZOQUINONE: 5.94906e-16 kg; data quality (3,2,1,1,5)
- carbon tetrachloride: 1.64301e-10 kg; data quality (4,2,1,1,5)
- ethylene glycol: 4.01561e-9 kg; data quality (5,2,1,1,5)
- 2,4-dinitrophenol: 2.15344e-14 kg; data quality (5,2,1,1,5)
- Urethane: 1.55225e-14 kg; data quality (5,2,1,1,5)
- acetaldehyde: 3.92378e-8 kg; data quality (3,2,1,4,1)
- 1,4-dioxane: 2.21495e-12 kg; data quality (4,2,1,1,5)
- Hydrazine: 5.37264e-12 kg; data quality (4,2,1,1,5)
- acrolein: 3.91753e-9 kg; data quality (3,2,1,3,2)
- Cresol: 1.82857e-11 kg; data quality (4,2,1,1,5)
- NITROGLYCERIN: 1.91601e-8, 7.87855e-9, 5.03892e-9 kg (3 entries, compartments not in this file); data quality (5,1,1,1,5)
- Nitrogen: 6.85796e-7 kg; data quality (4,2,1,1,5)
- methane, bromo-, halon 1001: 2.20012e-10 kg; data quality (3,2,1,1,5)
- dibenzofuran: 3.72788e-12 kg; data quality (4,2,1,1,5)
- Toluene, 2,4-dinitro-: 2.7235e-13 kg; data quality (5,1,1,1,5)
- 1-Methyl-2-pyrrolidinone: 1.40763e-9, 1.05808e-10 kg (2 entries, compartments not in this file); data quality (5,1,1,1,5)
- ethane, 1,2-dichloro-: 2.73123e-10 kg; data quality (3,2,1,1,5)
- styrene: 3.0914e-9 kg; data quality (3,2,1,3,2)
- carbon disulfide: 2.92142e-11 kg; data quality (4,2,1,1,5)
- Ethane, pentafluoro-, HFC-125: 2.1218e-8 kg; data quality (4,2,1,4,1)
- hexachlorobenzene: 6.48111e-12 kg; data quality (3,2,1,1,5)
- cadmium: 3.41148e-11 kg; data quality (3,2,1,1,5)
- Carbon dioxide: 0.00779816 kg; data quality (4,2,1,4,1)
- 2-NITROPROPANE: 6.80876e-13 kg; data quality (5,1,1,1,5)
- BUTYL ISOCYANATE: 1.31176e-10 kg; data quality (4,2,1,1,5)
- phthalate, dioctyl-: 7.54051e-11 kg; data quality (3,2,1,1,5)
- pyrene: 7.40459e-11 kg; data quality (3,2,1,4,1)
- ethylene glycol: 4.42569e-11 kg; data quality (5,1,1,1,5)
- 2-Acetylaminofluorene: 2.65447e-12 kg; data quality (5,2,1,1,5)
- hydrogen fluoride: 3.80042e-9 kg; data quality (2,2,1,1,5)
- hexane: 6.07939e-8 kg; data quality (3,2,1,3,2)
- Dinitrogen monoxide: 2.16933e-8 kg; data quality (4,2,1,4,1)
- formaldehyde: 8.59498e-8 kg; data quality (3,2,1,4,1)
- NITROUS ACID: 1.36175e-13 kg; data quality (5,1,1,1,5)
- 2-methylnaphthalene: 2.24493e-12 kg; data quality (2,2,1,1,5)
- Xylene: 5.03848e-13 kg; data quality (4,1,1,1,5)
- chromium: 2.05829e-9, 1.74863e-11, 2.12771e-12 kg (3 entries, compartments not in this file); data quality (4,1,1,1,5)
- hexachloro-1,3-butadiene: 2.37688e-12 kg; data quality (4,2,1,1,5)
- PHOSPHORUS: 1.51289e-9 kg; data quality (2,2,1,1,5)
- Ethylene glycol monoethyl ether: 1.98336e-11 kg; data quality (4,2,1,1,5)
- butanol: 1.09798e-8 kg; data quality (5,1,1,1,5)
- Chrysene: 1.80488e-11 kg; data quality (2,2,1,2,4)
- Benzo(a)anthracene: 8.72764e-15 kg; data quality (2,2,1,1,5)
- Methane, difluoro-, HFC-32: 1.23564e-8 kg; data quality (4,2,1,4,1)
- NITRIC ACID: 1.01205e-10 kg; data quality (3,1,1,1,5)
- 2-nitropropane: 6.27251e-18 kg; data quality (5,2,1,1,5)
- hydrogen chloride: 4.77576e-8 kg; data quality (2,2,1,1,5)
- Chromium, ion: 3.34641e-10 kg; data quality (2,2,1,1,5)
- Dinitrotoluene, technical grade (2,4 (77%)- and 2,6 (19%)-): 1.36175e-13, 1.27502e-8 kg (2 entries, compartments not in this file); data quality (5,1,1,1,5)
- mercury: 2.03398e-11 kg; data quality (2,2,1,1,5)
- 4-nitrophenol: 1.86642e-14 kg; data quality (2,2,1,1,5)
- formic acid: 4.72528e-11 kg; data quality (3,1,1,1,5)
- acenaphthylene: 2.18954e-10 kg; data quality (3,2,1,4,1)
- para-xylene: 2.1009e-10 kg; data quality (3,2,1,3,2)
- Hydrazine, methyl-: 8.31877e-12 kg; data quality (2,2,1,1,5)
- cyanide: 1.27139e-9 kg; data quality (2,2,1,1,5)
- p-phenylenediamine: 2.65447e-12 kg; data quality (5,2,1,1,5)
- ammonia: 3.47185e-10 kg; data quality (3,1,1,1,5)
- Triethylene glycol: 1.90856e-14 kg; data quality (5,2,1,1,5)
- biphenyl: 4.93947e-11 kg; data quality (4,2,1,1,5)
- 2-ethoxyethyl acetate: 5.1965e-11 kg; data quality (5,2,1,1,5)
- acetonitrile: 3.50832e-11 kg; data quality (3,2,1,1,5)
- benzene: 7.76198e-14 kg; data quality (3,1,1,1,5)
- Hydrocarbons, aromatic: 2.22596e-9 kg; data quality (3,2,1,3,2)
- vinyl acetate: 6.45164e-12 kg; data quality (4,2,1,1,5)
- isophorone: 9.14097e-11 kg; data quality (2,2,1,1,5)
- sulfur dioxide: 2.95371e-6 kg; data quality (2,2,1,1,5)
- chloroform: 5.81184e-10 kg; data quality (4,2,1,1,5)
- Ethene, chloro-: 5.73003e-10 kg; data quality (3,2,1,1,5)
- methyl methacrylate: 3.44486e-12 kg; data quality (4,2,1,1,5)
- cumene: 2.32079e-10 kg; data quality (4,2,1,1,5)
- Dimethyl sulfate: 4.13256e-12 kg; data quality (2,2,1,1,5)
- Ethane, 1,1,1-trifluoro-, HFC-143a: 9.07828e-9 kg; data quality (4,2,1,4,1)
- hydrogen sulfide: 1.27494e-10 kg; data quality (3,2,1,1,5)
- methanol: 1.12011e-9 kg; data quality (4,2,1,1,5)
- Propane, 1,2-dichloro-: 8.71288e-12 kg; data quality (4,2,1,1,5)
- ethane, 1,2-dibromo-: 1.42275e-12 kg; data quality (2,2,1,1,5)
- Nitrobenzene: 2.75167e-13 kg; data quality (4,2,1,1,5)
- o-cresol: 1.94177e-14 kg; data quality (4,2,1,1,5)
- lead: 1.91993e-11, 2.37629e-7 kg (2 entries, compartments not in this file); data quality (3,1,1,1,5)
- toluene, 2,4-dinitro-: 2.17604e-14 kg; data quality (5,2,1,1,5)
- Chrysene, 5-methyl-: 9.68575e-16 kg; data quality (2,2,1,1,5)
- 1,1-DICHLOROETHYLENE: 7.70708e-12 kg; data quality (3,2,1,1,5)
- Ethane, 1,1,1,2-tetrafluoro-, HFC-134a: 7.99732e-8 kg; data quality (4,2,1,4,1)
- bis(2-chloroethyl)ether: 3.55699e-17 kg; data quality (3,2,1,1,5)
- lead: 5.10132e-9 kg; data quality (3,2,1,1,5)
- Methane: 5.77581e-7 kg; data quality (4,2,1,4,1)
- benzyl chloride: 3.76769e-11 kg; data quality (2,2,1,1,5)
- phenanthrene: 2.19827e-10 kg; data quality (3,2,1,4,2)
- chlorine: 5.56727e-9 kg; data quality (4,2,1,1,5)
- acrylic acid: 1.10434e-13 kg; data quality (4,2,1,1,5)
- ethene, tetrachloro-: 3.09117e-9 kg; data quality (3,2,1,1,5)
- 1,4-dichlorobenzene: 5.90642e-11 kg; data quality (2,2,1,1,5)
- aniline: 3.5039e-15 kg; data quality (4,2,1,1,5)
- naphthalene: 5.97265e-9 kg; data quality (3,2,1,3,2)
- PYRENE, 1-NITRO-: 1.90916e-15 kg; data quality (2,2,1,1,5)
- epichlorohydrin: 5.04978e-12 kg; data quality (3,2,1,1,5)
- ethylene oxide: 1.98554e-12 kg; data quality (3,2,1,1,5)
- particulates, < 2.5 um: 1.27016e-6 kg; data quality (3,2,1,2,4)
- nickel: 5.80106e-14, 3.09513e-9 kg (2 entries, compartments not in this file); data quality (4,1,1,1,5)
- methane, monochloro-, r-40: 4.45683e-11 kg; data quality (3,2,1,1,5)
- Propoxur: 2.65447e-14 kg; data quality (5,2,1,1,5)
- Phthalate, dimethyl-: 8.80173e-12 kg; data quality (4,2,1,1,5)
- benzo(a)pyrene: 6.56479e-12 kg; data quality (3,2,1,4,1)
- diethanolamine: 6.07884e-11 kg; data quality (3,2,1,1,5)
- barium: 3.4135e-13 kg; data quality (4,1,1,1,5)
- polychlorinated biphenyls: 2.92115e-17 kg; data quality (3,2,1,1,5)
- Hexachlorocyclopentadiene: 5.22682e-13 kg; data quality (3,2,1,1,5)
- propylene oxide: 9.79611e-12 kg; data quality (3,2,1,1,5)
- Ethylene glycol: 4.59605e-9 kg; data quality (5,1,1,1,5)
- propanal: 8.09631e-9 kg; data quality (3,2,1,4,1)
- Aluminum: 3.60864e-11 kg; data quality (4,1,1,1,5)
- dimethyl formamide: 6.49922e-10 kg; data quality (4,2,1,1,5)
- monochloroethane: 1.58116e-10 kg; data quality (3,2,1,1,5)
- Triethyl amine: 5.62985e-12 kg; data quality (4,2,1,1,5)
- manganese: 8.382e-10 kg; data quality (3,2,1,1,5)
- Benzo(g,h,i)perylene: 2.84943e-11 kg; data quality (3,2,1,3,3)
- nitric acid: 3.88398e-8, 1.36175e-13 kg (2 entries, compartments not in this file); data quality (3,1,1,1,5)
- ETHYLENETHIOUREA: 4.24715e-14 kg; data quality (5,2,1,1,5)
- phenol: 1.6341e-12 kg; data quality (3,1,1,1,5)
- Dibenz(a,h)anthracene: 4.74399e-14 kg; data quality (3,2,1,4,2)
- Phosphorus: 1.34813e-10 kg; data quality (4,1,1,1,5)
- 1,1,2,2-tetrachloroethane: 5.8271e-11 kg; data quality (3,2,1,1,5)
- Dimethylcarbamyl chloride: 2.06584e-16 kg; data quality (5,2,1,1,5)
- 2-chloro-1-phenylethanone: 3.76772e-13 kg; data quality (2,2,1,1,5)
- hydroquinone: 4.13077e-11 kg; data quality (3,2,1,1,5)
- Phthalate, dibutyl-: 4.67571e-9 kg; data quality (4,1,1,1,5)
- benzidine: 5.30894e-12 kg; data quality (2,2,1,1,5)
- acenaphthene: 5.74536e-11 kg; data quality (3,2,1,4,1)
- nitrogen oxides: 8.34126e-6 kg; data quality (2,2,1,1,3)
- Benzo(k)fluoranthene: 6.37145e-12 kg; data quality (3,2,1,4,1)
- butadiene: 2.37914e-8 kg; data quality (3,2,1,4,1)
- methane, dichloro-, hcc-30: 3.03146e-8 kg; data quality (4,2,1,1,5)
- Propane sultone: 2.65447e-14 kg; data quality (5,2,1,1,5)
- bromoform: 2.11977e-12 kg; data quality (3,2,1,1,5)
- 2-METHOXYETHANOL: 6.16766e-14 kg; data quality (4,2,1,1,5)
- ethylbenzene: 9.55135e-10 kg; data quality (4,1,1,1,5)
- 1,2-BUTYLENE OXIDE: 1.56534e-11 kg; data quality (4,2,1,1,5)
- 2,2,4-trimethylpentane: 8.1207e-8 kg; data quality (3,2,1,4,1)
- Phthalate, dibutyl-: 2.76374e-11 kg; data quality (4,2,1,1,5)
- toluene: 2.54209e-7 kg; data quality (3,2,1,4,2)
- carbon monoxide: 8.85062e-5 kg; data quality (3,2,1,1,1)
- 2,4-D: 1.64756e-10 kg; data quality (3,2,1,1,5)
- Xylene: 2.17041e-7 kg; data quality (3,2,1,4,2)
- Water, fresh: 0.000489341 m3; data quality (1,2,1,4,2)
- 1,2,4-trimethylbenzene: 1.03765e-10 kg; data quality (5,1,1,1,5)
- Naphthalene: 1.61037e-10 kg; data quality (4,1,1,1,5)
- Propene, 1,3-dichloro-: 1.07598e-11 kg; data quality (3,2,1,1,5)
- acetophenone: 8.19312e-13 kg; data quality (4,2,1,1,5)
- Benzo(b)fluoranthene: 6.59446e-12 kg; data quality (3,2,1,4,1)
- 2,4,5-trichlorophenol: 2.65447e-14 kg; data quality (2,2,1,1,5)
- benzene, chloro-: 2.59015e-11 kg; data quality (4,2,1,1,5)
- 1-METHYLNAPTHALENE: 4.05972e-14 kg; data quality (2,2,1,1,5)
- benzene: 1.50988e-7 kg; data quality (3,2,1,4,1)
- ammonia: 5.73795e-8 kg; data quality (3,2,1,2,4)
- phenol: 6.14244e-9 kg; data quality (4,2,1,1,5)
- CHLORONAPHTHALENE: 1.64774e-18 kg; data quality (1,2,1,1,5)
- 2-(2-BUTOXYETHOXY) ETHYL ACETATE: 5.85585e-11 kg; data quality (5,2,1,1,5)
- ALLYL CHLORIDE: 2.06584e-16 kg; data quality (3,2,1,1,5)
- o-Xylene: 2.86717e-9 kg; data quality (3,2,1,4,1)
- arsenic: 9.52646e-11 kg; data quality (3,2,1,1,5)
- hexachloroethane: 1.32723e-13 kg; data quality (4,2,1,1,5)
- trichloroethylene: 3.31768e-9 kg; data quality (4,2,1,1,5)
- Cobalt: 3.88166e-10 kg; data quality (3,2,1,1,5)
- benzene, ethyl-: 6.24874e-8 kg; data quality (3,2,1,4,1)
- VOC, volatile organic compounds: 5.14541e-6 kg; data quality (3,2,1,1,2)
- Sulfuric acid: 2.06339e-8 kg; data quality (2,1,1,1,5)
- pentachlorophenol: 1.65492e-16 kg; data quality (3,2,1,1,5)
- fluorene: 1.07074e-10 kg; data quality (3,2,1,4,1)
- chlorine: 1.96092e-11 kg; data quality (2,1,1,1,5)

## Inventory method
Input-output

## Modelling constants
0

## Data collection
2015-2016

## Review details
In regard to quality assurance and peer-review, each dataset created went through Quality Assurance as defined in a quality assurance project plans at US EPA, CSRA or ERG. The model was assembled with the IO model builder model (USEPA 2016c). Validation functions were used to check that all the model components were properly assembled and harmonized. Bayou Demeke and Santosh Ghimire provided internal peer review of the model methodology and the manuscript underwent standard EPA management review. An editor and two anonymous reviewers at the Journal of Cleaner Production reviewed the model. In regard to data quality evaluation, data quality assessment was performed at the flow and process levels according to the updated US EPA data quality assessment guidelines as defined in US EPA (2016b).

## Intended application
The primary application is for use in the US Environmentally-Extended Input-Ouput model, USEEIO, version 1.1. This model is being used by the US EPA for supporting tools that prioritize goods and services based on potential environmental impacts, resource use or emissions for large regions, including the US and US states, and as a strealined tool for organizations as a starting point to consider sustainable materials management. Model results are designed to provide meso/macro-level decision support.

## Project
USEEIO v1.1 was developed by the US EPA with CSRA and ERG with Wesley W. Ingwersen and David E. Meyer as research leads. Yi Yang was the technical lead on the work for CSRA (contract EP-C-15-012); Troy Hawkins was lead for ERG (contract EP-C-12-021).
