# Cardboard; at manufacturer

Dataset: openLCA process, unit process
Category: 3221: Pulp, Paper, and Paperboard Mills
Geography: United States
Time period: 2017-01-01 to 2017-12-31
Data quality: US EPA - Process Pedigree Matrix (1;1)
Exchange data quality scheme: US EPA - Flow Pedigree Matrix
Generated by: US EPA with CSRA and ERG
Owner: US EPA
Published in: Yang, Ingwersen et al. 2017
restrictionsDescription: This model shold be appropriately cited (see Yang, Ingwersen et al. 2017 source or Publication field) when used. Any changes or derivations of this model by the user should be documented. The model itself and any results from use of this model shall not be construed to consitute US EPA opinion or policy.
copyright: false

## General comment
BEA Code & Name is '322130:Paperboard mills'. Description of the primary industry producing this good or service, adapted from the Census Bureau NAICS 2007 descriptions: This industry comprises establishments primarily engaged in manufacturing paperboard from pulp. These establishments may manufacture or purchase pulp. In addition, the establishments may also convert the paperboard they make.

## Technology
The process describes the average US production of this good or service within this NAICS-based grouping defined in the BEA 2007 detailed input-output tables (BEA 2015). Distribution, wholesale and retailing of this good or service, use, and final disposal are not included. Creation of a product system with this process will enable modeling of all upstream (supply-chain) activities.

## Geography
Data represent the 50 US states

## Time period
2017 was the year in which this version of USEEIO was released and is the target date for the model

## Reference product
- Cardboard; at manufacturer: 1 USD

## Inputs from technosphere
All rows: data quality (1,3,1,1,1)
- Other petroleum and coal products; at manufacturer: 0.000550897 USD
- Noncomparable imports: 0.000320319 USD
- Finished and coated fabric; at manufacturer: 0.000477069 USD
- Cutlery and handtools; at manufacturer: 0.000352859 USD
- Synthetic rubber and artificial and synthetic fibers; at manufacturer: 2.249e-5 USD
- Other textiles; at manufacturer: 1.40563e-6 USD
- Scientific research and development: 4.00273e-5 USD
- State and local government enterprises: 0.00164032 USD
- Marketing research and all other miscellaneous professional, scientific, and technical services: 0.000358028 USD
- Wood pulp; at manufacturer: 0.0135129 USD
- Coal; at mine: 0.0190407 USD
- Welding and Soldering Equipment, Scales and Balances, and other general purpose machinery; at manufacturer: 1.40725e-6 USD
- Wireless telecommunications: 0.000355124 USD
- Monetary authorities and depository credit intermediation: 0.00092593 USD
- Nondepository credit intermediation and related activities: 0.0011545 USD
- Company and enterprise management: 0.0273733 USD
- Surgical appliance and supplies; at manufacturer: 1.68527e-6 USD
- Vegetable oils and by-products; at manufacturer: 0.000121244 USD
- Other vehicle parts; at manufacturer: 0.00267336 USD
- Relay and industrial controls; at manufacturer: 0.00128782 USD
- Computer terminals and other computer peripheral equipment; at manufacturer: 7.46323e-5 USD
- Waste management and remediation: 0.00375706 USD
- Rubber and plastic belts and hoses; at manufacturer: 8.71489e-5 USD
- Paper bags and coated paper; at manufacturer: 0.00315081 USD
- Civic, social, professional, and similar organizations: 0.000238723 USD
- Buildings and dwellings services: 0.00981214 USD
- Other support services: 0.000880437 USD
- Investment advice, portfolio management, and other financial advising services: 0.000161115 USD
- Facilities support: 0.000600262 USD
- Office administration: 0.000121907 USD
- Laminated plastic plates and shapes; at manufacturer: 1.1245e-5 USD
- Independent artists, writers, and performers: 0.000159513 USD
- Other retail: 7.69365e-5 USD
- Employment services: 0.00120139 USD
- Gasoline, fuels, and by-products of petroleum refining; at manufacturer: 0.0239793 USD
- Dry-cleaning and laundry: 3.81321e-5 USD
- Paper; at manufacturer: 0.000138514 USD
- Consumer goods and general rental centers: 0.000118072 USD
- Hotels and campgrounds: 0.000405888 USD
- Office supplies (not paper); at manufacturer: 1.62694e-9 USD
- Synthetic dyes and pigments; at manufacturer: 0.00331992 USD
- Transmission and power train parts; at manufacturer: 8.08637e-5 USD
- Cement; at manufacturer: 3.37053e-6 USD
- Performances: 1.41051e-6 USD
- Vehicle engines and engine parts; at manufacturer: 4.11371e-5 USD
- Machine shops; at manufacturer: 0.00756182 USD
- Air and gas compressors; at manufacturer: 1.8838e-6 USD
- Truck transport: 0.0138457 USD
- Rail transport: 0.0160838 USD
- Valve and fittings (except for plumbing); at manufacturer: 0.00519606 USD
- Lessors of nonfinancial intangible assets: 0.0029884 USD
- Springs and wires; at manufacturer: 2.95182e-5 USD
- Air transport: 0.00128259 USD
- Power boilers and heat exchangers; at manufacturer: 3.51407e-5 USD
- Natural gas; at consumer: 0.0683946 USD
- Scenic and sightseeing transportation and support activities for transportation: 0.000186837 USD
- Electronic equipment repair and maintenance: 0.00122435 USD
- Motor vehicle steering, suspension components (except spring), and brake systems; at manufacturer: 4.11355e-5 USD
- Plastic pipe, fittings, and sausage casings; at manufacturer: 2.53013e-5 USD
- Paints and coatings; at manufacturer: 4.24856e-5 USD
- Satellite, telecommunications resellers, and all other telecommunications: 7.78749e-5 USD
- All other food and drinking places: 3.95507e-5 USD
- Insurance carriers: 0.000626636 USD
- Pipeline transport: 0.000157603 USD
- Limited-service restaurants: 0.000847892 USD
- Mineral wool; at manufacturer: 9.36259e-7 USD
- Other real estate: 4.13102e-5 USD
- Machinery for the paper, textile, food or other industries (except semiconductor machinery); at manufacturer: 0.0122751 USD
- Vehicle repair: 0.00300966 USD
- All other converted paper products; at manufacturer: 0.00518647 USD
- Ink and ink cartridges; at manufacturer: 4.84144e-5 USD
- Semiconductors; at manufacturer: 0.00579673 USD
- Printed circuit and electronic assembly; at manufacturer: 0.00233533 USD
- Lumber and treated lumber; at manufacturer: 0.0534781 USD
- Other nonmetallic mineral products; at manufacturer: 5.61755e-7 USD
- General merchandise stores: 3.92702e-5 USD
- Specialized design: 0.00152236 USD
- Adhesives; at manufacturer: 0.0019421 USD
- Other computer related services, including facilities management: 0.000201136 USD
- Rubber tires; at manufacturer: 7.62658e-5 USD
- Passenger ground transport: 0.000203793 USD
- Plastic bags, films, and sheets; at manufacturer: 0.000842089 USD
- Screws, nuts, and bolts; at manufacturer: 0.00159477 USD
- Metal coatings, engravings, and heat treatments; at manufacturer: 0.00690091 USD
- Wooden windows, door, and flooring; at manufacturer: 1.87252e-7 USD
- Other plastic products; at manufacturer: 0.000140495 USD
- Dimensional stone; at mine: 7.04067e-5 USD
- Timber and raw forest products; at forest: 0.0588084 USD
- Abrasive products; at manufacturer: 0.000195439 USD
- Urethane and other foam products; at manufacturer: 4.06734e-8 USD
- Electricity; at consumer: 0.0295466 USD
- Fabric; at manufacturer: 0.00101245 USD
- Ground or treated minerals and earth; at manufacturer: 6.55381e-5 USD
- Investigation and security: 0.000842147 USD
- Computer systems design: 0.000448174 USD
- Nonresidential building repair and maintanence: 0.00811458 USD
- Primary iron, steel, and ferroalloy products; at manufacturer: 0.000388512 USD
- Material handling equipment; at manufacturer: 0.000231848 USD
- Business support: 0.00169034 USD
- Other basic organic chemicals; at manufacturer: 0.0124994 USD
- All other forging, stamping, and sintering; at manufacturer: 1.87252e-7 USD
- Cardboard containers; at manufacturer: 0.016758 USD
- Polystyrene foam products; at manufacturer: 2.92849e-8 USD
- Promoters and agents: 4.02113e-5 USD
- Architectural, engineering, and related services: 0.00730792 USD
- Warehousing: 0.00153458 USD
- Legal services: 0.00148186 USD
- Electronic capacitors, resistors, coils, transformers, connectors and other components (except semiconductors and printed circuit assemblies); at manufacturer: 0.000309971 USD
- Metal pipe fittings, ball and roller bearings, industrial patterns, metal bath fixtures, other misc. fabricated metals; at manufacturer: 0.00154572 USD
- Veneer, plywood, and engineered wood; at manufacturer: 0.00700204 USD
- Glass and glass products; at manufacturer: 9.36259e-7 USD
- Plastic bottles; at manufacturer: 1.04124e-7 USD
- Food and beverage stores: 9.42767e-7 USD
- Cardboard; at manufacturer: 0.00207132 USD
- Air conditioning, refrigeration, and warm air heating equipment; at manufacturer: 3.95426e-5 USD
- Management consulting: 0.000931871 USD
- Corn products; at manufacturer: 0.00695195 USD
- Compressed Gases; at manufacturer: 0.000564474 USD
- Securities and commodities brokerage and exchanges: 8.13565e-5 USD
- Accounting, tax preparation, bookkeeping, and payroll: 0.00115408 USD
- Stationery; at manufacturer: 1.40563e-6 USD
- Wholesale trade: 0.0644233 USD
- Other rubber products; at manufacturer: 1.31076e-6 USD
- Sports: 3.95507e-5 USD
- Software: 1.40725e-6 USD
- Advertising and public relations: 0.00224731 USD
- Commercial equipment rental: 0.000665116 USD
- Clay and ceramic products; at manufacturer: 2.24702e-6 USD
- Unrefined oil and gas; at extraction site: 0.000232271 USD
- Vehicles and parts sales: 0.000580845 USD
- Sand, gravel, clay, phosphate, other nonmetallic minerals; at mine: 0.00196556 USD
- Other concrete products; at manufacturer: 1.87252e-7 USD
- Household goods repair: 0.001066 USD
- Petrochemicals; at manufacturer: 0.000893565 USD
- Aluminum products; at manufacturer: 6.01967e-8 USD
- Plastics; at manufacturer: 0.00172615 USD
- Full-service restaurants: 0.000485808 USD
- Lime and gypsum products; at manufacturer: 0.00436613 USD
- Insurance agencies and brokerages: 0.000235429 USD
- Soap and cleaning compounds; at manufacturer: 5.62251e-6 USD
- Vehicle rental and leasing: 0.00132872 USD
- Fiber, yarn, and thread; at manufacturer: 0.000596562 USD
- Wireless communications; at manufacturer: 1.62694e-9 USD
- Golf courses, marinas, ski resorts, fitness and other rec centers and industries: 8.11822e-5 USD
- Vehicle electrical and electronic equipment; at manufacturer: 0.000156936 USD
- Telecommunications: 0.00113907 USD
- Drinking water and wastewater treatment; at consumer: 0.00152292 USD
- Environmental and other technical consulting services: 0.000202868 USD
- Industrial process variable instruments; at manufacturer: 8.05799e-5 USD
- Other basic inorganic chemicals; at manufacturer: 0.0258434 USD
- Commercial machinery repair: 0.00590613 USD
- Data processing and hosting: 0.00142998 USD
- Chemicals (except basic chemicals, agrichemicals, polymers, paints, pharmaceuticals,soaps, cleaning compounds); at manufacturer: 0.0061505 USD
- Water transport (boats, ships, ferries): 0.00123734 USD
- Communications equipment; at manufacturer: 1.62694e-9 USD
- Lids, jars, bottle caps, other metal closures and crowns; at manufacturer: 0.00056663 USD
- Cutting and machine tool accessory, rolling mill, and other metalworking machines; at manufacturer: 0.000273051 USD

## Inputs from nature
- Water, fresh: 0.00453656, 0.0177272 m3 (2 entries, compartments not in this file); data quality (4,2,1,4,2)
- Water, saline: 0.00137676 m3; data quality (4,2,1,4,2)
- Occupation, urban, discontinuously built: 6.89157e-5 m2*a; data quality (4,2,1,1,1)
- Occupation, industrial area, built up: 0.000291697 m2*a; data quality (4,2,1,1,1)
- Energy, biomass: 23.2559 MJ; data quality (3,1,1,1,1)
- Occupation, industrial area: 0.00087509 m2*a; data quality (4,2,1,1,1)
- Energy, hydraulic potential: 0.00391318 MJ; data quality (3,1,1,1,1)

## Emissions to nature
- lead: 9.89612e-8 kg; data quality (3,2,1,1,3)
- Indeno(1,2,3-cd)pyrene: 3.37102e-11 kg; data quality (2,2,1,1,3)
- m-xylene: 5.07852e-7 kg; data quality (3,2,1,1,3)
- carbon disulfide: 5.14422e-7 kg; data quality (4,2,1,1,3)
- 2-methylnaphthalene: 2.68978e-9 kg; data quality (2,2,1,1,2)
- Propene, 1,3-dichloro-: 2.47452e-16 kg; data quality (3,2,1,1,2)
- 1,4-dioxane: 2.39891e-10 kg; data quality (4,2,1,1,3)
- acetaldehyde: 1.31983e-6 kg; data quality (3,1,1,1,3)
- hexane: 2.36816e-5 kg; data quality (3,2,1,1,3)
- Benzo(a)anthracene: 5.93317e-11 kg; data quality (2,2,1,1,3)
- Propene: 1.34824e-11 kg; data quality (3,1,1,1,2)
- Dimethyl sulfate: 5.94548e-10 kg; data quality (3,2,1,1,2)
- benzyl chloride: 1.21251e-8 kg; data quality (2,2,1,1,1)
- methyl isobutyl ketone: 2.81061e-6 kg; data quality (3,2,1,1,3)
- ACRYLAMIDE: 4.9242e-9 kg; data quality (4,2,1,1,2)
- cyanide: 1.12189e-8 kg; data quality (3,2,1,1,2)
- monochloroethane: 3.20272e-10 kg; data quality (3,2,1,1,2)
- BENZ(A)ACRIDINE: 9.97416e-16 kg; data quality (2,2,1,1,3)
- nitric acid: 1.06165e-10 kg; data quality (3,1,1,1,2)
- DMTT (DAZOMET): 3.40663e-11, 2.01122e-10 kg (2 entries, compartments not in this file); data quality (4,1,1,1,2)
- Phenol: 5.76025e-10 kg; data quality (3,1,1,1,3)
- hydrogen sulfide: 9.56044e-6 kg; data quality (3,2,1,1,3)
- naphthalene: 7.24349e-7 kg; data quality (3,2,1,1,3)
- diethanolamine: 4.82944e-9 kg; data quality (3,2,1,1,1)
- CATECHOL: 5.77677e-8, 1.33175e-10 kg (2 entries, compartments not in this file); data quality (2,1,1,1,3)
- t-butyl methyl ether: 9.52446e-10 kg; data quality (3,2,1,1,3)
- ammonia: 5.74518e-5 kg; data quality (3,2,1,1,3)
- CHLOROPRENE: 2.35837e-10 kg; data quality (2,2,1,1,3)
- HYDROGEN SULFIDE: 3.25523e-6, 3.23062e-8 kg (2 entries, compartments not in this file); data quality (3,1,1,1,3)
- Propane, 1,1,1,3,3,3-hexafluoro-, HCFC-236fa: 8.4555e-11 kg; data quality (4,2,1,4,1)
- Xylene: 9.05928e-7 kg; data quality (4,2,1,1,3)
- trichloroethylene: 3.67877e-7 kg; data quality (4,2,1,1,3)
- PCB-15: 1.73946e-15 kg; data quality (2,2,1,1,1)
- fluoranthene: 1.6744e-7 kg; data quality (2,2,1,1,3)
- butanol: 2.95388e-8 kg; data quality (5,1,1,1,2)
- 2,4,5,2',5'-PENTACHLOROBIPHENYL: 2.86535e-14 kg; data quality (2,2,1,1,1)
- Polychlorinated biphenyls: 2.98736e-11, 2.03088e-13 kg (2 entries, compartments not in this file); data quality (3,1,1,1,2)
- vinyl acetate: 9.761e-8 kg; data quality (4,2,1,1,3)
- propylene oxide: 3.49157e-10 kg; data quality (3,2,1,1,2)
- Methane, difluoro-, HFC-32: 4.26007e-9 kg; data quality (4,2,1,4,1)
- Dibenz(a,h)anthracene: 2.29514e-11 kg; data quality (2,2,1,1,3)
- cadmium: 1.0277e-8 kg; data quality (3,2,1,1,3)
- Chrysene: 3.78568e-10 kg; data quality (2,2,1,1,3)
- 3-methylcholanthrene: 8.62793e-11 kg; data quality (2,2,1,1,3)
- Cresol: 2.16389e-10, 5.04961e-11 kg (2 entries, compartments not in this file); data quality (2,1,1,1,2)
- chloroform: 8.42037e-7 kg; data quality (4,2,1,1,2)
- Propanal: 5.75852e-10 kg; data quality (2,1,1,1,2)
- methane, monochloro-, r-40: 2.23822e-6 kg; data quality (3,2,1,1,3)
- para-xylene: 2.20577e-7 kg; data quality (3,2,1,1,3)
- isophorone: 2.43891e-9 kg; data quality (2,2,1,1,2)
- Methane, monochloro-, R-40: 3.53132e-12 kg; data quality (3,1,1,1,3)
- chlorine: 5.748e-9 kg; data quality (2,1,1,1,1)
- CHLORONAPHTHALENE: 3.18181e-13 kg; data quality (1,2,1,1,3)
- Chloroform: 9.99695e-13, 8.41743e-11 kg (2 entries, compartments not in this file); data quality (3,1,1,1,1)
- AMMONIA: 4.14793e-9 kg; data quality (3,1,1,1,2)
- Benzo(g,h,i)perylene: 1.53667e-9 kg; data quality (3,2,1,1,3)
- 2,4-dinitrophenol: 1.73007e-10 kg; data quality (5,2,1,1,3)
- methanol: 1.55314e-7, 1.01016e-5 kg (2 entries, compartments not in this file); data quality (3,1,1,1,3)
- arsenic: 2.25308e-8 kg; data quality (3,2,1,1,3)
- Dimethoxy methane: 1.36135e-10 kg; data quality (2,2,1,1,2)
- Hexachlorocyclopentadiene: 5.66061e-8 kg; data quality (3,2,1,1,2)
- ethylene oxide: 9.45142e-11 kg; data quality (3,2,1,1,2)
- Benzo(g,h,i)perylene: 4.12585e-12 kg; data quality (2,1,1,1,2)
- Propane, 1,2-dichloro-: 3.53544e-8 kg; data quality (4,2,1,1,3)
- benzo(a)pyrene: 5.06919e-10 kg; data quality (2,2,1,1,3)
- acetophenone: 2.57821e-7 kg; data quality (4,2,1,1,3)
- 4-nitrophenol: 9.05371e-11 kg; data quality (2,2,1,1,3)
- pyrene: 2.0122e-9 kg; data quality (2,2,1,1,3)
- Ethylene glycol: 6.55122e-13 kg; data quality (5,1,1,1,2)
- lead: 4.21037e-8, 1.302e-8 kg (2 entries, compartments not in this file); data quality (3,1,1,1,3)
- ethylene glycol: 4.63585e-9 kg; data quality (5,1,1,1,2)
- Formaldehyde: 7.02403e-10 kg; data quality (2,1,1,1,3)
- tertiary-Butyl Acetate: 9.98132e-7 kg; data quality (3,2,1,1,3)
- CARBAZOLE: 1.43699e-11 kg; data quality (2,2,1,1,1)
- 2-chloro-1-phenylethanone: 4.02286e-11 kg; data quality (2,2,1,1,2)
- ethane, 1,1,2-trichloro-: 1.58973e-7 kg; data quality (4,2,1,1,3)
- Styrene: 1.05968e-11 kg; data quality (3,1,1,1,1)
- Zinc: 7.58134e-11, 6.36136e-13 kg (2 entries, compartments not in this file); data quality (5,1,1,1,4)
- Cresol, o-: 7.09553e-11 kg; data quality (2,1,1,1,3)
- hydroquinone: 6.52319e-11 kg; data quality (3,2,1,1,2)
- cumene: 3.43096e-7 kg; data quality (4,2,1,1,2)
- fluorene: 1.49425e-9 kg; data quality (2,2,1,1,3)
- CHLORINE: 3.60317e-12 kg; data quality (2,1,1,1,2)
- Ethylene glycol monoethyl ether: 9.65037e-9, 2.49354e-7 kg (2 entries, compartments not in this file); data quality (5,1,1,1,3)
- antimony: 4.25021e-8 kg; data quality (3,2,1,1,3)
- PHOSPHORUS: 1.43376e-7 kg; data quality (2,2,1,1,3)
- particulates, < 2.5 um: 0.000311227 kg; data quality (3,2,1,1,3)
- Chromium VI: 7.59123e-9 kg; data quality (3,2,1,1,3)
- acrolein: 3.3524e-6 kg; data quality (2,2,1,1,3)
- ammonia: 6.66377e-6 kg; data quality (3,1,1,1,3)
- selenium: 7.19847e-8 kg; data quality (2,2,1,1,3)
- biphenyl: 5.87868e-7 kg; data quality (4,2,1,1,3)
- 1,1-DICHLOROETHYLENE: 1.66725e-11 kg; data quality (3,2,1,1,1)
- bromoform: 1.54858e-10 kg; data quality (3,2,1,1,3)
- 1,2,4-trimethylbenzene: 1.19756e-9 kg; data quality (5,1,1,1,2)
- benzene: 2.81763e-6 kg; data quality (3,2,1,1,3)
- nickel: 4.89594e-8 kg; data quality (3,2,1,1,3)
- ethane, 1,2-dichloro-: 3.41005e-8 kg; data quality (3,2,1,1,3)
- 1,4-dichlorobenzene: 6.6675e-11 kg; data quality (2,2,1,1,3)
- Carbon dioxide: 0.519196 kg; data quality (4,2,1,4,1)
- phenol: 7.22825e-8 kg; data quality (3,1,1,1,3)
- Ethene, chloro-: 3.00221e-8 kg; data quality (3,2,1,1,3)
- formaldehyde: 8.06052e-6 kg; data quality (2,2,1,1,3)
- methyl methacrylate: 5.34706e-10 kg; data quality (4,2,1,1,1)
- particulates, < 10 um: 6.10167e-5 kg; data quality (3,2,1,1,3)
- ethane, 1,2-dibromo-: 1.43525e-9 kg; data quality (2,2,1,1,1)
- catechol: 8.87477e-11 kg; data quality (5,2,1,1,3)
- 1,1,2,2-tetrachloroethane: 1.10325e-10 kg; data quality (3,2,1,1,1)
- Benzo(b)fluoranthene: 9.47246e-11 kg; data quality (2,2,1,1,3)
- naphthalene: 1.66001e-10 kg; data quality (4,1,1,1,2)
- methane, dichloro-, hcc-30: 1.14646e-6 kg; data quality (4,2,1,1,3)
- 2-METHOXYETHANOL: 1.37583e-8 kg; data quality (4,2,1,1,3)
- manganese: 6.32921e-7 kg; data quality (4,1,1,1,3)
- toluene-2,4-diisocyante: 5.88994e-14 kg; data quality (3,2,1,1,5)
- Chrysene, 5-methyl-: 3.70191e-14 kg; data quality (2,2,1,1,2)
- formaldehyde: 3.99231e-7 kg; data quality (2,1,1,1,3)
- acrylonitrile: 1.10719e-9 kg; data quality (4,2,1,1,2)
- Hydrocarbons, aromatic: 8.53212e-8 kg; data quality (4,2,1,1,2)
- Ethane, 1,1,1-trifluoro-, HFC-143a: 3.1299e-9 kg; data quality (4,2,1,4,1)
- Dinitrogen monoxide: 3.75943e-5 kg; data quality (4,2,1,4,1)
- phenanthrene: 1.83891e-8 kg; data quality (3,2,1,1,3)
- Ethane, 1,1,1,2-tetrafluoro-, HFC-134a: 2.75721e-8 kg; data quality (4,2,1,4,1)
- chromium: 1.27961e-13 kg; data quality (4,1,1,1,1)
- phenol: 5.63769e-6 kg; data quality (4,2,1,1,3)
- methane, bromo-, halon 1001: 2.92955e-8 kg; data quality (3,2,1,1,3)
- carbon monoxide: 0.00193991 kg; data quality (2,2,1,1,3)
- Methane, monochloro-, R-40: 3.27561e-12 kg; data quality (3,1,1,1,2)
- propanal: 9.13223e-7 kg; data quality (3,2,1,1,3)
- Ethane, pentafluoro-, HFC-125: 7.31526e-9 kg; data quality (4,2,1,4,1)
- Aluminum: 7.45968e-8 kg; data quality (4,1,1,1,2)
- acenaphthylene: 8.16157e-8 kg; data quality (3,2,1,1,3)
- styrene: 2.45397e-6 kg; data quality (4,2,1,1,3)
- Methyl iodide: 1.12277e-8 kg; data quality (4,2,1,1,3)
- 2,3,4'-TRICHLOROBIPHENYL: 1.71328e-14 kg; data quality (2,2,1,1,1)
- hydrogen fluoride: 1.69881e-6 kg; data quality (2,2,1,1,3)
- Cresol: 4.0249e-6 kg; data quality (4,2,1,1,3)
- mercury: 7.52493e-9 kg; data quality (2,2,1,1,3)
- anthracene: 1.57457e-9 kg; data quality (3,2,1,1,3)
- polychlorinated biphenyls: 1.54263e-12 kg; data quality (3,2,1,1,3)
- o-Xylene: 2.55573e-7 kg; data quality (3,2,1,1,3)
- carbonyl sulfide: 5.75714e-8 kg; data quality (4,2,1,1,2)
- Formic acid: 1.32579e-11 kg; data quality (3,1,1,1,1)
- benzene, chloro-: 6.93674e-8 kg; data quality (4,2,1,1,3)
- hydrogen chloride: 5.26009e-5 kg; data quality (2,2,1,1,3)
- ethene, tetrachloro-: 5.43696e-7 kg; data quality (3,2,1,1,3)
- beryllium: 4.36128e-9 kg; data quality (2,2,1,1,3)
- Benzo(g,h,i)perylene: 1.68666e-10 kg; data quality (2,1,1,1,3)
- CARBAMODITHIOIC ACID, DIMETHYL-, POTASSIUM SALT: 4.04587e-8 kg; data quality (2,1,1,1,3)
- Sulfuric acid: 8.74788e-6 kg; data quality (2,1,1,1,3)
- DNOC: 3.57687e-10 kg; data quality (2,2,1,1,3)
- VOC, volatile organic compounds: 0.000943427 kg; data quality (3,2,1,1,3)
- 1-METHYLNAPTHALENE: 6.49746e-10 kg; data quality (2,2,1,1,3)
- acenaphthene: 6.90835e-9 kg; data quality (3,2,1,1,3)
- mercury: 1.38273e-11, 5.75956e-12 kg (2 entries, compartments not in this file); data quality (3,1,1,1,3)
- Nickel, ion: 1.4858e-12 kg; data quality (3,2,1,1,3)
- 2,4,6-trichlorophenol: 6.52907e-11 kg; data quality (2,2,1,1,3)
- Cobalt: 1.5598e-8 kg; data quality (3,2,1,1,3)
- Butanol: 3.88487e-10 kg; data quality (5,1,1,1,2)
- toluene: 4.58585e-11 kg; data quality (5,1,1,1,2)
- benzene, ethyl-: 3.2913e-7 kg; data quality (3,2,1,1,3)
- toluene: 5.94342e-6 kg; data quality (3,2,1,1,3)
- 2-PHENYLPHENOL, SODIUM SALT: 7.09553e-11 kg; data quality (2,1,1,1,3)
- methanol: 0.000387821 kg; data quality (4,2,1,1,3)
- p-cresol: 8.17459e-11 kg; data quality (4,2,1,1,1)
- Water, fresh: 0.019393 m3; data quality (4,2,1,4,2)
- barium: 7.46839e-11 kg; data quality (4,1,1,1,2)
- nitrogen oxides: 0.00156023 kg; data quality (2,2,1,1,3)
- Nitrogen: 0.000254502 kg; data quality (4,2,1,1,4)
- ethylene glycol: 1.46477e-7 kg; data quality (5,2,1,1,3)
- benz[a]anthracene: 1.51165e-9 kg; data quality (2,2,1,1,3)
- ETHYLENETHIOUREA: 7.69435e-9 kg; data quality (5,2,1,1,3)
- acetaldehyde: 2.53494e-5 kg; data quality (3,2,1,1,3)
- HYDROCHLORIC ACID: 1.47794e-8 kg; data quality (2,1,1,1,4)
- Diethylene glycol butyl ether: 2.545e-13 kg; data quality (4,2,1,1,5)
- toluene, 2,4-dinitro-: 3.25172e-10 kg; data quality (5,2,1,1,3)
- Methane: 0.00399856 kg; data quality (4,2,1,4,1)
- Water, saline: 0.000697603 m3; data quality (4,2,1,4,2)
- m-cresol: 7.75026e-10 kg; data quality (4,2,1,1,1)
- pentachlorophenol: 9.77097e-11 kg; data quality (3,2,1,1,2)
- chlorine: 7.21114e-7 kg; data quality (4,2,1,1,3)
- Phthalate, dimethyl-: 1.35449e-11 kg; data quality (4,2,1,1,1)
- phthalate, dioctyl-: 2.60527e-8 kg; data quality (3,2,1,1,3)
- Hydrazine, methyl-: 1.01668e-9 kg; data quality (2,2,1,1,2)
- carbon tetrachloride: 1.71833e-7 kg; data quality (4,2,1,1,3)
- hexachloroethane: 8.66769e-8 kg; data quality (4,2,1,1,1)
- hexachlorobenzene: 3.51996e-10 kg; data quality (3,2,1,1,3)
- Formic acid: 3.15799e-7 kg; data quality (3,1,1,1,2)
- Benzo(k)fluoranthene: 4.9587e-11 kg; data quality (2,2,1,1,3)
- 2,4,5-trichlorophenol: 5.72851e-11 kg; data quality (2,2,1,1,1)
- dibenzofuran: 3.32056e-11 kg; data quality (4,2,1,1,1)
- 1,2,4-trichlorobenzene: 6.55382e-7 kg; data quality (4,2,1,1,3)
- Chromium, ion: 3.4375e-8 kg; data quality (2,2,1,1,3)
- 2,2,4-trimethylpentane: 3.14412e-8 kg; data quality (3,2,1,4,1)
- formic acid: 1.00799e-9 kg; data quality (3,1,1,1,3)
- 1,1,1-trichloroethane: 2.59875e-7 kg; data quality (4,2,1,1,3)
- QUINOLINE: 1.25891e-10 kg; data quality (3,2,1,1,3)
- o-cresol: 4.8229e-7 kg; data quality (4,2,1,1,3)
- epichlorohydrin: 1.30694e-8 kg; data quality (3,2,1,1,3)
- ethyl acrylate: 1.2459e-9 kg; data quality (4,2,1,1,1)
- PCB-1: 1.44986e-15 kg; data quality (2,2,1,1,1)
- aniline: 4.49091e-10 kg; data quality (4,2,1,1,3)
- butadiene: 1.61246e-8 kg; data quality (3,2,1,4,1)
- N,N-DIMETHYLANILINE: 8.77529e-12 kg; data quality (5,2,1,1,1)
- manganese: 4.93134e-7 kg; data quality (3,2,1,1,3)
- Triethyl amine: 2.01374e-8 kg; data quality (3,2,1,1,3)
- Acetaldehyde: 7.72512e-10 kg; data quality (3,1,1,1,3)
- Phosphorus: 0.000129558 kg; data quality (2,1,1,1,1)
- sulfur dioxide: 0.0012262 kg; data quality (2,2,1,1,3)
- Phthalate, dibutyl-: 2.48691e-8 kg; data quality (4,2,1,1,3)
- acetonitrile: 7.1031e-16 kg; data quality (3,2,1,1,1)
- Vinyl acetate: 4.35709e-13 kg; data quality (4,1,1,1,4)
- acrylic acid: 9.63113e-10 kg; data quality (4,2,1,1,1)

## Inventory method
Input-output

## Modelling constants
The reference unit of all processes is 1 USD2013 of the good or service. The technosphere inputs are based on the US BEA detailed input-output tables for 2007. The IO tables are combined to develop a commodity-by-commodity model based on the the industry-technology assumption (see Suh et al., 2010), which assumes all commodities produced by a given industry have the same input structure, but that multiple industries can produce the same commodity. Thus, model technosphere flows represent commodity outputs (and not industry outputs) from other processes in the model. There are no by-products included in these processes. All commodity production is based on US-conditions, despite in reality that some goods and services are produced overseas, as USEEIO v1.1 is a single-region IO model.

## Completeness
The input-output approach assures that all purchased inputs associated with the sectors making these commodities as reported in the US census for 2007 are included. The direct resources extracted including minerals, energy sources, water and land occupied are included. Emissions to air include all critieria air pollutants, greenhouse gases, and hazardous and toxic air pollutants as defined by US EPA. Releases to water include toxics, total nitrogen and total phosphorus, and water discharges. Releases to soil or groundwater include toxics and agriculutural pesticides. Some metal releases to air, water and soil are not included because they could not be speciated. Solid hazardous and non-hazardous wastes generated are not included as an elementary flows although purchases of waste services are included.

## Data treatment
Greenhouse gases are primarily from the US Greenhouse Gas Emission Inventory (USEPA 2016a). Biogenic C uptake is not included (change from version 1.0), as biogenic C emission are not included. Toxic releases to air, water and soil (except pesticides) are from the 2013 Toxic Release Inventory (USEPA 2015a). Criteria air pollutants and hazardous air pollutants are from the 2011 National Emissions Inventory (USEPA 2015b). All estimates are normalized by industry based on sector output in the data year, then converted to 2013 USD using relative sector-specific CPIs (if data year is not 2013). Energy use represent raw renewables or fossil fuel energies and is based on EIA data for 2014. See Table 1 in Yang, Ingwersen et al. 2017 and Supporting Information 1, and the v1.1 data update notes (Ingwersen et al. 2017) for all details on environmental data sources used.Land occupation associated with manufacturing buildings was estimated based on the building floorspace data provided by the U.S. Energy Information Administration in the 2010 Manufacturing Energy Consumption Survey (EIA 2013). Portions of total renewable energy (EIA 2016) based on EIA-923 reports for 2014 (EIA 2017) are included. Nitrogen and Phosphorus releases are modeled in total N and total P equivalents as estimated by the Discharge Monitoring Report Nutrient Loading tool (USEPA 2016b). Self-supplied withdrawals were assigned to industrial sectors based on water use statistics for Canadian industries by NAICS 3-digit sector scaled to US production levels based on gross domestic product by industry (BEA 2015; Statistics Canada 2010), and further disaggregated to the manufacturing sectors based on compensation of employees as provided by the 2007 IO tables (BEA 2015). Water withdrawals associated with public supply were allocated to sectors based on their use of water, sewage, and other services in USD based on the IO tables (BEA 2015). Portions of total renewable energy (EIA 2016) by type are assigned to sectors (hydro, wind, solar, or) based on EIA-923 reports for 2014 (EIA 2017).

## Data collection
2015-2016

## Sampling procedure
US federal government sources, including surveys and US EPA emissions databases are used as the primary sources. From these sources, data for US reporting establishments/facilities are aggregated by the NAICS sector as defined in the BEA detailed 2007 input-output tables. When level of sector aggregation differs, or when direct emissions are not reported but modeled, additional sources are used to make allocations and estimates.

## Review details
In regard to quality assurance and peer-review, each dataset created went through Quality Assurance as defined in a quality assurance project plans at US EPA, CSRA or ERG. The model was assembled with the IO model builder model (USEPA 2016c). Validation functions were used to check that all the model components were properly assembled and harmonized. Bayou Demeke and Santosh Ghimire provided internal peer review of the model methodology and the manuscript underwent standard EPA management review. An editor and two anonymous reviewers at the Journal of Cleaner Production reviewed the model. In regard to data quality evaluation, data quality assessment was performed at the flow and process levels according to the updated US EPA data quality assessment guidelines as defined in US EPA (2016b).

## Intended application
The primary application is for use in the US Environmentally-Extended Input-Ouput model, USEEIO, version 1.1. This model is being used by the US EPA for supporting tools that prioritize goods and services based on potential environmental impacts, resource use or emissions for large regions, including the US and US states, and as a strealined tool for organizations as a starting point to consider sustainable materials management. Model results are designed to provide meso/macro-level decision support.

## Project
USEEIO v1.1 was developed by the US EPA with CSRA and ERG with Wesley W. Ingwersen and David E. Meyer as research leads. Yi Yang was the technical lead on the work for CSRA (contract EP-C-15-012); Troy Hawkins was lead for ERG (contract EP-C-12-021).

## Sources
- USEPA 2016c
- BEA 2015
- Kim et el. 2013
- Blackhurst et al. 2010
- USGS 2015
- USDA 2016
- EIA 2017
- Nickerson et al. 2011
- USDA 2006
- EIA 2013
- Ingwersen et al. DRAFT
- Lovelace 2009
- USEPA 2015b
- USDA 2014
- Statistics Canada 2010
- USGS 2016
- USDA 2009a
- BLM 2008
- Goebes et al. 2003
- Edelen and Ingwersen 2017
- EIA 2015
- Yienger et al. 1995
- Macknick et al. 2011
- EIA 2016
- Ingwersen et al. 2017
- USDA 2009b
- USEPA 2016b
- Maupin et al. 2014
- USEPA 2015a
- USEPA 2016a
- Torcellini et al. 2003
