# Lessors of nonfinancial intangible assets

Dataset: openLCA process, unit process
Category: 53: Real Estate and Rental and Leasing
Geography: United States
Time period: 2017-01-01 to 2017-12-31
Data quality: US EPA - Process Pedigree Matrix (1;1)
Exchange data quality scheme: US EPA - Flow Pedigree Matrix
Generated by: US EPA with CSRA and ERG
Owner: US EPA
Published in: Yang, Ingwersen et al. 2017
restrictionsDescription: This model shold be appropriately cited (see Yang, Ingwersen et al. 2017 source or Publication field) when used. Any changes or derivations of this model by the user should be documented. The model itself and any results from use of this model shall not be construed to consitute US EPA opinion or policy.
copyright: false

## General comment
BEA Code & Name is '533000:Lessors of nonfinancial intangible assets'. Description of the primary industry producing this good or service, adapted from the Census Bureau NAICS 2007 descriptions: Industries in the Lessors of Nonfinancial Intangible Assets (except Copyrighted Works) subsector include establishments that are primarily engaged in assigning rights to assets, such as patents, trademarks, brand names, and/or franchise agreements for which a royalty payment or licensing fee is paid to the asset holder. Establishments in this subsector own the patents, trademarks, and/or franchise agreements that they allow others to use or reproduce for a fee and may or may not have created those assets. Establishments that allow franchisees the use of the franchise name, contingent on the franchisee buying products or services from the franchisor, are classified elsewhere. Excluded from this subsector are establishments primarily engaged in leasing real property and establishments primarily engaged in leasing tangible assets, such as automobiles, computers, consumer goods, and industrial machinery and equipment. These establishments are classified in Subsector 531, Real Estate and Subsector 532, Rental and Leasing Services, respectively.

## Technology
The process describes the average US production of this good or service within this NAICS-based grouping defined in the BEA 2007 detailed input-output tables (BEA 2015). Distribution, wholesale and retailing of this good or service, use, and final disposal are not included. Creation of a product system with this process will enable modeling of all upstream (supply-chain) activities.

## Geography
Data represent the 50 US states

## Time period
2017 was the year in which this version of USEEIO was released and is the target date for the model

## Reference product
- Lessors of nonfinancial intangible assets: 1 USD

## Inputs from technosphere
All rows: data quality (1,3,1,1,1)
- Legal services: 0.0316657 USD
- Insurance carriers: 0.0137741 USD
- Electronic capacitors, resistors, coils, transformers, connectors and other components (except semiconductors and printed circuit assemblies); at manufacturer: 7.36583e-6 USD
- Air transport: 0.000412487 USD
- Wholesale trade: 0.00105331 USD
- Buildings and dwellings services: 0.0044195 USD
- Drinking water and wastewater treatment; at consumer: 0.000515608 USD
- Securities and commodities brokerage and exchanges: 0.000648193 USD
- Waste management and remediation: 0.00377867 USD
- Light gauge metal cans, boxes, and containers; at manufacturer: 7.36583e-6 USD
- Insurance agencies and brokerages: 0.000162048 USD
- All other converted paper products; at manufacturer: 7.36583e-6 USD
- Commercial machinery repair: 0.000449316 USD
- Vehicle repair: 0.000228341 USD
- Unrefined oil and gas; at extraction site: 3.68292e-5 USD
- Nondepository credit intermediation and related activities: 0.019571 USD
- Management consulting: 0.00547281 USD
- Travel arrangement and reservation: 0.00418379 USD
- Environmental and other technical consulting services: 0.00431638 USD
- Civic, social, professional, and similar organizations: 0.00636408 USD
- Investment advice, portfolio management, and other financial advising services: 0.00811715 USD
- Company and enterprise management: 0.000132585 USD
- Full-service restaurants: 0.000994387 USD
- Glass and glass products; at manufacturer: 3.68292e-5 USD
- Rail transport: 4.4195e-5 USD
- Facilities support: 0.0150189 USD
- Electricity; at consumer: 0.000316731 USD
- Office administration: 0.00833812 USD
- Internet publishing and broadcasting: 0.00955348 USD
- Electronic equipment repair and maintenance: 0.000139951 USD
- Veneer, plywood, and engineered wood; at manufacturer: 4.4195e-5 USD
- Hotels and campgrounds: 0.00130375 USD
- Plastic bags, films, and sheets; at manufacturer: 0.00017678 USD
- Screws, nuts, and bolts; at manufacturer: 5.15608e-5 USD
- All other food and drinking places: 0.000508242 USD
- Advertising and public relations: 0.0233939 USD
- Commercial equipment rental: 0.00182673 USD
- Other textiles; at manufacturer: 7.36583e-6 USD
- Truck transport: 0.000648193 USD
- Metal pipe fittings, ball and roller bearings, industrial patterns, metal bath fixtures, other misc. fabricated metals; at manufacturer: 0.0014437 USD
- Other computer related services, including facilities management: 0.00368292 USD
- Other real estate: 0.0148716 USD
- Paper; at manufacturer: 6.62925e-5 USD
- Telecommunications: 0.00658505 USD
- Paper bags and coated paper; at manufacturer: 0.000331462 USD
- Directory, mailing list, and other publishers; at publisher: 0.00369765 USD
- Gasoline, fuels, and by-products of petroleum refining; at manufacturer: 0.000213609 USD
- Household goods repair: 0.000125219 USD
- Wireless communications; at manufacturer: 0.000110487 USD
- Warehousing: 0.00115644 USD
- Employment services: 0.0165658 USD
- Computer systems design: 0.0316952 USD
- Computer terminals and other computer peripheral equipment; at manufacturer: 0.000294633 USD
- Secondary steel products; at manufacturer: 7.36583e-6 USD
- News syndicates, libraries, archives, Internet publishing and all other information services: 0.00246019 USD
- Nonresidential building repair and maintanence: 0.00026517 USD
- Architectural, engineering, and related services: 0.00724798 USD
- Books, newspapers, magazines, and other print media; at manufacturer: 0.00184882 USD
- Couriers and messengers: 0.0043974 USD
- Other support services: 0.00537706 USD
- Monetary authorities and depository credit intermediation: 0.084022 USD
- Gaskets, seals, musical instruments, fasteners, brooms, brushes, mop and other misc. goods; at manufacturer: 2.20975e-5 USD
- Postal service: 0.00313048 USD
- Specialized design: 0.000589267 USD
- Other plastic products; at manufacturer: 0.000449316 USD
- Investigation and security: 0.00227604 USD
- Limited-service restaurants: 0.00135531 USD
- Polystyrene foam products; at manufacturer: 2.94633e-5 USD
- Consumer goods and general rental centers: 0.000405121 USD
- Magazines and journals; at publisher: 0.000338828 USD
- Scenic and sightseeing transportation and support activities for transportation: 0.00307155 USD
- Wireless telecommunications: 0.00338092 USD
- Noncomparable imports: 0.00207716 USD
- State and local government enterprises: 0.00110487 USD
- Software: 0.000397755 USD
- Natural gas; at consumer: 0.000257804 USD
- Satellite, telecommunications resellers, and all other telecommunications: 0.000994387 USD
- Lessors of nonfinancial intangible assets: 0.00712276 USD
- Accounting, tax preparation, bookkeeping, and payroll: 0.033846 USD
- Communications equipment; at manufacturer: 1.47317e-5 USD
- Vehicle rental and leasing: 0.00386706 USD
- Data processing and hosting: 0.000427218 USD
- Cardboard; at manufacturer: 0.000854436 USD
- Business support: 0.0451525 USD
- Plastic bottles; at manufacturer: 9.57558e-5 USD
- Other basic organic chemicals; at manufacturer: 0.000162048 USD
- Urethane and other foam products; at manufacturer: 4.4195e-5 USD
- Cardboard containers; at manufacturer: 0.000950192 USD
- Plastic pipe, fittings, and sausage casings; at manufacturer: 6.62925e-5 USD

## Inputs from nature
- Occupation, urban, discontinuously built: 1.28188e-5 m2*a; data quality (4,2,1,1,1)
- Water, fresh: 0.000170366, 0.000294835 m3 (2 entries, compartments not in this file); data quality (1,2,1,4,2)

## Emissions to nature
- particulates, < 2.5 um: 1.03192e-8 kg; data quality (3,2,1,4,1)
- Dibenz(a,h)anthracene: 1.35281e-15 kg; data quality (3,2,1,4,1)
- Ethane, 1,1,1,2-tetrafluoro-, HFC-134a: 8.19421e-9 kg; data quality (4,2,1,4,1)
- o-Xylene: 8.97882e-11 kg; data quality (3,2,1,4,1)
- toluene: 7.21502e-9 kg; data quality (3,2,1,4,1)
- Chromium, ion: 2.9011e-13 kg; data quality (3,2,1,5,1)
- Carbon dioxide: 0.00107865 kg; data quality (4,2,1,4,1)
- benzo(a)pyrene: 1.97881e-13 kg; data quality (3,2,1,4,1)
- acetaldehyde: 1.21506e-9 kg; data quality (3,2,1,4,1)
- pyrene: 2.38831e-12 kg; data quality (3,2,1,4,1)
- sulfur dioxide: 3.5988e-10 kg; data quality (3,2,1,4,1)
- acenaphthylene: 7.1418e-12 kg; data quality (3,2,1,4,1)
- acenaphthene: 1.83941e-12 kg; data quality (3,2,1,4,1)
- formaldehyde: 2.60179e-9 kg; data quality (3,2,1,4,1)
- mercury: 6.05777e-15 kg; data quality (3,2,1,5,1)
- styrene: 7.28021e-11 kg; data quality (3,2,1,4,1)
- m-xylene: 2.50169e-10 kg; data quality (3,2,1,4,1)
- hexane: 1.59253e-9 kg; data quality (3,2,1,4,1)
- fluorene: 3.37838e-12 kg; data quality (3,2,1,4,1)
- manganese: 2.03569e-13 kg; data quality (3,2,1,5,1)
- carbon monoxide: 2.8243e-6 kg; data quality (3,2,1,1,1)
- Hydrocarbons, aromatic: 5.22995e-11 kg; data quality (3,2,1,4,1)
- benzene: 4.74604e-9 kg; data quality (3,2,1,4,1)
- Water, fresh: 0.000393892 m3; data quality (1,2,1,4,2)
- nickel: 7.85031e-13 kg; data quality (3,2,1,5,1)
- Chrysene: 1.97945e-13 kg; data quality (3,2,1,4,1)
- Benzo(g,h,i)perylene: 5.63616e-13 kg; data quality (3,2,1,4,1)
- acrolein: 9.73914e-11 kg; data quality (3,2,1,4,1)
- nitrogen oxides: 1.40354e-7 kg; data quality (3,2,1,1,1)
- Benzo(b)fluoranthene: 2.12886e-13 kg; data quality (3,2,1,4,1)
- naphthalene: 1.61631e-10 kg; data quality (3,2,1,4,1)
- VOC, volatile organic compounds: 1.28381e-7 kg; data quality (3,2,1,1,1)
- ammonia: 4.0953e-10 kg; data quality (3,2,1,4,1)
- Ethane, pentafluoro-, HFC-125: 2.17403e-9 kg; data quality (4,2,1,4,1)
- Chromium VI: 8.71409e-14 kg; data quality (3,2,1,5,1)
- Methane: 9.74451e-8 kg; data quality (4,2,1,4,1)
- 2,2,4-trimethylpentane: 2.65284e-9 kg; data quality (3,2,1,4,1)
- Xylene: 6.087e-9 kg; data quality (3,2,1,4,1)
- Methane, difluoro-, HFC-32: 1.26606e-9 kg; data quality (4,2,1,4,1)
- propanal: 2.65156e-10 kg; data quality (3,2,1,4,1)
- Dinitrogen monoxide: 2.32484e-9 kg; data quality (4,2,1,4,1)
- arsenic: 3.88567e-13 kg; data quality (3,2,1,5,1)
- fluoranthene: 1.90045e-12 kg; data quality (3,2,1,4,1)
- particulates, < 10 um: 5.35864e-10 kg; data quality (3,2,1,4,1)
- Indeno(1,2,3-cd)pyrene: 1.7264e-13 kg; data quality (3,2,1,4,1)
- butadiene: 7.69917e-10 kg; data quality (3,2,1,4,1)
- Ethane, 1,1,1-trifluoro-, HFC-143a: 9.30179e-10 kg; data quality (4,2,1,4,1)
- anthracene: 1.42515e-12 kg; data quality (3,2,1,4,1)
- phenanthrene: 6.05945e-12 kg; data quality (3,2,1,4,1)
- benz[a]anthracene: 2.07036e-13 kg; data quality (3,2,1,4,1)
- para-xylene: 4.68205e-12 kg; data quality (3,2,1,4,1)
- Benzo(k)fluoranthene: 2.09251e-13 kg; data quality (3,2,1,4,1)
- benzene, ethyl-: 1.86475e-9 kg; data quality (3,2,1,4,1)
- Propane, 1,1,1,3,3,3-hexafluoro-, HCFC-236fa: 2.5129e-11 kg; data quality (4,2,1,4,1)

## Inventory method
Input-output

## Modelling constants
The reference unit of all processes is 1 USD2013 of the good or service. The technosphere inputs are based on the US BEA detailed input-output tables for 2007. The IO tables are combined to develop a commodity-by-commodity model based on the the industry-technology assumption (see Suh et al., 2010), which assumes all commodities produced by a given industry have the same input structure, but that multiple industries can produce the same commodity. Thus, model technosphere flows represent commodity outputs (and not industry outputs) from other processes in the model. There are no by-products included in these processes. All commodity production is based on US-conditions, despite in reality that some goods and services are produced overseas, as USEEIO v1.1 is a single-region IO model.

## Completeness
The input-output approach assures that all purchased inputs associated with the sectors making these commodities as reported in the US census for 2007 are included. The direct resources extracted including minerals, energy sources, water and land occupied are included. Emissions to air include all critieria air pollutants, greenhouse gases, and hazardous and toxic air pollutants as defined by US EPA. Releases to water include toxics, total nitrogen and total phosphorus, and water discharges. Releases to soil or groundwater include toxics and agriculutural pesticides. Some metal releases to air, water and soil are not included because they could not be speciated. Solid hazardous and non-hazardous wastes generated are not included as an elementary flows although purchases of waste services are included.

## Data treatment
Greenhouse gases are primarily from the US Greenhouse Gas Emission Inventory (USEPA 2016a). Biogenic C uptake is not included (change from version 1.0), as biogenic C emission are not included. Toxic releases to air, water and soil (except pesticides) are from the 2013 Toxic Release Inventory (USEPA 2015a). Criteria air pollutants and hazardous air pollutants are from the 2011 National Emissions Inventory (USEPA 2015b). All estimates are normalized by industry based on sector output in the data year, then converted to 2013 USD using relative sector-specific CPIs (if data year is not 2013). Energy use represent raw renewables or fossil fuel energies and is based on EIA data for 2014. See Table 1 in Yang, Ingwersen et al. 2017 and Supporting Information 1, and the v1.1 data update notes (Ingwersen et al. 2017) for all details on environmental data sources used.Land occupation for commercial buildings was estimated based on the building floorspace data provided by the U.S. Energy Information Administration 2012 Commercial Building Energy Consumption Survey (CBECS) (EIA 2015). Total commercial public supply water use is reported by USGS (Maupin et al. 2014). Water use is allocated across commercial sectors based on their use of water, sewage, and other services in USD based on the 2007 Benchmark Use Table before redefinitions (BEA 2015).

## Data collection
2015-2016

## Sampling procedure
US federal government sources, including surveys and US EPA emissions databases are used as the primary sources. From these sources, data for US reporting establishments/facilities are aggregated by the NAICS sector as defined in the BEA detailed 2007 input-output tables. When level of sector aggregation differs, or when direct emissions are not reported but modeled, additional sources are used to make allocations and estimates.

## Review details
In regard to quality assurance and peer-review, each dataset created went through Quality Assurance as defined in a quality assurance project plans at US EPA, CSRA or ERG. The model was assembled with the IO model builder model (USEPA 2016c). Validation functions were used to check that all the model components were properly assembled and harmonized. Bayou Demeke and Santosh Ghimire provided internal peer review of the model methodology and the manuscript underwent standard EPA management review. An editor and two anonymous reviewers at the Journal of Cleaner Production reviewed the model. In regard to data quality evaluation, data quality assessment was performed at the flow and process levels according to the updated US EPA data quality assessment guidelines as defined in US EPA (2016b).

## Intended application
The primary application is for use in the US Environmentally-Extended Input-Ouput model, USEEIO, version 1.1. This model is being used by the US EPA for supporting tools that prioritize goods and services based on potential environmental impacts, resource use or emissions for large regions, including the US and US states, and as a strealined tool for organizations as a starting point to consider sustainable materials management. Model results are designed to provide meso/macro-level decision support.

## Project
USEEIO v1.1 was developed by the US EPA with CSRA and ERG with Wesley W. Ingwersen and David E. Meyer as research leads. Yi Yang was the technical lead on the work for CSRA (contract EP-C-15-012); Troy Hawkins was lead for ERG (contract EP-C-12-021).

## Sources
- Lovelace 2009
- USGS 2016
- USDA 2009b
- USGS 2015
- Yienger et al. 1995
- USDA 2006
- Macknick et al. 2011
- EIA 2013
- Ingwersen et al. DRAFT
- Edelen and Ingwersen 2017
- EIA 2017
- Maupin et al. 2014
- Nickerson et al. 2011
- USEPA 2016b
- USDA 2009a
- Ingwersen et al. 2017
- USEPA 2016c
- BEA 2015
- USEPA 2015b
- Statistics Canada 2010
- Torcellini et al. 2003
- Blackhurst et al. 2010
- EIA 2016
- Goebes et al. 2003
- USDA 2016
- Kim et el. 2013
- USDA 2014
- USEPA 2015a
- EIA 2015
- USEPA 2016a
- BLM 2008
