# Timber and raw forest products; at forest

Dataset: openLCA process, unit process
Category: 11: Agriculture, Forestry, Fishing and Hunting
Geography: United States
Time period: 2017-01-01 to 2017-12-31
Data quality: US EPA - Process Pedigree Matrix (1;2)
Exchange data quality scheme: US EPA - Flow Pedigree Matrix
Generated by: US EPA with CSRA and ERG
Owner: US EPA
Published in: Yang, Ingwersen et al. 2017
restrictionsDescription: This model shold be appropriately cited (see Yang, Ingwersen et al. 2017 source or Publication field) when used. Any changes or derivations of this model by the user should be documented. The model itself and any results from use of this model shall not be construed to consitute US EPA opinion or policy.
copyright: false

## General comment
BEA Code & Name is '113000:Forestry and logging'. Description of the primary industry producing this good or service, adapted from the Census Bureau NAICS 2007 descriptions: Industries in the Forestry and Logging subsector grow and harvest timber on a long production cycle (i.e., of 10 years or more). Long production cycles use different production processes than short production cycles, which require more horticultural interventions prior to harvest, resulting in processes more similar to those found in the Crop Production subsector. Consequently, Christmas tree production and other production involving production cycles of less than 10 years, are classified in the Crop Production subsector. Industries in this subsector specialize in different stages of the production cycle. Reforestation requires production of seedlings in specialized nurseries. Timber production requires natural forest or suitable areas of land that are available for a long duration. The maturation time for timber depends upon the species of tree, the climatic conditions of the region, and the intended purpose of the timber. The harvesting of timber (except when done on an extremely small scale) requires specialized machinery unique to the industry. Establishments gathering forest products, such as gums, barks, balsam needles, rhizomes, fibers, Spanish moss, and ginseng and truffles, are also included in this subsector.

## Technology
The process describes the average US production of this good or service within this NAICS-based grouping defined in the BEA 2007 detailed input-output tables (BEA 2015). Distribution, wholesale and retailing of this good or service, use, and final disposal are not included. Creation of a product system with this process will enable modeling of all upstream (supply-chain) activities.

## Geography
Data represent the 50 US states

## Time period
2017 was the year in which this version of USEEIO was released and is the target date for the model

## Reference product
- Timber and raw forest products; at forest: 1 USD

## Inputs from technosphere
All rows: data quality (1,3,1,1,1)
- Lessors of nonfinancial intangible assets: 7.20011e-5 USD
- Animal farms and aquaculture ponds (except cattle and poultry): 0.000903654 USD
- Other plastic products; at manufacturer: 1.81647e-5 USD
- Timber and raw forest products; at forest: 0.159263 USD
- Concrete pipe, bricks, and blocks; at manufacturer: 2.64214e-5 USD
- Other basic inorganic chemicals; at manufacturer: 6.99893e-5 USD
- Used and secondhand goods: 1.65134e-6 USD
- Computers; at manufacturer: 3.30267e-6 USD
- Packaged meat (except poultry); at manufacturer: 2.95457e-6 USD
- Rubber and plastic belts and hoses; at manufacturer: 7.23847e-6 USD
- Veneer, plywood, and engineered wood; at manufacturer: 1.67244e-5 USD
- Stationery; at manufacturer: 1.86238e-6 USD
- Vehicle repair: 0.00210919 USD
- Electricity; at consumer: 0.000969423 USD
- Other basic organic chemicals; at manufacturer: 0.000401275 USD
- Performances: 2.07342e-6 USD
- Poultry farms: 4.95401e-6 USD
- Plastic pipe, fittings, and sausage casings; at manufacturer: 1.65134e-5 USD
- Vehicle electrical and electronic equipment; at manufacturer: 5.04582e-5 USD
- Employment services: 1.09741e-5 USD
- Lumber and treated lumber; at manufacturer: 0.0137472 USD
- Chemicals (except basic chemicals, agrichemicals, polymers, paints, pharmaceuticals,soaps, cleaning compounds); at manufacturer: 2.21375e-5 USD
- Machinery for the paper, textile, food or other industries (except semiconductor machinery); at manufacturer: 2.14674e-5 USD
- Pharmaceutical products (pills, powders, solutions, etc.); at manufacturer: 1.26624e-6 USD
- Other support services: 0.00010437 USD
- Monetary authorities and depository credit intermediation: 0.00198108 USD
- Books, newspapers, magazines, and other print media; at manufacturer: 5.23961e-5 USD
- Agriculture and forestry support: 0.1457 USD
- Metal hinges, keys, lock, and other hardware; at manufacturer: 4.7231e-5 USD
- Travel arrangement and reservation: 0.000101067 USD
- Buildings and dwellings services: 0.000546483 USD
- Rubber tires; at manufacturer: 0.000136762 USD
- All other food and drinking places: 4.14684e-6 USD
- Welding and Soldering Equipment, Scales and Balances, and other general purpose machinery; at manufacturer: 1.38438e-5 USD
- Storage batteries; at manufacturer: 5.74857e-5 USD
- Fertilizers; at manufacturer: 0.00101392 USD
- Metal structural products; at manufacturer: 1.40549e-5 USD
- Other textiles; at manufacturer: 3.96321e-5 USD
- Advertising and public relations: 0.000144996 USD
- Nonresidential building repair and maintanence: 0.00112271 USD
- Pipeline transport: 0.000163794 USD
- Other petroleum and coal products; at manufacturer: 4.7231e-5 USD
- Other computer related services, including facilities management: 0.000458143 USD
- Household goods repair: 0.00132247 USD
- Metal pipe fittings, ball and roller bearings, industrial patterns, metal bath fixtures, other misc. fabricated metals; at manufacturer: 0.000121728 USD
- Coal; at mine: 9.4462e-5 USD
- Accounting, tax preparation, bookkeeping, and payroll: 0.000735369 USD
- Tobacco, cotton, sugarcane, peanuts, sugar beets, herbs and spices, and other crops; at farm: 0.000856058 USD
- Truck transport: 0.0138274 USD
- Dairies: 6.33121e-7 USD
- Fresh wheat, corn, rice, and other grains; at farm: 0.000337475 USD
- Natural gas; at consumer: 0.00029452 USD
- Computer systems design: 0.000253513 USD
- Other real estate: 0.00190011 USD
- Limited-service restaurants: 1.34587e-5 USD
- Nondepository credit intermediation and related activities: 0.000793216 USD
- Full-service restaurants: 2.1104e-7 USD
- Noncomparable imports: 0.00113988 USD
- Vehicle engines and engine parts; at manufacturer: 0.000148932 USD
- Insurance carriers: 0.00191384 USD
- Breweries and beer; at manufacturer: 2.1104e-7 USD
- Material handling equipment; at manufacturer: 0.00023063 USD
- Other animal food; at manufacturer: 0.00171956 USD
- Business support: 4.93044e-5 USD
- Motor vehicle steering, suspension components (except spring), and brake systems; at manufacturer: 0.000188924 USD
- Gaskets, seals, musical instruments, fasteners, brooms, brushes, mop and other misc. goods; at manufacturer: 1.54952e-5 USD
- Distilleries and spirits; at manufacturer: 4.00977e-6 USD
- Other retail: 7.36894e-5 USD
- Light bulbs; at manufacturer: 1.65134e-6 USD
- Power tools; at manufacturer: 4.83108e-5 USD
- Postal service: 5.37609e-6 USD
- Waste management and remediation: 0.000283386 USD
- Water transport (boats, ships, ferries): 0.000112762 USD
- Air transport: 7.80103e-5 USD
- Drinking water and wastewater treatment; at consumer: 0.000491875 USD
- Wooden windows, door, and flooring; at manufacturer: 6.60535e-6 USD
- General merchandise stores: 4.88823e-5 USD
- Cardboard containers; at manufacturer: 6.70471e-5 USD
- Commercial machinery repair: 0.00505909 USD
- Pesticides; at manufacturer: 0.00121552 USD
- Corn products; at manufacturer: 8.44162e-7 USD
- Colleges, universities, junior colleges, and professional schools: 1.40918e-5 USD
- Soap and cleaning compounds; at manufacturer: 1.15594e-5 USD
- Leather; at manufacturer: 9.49682e-6 USD
- Veterinarians: 2.15261e-5 USD
- Secondary steel products; at manufacturer: 8.67876e-6 USD
- Investment advice, portfolio management, and other financial advising services: 0.000108939 USD
- Sports: 4.14684e-6 USD
- Lawn and garden equipment; at manufacturer: 8.25668e-6 USD
- Magazines and journals; at publisher: 1.07522e-5 USD
- Legal services: 0.000551374 USD
- Sand, gravel, clay, phosphate, other nonmetallic minerals; at mine: 7.96862e-5 USD
- Marketing research and all other miscellaneous professional, scientific, and technical services: 0.000226905 USD
- Plastic bags, films, and sheets; at manufacturer: 1.15594e-5 USD
- Insurance agencies and brokerages: 0.000228208 USD
- Vehicles and parts sales: 9.4462e-5 USD
- Machine shops; at manufacturer: 5.16505e-6 USD
- Cattle ranches and feedlots: 0.000102533 USD
- Transmission and power train parts; at manufacturer: 9.4462e-5 USD
- Electronic equipment repair and maintenance: 0.00209471 USD
- Dry, condensed, and evaporated dairy; at manufacturer: 8.44162e-7 USD
- Independent artists, writers, and performers: 0.000283386 USD
- Dimensional stone; at mine: 0.000108788 USD
- Environmental and other technical consulting services: 4.7231e-5 USD
- Civic, social, professional, and similar organizations: 2.33667e-5 USD
- Wholesale trade: 0.0454288 USD
- Warehousing: 0.000105981 USD
- Computer terminals and other computer peripheral equipment; at manufacturer: 1.65134e-6 USD
- Vehicle seating and interior trim (upholstery); at manufacturer: 1.65134e-6 USD
- Golf courses, marinas, ski resorts, fitness and other rec centers and industries: 5.20204e-6 USD
- Sanitary paper (tissues, napkins, diapers, etc.); at manufacturer: 3.51371e-6 USD
- Rail transport: 0.000940111 USD
- Other vehicle parts; at manufacturer: 0.000191729 USD
- Motors and generators; at manufacturer: 3.51371e-6 USD
- Sugar, candy, and chocolate; at manufacturer: 4.22081e-7 USD
- Wireless telecommunications: 0.000155785 USD
- Adhesives; at manufacturer: 4.95401e-6 USD
- Commercial equipment rental: 0.00431314 USD
- Telecommunications: 0.000338489 USD
- State and local government enterprises: 0.000141693 USD
- Securities and commodities brokerage and exchanges: 0.000278072 USD
- Software: 5.07447e-5 USD
- Farm machinery and equipment; at manufacturer: 0.00776538 USD
- Cutlery and handtools; at manufacturer: 8.57694e-5 USD
- Vehicle rental and leasing: 0.000514063 USD
- Vegetable oils and by-products; at manufacturer: 2.25813e-5 USD
- Fresh soybeans, canola, flaxseeds, and other oilseeds; at farm: 9.90802e-6 USD
- Flours and malts; at manufacturer: 2.95457e-6 USD
- Promoters and agents: 1.65134e-6 USD
- Gasoline, fuels, and by-products of petroleum refining; at manufacturer: 0.0263076 USD
- Architectural, engineering, and related services: 0.00496463 USD
- Satellite, telecommunications resellers, and all other telecommunications: 5.07447e-5 USD
- Vaccines and other biological medical products; at manufacturer: 6.33121e-7 USD

## Inputs from nature
- Occupation, pasture and meadow, intensive: 0.00537596 m2*a; data quality (2,3,1,1,1)
- Occupation, urban, discontinuously built: 0.00071358 m2*a; data quality (4,2,1,1,1)
- Occupation, industrial area: 4.77003e-5 m2*a; data quality (2,3,1,1,1)
- Water, fresh: 0.084104, 0.0393919 m3 (2 entries, compartments not in this file); data quality (4,3,1,4,2)
- Occupation, forest: 96.9121 m2*a; data quality (2,3,1,1,1)
- Occupation, pasture and meadow: 0.0516069 m2*a; data quality (2,3,1,1,1)
- Water, saline: 3.22601e-6 m3; data quality (4,2,1,1,2)
- Occupation, annual crop: 0.53841 m2*a; data quality (2,3,1,1,1)
- Occupation, pasture and meadow, extensive: 0.0020694 m2*a; data quality (2,3,1,1,1)
- Occupation, permanent crop: 0.00566719 m2*a; data quality (2,3,1,1,1)
- Energy, hydraulic potential: 0.000199977 MJ; data quality (3,1,1,1,1)

## Emissions to nature
- THIAMETHOXAM: 4.81426e-9, 1.71385e-9, 8.17046e-10 kg (3 entries, compartments not in this file); data quality (4,3,1,5,4)
- Endosulfan: 7.76493e-9, 1.31782e-9, 2.76428e-9 kg (3 entries, compartments not in this file); data quality (4,3,1,5,4)
- Thidiazuron: 1.38214e-8, 3.88247e-8, 6.58908e-9 kg (3 entries, compartments not in this file); data quality (4,3,1,5,4)
- 2,4-DB: 6.14355e-9, 1.28868e-8, 3.61995e-8 kg (3 entries, compartments not in this file); data quality (4,2,1,5,4)
- Chlorothalonil: 2.37939e-7, 3.17378e-7, 2.65177e-7 kg (3 entries, compartments not in this file); data quality (3,2,1,1,4)
- Carbon dioxide: 0.0986613 kg; data quality (4,2,1,4,1)
- isophorone: 2.22088e-11 kg; data quality (3,2,1,1,5)
- Glyphosate: 1.13831e-7, 2.27823e-7, 8.26952e-8 kg (3 entries, compartments not in this file); data quality (3,3,1,1,4)
- PETROLEUM DISTILLATE: 3.61082e-9, 7.57412e-9, 2.12759e-8 kg (3 entries, compartments not in this file); data quality (4,3,1,5,4)
- particulates, < 10 um: 0.00112245 kg; data quality (3,2,1,1,5)
- Chlorpyrifos: 1.51538e-8, 5.9882e-9, 5.67774e-10 kg (3 entries, compartments not in this file); data quality (3,2,1,2,4)
- Diflubenzuron: 1.0739e-9, 3.01662e-9, 5.11962e-10 kg (3 entries, compartments not in this file); data quality (4,2,1,5,4)
- IMAZAPIC-AMMONIUM: 9.89794e-10, 5.83213e-9, 2.07621e-9 kg (3 entries, compartments not in this file); data quality (4,2,1,5,4)
- Cyclanilide: 6.46841e-9, 3.08369e-9, 1.81699e-8 kg (3 entries, compartments not in this file); data quality (4,3,1,5,4)
- DICAMBA SODIUM SALT: 1.10571e-9, 3.10597e-9, 5.27127e-10 kg (3 entries, compartments not in this file); data quality (4,3,1,5,4)
- sulfur dioxide: 2.62351e-6 kg; data quality (3,2,1,3,2)
- Pendimethalin: 4.09701e-7, 1.66863e-8 kg (2 entries, compartments not in this file); data quality (3,3,1,1,4)
- pyrene: 2.26716e-8 kg; data quality (3,2,1,3,3)
- Oxamyl: 6.0324e-9, 1.50074e-8, 2.29354e-10 kg (3 entries, compartments not in this file); data quality (3,3,1,1,4)
- Flutolanil: 1.35312e-8, 3.80094e-8, 6.45073e-9 kg (3 entries, compartments not in this file); data quality (4,2,1,5,4)
- ZETA-CYPERMETHRIN: 1.24239e-9, 4.42284e-10, 2.10851e-10 kg (3 entries, compartments not in this file); data quality (4,3,1,5,4)
- SULFOSATE: 1.67723e-8, 5.97084e-9, 2.84648e-9 kg (3 entries, compartments not in this file); data quality (4,3,1,5,4)
- antimony: 4.86062e-12 kg; data quality (3,2,1,1,5)
- Malathion: 4.12293e-7, 1.05188e-8, 1.04354e-7 kg (3 entries, compartments not in this file); data quality (3,3,1,1,4)
- acrolein: 3.97301e-7 kg; data quality (3,2,1,4,1)
- toluene: 2.9006e-5 kg; data quality (3,2,1,4,1)
- fluoranthene: 2.30798e-8 kg; data quality (3,2,1,2,3)
- Ethalfluralin: 7.13334e-9, 1.4963e-8, 4.20316e-8 kg (3 entries, compartments not in this file); data quality (4,2,1,5,4)
- Aldicarb: 1.99227e-7, 6.04564e-8, 5.4196e-9 kg (3 entries, compartments not in this file); data quality (3,3,1,1,4)
- benzene: 8.10714e-6 kg; data quality (3,2,1,4,1)
- mercury: 6.5817e-11 kg; data quality (3,2,1,3,3)
- Quintozene: 7.23082e-12 kg; data quality (3,2,1,1,5)
- cadmium: 6.10376e-12 kg; data quality (3,2,1,1,5)
- LACTOFEN: 6.82616e-11, 1.43187e-10, 4.02216e-10 kg (3 entries, compartments not in this file); data quality (4,2,1,5,4)
- MONOCARBAMIDE DIHYD.: 1.32045e-8, 2.76981e-8, 7.78046e-8 kg (3 entries, compartments not in this file); data quality (4,3,1,5,4)
- phenol: 8.80099e-9 kg; data quality (3,2,1,1,5)
- benzene, ethyl-: 6.90199e-6 kg; data quality (3,2,1,4,1)
- FLONICAMID: 1.08709e-9, 3.86999e-10, 1.84494e-10 kg (3 entries, compartments not in this file); data quality (4,3,1,5,4)
- propanal: 7.99139e-7 kg; data quality (3,2,1,4,1)
- Acetochlor: 1.13484e-10, 6.31835e-9, 2.34843e-9 kg (3 entries, compartments not in this file); data quality (3,3,1,1,4)
- m-xylene: 1.77801e-6 kg; data quality (3,2,1,4,1)
- Indeno(1,2,3-cd)pyrene: 4.2299e-9 kg; data quality (3,2,1,2,4)
- Sulfur: 6.76949e-10, 8.06535e-10 kg (2 entries, compartments not in this file); data quality (3,2,1,2,4)
- TRIFLOXYSTROBIN: 7.15935e-11, 2.01108e-10, 3.41308e-11 kg (3 entries, compartments not in this file); data quality (4,2,1,5,4)
- chloroform: 1.58692e-10 kg; data quality (4,2,1,1,5)
- Fluometuron: 9.3565e-9, 5.5131e-8, 1.96264e-8 kg (3 entries, compartments not in this file); data quality (4,3,1,5,4)
- Diuron: 1.69713e-7, 3.78336e-8, 1.73748e-8 kg (3 entries, compartments not in this file); data quality (3,3,1,1,4)
- Hydrocarbons, aromatic: 3.99493e-7 kg; data quality (3,2,1,4,1)
- FLUBENDIAMIDE: 2.01108e-10, 3.41308e-11, 7.15935e-11 kg (3 entries, compartments not in this file); data quality (4,2,1,5,4)
- ACIFLUORFEN-SODIUM: 1.57506e-9, 4.42438e-9, 7.50878e-10 kg (3 entries, compartments not in this file); data quality (4,2,1,5,4)
- Lambda-cyhalothrin: 3.97409e-9, 6.74457e-10, 1.41475e-9 kg (3 entries, compartments not in this file); data quality (4,3,1,5,4)
- Ethephon: 6.31056e-7, 3.2976e-8, 1.38722e-6 kg (3 entries, compartments not in this file); data quality (3,3,1,1,4)
- PENTHIOPYRAD: 2.2194e-9, 1.05806e-9, 6.23435e-9 kg (3 entries, compartments not in this file); data quality (4,2,1,5,4)
- t-butyl methyl ether: 2.30554e-14 kg; data quality (3,2,1,1,5)
- acetophenone: 1.8136e-14 kg; data quality (4,2,1,1,5)
- cumene: 9.90678e-10 kg; data quality (3,2,1,1,5)
- chlorine: 1.93432e-9 kg; data quality (4,2,1,1,5)
- Propiconazole: 3.36612e-9, 1.65361e-8, 5.20994e-9 kg (3 entries, compartments not in this file); data quality (3,2,1,2,4)
- Bifenthrin: 2.36126e-9, 1.39132e-8, 4.95303e-9 kg (3 entries, compartments not in this file); data quality (4,3,1,5,4)
- Paraquat: 1.64808e-7, 8.15887e-8, 4.20444e-8 kg (3 entries, compartments not in this file); data quality (3,3,1,1,4)
- benzo(a)pyrene: 5.49991e-9 kg; data quality (3,2,1,2,4)
- Pyrithiobac sodium salt: 2.26671e-9, 6.36724e-9, 1.08061e-9 kg (3 entries, compartments not in this file); data quality (4,3,1,5,4)
- Phorate: 7.39045e-9, 4.35466e-8, 1.55024e-8 kg (3 entries, compartments not in this file); data quality (4,2,1,5,4)
- Mepiquat chloride: 1.06701e-8, 5.08677e-9, 2.99726e-8 kg (3 entries, compartments not in this file); data quality (4,3,1,5,4)
- Methane: 0.000219046 kg; data quality (4,2,1,4,1)
- PROTHIOCONAZOLE: 3.72286e-9, 1.7748e-9, 1.04576e-8 kg (3 entries, compartments not in this file); data quality (4,2,1,5,4)
- Dicamba: 4.01757e-9, 7.97879e-9, 2.25537e-8 kg (3 entries, compartments not in this file); data quality (4,3,1,5,4)
- Trifluralin: 2.09824e-7, 6.84384e-7, 2.55478e-8 kg (3 entries, compartments not in this file); data quality (3,3,1,1,4)
- methanol: 2.60249e-8 kg; data quality (3,2,1,1,5)
- Prometryn: 6.60019e-8, 1.12014e-8, 2.34964e-8 kg (3 entries, compartments not in this file); data quality (4,3,1,5,4)
- o-Xylene: 6.39348e-7 kg; data quality (3,2,1,4,1)
- Carfentrazone ethyl ester: 3.88247e-9, 1.38214e-9, 6.58908e-10 kg (3 entries, compartments not in this file); data quality (4,3,1,5,4)
- hydrogen fluoride: 9.36554e-12 kg; data quality (2,2,1,1,5)
- Glyphosate-isopropylammonium: 3.27943e-7, 5.79178e-7, 2.18864e-9 kg (3 entries, compartments not in this file); data quality (3,3,1,1,4)
- Flumiclorac-pentyl: 2.63563e-11, 5.52856e-11, 1.55299e-10 kg (3 entries, compartments not in this file); data quality (4,3,1,5,4)
- THIFENSULFURON: 2.63563e-11, 1.55299e-10, 5.52856e-11 kg (3 entries, compartments not in this file); data quality (4,3,1,5,4)
- ETOXAZOLE: 2.63563e-11, 1.55299e-10, 5.52856e-11 kg (3 entries, compartments not in this file); data quality (4,3,1,5,4)
- Propene, 1,3-dichloro-: 1.29749e-16 kg; data quality (3,2,1,1,5)
- ACETAMIPRID: 5.52856e-10, 1.55299e-9, 2.63563e-10 kg (3 entries, compartments not in this file); data quality (4,3,1,5,4)
- 2,4-D, 2-ETHYLHEXYL ESTER: 3.85982e-9, 7.61535e-9, 2.36848e-8 kg (3 entries, compartments not in this file); data quality (3,3,1,1,4)
- lead: 1.63678e-10 kg; data quality (3,2,1,1,5)
- formaldehyde: 1.51223e-5 kg; data quality (3,2,1,3,2)
- PYRACLOSTROBIN: 2.15823e-9, 3.38436e-9, 3.70287e-9 kg (3 entries, compartments not in this file); data quality (3,2,1,2,4)
- Tebuconazole: 6.75894e-8, 8.9125e-9, 2.50939e-8 kg (3 entries, compartments not in this file); data quality (3,2,1,1,4)
- SODIUM CHLORATE: 2.20963e-8, 6.72504e-9, 1.29119e-8 kg (3 entries, compartments not in this file); data quality (3,3,1,1,4)
- Dicrotophos: 2.06806e-7, 8.56309e-11, 5.81022e-9 kg (3 entries, compartments not in this file); data quality (3,3,1,1,4)
- beryllium: 6.76874e-13 kg; data quality (2,2,1,1,5)
- Cyfluthrin: 9.39855e-10, 2.64008e-9, 4.48058e-10 kg (3 entries, compartments not in this file); data quality (4,3,1,5,4)
- Flumioxazin: 2.08727e-8, 7.43058e-9, 3.54239e-9 kg (3 entries, compartments not in this file); data quality (4,2,1,5,4)
- IMAZAPIC: 2.4133e-9, 4.0957e-10, 8.59122e-10 kg (3 entries, compartments not in this file); data quality (4,2,1,5,4)
- DICLOSULAM: 2.86374e-10, 1.36523e-10, 8.04432e-10 kg (3 entries, compartments not in this file); data quality (4,2,1,5,4)
- S,S,S-tributyl phosphorotrithioate: 9.89247e-8, 1.20055e-8, 4.62133e-7 kg (3 entries, compartments not in this file); data quality (3,3,1,1,4)
- carbon tetrachloride: 2.5504e-10 kg; data quality (4,2,1,1,5)
- TRIFLOXYSULFURON-SOD: 4.65896e-10, 7.9069e-11, 1.65857e-10 kg (3 entries, compartments not in this file); data quality (4,3,1,5,4)
- Triethyl amine: 1.08464e-11 kg; data quality (3,2,1,1,5)
- Glufosinate-ammonium: 2.33044e-8, 2.5414e-8, 1.64611e-8 kg (3 entries, compartments not in this file); data quality (3,3,1,1,4)
- ethane, 1,2-dibromo-: 1.44085e-15 kg; data quality (2,2,1,1,5)
- Cobalt: 4.8596e-13 kg; data quality (3,2,1,1,5)
- bromoform: 1.37098e-15 kg; data quality (3,2,1,1,5)
- benz[a]anthracene: 7.13547e-9 kg; data quality (3,2,1,2,4)
- Azoxystrobin: 7.16438e-9, 7.29791e-9, 7.64176e-9 kg (3 entries, compartments not in this file); data quality (3,2,1,2,4)
- FOMESAFEN SODIUM: 1.26815e-8, 1.83283e-8, 4.26235e-8 kg (3 entries, compartments not in this file); data quality (3,3,1,1,4)
- Benzo(b)fluoranthene: 6.83364e-10 kg; data quality (3,2,1,4,1)
- PHOSPHORUS: 7.61488e-9 kg; data quality (3,2,1,1,5)
- Clomazone: 3.67925e-10, 7.13704e-10, 1.47457e-12 kg (3 entries, compartments not in this file); data quality (3,3,1,2,4)
- SULFUR: 1.79819e-9 kg; data quality (3,2,1,2,4)
- METHOXYFENOZIDE: 1.56306e-9, 5.5644e-10, 2.65272e-10 kg (3 entries, compartments not in this file); data quality (4,2,1,5,4)
- 2,4-D, DIMETHYLAMINE SALT: 3.44916e-8, 9.1992e-9, 2.77396e-8 kg (3 entries, compartments not in this file); data quality (3,3,1,1,4)
- Cypermethrin: 4.03776e-9, 1.43742e-9, 6.85265e-10 kg (3 entries, compartments not in this file); data quality (4,3,1,5,4)
- styrene: 4.03953e-7 kg; data quality (3,2,1,4,1)
- 1,4-dichlorobenzene: 9.69406e-10 kg; data quality (3,2,1,1,5)
- Clethodim: 1.87693e-9, 5.27235e-9, 8.94791e-10 kg (3 entries, compartments not in this file); data quality (4,3,1,5,4)
- ethane, 1,1,2-trichloro-: 1.56364e-16 kg; data quality (4,2,1,1,5)
- Acephate: 8.45188e-9, 3.21356e-7 kg (2 entries, compartments not in this file); data quality (3,3,1,1,4)
- methyl isobutyl ketone: 1.59031e-8 kg; data quality (3,2,1,1,5)
- acetonitrile: 2.34e-9 kg; data quality (3,2,1,1,5)
- Sethoxydim: 2.04785e-10, 1.20665e-9, 4.29561e-10 kg (3 entries, compartments not in this file); data quality (4,2,1,5,4)
- Water, fresh: 0.0296722 m3; data quality (4,3,1,1,2)
- DICHLOROPROPENE: 6.56827e-7, 5.52285e-9, 8.34939e-9 kg (3 entries, compartments not in this file); data quality (3,3,1,1,4)
- avermectin B1: 2.63563e-11, 1.55299e-10, 5.52856e-11 kg (3 entries, compartments not in this file); data quality (4,3,1,5,4)
- naphthalene: 2.03666e-7 kg; data quality (3,2,1,4,1)
- MEPIQUAT PENTABORATE: 1.32685e-9, 6.32552e-10, 3.72717e-9 kg (3 entries, compartments not in this file); data quality (4,3,1,5,4)
- Linuron: 1.70829e-9, 2.8992e-10, 6.08141e-10 kg (3 entries, compartments not in this file); data quality (4,3,1,5,4)
- fluorene: 1.40023e-8 kg; data quality (3,2,1,4,1)
- anthracene: 8.63264e-9 kg; data quality (3,2,1,2,4)
- ethane, 1,2-dichloro-: 1.64412e-10 kg; data quality (3,2,1,1,5)
- Methyl iodide: 1.29749e-11 kg; data quality (3,2,1,1,5)
- ethene, tetrachloro-: 2.24558e-10 kg; data quality (3,2,1,1,5)
- Pendimethalin: 2.02271e-8 kg; data quality (3,2,1,1,4)
- Bentazone: 1.3072e-8, 4.65358e-9, 2.2185e-9 kg (3 entries, compartments not in this file); data quality (4,2,1,5,4)
- Esfenvalerate: 3.56407e-10, 6.04871e-11, 1.26879e-10 kg (3 entries, compartments not in this file); data quality (4,2,1,5,4)
- MSMA: 1.52035e-8, 4.27071e-8, 7.24799e-9 kg (3 entries, compartments not in this file); data quality (4,3,1,5,4)
- Water, saline: 3.22601e-6 m3; data quality (4,2,1,4,2)
- methane, monochloro-, r-40: 3.2322e-9 kg; data quality (3,2,1,1,5)
- Dinitrogen monoxide: 9.25432e-5 kg; data quality (4,2,1,4,1)
- 2-methylnaphthalene: 1.39254e-16 kg; data quality (2,2,1,1,5)
- dibenzofuran: 4.98851e-10 kg; data quality (3,2,1,1,5)
- nickel: 2.88607e-9 kg; data quality (3,2,1,5,1)
- Dimethoate: 8.84569e-10, 4.21701e-10, 2.48478e-9 kg (3 entries, compartments not in this file); data quality (4,3,1,5,4)
- Acephate: 5.25508e-10 kg; data quality (3,2,1,2,4)
- Xylene: 2.67044e-5 kg; data quality (3,2,1,4,1)
- trichloroethylene: 1.70026e-10 kg; data quality (4,2,1,1,5)
- pentachlorophenol: 2.89043e-13 kg; data quality (3,2,1,1,5)
- NOVALURON: 5.27127e-10, 1.10571e-9, 3.10597e-9 kg (3 entries, compartments not in this file); data quality (4,3,1,5,4)
- Benzo(g,h,i)perylene: 1.01967e-8 kg; data quality (3,2,1,2,4)
- 1,1-DICHLOROETHYLENE: 3.32417e-15 kg; data quality (3,2,1,1,5)
- manganese: 1.01024e-9 kg; data quality (3,2,1,5,1)
- 2,2,4-trimethylpentane: 1.11521e-5 kg; data quality (3,2,1,4,1)
- PYRAFLUFEN-ETHYL: 3.10597e-10, 1.10571e-10, 5.27127e-11 kg (3 entries, compartments not in this file); data quality (4,3,1,5,4)
- 4-nitrophenol: 6.23425e-13 kg; data quality (2,2,1,1,5)
- hexane: 4.92353e-6 kg; data quality (3,2,1,4,1)
- Phosphorus: 9.64014e-6 kg; data quality (3,2,1,4,5)
- ammonia: 0.000172742 kg; data quality (3,2,1,1,5)
- Chromium VI: 2.14276e-10 kg; data quality (3,2,1,5,1)
- Metolachlor: 1.83684e-8, 6.02627e-8 kg (2 entries, compartments not in this file); data quality (3,2,1,1,4)
- Metolachlor: 4.97617e-7 kg; data quality (3,3,1,1,4)
- Imidacloprid: 2.92377e-9, 1.39385e-9, 8.21296e-9 kg (3 entries, compartments not in this file); data quality (4,3,1,5,4)
- nitrogen oxides: 0.000688044 kg; data quality (3,2,1,1,1)
- selenium: 2.01532e-12 kg; data quality (2,2,1,1,5)
- Ametryn: 4.29496e-8 kg; data quality (2,1,1,1,5)
- para-xylene: 1.60651e-8 kg; data quality (3,2,1,4,1)
- Metalaxyl-M: 1.55299e-10, 5.52856e-11, 2.63563e-11 kg (3 entries, compartments not in this file); data quality (4,3,1,5,4)
- particulates, < 2.5 um: 0.000381943 kg; data quality (3,2,1,1,4)
- Atrazine: 1.72355e-7 kg; data quality (2,1,1,1,5)
- Nitrogen: 0.000104785 kg; data quality (3,2,1,4,5)
- 1,1,2,2-tetrachloroethane: 7.44026e-14 kg; data quality (3,2,1,1,5)
- arsenic: 3.19356e-9 kg; data quality (3,2,1,5,1)
- Ethene, chloro-: 1.02032e-10 kg; data quality (3,2,1,1,5)
- benzene, chloro-: 3.75132e-9 kg; data quality (3,2,1,1,5)
- acenaphthene: 4.85851e-9 kg; data quality (3,2,1,4,1)
- methane, dichloro-, hcc-30: 1.44934e-9 kg; data quality (4,2,1,1,5)
- 2,4-dinitrophenol: 1.02015e-12 kg; data quality (5,2,1,1,5)
- Benzo(k)fluoranthene: 3.50425e-9 kg; data quality (3,2,1,2,4)
- Chrysene: 6.71429e-9 kg; data quality (3,2,1,2,4)
- 1,1,1-trichloroethane: 1.75695e-10 kg; data quality (4,2,1,1,5)
- carbon monoxide: 0.00369959 kg; data quality (3,2,1,1,1)
- biphenyl: 2.36029e-13 kg; data quality (4,2,1,1,5)
- methane, bromo-, halon 1001: 1.2401e-10 kg; data quality (3,2,1,1,5)
- Naphthalene: 7.01958e-11 kg; data quality (4,1,1,1,5)
- Dibenz(a,h)anthracene: 3.65067e-11 kg; data quality (3,2,1,4,1)
- phthalate, dioctyl-: 2.66373e-13 kg; data quality (3,2,1,1,5)
- VOC, volatile organic compounds: 0.000385189 kg; data quality (3,2,1,1,2)
- Propane, 1,2-dichloro-: 1.8709e-10 kg; data quality (4,2,1,1,5)
- SPIROMESIFEN: 1.55299e-10, 2.63563e-11, 5.52856e-11 kg (3 entries, compartments not in this file); data quality (4,3,1,5,4)
- Pendimethalin: 2.69536e-8 kg; data quality (5,1,1,1,5)
- acenaphthylene: 9.09211e-9 kg; data quality (3,2,1,4,1)
- phenanthrene: 3.46478e-8 kg; data quality (3,2,1,3,2)
- acetaldehyde: 6.27022e-6 kg; data quality (3,2,1,3,2)
- butadiene: 1.7875e-6 kg; data quality (3,2,1,3,2)
- Chromium, ion: 8.66416e-10 kg; data quality (3,2,1,5,1)
- hydrogen chloride: 4.9732e-8 kg; data quality (2,2,1,1,5)
- monochloroethane: 2.08485e-15 kg; data quality (3,2,1,1,5)

## Inventory method
Input-output

## Modelling constants
The reference unit of all processes is 1 USD2013 of the good or service. The technosphere inputs are based on the US BEA detailed input-output tables for 2007. The IO tables are combined to develop a commodity-by-commodity model based on the the industry-technology assumption (see Suh et al., 2010), which assumes all commodities produced by a given industry have the same input structure, but that multiple industries can produce the same commodity. Thus, model technosphere flows represent commodity outputs (and not industry outputs) from other processes in the model. There are no by-products included in these processes. All commodity production is based on US-conditions, despite in reality that some goods and services are produced overseas, as USEEIO v1.1 is a single-region IO model.

## Completeness
The input-output approach assures that all purchased inputs associated with the sectors making these commodities as reported in the US census for 2007 are included. The direct resources extracted including minerals, energy sources, water and land occupied are included. Emissions to air include all critieria air pollutants, greenhouse gases, and hazardous and toxic air pollutants as defined by US EPA. Releases to water include toxics, total nitrogen and total phosphorus, and water discharges. Releases to soil or groundwater include toxics and agriculutural pesticides. Some metal releases to air, water and soil are not included because they could not be speciated. Solid hazardous and non-hazardous wastes generated are not included as an elementary flows although purchases of waste services are included.

## Data treatment
Greenhouse gases are primarily from the US Greenhouse Gas Emission Inventory (USEPA 2016a). Biogenic C uptake is not included (change from version 1.0), as biogenic C emission are not included. Toxic releases to air, water and soil (except pesticides) are from the 2013 Toxic Release Inventory (USEPA 2015a). Criteria air pollutants and hazardous air pollutants are from the 2011 National Emissions Inventory (USEPA 2015b). All estimates are normalized by industry based on sector output in the data year, then converted to 2013 USD using relative sector-specific CPIs (if data year is not 2013). Energy use represent raw renewables or fossil fuel energies and is based on EIA data for 2014. See Table 1 in Yang, Ingwersen et al. 2017 and Supporting Information 1, and the v1.1 data update notes (Ingwersen et al. 2017) for all details on environmental data sources used.

## Data collection
2015-2016

## Sampling procedure
US federal government sources, including surveys and US EPA emissions databases are used as the primary sources. From these sources, data for US reporting establishments/facilities are aggregated by the NAICS sector as defined in the BEA detailed 2007 input-output tables. When level of sector aggregation differs, or when direct emissions are not reported but modeled, additional sources are used to make allocations and estimates.

## Review details
In regard to quality assurance and peer-review, each dataset created went through Quality Assurance as defined in a quality assurance project plans at US EPA, CSRA or ERG. The model was assembled with the IO model builder model (USEPA 2016c). Validation functions were used to check that all the model components were properly assembled and harmonized. Bayou Demeke and Santosh Ghimire provided internal peer review of the model methodology and the manuscript underwent standard EPA management review. An editor and two anonymous reviewers at the Journal of Cleaner Production reviewed the model. In regard to data quality evaluation, data quality assessment was performed at the flow and process levels according to the updated US EPA data quality assessment guidelines as defined in US EPA (2016b).

## Intended application
The primary application is for use in the US Environmentally-Extended Input-Ouput model, USEEIO, version 1.1. This model is being used by the US EPA for supporting tools that prioritize goods and services based on potential environmental impacts, resource use or emissions for large regions, including the US and US states, and as a strealined tool for organizations as a starting point to consider sustainable materials management. Model results are designed to provide meso/macro-level decision support.

## Project
USEEIO v1.1 was developed by the US EPA with CSRA and ERG with Wesley W. Ingwersen and David E. Meyer as research leads. Yi Yang was the technical lead on the work for CSRA (contract EP-C-15-012); Troy Hawkins was lead for ERG (contract EP-C-12-021).

## Sources
- Ingwersen et al. 2017
- USEPA 2016b
- USDA 2009a
- EIA 2016
- USGS 2016
- Nickerson et al. 2011
- USDA 2009b
- USEPA 2016c
- Lovelace 2009
- USEPA 2016a
- USEPA 2015b
- Yienger et al. 1995
- Macknick et al. 2011
- BLM 2008
- USDA 2006
- Torcellini et al. 2003
- EIA 2017
- USGS 2015
- Kim et el. 2013
- Statistics Canada 2010
- EIA 2013
- USEPA 2015a
- USDA 2014
- BEA 2015
- Edelen and Ingwersen 2017
- USDA 2016
- Blackhurst et al. 2010
- Ingwersen et al. DRAFT
- Goebes et al. 2003
- EIA 2015
- Maupin et al. 2014
