# Home refrigerators and freezers; at manufacturer

Dataset: openLCA process, unit process
Category: 3352: Household Appliance Manufacturing
Geography: United States
Time period: 2017-01-01 to 2017-12-31
Data quality: US EPA - Process Pedigree Matrix (1;1)
Exchange data quality scheme: US EPA - Flow Pedigree Matrix
Generated by: US EPA with CSRA and ERG
Owner: US EPA
Published in: Yang, Ingwersen et al. 2017
restrictionsDescription: This model shold be appropriately cited (see Yang, Ingwersen et al. 2017 source or Publication field) when used. Any changes or derivations of this model by the user should be documented. The model itself and any results from use of this model shall not be construed to consitute US EPA opinion or policy.
copyright: false

## General comment
BEA Code & Name is '335222:Household refrigerator and home freezer manufacturing'. Description of the primary industry producing this good or service, adapted from the Census Bureau NAICS 2007 descriptions: This U.S. industry comprises establishments primarily engaged in manufacturing household-type refrigerators and upright and chest freezers.

## Technology
The process describes the average US production of this good or service within this NAICS-based grouping defined in the BEA 2007 detailed input-output tables (BEA 2015). Distribution, wholesale and retailing of this good or service, use, and final disposal are not included. Creation of a product system with this process will enable modeling of all upstream (supply-chain) activities.

## Geography
Data represent the 50 US states

## Time period
2017 was the year in which this version of USEEIO was released and is the target date for the model

## Reference product
- Home refrigerators and freezers; at manufacturer: 1 USD

## Inputs from technosphere
All rows: data quality (1,3,1,1,1)
- Vending, commercial laundry, and other commercial and service industry machinery; at manufacturer: 6.23141e-9 USD
- Cardboard; at manufacturer: 0.000525322 USD
- Other vehicle parts; at manufacturer: 5.35901e-7 USD
- Power boilers and heat exchangers; at manufacturer: 2.43025e-7 USD
- Marketing research and all other miscellaneous professional, scientific, and technical services: 0.000175648 USD
- Air transport: 0.000875651 USD
- Water transport (boats, ships, ferries): 0.000175085 USD
- Commercial equipment rental: 0.000175168 USD
- Vehicles and parts sales: 6.23141e-9 USD
- Aluminum; at manufacturer: 0.0070036 USD
- Wiring devices; at manufacturer: 0.0124291 USD
- Wireless telecommunications: 1.46115e-7 USD
- Management consulting: 0.000350241 USD
- Paper bags and coated paper; at manufacturer: 0.00052529 USD
- Performances: 6.23141e-9 USD
- Metal cutting and forming machine tools; at manufacturer: 6.23141e-9 USD
- Specialty transformers; at manufacturer: 0.00035015 USD
- Truck transport: 0.00980445 USD
- Promoters and agents: 6.23141e-9 USD
- Scientific research and development: 6.23141e-9 USD
- Machine shops; at manufacturer: 0.00262812 USD
- Software: 1.86942e-8 USD
- Rubber tires; at manufacturer: 6.23141e-9 USD
- Home refrigerators and freezers; at manufacturer: 0.00157506 USD
- State and local government enterprises: 0.000350178 USD
- Other real estate: 0.000525086 USD
- Heating equipment other than warm air furnaces; at manufacturer: 2.0626e-6 USD
- Business support: 6.37309e-7 USD
- Valve and fittings (except for plumbing); at manufacturer: 0.00210269 USD
- Household goods repair: 0.000175078 USD
- Home cooking appliances; at manufacturer: 2.41085e-7 USD
- Plastics; at manufacturer: 0.038154 USD
- Primary copper; at manufacturer: 1.49554e-6 USD
- Insurance carriers: 0.00140076 USD
- Relay and industrial controls; at manufacturer: 0.0115548 USD
- Facilities support: 2.41085e-7 USD
- General merchandise stores: 1.86942e-8 USD
- Warehousing: 0.000875386 USD
- Nonferrous metal casts; at manufacturer: 0.00297982 USD
- Other secondary nonferrous metal products; at manufacturer: 0.0134771 USD
- Paints and coatings; at manufacturer: 0.0134807 USD
- Specialized design: 0.000175502 USD
- Passenger ground transport: 8.72398e-8 USD
- Investigation and security: 3.12423e-7 USD
- Independent artists, writers, and performers: 2.49256e-8 USD
- Nonresidential building repair and maintanence: 0.00122552 USD
- Communication and energy wire and cable; at manufacturer: 3.92579e-7 USD
- Transmission and power train parts; at manufacturer: 1.24628e-8 USD
- Navigation instruments; at manufacturer: 9.53406e-7 USD
- Consumer goods and general rental centers: 1.86942e-8 USD
- Metal coatings, engravings, and heat treatments; at manufacturer: 0.00682715 USD
- Postal service: 0.000875301 USD
- Metal hinges, keys, lock, and other hardware; at manufacturer: 6.35604e-7 USD
- Golf courses, marinas, ski resorts, fitness and other rec centers and industries: 4.36199e-8 USD
- Other rubber products; at manufacturer: 0.00700028 USD
- Waste management and remediation: 0.000525405 USD
- Vehicle repair: 0.000525189 USD
- Chemicals (except basic chemicals, agrichemicals, polymers, paints, pharmaceuticals,soaps, cleaning compounds); at manufacturer: 0.000175337 USD
- Company and enterprise management: 0.0217076 USD
- Securities and commodities brokerage and exchanges: 0.000351894 USD
- All other food and drinking places: 1.86942e-8 USD
- Laminated plastic plates and shapes; at manufacturer: 0.00192519 USD
- Motor vehicle steering, suspension components (except spring), and brake systems; at manufacturer: 6.23141e-9 USD
- Data processing and hosting: 0.000350534 USD
- Lids, jars, bottle caps, other metal closures and crowns; at manufacturer: 0.0476195 USD
- Telecommunications: 0.000350436 USD
- Gasoline, fuels, and by-products of petroleum refining; at manufacturer: 0.000350327 USD
- Mineral wool; at manufacturer: 0.00525258 USD
- Unrefined oil and gas; at extraction site: 6.23141e-9 USD
- Electricity; at consumer: 0.00332638 USD
- Aluminum products; at manufacturer: 0.00665476 USD
- Air purification and ventilation equipment; at manufacturer: 1.38337e-6 USD
- Buildings and dwellings services: 0.00157575 USD
- Secondary steel products; at manufacturer: 4.54893e-7 USD
- Plastic bags, films, and sheets; at manufacturer: 0.031503 USD
- Light gauge metal cans, boxes, and containers; at manufacturer: 0.000700752 USD
- Other computer related services, including facilities management: 7.47769e-8 USD
- Soap and cleaning compounds; at manufacturer: 8.38007e-8 USD
- Other retail: 0.000175178 USD
- Fabricated pipe and pipe fittings; at manufacturer: 1.68248e-7 USD
- Satellite, telecommunications resellers, and all other telecommunications: 1.86942e-8 USD
- Lessors of nonfinancial intangible assets: 0.000526587 USD
- Legal services: 0.000350353 USD
- Other plastic products; at manufacturer: 0.00752922 USD
- Environmental and other technical consulting services: 0.000175057 USD
- Books, newspapers, magazines, and other print media; at manufacturer: 6.23141e-9 USD
- Natural gas; at consumer: 0.00245144 USD
- Insurance agencies and brokerages: 0.000525253 USD
- Investment advice, portfolio management, and other financial advising services: 3.73885e-8 USD
- Springs and wires; at manufacturer: 0.000350144 USD
- Cutlery and handtools; at manufacturer: 0.000525432 USD
- Secondary copper products; at manufacturer: 0.0140116 USD
- Rubber and plastic belts and hoses; at manufacturer: 0.00472694 USD
- Accounting, tax preparation, bookkeeping, and payroll: 0.00017529 USD
- Clay and ceramic products; at manufacturer: 1.24628e-8 USD
- Special tools, dies, jigs, and fixtures; at manufacturer: 1.68248e-7 USD
- Magazines and journals; at publisher: 1.24628e-8 USD
- Sports: 1.24628e-8 USD
- Watches, clocks, and other measuring and controlling devices; at manufacturer: 0.00437746 USD
- Semiconductors; at manufacturer: 0.00612795 USD
- Veneer, plywood, and engineered wood; at manufacturer: 2.99108e-7 USD
- Compressed Gases; at manufacturer: 3.73885e-8 USD
- Architectural, engineering, and related services: 0.000175648 USD
- Motors and generators; at manufacturer: 0.0435889 USD
- Office administration: 1.86942e-8 USD
- Civic, social, professional, and similar organizations: 5.60827e-8 USD
- Screws, nuts, and bolts; at manufacturer: 0.0166314 USD
- Automatic controls for HVAC and refrigeration equipment; at manufacturer: 0.0134846 USD
- Rail transport: 0.00210068 USD
- Nondepository credit intermediation and related activities: 0.000875615 USD
- All other forging, stamping, and sintering; at manufacturer: 0.000525335 USD
- Air conditioning, refrigeration, and warm air heating equipment; at manufacturer: 0.0423747 USD
- Hotels and campgrounds: 1.80711e-7 USD
- Wholesale trade: 0.0618055 USD
- Metal pipe fittings, ball and roller bearings, industrial patterns, metal bath fixtures, other misc. fabricated metals; at manufacturer: 0.00227575 USD
- Plywood and veneer; at manufacturer: 3.73885e-8 USD
- Welding and Soldering Equipment, Scales and Balances, and other general purpose machinery; at manufacturer: 1.7448e-7 USD
- Commercial machinery repair: 0.000875404 USD
- Electronic equipment repair and maintenance: 0.000175103 USD
- Custom metal rolls; at manufacturer: 0.0112019 USD
- Other support services: 3.40141e-7 USD
- Food and beverage stores: 6.23141e-9 USD
- Coal; at mine: 0.000175047 USD
- Monetary authorities and depository credit intermediation: 0.000350959 USD
- Full-service restaurants: 1.55785e-7 USD
- Advertising and public relations: 0.00140177 USD
- Plastic pipe, fittings, and sausage casings; at manufacturer: 0.00402534 USD
- Other basic organic chemicals; at manufacturer: 7.50562e-7 USD
- Limited-service restaurants: 3.08132e-7 USD
- Computer systems design: 1.99405e-7 USD
- Primary iron, steel, and ferroalloy products; at manufacturer: 0.0681031 USD
- Metal structural products; at manufacturer: 0.00227618 USD
- Cast iron and steel; at manufacturer: 0.000527963 USD
- Printed circuit and electronic assembly; at manufacturer: 0.000700435 USD
- Ball and roller bearings; at manufacturer: 0.00175149 USD
- Drinking water and wastewater treatment; at consumer: 0.000175131 USD
- Noncomparable imports: 0.00245106 USD
- Other petroleum and coal products; at manufacturer: 0.00122575 USD
- Cardboard containers; at manufacturer: 0.0115558 USD
- Electronic capacitors, resistors, coils, transformers, connectors and other components (except semiconductors and printed circuit assemblies); at manufacturer: 0.0028014 USD
- Paper; at manufacturer: 0.000175072 USD
- Vehicle rental and leasing: 0.00035025 USD
- Employment services: 0.0001754 USD
- Abrasive products; at manufacturer: 0.000175362 USD
- Material handling equipment; at manufacturer: 0.000175112 USD
- Metal windows, doors, and architectural products; at manufacturer: 0.00070022 USD
- Cutting and machine tool accessory, rolling mill, and other metalworking machines; at manufacturer: 0.000175234 USD
- Gaskets, seals, musical instruments, fasteners, brooms, brushes, mop and other misc. goods; at manufacturer: 5.10976e-7 USD
- other miscellaneous electrical equipment and components; at manufacturer: 0.000175085 USD

## Inputs from nature
- Occupation, industrial area: 0.000623087 m2*a; data quality (4,2,1,1,1)
- Water, fresh: 0.000331831, 0.000136209 m3 (2 entries, compartments not in this file); data quality (2,2,1,4,2)
- Occupation, industrial area, built up: 0.000207696 m2*a; data quality (4,2,1,1,1)
- Occupation, urban, discontinuously built: 0.000167663 m2*a; data quality (4,2,1,1,1)
- Water, saline: 1.33977e-5 m3; data quality (4,2,1,4,2)

## Emissions to nature
- beryllium: 3.53157e-13 kg; data quality (2,2,1,1,5)
- m-xylene: 9.14251e-7 kg; data quality (3,2,1,1,5)
- Propene: 3.8735e-10 kg; data quality (3,1,1,1,3)
- para-xylene: 4.09744e-7 kg; data quality (3,2,1,1,5)
- arsenic: 3.39076e-12 kg; data quality (3,2,1,3,3)
- acenaphthylene: 6.01871e-12 kg; data quality (3,2,1,4,1)
- 2,2,4-trimethylpentane: 7.19042e-10 kg; data quality (3,2,1,4,1)
- methanol: 2.84906e-7 kg; data quality (3,2,1,1,5)
- NITROUS ACID: 3.24694e-7 kg; data quality (5,1,1,1,3)
- polychlorinated biphenyls: 7.14568e-19 kg; data quality (3,2,1,1,5)
- Ethene, chloro-: 7.96916e-18 kg; data quality (3,2,1,1,5)
- styrene: 2.90898e-7 kg; data quality (4,2,1,1,5)
- Nitrogen: 9.07003e-11 kg; data quality (2,2,1,1,5)
- ethene, tetrachloro-: 8.20357e-9 kg; data quality (3,2,1,1,5)
- anthracene: 4.50193e-13 kg; data quality (3,2,1,4,1)
- Methane, difluoro-, HFC-32: 8.57831e-6 kg; data quality (4,2,1,4,1)
- sulfur dioxide: 1.5166e-7 kg; data quality (2,2,1,1,5)
- Dibenz(a,h)anthracene: 3.65606e-16 kg; data quality (2,2,1,2,3)
- Xylene: 1.07112e-6 kg; data quality (4,2,1,1,5)
- Ethane, 1,1,1,2-tetrafluoro-, HFC-134a: 5.55208e-5 kg; data quality (4,2,1,4,1)
- particulates, < 10 um: 2.82503e-8 kg; data quality (3,2,1,1,5)
- Zinc: 8.31517e-15 kg; data quality (5,1,1,1,5)
- ethane, 1,2-dichloro-: 1.97994e-16 kg; data quality (3,2,1,1,5)
- Aluminum: 2.73682e-13 kg; data quality (4,1,1,1,5)
- acrolein: 2.19647e-10 kg; data quality (3,2,1,4,1)
- nitrogen oxides: 4.56714e-6 kg; data quality (2,2,1,1,4)
- Benzo(k)fluoranthene: 7.75286e-14 kg; data quality (3,2,1,4,1)
- copper: 5.6461e-13 kg; data quality (4,1,1,1,5)
- mercury: 7.68425e-13 kg; data quality (2,2,1,1,5)
- 2-ethoxyethyl acetate: 3.44555e-12 kg; data quality (5,2,1,1,5)
- Phthalate, dibutyl-: 1.87515e-8 kg; data quality (3,2,1,1,5)
- 1,4-dioxane: 2.65639e-22 kg; data quality (4,2,1,1,5)
- particulates, < 2.5 um: 3.32587e-7 kg; data quality (3,2,1,2,4)
- lead: 1.46034e-12 kg; data quality (3,2,1,1,5)
- propanal: 6.88542e-10 kg; data quality (3,2,1,4,1)
- pyrene: 7.97799e-13 kg; data quality (3,2,1,4,1)
- nickel: 1.41153e-13, 1.34223e-13 kg (2 entries, compartments not in this file); data quality (4,1,1,1,5)
- Water, fresh: 0.000392952 m3; data quality (2,2,1,4,2)
- naphthalene: 2.0433e-9 kg; data quality (3,2,1,1,5)
- VOC, volatile organic compounds: 0.0001086 kg; data quality (3,2,1,1,5)
- methyl isobutyl ketone: 4.38066e-6 kg; data quality (3,2,1,1,5)
- chromium: 1.34901e-10, 6.4513e-10 kg (2 entries, compartments not in this file); data quality (4,1,1,1,3)
- copper: 6.45436e-10, 5.99902e-8 kg (2 entries, compartments not in this file); data quality (4,1,1,1,3)
- phenanthrene: 1.3586e-11 kg; data quality (3,2,1,4,1)
- trichloroethylene: 2.39283e-8 kg; data quality (3,2,1,1,5)
- fluoranthene: 1.28445e-12 kg; data quality (3,2,1,4,1)
- BUTYL ISOCYANATE: 1.74907e-13 kg; data quality (4,2,1,1,5)
- vinyl acetate: 5.7378e-12 kg; data quality (4,2,1,1,5)
- Hydrocarbons, aromatic: 2.08219e-10 kg; data quality (3,2,1,4,1)
- hydrogen chloride: 2.42293e-9 kg; data quality (2,2,1,1,5)
- manganese: 2.56641e-14 kg; data quality (4,1,1,1,5)
- benzene, ethyl-: 1.3858e-6 kg; data quality (3,2,1,1,5)
- ethane, 1,2-dibromo-: 6.03421e-19 kg; data quality (2,2,1,1,5)
- acenaphthene: 5.06379e-12 kg; data quality (3,2,1,4,1)
- carbon monoxide: 8.08067e-6 kg; data quality (3,2,1,1,2)
- methyl methacrylate: 4.09615e-13 kg; data quality (4,2,1,1,5)
- benzene: 2.768e-9 kg; data quality (3,2,1,4,2)
- benzo(a)pyrene: 6.90731e-14 kg; data quality (3,2,1,4,1)
- selenium: 1.82099e-12 kg; data quality (2,2,1,1,5)
- butanol: 2.79538e-10 kg; data quality (5,1,1,1,5)
- Diethylene glycol butyl ether: 1.88077e-11 kg; data quality (4,2,1,1,5)
- diisocyanates: 5.0734e-9 kg; data quality (4,1,1,1,3)
- butadiene: 3.5036e-10 kg; data quality (3,2,1,4,1)
- manganese: 6.45097e-10 kg; data quality (4,1,1,1,3)
- Dinitrogen monoxide: 3.28216e-8 kg; data quality (4,2,1,4,1)
- tertiary-Butyl Acetate: 1.75416e-6 kg; data quality (3,2,1,1,5)
- acetaldehyde: 3.44787e-9 kg; data quality (3,2,1,4,1)
- Propane, 1,1,1,3,3,3-hexafluoro-, HCFC-236fa: 1.70265e-7 kg; data quality (4,2,1,4,1)
- Benzo(g,h,i)perylene: 1.44018e-13 kg; data quality (3,2,1,4,1)
- lead: 5.85832e-13 kg; data quality (3,1,1,1,5)
- phenol: 1.06255e-15 kg; data quality (4,2,1,1,5)
- Water, saline: 6.78858e-6 m3; data quality (4,2,1,4,2)
- cadmium: 6.22422e-12 kg; data quality (3,2,1,1,5)
- Chromium, ion: 3.20694e-9 kg; data quality (2,2,1,1,5)
- Benzo(b)fluoranthene: 8.41787e-14 kg; data quality (3,2,1,4,1)
- isophorone: 4.61424e-9 kg; data quality (3,2,1,1,5)
- Triethyl amine: 3.30049e-8 kg; data quality (3,2,1,1,5)
- nitric acid: 1.53985e-14 kg; data quality (3,1,1,1,5)
- 2-methylnaphthalene: 9.32374e-14 kg; data quality (2,2,1,1,5)
- toluene: 7.93691e-6 kg; data quality (3,2,1,1,5)
- dimethyl formamide: 2.65639e-14 kg; data quality (4,2,1,1,5)
- Chrysene: 1.41714e-13 kg; data quality (3,2,1,4,1)
- fluorene: 5.47977e-12 kg; data quality (3,2,1,4,1)
- Cobalt: 2.85421e-12 kg; data quality (3,2,1,1,5)
- hexane: 1.66573e-5 kg; data quality (3,2,1,1,5)
- nickel: 4.81987e-11 kg; data quality (3,2,1,1,5)
- 3-methylcholanthrene: 5.53317e-19 kg; data quality (2,2,1,1,5)
- acetophenone: 5.22208e-10 kg; data quality (3,2,1,1,5)
- SEC-BUTYL ALCOHOL: 3.73867e-10 kg; data quality (5,1,1,1,5)
- o-Xylene: 3.95741e-7 kg; data quality (3,2,1,1,5)
- Indeno(1,2,3-cd)pyrene: 4.54703e-14 kg; data quality (3,2,1,4,1)
- 1,1,1-trichloroethane: 3.96008e-7 kg; data quality (3,2,1,1,5)
- Benzo(a)anthracene: 4.91846e-18 kg; data quality (2,2,1,1,5)
- Methane: 3.44973e-7 kg; data quality (4,2,1,4,1)
- antimony: 6.69833e-15 kg; data quality (2,1,1,1,5)
- benz[a]anthracene: 8.59716e-14 kg; data quality (3,2,1,4,1)
- ammonia: 9.63121e-8 kg; data quality (3,2,1,1,5)
- ethylene glycol: 7.89852e-7 kg; data quality (3,2,1,1,5)
- methylene diphenyl diisocyanate: 6.54194e-8 kg; data quality (4,2,1,1,5)
- manganese: 7.26147e-11 kg; data quality (3,2,1,1,5)
- Ethane, 1,1,1-trifluoro-, HFC-143a: 6.30253e-6 kg; data quality (4,2,1,4,1)
- Ethane, 2,2-dichloro-1,1,1-trifluoro-, HCFC-123: 9.21341e-11 kg; data quality (4,1,1,1,5)
- Ethylene glycol monoethyl ether: 2.75042e-6 kg; data quality (5,1,1,1,3)
- formaldehyde: 9.96416e-9 kg; data quality (3,2,1,3,2)
- Phosphorus: 2.31641e-10 kg; data quality (2,1,1,1,5)
- methane, dichloro-, hcc-30: 2.13983e-8 kg; data quality (3,2,1,1,5)
- Carbon dioxide: 0.018487 kg; data quality (4,2,1,4,1)
- Chromium VI: 1.64834e-9 kg; data quality (3,2,1,1,5)
- methane, chlorodifluoro-, hcfc-22: 7.80189e-12 kg; data quality (4,1,1,1,5)
- chromium: 6.67267e-13 kg; data quality (4,1,1,1,5)
- Ethane, pentafluoro-, HFC-125: 1.47304e-5 kg; data quality (4,2,1,4,1)
- cumene: 1.05384e-9 kg; data quality (3,2,1,1,5)

## Inventory method
Input-output

## Modelling constants
The reference unit of all processes is 1 USD2013 of the good or service. The technosphere inputs are based on the US BEA detailed input-output tables for 2007. The IO tables are combined to develop a commodity-by-commodity model based on the the industry-technology assumption (see Suh et al., 2010), which assumes all commodities produced by a given industry have the same input structure, but that multiple industries can produce the same commodity. Thus, model technosphere flows represent commodity outputs (and not industry outputs) from other processes in the model. There are no by-products included in these processes. All commodity production is based on US-conditions, despite in reality that some goods and services are produced overseas, as USEEIO v1.1 is a single-region IO model.

## Completeness
The input-output approach assures that all purchased inputs associated with the sectors making these commodities as reported in the US census for 2007 are included. The direct resources extracted including minerals, energy sources, water and land occupied are included. Emissions to air include all critieria air pollutants, greenhouse gases, and hazardous and toxic air pollutants as defined by US EPA. Releases to water include toxics, total nitrogen and total phosphorus, and water discharges. Releases to soil or groundwater include toxics and agriculutural pesticides. Some metal releases to air, water and soil are not included because they could not be speciated. Solid hazardous and non-hazardous wastes generated are not included as an elementary flows although purchases of waste services are included.

## Data treatment
Greenhouse gases are primarily from the US Greenhouse Gas Emission Inventory (USEPA 2016a). Biogenic C uptake is not included (change from version 1.0), as biogenic C emission are not included. Toxic releases to air, water and soil (except pesticides) are from the 2013 Toxic Release Inventory (USEPA 2015a). Criteria air pollutants and hazardous air pollutants are from the 2011 National Emissions Inventory (USEPA 2015b). All estimates are normalized by industry based on sector output in the data year, then converted to 2013 USD using relative sector-specific CPIs (if data year is not 2013). Energy use represent raw renewables or fossil fuel energies and is based on EIA data for 2014. See Table 1 in Yang, Ingwersen et al. 2017 and Supporting Information 1, and the v1.1 data update notes (Ingwersen et al. 2017) for all details on environmental data sources used.Land occupation associated with manufacturing buildings was estimated based on the building floorspace data provided by the U.S. Energy Information Administration in the 2010 Manufacturing Energy Consumption Survey (EIA 2013). Portions of total renewable energy (EIA 2016) based on EIA-923 reports for 2014 (EIA 2017) are included. Nitrogen and Phosphorus releases are modeled in total N and total P equivalents as estimated by the Discharge Monitoring Report Nutrient Loading tool (USEPA 2016b). Self-supplied withdrawals were assigned to industrial sectors based on water use statistics for Canadian industries by NAICS 3-digit sector scaled to US production levels based on gross domestic product by industry (BEA 2015; Statistics Canada 2010), and further disaggregated to the manufacturing sectors based on compensation of employees as provided by the 2007 IO tables (BEA 2015). Water withdrawals associated with public supply were allocated to sectors based on their use of water, sewage, and other services in USD based on the IO tables (BEA 2015). Portions of total renewable energy (EIA 2016) by type are assigned to sectors (hydro, wind, solar, or) based on EIA-923 reports for 2014 (EIA 2017).

## Data collection
2015-2016

## Sampling procedure
US federal government sources, including surveys and US EPA emissions databases are used as the primary sources. From these sources, data for US reporting establishments/facilities are aggregated by the NAICS sector as defined in the BEA detailed 2007 input-output tables. When level of sector aggregation differs, or when direct emissions are not reported but modeled, additional sources are used to make allocations and estimates.

## Review details
In regard to quality assurance and peer-review, each dataset created went through Quality Assurance as defined in a quality assurance project plans at US EPA, CSRA or ERG. The model was assembled with the IO model builder model (USEPA 2016c). Validation functions were used to check that all the model components were properly assembled and harmonized. Bayou Demeke and Santosh Ghimire provided internal peer review of the model methodology and the manuscript underwent standard EPA management review. An editor and two anonymous reviewers at the Journal of Cleaner Production reviewed the model. In regard to data quality evaluation, data quality assessment was performed at the flow and process levels according to the updated US EPA data quality assessment guidelines as defined in US EPA (2016b).

## Intended application
The primary application is for use in the US Environmentally-Extended Input-Ouput model, USEEIO, version 1.1. This model is being used by the US EPA for supporting tools that prioritize goods and services based on potential environmental impacts, resource use or emissions for large regions, including the US and US states, and as a strealined tool for organizations as a starting point to consider sustainable materials management. Model results are designed to provide meso/macro-level decision support.

## Project
USEEIO v1.1 was developed by the US EPA with CSRA and ERG with Wesley W. Ingwersen and David E. Meyer as research leads. Yi Yang was the technical lead on the work for CSRA (contract EP-C-15-012); Troy Hawkins was lead for ERG (contract EP-C-12-021).

## Sources
- EIA 2015
- USEPA 2015a
- USGS 2016
- USDA 2009a
- Kim et el. 2013
- USDA 2006
- USEPA 2016a
- Torcellini et al. 2003
- Blackhurst et al. 2010
- USEPA 2015b
- Maupin et al. 2014
- EIA 2017
- EIA 2016
- Ingwersen et al. DRAFT
- Yienger et al. 1995
- Nickerson et al. 2011
- EIA 2013
- Edelen and Ingwersen 2017
- USEPA 2016b
- BEA 2015
- BLM 2008
- USDA 2016
- Macknick et al. 2011
- USDA 2009b
- Goebes et al. 2003
- USGS 2015
- Ingwersen et al. 2017
- USEPA 2016c
- USDA 2014
- Statistics Canada 2010
- Lovelace 2009
