# Other secondary nonferrous metal products; at manufacturer

Dataset: openLCA process, unit process
Category: 3314: Nonferrous Metal (except Aluminum) Production and Processing
Geography: United States
Time period: 2017-01-01 to 2017-12-31
Data quality: US EPA - Process Pedigree Matrix (1;1)
Exchange data quality scheme: US EPA - Flow Pedigree Matrix
Generated by: US EPA with CSRA and ERG
Owner: US EPA
Published in: Yang, Ingwersen et al. 2017
restrictionsDescription: This model shold be appropriately cited (see Yang, Ingwersen et al. 2017 source or Publication field) when used. Any changes or derivations of this model by the user should be documented. The model itself and any results from use of this model shall not be construed to consitute US EPA opinion or policy.
copyright: false

## General comment
BEA Code & Name is '331490:Nonferrous metal (except copper and aluminum) rolling, drawing, extruding and alloying'. Description of the primary industry producing this good or service, adapted from the Census Bureau NAICS 2007 descriptions: This industry comprises establishments primarily engaged in one or more of the following: (1) recovering nonferrous metals (except copper and aluminum) and nonferrous metal alloys from scrap; (2) alloying purchased nonferrous metals (except copper and aluminum); (3) rolling, drawing, and extruding shapes from purchased nonferrous metals (except copper and aluminum); and (4) recovering nonferrous metals from scrap (except copper and aluminum) and rolling, drawing, or extruding shapes in integrated facilities.

## Technology
The process describes the average US production of this good or service within this NAICS-based grouping defined in the BEA 2007 detailed input-output tables (BEA 2015). Distribution, wholesale and retailing of this good or service, use, and final disposal are not included. Creation of a product system with this process will enable modeling of all upstream (supply-chain) activities.

## Geography
Data represent the 50 US states

## Time period
2017 was the year in which this version of USEEIO was released and is the target date for the model

## Reference product
- Other secondary nonferrous metal products; at manufacturer: 1 USD

## Inputs from technosphere
All rows: data quality (1,3,1,1,1)
- Facilities support: 0.0003171 USD
- Compressed Gases; at manufacturer: 0.00020895 USD
- Ink and ink cartridges; at manufacturer: 6.99667e-8 USD
- Cutting and machine tool accessory, rolling mill, and other metalworking machines; at manufacturer: 0.000903631 USD
- Vehicles and parts sales: 0.000276661 USD
- Independent artists, writers, and performers: 0.000158501 USD
- Fertilizers; at manufacturer: 2.12739e-7 USD
- Other retail: 7.69592e-5 USD
- Fiber, yarn, and thread; at manufacturer: 2.57586e-6 USD
- Monetary authorities and depository credit intermediation: 0.00258866 USD
- Coal; at mine: 0.00287176 USD
- All other forging, stamping, and sintering; at manufacturer: 0.000110979 USD
- Petrochemicals; at manufacturer: 0.000151649 USD
- Major home appliances (except ovens, stoves, refrigerators and laundry machines); at manufacturer: 2.04749e-5 USD
- Switchgear and switchboards; at manufacturer: 3.84539e-5 USD
- Other engine equipment; at manufacturer: 0.000210808 USD
- Adhesives; at manufacturer: 0.000111794 USD
- Computer systems design: 0.000635786 USD
- Lumber and treated lumber; at manufacturer: 2.21113e-6 USD
- Urethane and other foam products; at manufacturer: 6.54948e-7 USD
- Specialty transformers; at manufacturer: 1.81698e-5 USD
- Software: 5.35054e-5 USD
- Glass and glass products; at manufacturer: 0.000341564 USD
- Hydraulic pumps, motors, cylinders and actuators; at manufacturer: 3.62492e-5 USD
- Paper bags and coated paper; at manufacturer: 0.000218718 USD
- Abrasive products; at manufacturer: 0.000894542 USD
- Drinking water and wastewater treatment; at consumer: 0.000474513 USD
- Secondary steel products; at manufacturer: 0.00119323 USD
- Ready-mix concrete; at manufacturer: 4.05022e-8 USD
- Aircraft; at manufacturer: 2.2492e-6 USD
- Electronic equipment repair and maintenance: 0.0003745 USD
- Ball and roller bearings; at manufacturer: 9.7857e-5 USD
- Chemicals (except basic chemicals, agrichemicals, polymers, paints, pharmaceuticals,soaps, cleaning compounds); at manufacturer: 0.00139923 USD
- Insurance carriers: 0.000885392 USD
- Architectural, engineering, and related services: 0.0019717 USD
- Computer storage device readers; at manufacturer: 1.34716e-6 USD
- Watches, clocks, and other measuring and controlling devices; at manufacturer: 6.97743e-6 USD
- Primary batteries; at manufacturer: 7.44616e-6 USD
- Paper; at manufacturer: 2.94776e-5 USD
- Other computer related services, including facilities management: 0.000215791 USD
- Commercial equipment rental: 0.000322959 USD
- Office supplies (not paper); at manufacturer: 6.47069e-8 USD
- Automatic controls for HVAC and refrigeration equipment; at manufacturer: 1.50187e-8 USD
- Other nonmetallic mineral products; at manufacturer: 1.30997e-6 USD
- Synthetic rubber and artificial and synthetic fibers; at manufacturer: 2.12504e-5 USD
- Veneer, plywood, and engineered wood; at manufacturer: 0.00972561 USD
- Material handling equipment; at manufacturer: 0.000264914 USD
- Warehousing: 0.00067297 USD
- Environmental and other technical consulting services: 0.000160236 USD
- Scientific research and development: 5.27465e-5 USD
- Other support services: 0.000590438 USD
- Electromedical appartuses; at manufacturer: 1.89661e-6 USD
- Waste management and remediation: 0.00132465 USD
- Ground or treated minerals and earth; at manufacturer: 4.83927e-7 USD
- Other transportation equipment; at manufacturer: 9.94994e-6 USD
- Dental equipment and supplies; at manufacturer: 1.3614e-8 USD
- Consumer goods and general rental centers: 5.409e-5 USD
- Aircraft engines and parts; at manufacturer: 1.54319e-5 USD
- Advertising and public relations: 0.00127859 USD
- Small electrical appliances; at manufacturer: 6.79797e-8 USD
- Cast iron and steel; at manufacturer: 0.00015906 USD
- Hotels and campgrounds: 0.00028176 USD
- Industrial process variable instruments; at manufacturer: 2.81104e-5 USD
- Transmission and power train parts; at manufacturer: 0.000157973 USD
- Fluid meters and counting devices; at manufacturer: 7.52486e-7 USD
- Electronic capacitors, resistors, coils, transformers, connectors and other components (except semiconductors and printed circuit assemblies); at manufacturer: 0.00311579 USD
- Other concrete products; at manufacturer: 1.02463e-6 USD
- Full-service restaurants: 0.000484362 USD
- Machine shops; at manufacturer: 0.0179519 USD
- Investment advice, portfolio management, and other financial advising services: 0.000209996 USD
- Promoters and agents: 5.23695e-5 USD
- Springs and wires; at manufacturer: 8.51734e-6 USD
- Investigation and security: 0.000537184 USD
- Natural gas; at consumer: 0.0067105 USD
- State and local government enterprises: 0.000527672 USD
- Other petroleum and coal products; at manufacturer: 0.000178296 USD
- Aluminum; at manufacturer: 0.00138285 USD
- Travel trailer and campers; at manufacturer: 1.44623e-8 USD
- Vehicle rental and leasing: 0.000543265 USD
- Other plastic products; at manufacturer: 0.00166763 USD
- Cement; at manufacturer: 3.33412e-7 USD
- Audio and video equipment; at manufacturer: 4.12192e-6 USD
- Household goods repair: 0.000267188 USD
- Industrial process furnaces and ovens; at manufacturer: 1.96108e-6 USD
- All other food and drinking places: 5.2668e-5 USD
- Stationery; at manufacturer: 6.46606e-9 USD
- Other aircraft parts; at manufacturer: 1.50695e-5 USD
- Company and enterprise management: 0.0105017 USD
- Food and beverage stores: 7.567e-7 USD
- Home furniture - Cabinets and non-wood, nonupholstered; at manufacturer: 8.40698e-6 USD
- Printed circuit and electronic assembly; at manufacturer: 0.00304363 USD
- Industrial molds; at manufacturer: 8.24468e-6 USD
- Custom metal rolls; at manufacturer: 9.38712e-5 USD
- Propulsion units and parts for space vehicles and guided missiles; at manufacturer: 5.535e-5 USD
- Plastic bags, films, and sheets; at manufacturer: 0.00394744 USD
- Relay and industrial controls; at manufacturer: 0.00216085 USD
- Wireless telecommunications: 0.000337331 USD
- Navigation instruments; at manufacturer: 2.23171e-6 USD
- Securities and commodities brokerage and exchanges: 0.00700124 USD
- Sports: 5.26264e-5 USD
- Light gauge metal cans, boxes, and containers; at manufacturer: 8.31342e-5 USD
- Analytical laboratory instruments; at manufacturer: 1.43922e-6 USD
- Office administration: 7.17435e-5 USD
- Dental laboratories; at manufacturer: 6.80698e-8 USD
- Satellite, telecommunications resellers, and all other telecommunications: 5.65154e-5 USD
- Machinery for the paper, textile, food or other industries (except semiconductor machinery); at manufacturer: 3.87201e-7 USD
- Vehicle repair: 0.000850235 USD
- Electricity; at consumer: 0.00674558 USD
- Optical instruments and lenses; at manufacturer: 0.000812159 USD
- Lessors of nonfinancial intangible assets: 0.00205735 USD
- Other vehicle parts; at manufacturer: 0.00127465 USD
- Plastics and rubber industry machinery; at manufacturer: 2.01452e-7 USD
- Plywood and veneer; at manufacturer: 3.83026e-6 USD
- Other basic organic chemicals; at manufacturer: 0.00204354 USD
- Other basic inorganic chemicals; at manufacturer: 0.000729513 USD
- External hard drives, CDs, other storage media; at manufacturer: 2.27258e-7 USD
- Guided missiles and space vehicles; at manufacturer: 3.94083e-5 USD
- Computer terminals and other computer peripheral equipment; at manufacturer: 5.62802e-5 USD
- Air purification and ventilation equipment; at manufacturer: 5.14607e-7 USD
- Limited-service restaurants: 0.000809046 USD
- Wiring devices; at manufacturer: 0.000161288 USD
- Cardboard containers; at manufacturer: 0.00839128 USD
- Other real estate: 0.00018135 USD
- Vehicle electrical and electronic equipment; at manufacturer: 4.76914e-5 USD
- Semiconductor machinery; at manufacturer: 2.26103e-7 USD
- Metal hinges, keys, lock, and other hardware; at manufacturer: 1.53097e-5 USD
- Truck trailers; at manufacturer: 1.89671e-7 USD
- Sanitary paper (tissues, napkins, diapers, etc.); at manufacturer: 8.29021e-10 USD
- Polystyrene foam products; at manufacturer: 2.88037e-7 USD
- Buildings and dwellings services: 0.0028748 USD
- Signal testing instruments; at manufacturer: 8.15394e-5 USD
- Laminated plastic plates and shapes; at manufacturer: 9.39647e-6 USD
- Semiconductors; at manufacturer: 0.00365317 USD
- Mechanical power transmission equipment; at manufacturer: 7.92954e-6 USD
- Passenger ground transport: 0.000165173 USD
- Welding and Soldering Equipment, Scales and Balances, and other general purpose machinery; at manufacturer: 0.000213999 USD
- Unrefined oil and gas; at extraction site: 1.28558e-7 USD
- Special tools, dies, jigs, and fixtures; at manufacturer: 1.28183e-6 USD
- Carpets and rugs; at manufacturer: 5.4096e-6 USD
- Other rubber products; at manufacturer: 2.47513e-5 USD
- Fabric; at manufacturer: 6.83432e-6 USD
- Wholesale trade: 0.0689709 USD
- Other textiles; at manufacturer: 1.50457e-8 USD
- Motor vehicle steering, suspension components (except spring), and brake systems; at manufacturer: 8.7674e-5 USD
- Cardboard; at manufacturer: 0.00148807 USD
- Heavy gauge metal tanks; at manufacturer: 6.9822e-6 USD
- Paints and coatings; at manufacturer: 4.666e-5 USD
- Home refrigerators and freezers; at manufacturer: 6.08714e-6 USD
- Books, newspapers, magazines, and other print media; at manufacturer: 3.24771e-6 USD
- Primary iron, steel, and ferroalloy products; at manufacturer: 0.0169623 USD
- Golf courses, marinas, ski resorts, fitness and other rec centers and industries: 5.61148e-5 USD
- Air conditioning, refrigeration, and warm air heating equipment; at manufacturer: 7.74811e-5 USD
- Screws, nuts, and bolts; at manufacturer: 0.0015243 USD
- Synthetic dyes and pigments; at manufacturer: 2.12948e-5 USD
- Noncomparable imports: 0.00243133 USD
- Lids, jars, bottle caps, other metal closures and crowns; at manufacturer: 0.000775947 USD
- Curtains and linens; at manufacturer: 7.19389e-6 USD
- Other primary nonferrous metals; at manufacturer: 0.193769 USD
- Vegetable oils and by-products; at manufacturer: 2.48706e-9 USD
- Finished and coated fabric; at manufacturer: 2.94838e-6 USD
- Data processing and hosting: 0.00118331 USD
- Plastic pipe, fittings, and sausage casings; at manufacturer: 1.92694e-5 USD
- Scenic and sightseeing transportation and support activities for transportation: 0.00025163 USD
- Management consulting: 0.000591968 USD
- Clay and ceramic products; at manufacturer: 0.0001791 USD
- Marketing research and all other miscellaneous professional, scientific, and technical services: 0.0021994 USD
- Civic, social, professional, and similar organizations: 0.000113818 USD
- Gaskets, seals, musical instruments, fasteners, brooms, brushes, mop and other misc. goods; at manufacturer: 0.000526339 USD
- Sand, gravel, clay, phosphate, other nonmetallic minerals; at mine: 2.12803e-6 USD
- Truck transport: 0.0211164 USD
- Valve and fittings (except for plumbing); at manufacturer: 0.000106931 USD
- Motors and generators; at manufacturer: 0.000189001 USD
- Communication and energy wire and cable; at manufacturer: 0.0217919 USD
- Asphalt pavement; at manufacturer: 1.16448e-7 USD
- Light bulbs; at manufacturer: 2.23536e-6 USD
- Nondepository credit intermediation and related activities: 0.00141025 USD
- Mineral wool; at manufacturer: 9.42067e-6 USD
- other miscellaneous electrical equipment and components; at manufacturer: 0.000429943 USD
- Metal pipe fittings, ball and roller bearings, industrial patterns, metal bath fixtures, other misc. fabricated metals; at manufacturer: 0.00238567 USD
- Travel arrangement and reservation: 6.01229e-8 USD
- Cutlery and handtools; at manufacturer: 0.00048583 USD
- Telephones; at manufacturer: 6.42588e-6 USD
- Fabricated pipe and pipe fittings; at manufacturer: 6.9494e-6 USD
- Storage batteries; at manufacturer: 4.74637e-6 USD
- Vehicle seating and interior trim (upholstery); at manufacturer: 1.08652e-6 USD
- Air and gas compressors; at manufacturer: 8.29021e-8 USD
- Wooden windows, door, and flooring; at manufacturer: 0.00047903 USD
- Dry-cleaning and laundry: 5.23248e-5 USD
- Business support: 0.00096849 USD
- Construction machinery; at manufacturer: 8.14723e-7 USD
- Heavy duty trucks; at manufacturer: 0.000190196 USD
- Wood kitchen cabinets and countertops; at manufacturer: 1.81378e-6 USD
- Surgical appliance and supplies; at manufacturer: 0.000264905 USD
- Metal structural products; at manufacturer: 0.000200984 USD
- Secondary copper products; at manufacturer: 0.0157546 USD
- Commercial machinery repair: 0.00164559 USD
- Light fixtures; at manufacturer: 3.00494e-6 USD
- Custom computer programming: 5.27497e-6 USD
- Power boilers and heat exchangers; at manufacturer: 2.17695e-7 USD
- Timber and raw forest products; at forest: 3.43447e-6 USD
- Metal windows, doors, and architectural products; at manufacturer: 0.00144563 USD
- Telecommunications: 0.00102286 USD
- General merchandise stores: 2.63874e-6 USD
- Railroad rolling stock; at manufacturer: 2.28467e-7 USD
- Primary copper; at manufacturer: 0.0147741 USD
- Ophthalmic goods; at manufacturer: 1.66177e-8 USD
- Insurance agencies and brokerages: 0.000278636 USD
- Legal services: 0.000932328 USD
- Metal cutting and forming machine tools; at manufacturer: 6.55055e-6 USD
- Carbon and graphite products; at manufacturer: 8.05416e-5 USD
- Specialized design: 0.00111134 USD
- Employment services: 0.000650387 USD
- Wireless communications; at manufacturer: 6.67262e-5 USD
- Aluminum products; at manufacturer: 0.00237551 USD
- Copper, nickel, lead, and zinc; at mine: 0.0336253 USD
- Rubber and plastic belts and hoses; at manufacturer: 4.9075e-6 USD
- Nonferrous metal casts; at manufacturer: 0.000230488 USD
- Lime and gypsum products; at manufacturer: 1.60176e-6 USD
- Surgical and medical instruments; at manufacturer: 4.51983e-6 USD
- Communications equipment; at manufacturer: 1.20062e-6 USD
- Metal coatings, engravings, and heat treatments; at manufacturer: 0.00677857 USD
- Metal plumbing drains, faucets, valves, and other fittings; at manufacturer: 1.34655e-6 USD
- Vehicle bodies; at manufacturer: 1.98292e-7 USD
- Power tools; at manufacturer: 3.00622e-7 USD
- Vending, commercial laundry, and other commercial and service industry machinery; at manufacturer: 6.64383e-5 USD
- Computers; at manufacturer: 4.59729e-8 USD
- Performances: 5.96832e-8 USD
- Accounting, tax preparation, bookkeeping, and payroll: 0.000842544 USD
- Vehicle metal stamping; at manufacturer: 7.98486e-5 USD
- Home cooking appliances; at manufacturer: 2.90522e-6 USD
- Speed changers, industrial high-speed drives, and gears; at manufacturer: 1.90006e-5 USD
- Pumps and pumping equipment; at manufacturer: 1.30661e-6 USD
- Gasoline, fuels, and by-products of petroleum refining; at manufacturer: 0.00142657 USD
- Iron, gold, silver, and other metal ores; at mine: 0.0285179 USD
- Soap and cleaning compounds; at manufacturer: 2.25358e-6 USD
- Concrete pipe, bricks, and blocks; at manufacturer: 8.84849e-7 USD
- Air transport: 0.00109765 USD
- Other secondary nonferrous metal products; at manufacturer: 0.075042 USD
- Leather; at manufacturer: 1.61899e-9 USD
- Magazines and journals; at publisher: 5.81477e-5 USD
- Rail transport: 0.00462868 USD
- Plastics; at manufacturer: 0.00345509 USD
- Vehicle engines and engine parts; at manufacturer: 0.000122315 USD
- Postal service: 8.1375e-5 USD
- Rubber tires; at manufacturer: 7.13435e-7 USD
- Water transport (boats, ships, ferries): 0.0018935 USD
- Irradiation apparatuses; at manufacturer: 2.42849e-8 USD
- Pipeline transport: 9.59988e-7 USD
- All other converted paper products; at manufacturer: 3.04767e-7 USD
- Nonresidential building repair and maintanence: 0.00223024 USD
- Heating equipment other than warm air furnaces; at manufacturer: 1.453e-5 USD

## Inputs from nature
- Water, fresh: 0.00197735, 0.00781181 m3 (2 entries, compartments not in this file); data quality (4,2,1,4,2)
- Energy, wind: 7.13013e-7 MJ; data quality (3,1,1,1,1)
- Water, saline: 0.000611946 m3; data quality (4,2,1,4,2)
- Occupation, industrial area, built up: 0.000119874 m2*a; data quality (4,2,1,1,1)
- Occupation, urban, discontinuously built: 5.74735e-5 m2*a; data quality (4,2,1,1,1)
- Occupation, industrial area: 0.000359622 m2*a; data quality (4,2,1,1,1)

## Emissions to nature
- Cadmium: 7.93811e-10 kg; data quality (3,1,1,1,4)
- cobalt: 4.38447e-9 kg; data quality (4,1,1,1,4)
- BIS (2-ETHOXY ETHYL) ETHER: 4.35562e-11 kg; data quality (5,2,1,1,5)
- 1,2,4-trimethylbenzene: 5.21609e-9 kg; data quality (5,1,1,1,3)
- fluoranthene: 4.58672e-11 kg; data quality (2,2,1,1,4)
- dibenzofuran: 3.78156e-8 kg; data quality (4,2,1,1,4)
- NITROUS ACID: 5.44817e-10 kg; data quality (5,1,1,1,2)
- para-xylene: 2.76554e-9 kg; data quality (3,2,1,1,5)
- cumene: 1.07581e-8 kg; data quality (4,2,1,1,4)
- Ethene, chloro-: 4.01705e-10 kg; data quality (3,2,1,1,4)
- 4-nitrophenol: 3.67294e-14 kg; data quality (2,2,1,1,4)
- Cresol: 2.13035e-9 kg; data quality (4,2,1,1,5)
- 3,3'-Dichlorobenzidine: 7.82922e-18 kg; data quality (3,2,1,1,5)
- formaldehyde: 7.28208e-8 kg; data quality (2,2,1,2,4)
- 2,4/2,6-toluenediisocyanate (mixture): 1.07275e-10 kg; data quality (4,1,1,1,5)
- ethane, 1,1,2-trichloro-: 2.27357e-14 kg; data quality (4,2,1,1,4)
- 2,2-BIS(4-HYDROXY-3,5-DIBROMOPHENYL)PROPANE: 2.33537e-13, 7.79867e-13 kg (2 entries, compartments not in this file); data quality (5,1,1,1,5)
- mercury: 3.39027e-13, 1.70136e-12 kg (2 entries, compartments not in this file); data quality (3,1,1,1,5)
- antimony: 5.31913e-8, 6.06574e-9 kg (2 entries, compartments not in this file); data quality (2,1,1,1,4)
- copper: 4.49006e-9 kg; data quality (4,1,1,1,5)
- sodium dimethyldithiocarbamate: 1.49447e-13, 1.34589e-10 kg (2 entries, compartments not in this file); data quality (5,1,1,1,5)
- carbonyl sulfide: 3.52387e-10 kg; data quality (4,2,1,1,4)
- mercury: 6.4228e-9 kg; data quality (2,2,1,1,4)
- Styrene: 1.8465e-13 kg; data quality (3,1,1,1,5)
- phenol: 3.342e-12 kg; data quality (3,1,1,1,3)
- particulates, < 2.5 um: 7.46142e-5 kg; data quality (3,2,1,1,4)
- dicyclopentadiene: 1.85564e-12 kg; data quality (4,1,1,1,5)
- toluene: 7.30385e-7 kg; data quality (4,2,1,1,4)
- Ethylene glycol monoethyl ether: 1.16303e-8 kg; data quality (5,1,1,1,4)
- 1,4-dioxane: 2.48641e-11 kg; data quality (4,2,1,1,5)
- fluorine: 1.19806e-11 kg; data quality (4,1,1,1,5)
- TERT-BUTYL ALCOHOL: 2.75698e-10 kg; data quality (4,1,1,1,5)
- CHLORONAPHTHALENE: 4.73285e-19 kg; data quality (1,2,1,1,5)
- catechol: 1.80965e-11 kg; data quality (5,2,1,1,5)
- methanol: 6.86398e-13, 1.52495e-12 kg (2 entries, compartments not in this file); data quality (3,1,1,1,5)
- 1,3-PHENYLENEDIAMINE: 1.71855e-14 kg; data quality (4,1,1,1,5)
- methane, bromo-, halon 1001: 8.31734e-9 kg; data quality (3,2,1,1,4)
- particulates, < 10 um: 1.75583e-5 kg; data quality (3,2,1,1,4)
- BENZ(A)ACRIDINE: 1.4383e-12 kg; data quality (2,2,1,1,4)
- 1,1,1-trichloroethane: 1.9497e-8 kg; data quality (3,2,1,1,4)
- ozone: 6.50958e-9 kg; data quality (4,1,1,1,5)
- MOLYBDENUM(VI): 1.82171e-7, 1.11205e-7 kg (2 entries, compartments not in this file); data quality (3,1,1,1,4)
- CYANAMIDE: 2.24857e-10 kg; data quality (2,1,1,1,4)
- Cumene hydroperoxide: 2.29661e-12 kg; data quality (2,1,1,1,5)
- toluene: 7.89355e-12, 4.49442e-14 kg (2 entries, compartments not in this file); data quality (5,1,1,1,4)
- ethyl acrylate: 5.4595e-13 kg; data quality (4,2,1,1,5)
- tertiary-Butyl Acetate: 1.6996e-8 kg; data quality (3,2,1,1,5)
- manganese: 2.29408e-9 kg; data quality (4,1,1,1,4)
- Nitrogen: 2.72095e-6 kg; data quality (4,2,1,1,5)
- benzene, ethyl-: 6.15994e-8 kg; data quality (4,2,1,1,4)
- Ethane, 1,1,1-trifluoro-, HFC-143a: 6.78712e-9 kg; data quality (4,2,1,4,1)
- acetonitrile: 3.40214e-9 kg; data quality (3,2,1,1,5)
- silver: 3.52773e-8 kg; data quality (4,1,1,1,4)
- Propane, 1,2-dichloro-: 9.78344e-15 kg; data quality (4,2,1,1,5)
- NITRATE: 6.27769e-13 kg; data quality (5,1,1,1,5)
- ethene, tetrachloro-: 1.02348e-8 kg; data quality (3,2,1,1,4)
- Phthalate, dioctyl-: 5.08168e-13, 8.46557e-12 kg (2 entries, compartments not in this file); data quality (4,1,1,1,5)
- PCB-1: 2.19664e-20 kg; data quality (2,2,1,1,5)
- nickel: 4.97411e-8, 4.94667e-8 kg (2 entries, compartments not in this file); data quality (4,1,1,1,4)
- hydrogen fluoride: 3.64287e-7 kg; data quality (2,2,1,1,4)
- toluene, 2,4-dinitro-: 1.62966e-13 kg; data quality (5,2,1,1,5)
- Benzo(b)fluoranthene: 2.78495e-12 kg; data quality (2,2,1,1,4)
- copper: 2.91125e-7, 3.87024e-8 kg (2 entries, compartments not in this file); data quality (4,1,1,1,4)
- o-cresol: 1.38575e-10 kg; data quality (4,2,1,1,5)
- 1,2-BUTYLENE OXIDE: 1.26874e-11 kg; data quality (4,2,1,1,5)
- Nitrogen fluoride: 1.3364e-10 kg; data quality (2,1,1,1,1)
- Cyclohexanol: 2.05508e-12 kg; data quality (4,1,1,1,4)
- 2-chloro-1-phenylethanone: 4.07414e-12 kg; data quality (2,2,1,1,5)
- selenium: 4.84426e-8 kg; data quality (2,2,1,1,5)
- 2,3,4'-TRICHLOROBIPHENYL: 2.59567e-19 kg; data quality (2,2,1,1,5)
- benzyl chloride: 4.6672e-10 kg; data quality (2,2,1,1,5)
- ethane, 1,2-dichloro-: 2.47358e-11 kg; data quality (3,2,1,1,5)
- methane, chlorodifluoro-, hcfc-22: 1.15198e-8 kg; data quality (4,1,1,1,5)
- 2-ethoxyethyl acetate: 1.82704e-9 kg; data quality (3,2,1,1,5)
- Chrysene, 5-methyl-: 1.28045e-14 kg; data quality (2,2,1,1,5)
- hexachlorobenzene: 6.24072e-14 kg; data quality (4,1,1,1,5)
- polychlorinated biphenyls: 8.95799e-13 kg; data quality (3,2,1,1,4)
- cyclohexane: 1.56213e-9 kg; data quality (4,1,1,1,5)
- chromium: 2.80643e-9, 1.29408e-7, 1.97898e-9 kg (3 entries, compartments not in this file); data quality (4,1,1,1,4)
- hydrogen sulfide: 9.82189e-11 kg; data quality (3,2,1,1,4)
- trichloroethylene: 6.95697e-7 kg; data quality (4,2,1,1,4)
- Zinc: 1.88078e-11 kg; data quality (5,1,1,1,5)
- Xylene: 2.5869e-7 kg; data quality (4,2,1,1,4)
- 4,4'-METHYLENEDIANILINE: 3.42666e-11 kg; data quality (4,2,1,1,5)
- acetophenone: 5.96143e-7 kg; data quality (4,2,1,1,4)
- butadiene: 7.32843e-8 kg; data quality (2,2,1,1,4)
- pyrene: 4.19302e-11 kg; data quality (2,2,1,1,4)
- benzene: 6.90418e-7 kg; data quality (3,2,1,1,4)
- methane, monochloro-, r-40: 4.12432e-7 kg; data quality (3,2,1,1,4)
- Ethane, 1,1,1,2-tetrafluoro-, HFC-134a: 1.48092e-6 kg; data quality (4,2,1,4,1)
- Dimethyl sulfate: 2.7937e-11 kg; data quality (2,2,1,1,5)
- Phenol: 9.43688e-12 kg; data quality (3,1,1,1,5)
- Sodium formate: 1.01417e-13 kg; data quality (3,1,1,1,5)
- styrene: 2.0673e-7 kg; data quality (4,2,1,1,4)
- Titanium: 2.92123e-9 kg; data quality (5,2,1,1,4)
- SEC-BUTYL ALCOHOL: 4.98284e-10, 2.45085e-12 kg (2 entries, compartments not in this file); data quality (5,1,1,1,5)
- 2-(2-BUTOXYETHOXY) ETHYL ACETATE: 4.113e-12 kg; data quality (5,2,1,1,5)
- methyl methacrylate: 1.12084e-9 kg; data quality (4,2,1,1,4)
- propylene oxide: 2.57959e-13 kg; data quality (3,2,1,1,5)
- benzidine: 8.85432e-18 kg; data quality (2,2,1,1,5)
- Phenol, 2,4-dimethyl-: 5.85289e-14 kg; data quality (4,1,1,1,3)
- carbon tetrachloride: 3.99355e-10 kg; data quality (4,2,1,1,4)
- bis(2-chloroethyl)ether: 1.62725e-19 kg; data quality (3,2,1,1,5)
- carbon disulfide: 1.14885e-6 kg; data quality (4,2,1,1,4)
- Methane: 1.06036e-6 kg; data quality (4,2,1,4,1)
- phthalic anhydride: 6.81702e-12 kg; data quality (2,2,1,1,5)
- Nitrobenzene: 1.56242e-19 kg; data quality (4,2,1,1,5)
- 2,4/2,6-toluenediisocyanate (mixture): 1.35329e-13 kg; data quality (3,1,1,1,5)
- diisocyanates: 1.21147e-11 kg; data quality (4,1,1,1,5)
- 2-methylnaphthalene: 3.41102e-10 kg; data quality (2,2,1,1,4)
- arsenic: 3.1921e-8, 3.99279e-9 kg (2 entries, compartments not in this file); data quality (2,1,1,1,4)
- chlorine: 1.94331e-5 kg; data quality (4,2,1,1,5)
- Butane, perfluorocyclo-, PFC-318: 3.71944e-11 kg; data quality (2,1,1,1,1)
- AMMONIA: 1.54284e-10 kg; data quality (3,1,1,1,4)
- Decabromodiphenyl oxide: 4.57598e-13, 2.28799e-14 kg (2 entries, compartments not in this file); data quality (4,1,1,1,5)
- BUTYL ACRYLATE: 7.94121e-12 kg; data quality (4,1,1,1,5)
- monochloroethane: 1.03536e-7 kg; data quality (3,2,1,1,4)
- HYDROFLUORIC ACID: 7.02098e-13 kg; data quality (3,1,1,1,5)
- benzo(a)pyrene: 2.86485e-11 kg; data quality (2,2,1,1,4)
- cyanide: 1.13724e-8 kg; data quality (3,2,1,1,4)
- arsenic: 1.82982e-7 kg; data quality (3,2,1,1,4)
- ALUMINUM OXIDE: 5.13635e-12, 2.31231e-12 kg (2 entries, compartments not in this file); data quality (5,1,1,1,5)
- carbon monoxide: 0.00141002 kg; data quality (2,2,1,1,4)
- chloroform: 1.19804e-9 kg; data quality (4,2,1,1,4)
- 1,2,4-trichlorobenzene: 2.6145e-16 kg; data quality (3,2,1,1,5)
- Phthalate, dimethyl-: 4.07397e-10 kg; data quality (4,2,1,1,3)
- acrolein: 2.07673e-8 kg; data quality (2,2,1,1,4)
- NITROUS ACID: 2.3501e-7 kg; data quality (5,1,1,1,4)
- NITRIC ACID: 1.31974e-12 kg; data quality (3,1,1,1,5)
- hydroquinone: 1.05082e-12 kg; data quality (3,2,1,1,5)
- Phosphorus: 1.33218e-8 kg; data quality (3,1,1,1,5)
- Hydrocarbons, aromatic: 7.71513e-10 kg; data quality (3,2,1,3,3)
- Propene, 1,3-dichloro-: 2.631e-9 kg; data quality (3,2,1,1,4)
- QUINOLINE: 1.91499e-14 kg; data quality (3,2,1,1,4)
- Benzo(k)fluoranthene: 1.40236e-12 kg; data quality (2,2,1,1,4)
- 2-METHOXYETHANOL: 1.30868e-12 kg; data quality (4,2,1,1,5)
- silver: 1.1781e-13 kg; data quality (4,1,1,1,5)
- p-cresol: 1.55741e-8 kg; data quality (4,2,1,1,4)
- phthalate, dioctyl-: 1.00917e-7 kg; data quality (3,2,1,1,4)
- chlorine: 2.71841e-9 kg; data quality (2,1,1,1,4)
- biphenyl: 4.78706e-8 kg; data quality (4,2,1,1,4)
- butanol: 1.77792e-8 kg; data quality (5,1,1,1,4)
- dimethyl formamide: 2.64463e-9 kg; data quality (4,2,1,1,5)
- Aluminum: 1.38906e-7 kg; data quality (4,1,1,1,3)
- bromoform: 2.26988e-11 kg; data quality (3,2,1,1,5)
- Methane, trifluoro-, HFC-23: 5.17706e-11 kg; data quality (2,1,1,1,1)
- anthracene: 8.07676e-12 kg; data quality (3,2,1,1,4)
- ethane, 1,2-dibromo-: 3.96124e-10 kg; data quality (2,2,1,1,4)
- N,N-DIMETHYLANILINE: 6.57009e-13 kg; data quality (5,2,1,1,5)
- Dimethoxy methane: 8.37038e-15 kg; data quality (2,2,1,1,4)
- isophorone: 8.18681e-10 kg; data quality (2,2,1,1,5)
- DNOC: 1.3009e-19 kg; data quality (2,2,1,1,5)
- ammonia: 1.96662e-5 kg; data quality (3,2,1,1,5)
- toluene-2,4-diisocyante: 6.4178e-12 kg; data quality (3,2,1,1,5)
- 1-Methyl-2-pyrrolidinone: 4.24771e-9, 9.92478e-13 kg (2 entries, compartments not in this file); data quality (5,1,1,1,4)
- 1,4-dichlorobenzene: 1.65054e-12 kg; data quality (2,2,1,1,4)
- ethylene glycol: 1.48493e-8 kg; data quality (5,2,1,1,4)
- nitric acid: 1.72289e-6, 3.64376e-14 kg (2 entries, compartments not in this file); data quality (3,1,1,1,4)
- Zinc: 4.56256e-7 kg; data quality (5,1,1,1,4)
- Methyl iodide: 6.20368e-9 kg; data quality (4,2,1,1,4)
- methyl isobutyl ketone: 3.42844e-7 kg; data quality (4,2,1,1,5)
- Propane, perfluoro-: 4.33865e-11 kg; data quality (2,1,1,1,1)
- Ethene, trichloro-: 1.01417e-13 kg; data quality (5,1,1,1,5)
- acenaphthylene: 1.8536e-11 kg; data quality (3,2,1,4,2)
- formic acid: 1.332e-11 kg; data quality (3,1,1,1,5)
- antimony: 4.40062e-8 kg; data quality (3,2,1,1,5)
- cadmium: 4.64101e-8 kg; data quality (3,2,1,1,4)
- hexachloroethane: 5.87506e-14 kg; data quality (4,2,1,1,4)
- vinyl acetate: 7.3233e-11 kg; data quality (4,2,1,1,5)
- Cobalt: 2.59037e-9 kg; data quality (4,1,1,1,4)
- Ethylene glycol monoethyl ether: 7.43639e-12, 5.54675e-13 kg (2 entries, compartments not in this file); data quality (5,1,1,1,5)
- 2,4,5-trichlorophenol: 1.3009e-19 kg; data quality (2,2,1,1,5)
- Chrysene: 2.00416e-11 kg; data quality (2,2,1,1,4)
- m-cresol: 1.76217e-8 kg; data quality (4,2,1,1,4)
- phenol: 4.28942e-7 kg; data quality (4,2,1,1,4)
- hexachloro-1,3-butadiene: 1.56242e-19 kg; data quality (4,2,1,1,5)
- NITROGLYCERIN: 7.53732e-13 kg; data quality (5,1,1,1,5)
- HYDROCHLORIC ACID: 1.87221e-10 kg; data quality (2,1,1,1,5)
- pentachlorophenol: 7.06534e-18 kg; data quality (3,2,1,1,5)
- hydrogen chloride: 7.84747e-6 kg; data quality (2,2,1,1,5)
- benzene, chloro-: 1.09508e-8 kg; data quality (4,2,1,1,4)
- Methane, difluoro-, HFC-32: 9.23788e-9 kg; data quality (4,2,1,4,1)
- 2-nitropropane: 2.36819e-14 kg; data quality (4,2,1,1,5)
- Sulfuric acid: 8.70009e-7 kg; data quality (2,1,1,1,5)
- methane, tetrachloro-, R-10: 1.59631e-11 kg; data quality (3,1,1,1,5)
- Triethyl amine: 5.94503e-10 kg; data quality (4,2,1,1,5)
- Chromium, ion: 7.80705e-8 kg; data quality (2,2,1,1,4)
- BUTYL ISOCYANATE: 2.87119e-11 kg; data quality (5,2,1,1,5)
- 1,4-BENZOQUINONE: 5.38864e-14 kg; data quality (3,2,1,1,5)
- styrene: 7.8979e-13 kg; data quality (3,1,1,1,5)
- Carbon dioxide: 0.0780527 kg; data quality (3,2,1,4,1)
- ACRYLAMIDE: 2.03064e-15 kg; data quality (4,2,1,1,5)
- PHOSPHORUS: 2.52452e-8 kg; data quality (2,2,1,1,4)
- sulfur dioxide: 0.000693334 kg; data quality (2,2,1,1,4)
- 2,4-dimethylphenol: 2.49919e-10 kg; data quality (4,1,1,1,4)
- propanal: 1.82179e-9 kg; data quality (3,2,1,4,2)
- maleic anhydride: 3.66216e-13 kg; data quality (2,2,1,1,5)
- Propane, 1,1,1,3,3,3-hexafluoro-, HCFC-236fa: 1.83356e-10 kg; data quality (4,2,1,4,1)
- Dinitrogen monoxide: 9.97998e-8 kg; data quality (4,2,1,4,1)
- ethylene glycol: 1.75825e-12 kg; data quality (5,1,1,1,5)
- 2,2,4-trimethylpentane: 5.99196e-8 kg; data quality (3,2,1,1,4)
- hexane: 3.72247e-7 kg; data quality (3,2,1,1,4)
- 2,4,5,2',5'-PENTACHLOROBIPHENYL: 4.57848e-19 kg; data quality (2,2,1,1,5)
- phosgene: 9.5415e-8 kg; data quality (4,2,1,1,4)
- Pentachloroethane: 1.75966e-14 kg; data quality (2,1,1,1,5)
- VOC, volatile organic compounds: 4.96648e-5 kg; data quality (3,2,1,1,4)
- Sodium formate: 5.68218e-12 kg; data quality (3,1,1,1,4)
- n-nitrosodimethylamine: 1.95623e-17 kg; data quality (5,2,1,1,5)
- Acetophenone: 2.28799e-14 kg; data quality (4,1,1,1,5)
- Ethanol, 2-butoxy-: 7.86348e-12 kg; data quality (5,2,1,1,5)
- ethylene oxide: 6.31782e-11 kg; data quality (3,2,1,1,5)
- 4-Methyl-2-pentanone: 8.32091e-11 kg; data quality (4,1,1,1,5)
- beryllium: 3.34836e-10 kg; data quality (2,2,1,1,4)
- Chromium VI: 3.04982e-9 kg; data quality (3,2,1,1,4)
- beryllium: 9.18904e-13 kg; data quality (5,1,1,1,3)
- Hydrazine: 3.64926e-9 kg; data quality (4,2,1,1,4)
- Ethane, pentafluoro-, HFC-125: 1.5863e-8 kg; data quality (4,2,1,4,1)
- CHLOROPRENE: 1.62e-14 kg; data quality (2,2,1,1,5)
- lead: 1.1705e-6 kg; data quality (3,2,1,1,4)
- epichlorohydrin: 2.45313e-12 kg; data quality (3,2,1,1,4)
- acenaphthene: 1.52368e-11 kg; data quality (3,2,1,4,1)
- Nickel, ion: 1.19889e-12 kg; data quality (3,2,1,1,5)
- aniline: 5.96973e-12 kg; data quality (4,2,1,1,4)
- Methane, tetrafluoro-, R-14: 6.22088e-10 kg; data quality (2,1,1,1,1)
- Phthalate, dibutyl-: 4.93692e-10 kg; data quality (4,2,1,1,4)
- 1,1-DIMETHYL HYDRAZINE: 3.30582e-14 kg; data quality (5,2,1,1,5)
- fluorene: 3.00041e-11 kg; data quality (3,2,1,2,3)
- nitrogen oxides: 9.1849e-5 kg; data quality (2,2,1,1,4)
- Water, fresh: 0.00853318 m3; data quality (4,2,1,4,2)
- 4,4'-METHYLENEBIS(2-CHLOROANALINE): 9.58529e-13 kg; data quality (5,2,1,1,5)
- Sulfur hexafluoride: 1.24792e-6 kg; data quality (4,2,1,4,1)
- Phosphine: 2.65977e-12 kg; data quality (4,2,1,1,4)
- Hydrazine, methyl-: 9.89434e-11 kg; data quality (2,2,1,1,5)
- manganese: 1.33007e-11 kg; data quality (4,1,1,1,5)
- manganese: 1.01033e-7 kg; data quality (3,2,1,1,4)
- diethanolamine: 2.12378e-11 kg; data quality (3,2,1,1,5)
- Benzo(a)anthracene: 1.17576e-13 kg; data quality (2,2,1,1,4)
- Triethylene glycol: 1.2931e-12 kg; data quality (5,2,1,1,5)
- Cobalt: 1.01247e-8 kg; data quality (3,2,1,1,4)
- acetamide: 5.58936e-15 kg; data quality (5,2,1,1,4)
- nickel: 3.08764e-7 kg; data quality (3,2,1,1,4)
- BETA-PROPIOLACTONE: 3.72624e-16 kg; data quality (5,2,1,1,4)
- Decabromodiphenyl oxide: 2.39326e-11 kg; data quality (4,1,1,1,4)
- 2-(2-ETHOXYETHOXY) ETHYL ACETATE: 1.88981e-11 kg; data quality (5,2,1,1,5)
- methane, dichloro-, hcc-30: 1.63357e-8 kg; data quality (4,2,1,1,4)
- Benzo(g,h,i)perylene: 2.07166e-8 kg; data quality (3,2,1,1,4)
- methanol: 3.21812e-7 kg; data quality (4,2,1,1,4)
- lead: 6.02344e-9, 4.30321e-10 kg (2 entries, compartments not in this file); data quality (3,1,1,1,4)
- methylene diphenyl diisocyanate: 2.05233e-10 kg; data quality (4,2,1,1,5)
- t-butyl methyl ether: 9.21071e-10 kg; data quality (4,1,1,1,4)
- phenanthrene: 9.23543e-10 kg; data quality (3,2,1,1,4)
- Indeno(1,2,3-cd)pyrene: 2.21241e-13 kg; data quality (3,2,1,3,3)
- 3-methylcholanthrene: 1.98151e-14 kg; data quality (2,2,1,1,4)
- Xylene: 4.18401e-14 kg; data quality (4,1,1,1,4)
- acrylonitrile: 9.68447e-10 kg; data quality (4,2,1,1,4)
- Hexachlorocyclopentadiene: 1.56242e-19 kg; data quality (3,2,1,1,5)
- Asbestos: 1.98344e-14 kg; data quality (5,2,1,1,5)
- 1,1,2,2-tetrachloroethane: 1.08791e-9 kg; data quality (3,2,1,1,4)
- m-xylene: 8.09276e-9 kg; data quality (4,1,1,2,4)
- 2,4-dinitrophenol: 2.38079e-17 kg; data quality (5,2,1,1,5)
- Ethane, hexafluoro-, HFC-116: 4.71028e-10 kg; data quality (2,1,1,1,1)
- Water, saline: 0.000310072 m3; data quality (4,2,1,4,2)
- Aluminum: 4.08987e-6 kg; data quality (4,1,1,1,5)
- 2,4,6-trichlorophenol: 1.3009e-19 kg; data quality (2,2,1,1,5)
- acrylic acid: 2.28987e-12 kg; data quality (4,2,1,1,5)
- ammonia: 1.60713e-7 kg; data quality (3,1,1,1,4)
- Cresol: 5.77841e-10 kg; data quality (2,1,1,1,5)
- acetaldehyde: 5.47428e-8 kg; data quality (3,2,1,1,4)
- benz[a]anthracene: 2.9911e-11 kg; data quality (2,2,1,1,4)
- Diethylene glycol butyl ether: 2.5154e-10 kg; data quality (4,2,1,1,5)
- o-Xylene: 3.49083e-9 kg; data quality (3,2,1,2,4)
- Propene: 1.05248e-8 kg; data quality (3,1,1,1,4)
- ethylbenzene: 2.30958e-9 kg; data quality (4,1,1,1,4)
- o-toluidine: 2.82756e-19 kg; data quality (4,2,1,1,4)
- Dibenz(a,h)anthracene: 4.06982e-14 kg; data quality (2,2,1,1,4)
- 1,1-DICHLOROETHYLENE: 1.84998e-13 kg; data quality (3,2,1,1,4)
- Bromine: 4.5531e-11 kg; data quality (5,1,1,1,5)
- naphthalene: 8.74737e-8 kg; data quality (3,2,1,1,4)

## Inventory method
Input-output

## Modelling constants
The reference unit of all processes is 1 USD2013 of the good or service. The technosphere inputs are based on the US BEA detailed input-output tables for 2007. The IO tables are combined to develop a commodity-by-commodity model based on the the industry-technology assumption (see Suh et al., 2010), which assumes all commodities produced by a given industry have the same input structure, but that multiple industries can produce the same commodity. Thus, model technosphere flows represent commodity outputs (and not industry outputs) from other processes in the model. There are no by-products included in these processes. All commodity production is based on US-conditions, despite in reality that some goods and services are produced overseas, as USEEIO v1.1 is a single-region IO model.

## Completeness
The input-output approach assures that all purchased inputs associated with the sectors making these commodities as reported in the US census for 2007 are included. The direct resources extracted including minerals, energy sources, water and land occupied are included. Emissions to air include all critieria air pollutants, greenhouse gases, and hazardous and toxic air pollutants as defined by US EPA. Releases to water include toxics, total nitrogen and total phosphorus, and water discharges. Releases to soil or groundwater include toxics and agriculutural pesticides. Some metal releases to air, water and soil are not included because they could not be speciated. Solid hazardous and non-hazardous wastes generated are not included as an elementary flows although purchases of waste services are included.

## Data treatment
Greenhouse gases are primarily from the US Greenhouse Gas Emission Inventory (USEPA 2016a). Biogenic C uptake is not included (change from version 1.0), as biogenic C emission are not included. Toxic releases to air, water and soil (except pesticides) are from the 2013 Toxic Release Inventory (USEPA 2015a). Criteria air pollutants and hazardous air pollutants are from the 2011 National Emissions Inventory (USEPA 2015b). All estimates are normalized by industry based on sector output in the data year, then converted to 2013 USD using relative sector-specific CPIs (if data year is not 2013). Energy use represent raw renewables or fossil fuel energies and is based on EIA data for 2014. See Table 1 in Yang, Ingwersen et al. 2017 and Supporting Information 1, and the v1.1 data update notes (Ingwersen et al. 2017) for all details on environmental data sources used.Land occupation associated with manufacturing buildings was estimated based on the building floorspace data provided by the U.S. Energy Information Administration in the 2010 Manufacturing Energy Consumption Survey (EIA 2013). Portions of total renewable energy (EIA 2016) based on EIA-923 reports for 2014 (EIA 2017) are included. Nitrogen and Phosphorus releases are modeled in total N and total P equivalents as estimated by the Discharge Monitoring Report Nutrient Loading tool (USEPA 2016b). Self-supplied withdrawals were assigned to industrial sectors based on water use statistics for Canadian industries by NAICS 3-digit sector scaled to US production levels based on gross domestic product by industry (BEA 2015; Statistics Canada 2010), and further disaggregated to the manufacturing sectors based on compensation of employees as provided by the 2007 IO tables (BEA 2015). Water withdrawals associated with public supply were allocated to sectors based on their use of water, sewage, and other services in USD based on the IO tables (BEA 2015). Portions of total renewable energy (EIA 2016) by type are assigned to sectors (hydro, wind, solar, or) based on EIA-923 reports for 2014 (EIA 2017).

## Data collection
2015-2016

## Sampling procedure
US federal government sources, including surveys and US EPA emissions databases are used as the primary sources. From these sources, data for US reporting establishments/facilities are aggregated by the NAICS sector as defined in the BEA detailed 2007 input-output tables. When level of sector aggregation differs, or when direct emissions are not reported but modeled, additional sources are used to make allocations and estimates.

## Review details
In regard to quality assurance and peer-review, each dataset created went through Quality Assurance as defined in a quality assurance project plans at US EPA, CSRA or ERG. The model was assembled with the IO model builder model (USEPA 2016c). Validation functions were used to check that all the model components were properly assembled and harmonized. Bayou Demeke and Santosh Ghimire provided internal peer review of the model methodology and the manuscript underwent standard EPA management review. An editor and two anonymous reviewers at the Journal of Cleaner Production reviewed the model. In regard to data quality evaluation, data quality assessment was performed at the flow and process levels according to the updated US EPA data quality assessment guidelines as defined in US EPA (2016b).

## Intended application
The primary application is for use in the US Environmentally-Extended Input-Ouput model, USEEIO, version 1.1. This model is being used by the US EPA for supporting tools that prioritize goods and services based on potential environmental impacts, resource use or emissions for large regions, including the US and US states, and as a strealined tool for organizations as a starting point to consider sustainable materials management. Model results are designed to provide meso/macro-level decision support.

## Project
USEEIO v1.1 was developed by the US EPA with CSRA and ERG with Wesley W. Ingwersen and David E. Meyer as research leads. Yi Yang was the technical lead on the work for CSRA (contract EP-C-15-012); Troy Hawkins was lead for ERG (contract EP-C-12-021).

## Sources
- Lovelace 2009
- Ingwersen et al. DRAFT
- USEPA 2016c
- Kim et el. 2013
- USEPA 2015b
- BEA 2015
- BLM 2008
- Edelen and Ingwersen 2017
- USEPA 2016a
- Macknick et al. 2011
- EIA 2015
- Statistics Canada 2010
- Torcellini et al. 2003
- Yienger et al. 1995
- USDA 2016
- USGS 2016
- USDA 2006
- USEPA 2015a
- USDA 2014
- Nickerson et al. 2011
- Blackhurst et al. 2010
- USDA 2009b
- Maupin et al. 2014
- USDA 2009a
- USEPA 2016b
- EIA 2016
- EIA 2017
- Ingwersen et al. 2017
- USGS 2015
- Goebes et al. 2003
- EIA 2013
