# Fresh soybeans, canola, flaxseeds, and other oilseeds; at farm

Dataset: openLCA process, unit process
Category: 1111: Oilseed and Grain Farming
Geography: United States
Time period: 2017-01-01 to 2017-12-31
Data quality: US EPA - Process Pedigree Matrix (1;1)
Exchange data quality scheme: US EPA - Flow Pedigree Matrix
Generated by: US EPA with CSRA and ERG
Owner: US EPA
Published in: Yang, Ingwersen et al. 2017
restrictionsDescription: This model shold be appropriately cited (see Yang, Ingwersen et al. 2017 source or Publication field) when used. Any changes or derivations of this model by the user should be documented. The model itself and any results from use of this model shall not be construed to consitute US EPA opinion or policy.
copyright: false

## General comment
BEA Code & Name is '1111A0:Oilseed farming'. Description of the primary industry producing this good or service, adapted from the Census Bureau NAICS 2007 descriptions: This industry comprises establishments primarily engaged in growing oilseed crops. These crops have an annual life cycle and are typically grown in open fields. Related NAICS codes are: 11111-2

## Technology
The process describes the average US production of this good or service within this NAICS-based grouping defined in the BEA 2007 detailed input-output tables (BEA 2015). Distribution, wholesale and retailing of this good or service, use, and final disposal are not included. Creation of a product system with this process will enable modeling of all upstream (supply-chain) activities.

## Geography
Data represent the 50 US states

## Time period
2017 was the year in which this version of USEEIO was released and is the target date for the model

## Reference product
- Fresh soybeans, canola, flaxseeds, and other oilseeds; at farm: 1 USD

## Inputs from technosphere
All rows: data quality (1,3,1,1,1)
- Electronic equipment repair and maintenance: 0.000513419 USD
- Investment advice, portfolio management, and other financial advising services: 0.000606768 USD
- Computer systems design: 4.66744e-5 USD
- Farm machinery and equipment; at manufacturer: 0.0113419 USD
- Water transport (boats, ships, ferries): 0.00168028 USD
- Sanitary paper (tissues, napkins, diapers, etc.); at manufacturer: 9.33489e-5 USD
- Securities and commodities brokerage and exchanges: 4.66744e-5 USD
- Golf courses, marinas, ski resorts, fitness and other rec centers and industries: 0.000280047 USD
- Full-service restaurants: 4.66744e-5 USD
- Civic, social, professional, and similar organizations: 0.004014 USD
- Waste management and remediation: 0.000653442 USD
- Business support: 0.000140023 USD
- Pipeline transport: 0.00042007 USD
- Other petroleum and coal products; at manufacturer: 0.000280047 USD
- Architectural, engineering, and related services: 0.000186698 USD
- Colleges, universities, junior colleges, and professional schools: 0.00042007 USD
- Limited-service restaurants: 0.000466744 USD
- Sports: 0.000233372 USD
- Drinking water and wastewater treatment; at consumer: 0.00592765 USD
- Material handling equipment; at manufacturer: 0.000513419 USD
- Other basic inorganic chemicals; at manufacturer: 0.00527421 USD
- Secondary steel products; at manufacturer: 0.000186698 USD
- Cutlery and handtools; at manufacturer: 0.00228705 USD
- Monetary authorities and depository credit intermediation: 0.0139557 USD
- Accounting, tax preparation, bookkeeping, and payroll: 0.00317386 USD
- Insurance carriers: 0.0192299 USD
- Management consulting: 4.66744e-5 USD
- Concrete pipe, bricks, and blocks; at manufacturer: 9.33489e-5 USD
- Other textiles; at manufacturer: 4.66744e-5 USD
- Agriculture and forestry support: 0.0610502 USD
- Employment services: 4.66744e-5 USD
- Lime and gypsum products; at manufacturer: 4.66744e-5 USD
- Natural gas; at consumer: 0.002007 USD
- Motors and generators; at manufacturer: 0.000140023 USD
- Other real estate: 0.00513419 USD
- Gaskets, seals, musical instruments, fasteners, brooms, brushes, mop and other misc. goods; at manufacturer: 0.000326721 USD
- Noncomparable imports: 0.00266044 USD
- Wholesale trade: 0.0463944 USD
- Vehicle seating and interior trim (upholstery); at manufacturer: 4.66744e-5 USD
- Chemicals (except basic chemicals, agrichemicals, polymers, paints, pharmaceuticals,soaps, cleaning compounds); at manufacturer: 0.000700117 USD
- Electricity; at consumer: 0.00485414 USD
- Nondepository credit intermediation and related activities: 0.00130688 USD
- Pumps and pumping equipment; at manufacturer: 9.33489e-5 USD
- Poultry farms: 0.000326721 USD
- Metal pipe fittings, ball and roller bearings, industrial patterns, metal bath fixtures, other misc. fabricated metals; at manufacturer: 0.000606768 USD
- Office administration: 4.66744e-5 USD
- Welding and Soldering Equipment, Scales and Balances, and other general purpose machinery; at manufacturer: 0.000326721 USD
- Vehicle repair: 0.000886814 USD
- Warehousing: 0.00826138 USD
- Nonresidential building repair and maintanence: 0.0131155 USD
- Performances: 9.33489e-5 USD
- Lessors of nonfinancial intangible assets: 0.000373396 USD
- Other vehicle parts; at manufacturer: 0.00149358 USD
- Storage batteries; at manufacturer: 0.0018203 USD
- Telecommunications: 0.00042007 USD
- Gasoline, fuels, and by-products of petroleum refining; at manufacturer: 0.0417736 USD
- Insurance agencies and brokerages: 0.000466744 USD
- Dimensional stone; at mine: 0.00266044 USD
- Fresh soybeans, canola, flaxseeds, and other oilseeds; at farm: 0.110058 USD
- Legal services: 0.00112019 USD
- Buildings and dwellings services: 0.000186698 USD
- Books, newspapers, magazines, and other print media; at manufacturer: 0.000140023 USD
- Metal structural products; at manufacturer: 0.00084014 USD
- Power tools; at manufacturer: 0.000326721 USD
- Magazines and journals; at publisher: 0.00042007 USD
- Veneer, plywood, and engineered wood; at manufacturer: 0.000140023 USD
- Other computer related services, including facilities management: 9.33489e-5 USD
- Rubber and plastic belts and hoses; at manufacturer: 0.000233372 USD
- General merchandise stores: 4.66744e-5 USD
- Vehicle engines and engine parts; at manufacturer: 0.000233372 USD
- All other food and drinking places: 0.000233372 USD
- Postal service: 0.000140023 USD
- Tobacco, cotton, sugarcane, peanuts, sugar beets, herbs and spices, and other crops; at farm: 0.00966161 USD
- Pesticides; at manufacturer: 0.0266978 USD
- Vehicle rental and leasing: 0.00331389 USD
- Other retail: 0.000560093 USD
- Vehicle electrical and electronic equipment; at manufacturer: 0.0018203 USD
- Machine shops; at manufacturer: 9.33489e-5 USD
- Commercial equipment rental: 0.00373396 USD
- Commercial machinery repair: 0.000140023 USD
- Rail transport: 0.0042007 USD
- Wireless telecommunications: 0.000700117 USD
- Other plastic products; at manufacturer: 0.00112019 USD
- Rubber tires; at manufacturer: 0.00312719 USD
- Truck transport: 0.0125554 USD
- Air transport: 0.000980163 USD
- Animal farms and aquaculture ponds (except cattle and poultry): 0.000980163 USD
- Fertilizers; at manufacturer: 0.0251109 USD
- Wooden windows, door, and flooring; at manufacturer: 0.000140023 USD
- Satellite, telecommunications resellers, and all other telecommunications: 9.33489e-5 USD
- Cattle ranches and feedlots: 0.00126021 USD
- Sand, gravel, clay, phosphate, other nonmetallic minerals; at mine: 4.66744e-5 USD

## Inputs from nature
- Water, fresh: 0.00159291, 0.000920439 m3 (2 entries, compartments not in this file); data quality (1,2,1,4,2)
- Occupation, annual crop: 2.23905 m2*a; data quality (2,3,1,1,1)
- Occupation, urban, discontinuously built: 5.50827e-6 m2*a; data quality (4,2,1,1,1)

## Emissions to nature
- Propiconazole: 1.96426e-7, 3.45094e-7, 1.26926e-10 kg (3 entries, compartments not in this file); data quality (3,2,1,1,4)
- fluorene: 5.30754e-9 kg; data quality (3,2,1,4,1)
- FENOXAPROP-P-ETHYL: 3.94572e-9, 8.27661e-9, 2.32492e-8 kg (3 entries, compartments not in this file); data quality (4,2,1,5,4)
- Water, fresh: 0.00204192 m3; data quality (1,2,1,4,2)
- pyrene: 3.33642e-10 kg; data quality (3,2,1,4,1)
- anthracene: 1.4203e-10 kg; data quality (3,2,1,4,1)
- Lambda-cyhalothrin: 1.66715e-7, 4.68306e-7, 7.9478e-8 kg (3 entries, compartments not in this file); data quality (4,2,1,5,4)
- DIMETHENAMID-P: 9.65904e-7, 1.30311e-7, 6.58813e-8 kg (3 entries, compartments not in this file); data quality (3,2,1,1,4)
- METHOXYFENOZIDE: 1.53709e-7, 4.31772e-7, 7.32776e-8 kg (3 entries, compartments not in this file); data quality (4,2,1,5,4)
- IMAZAQUIN: 1.29645e-8, 2.71946e-8, 7.63903e-8 kg (3 entries, compartments not in this file); data quality (4,2,1,5,4)
- QUIZALOFOP-P-ETHYL: 6.65135e-8, 1.3952e-7, 3.91916e-7 kg (3 entries, compartments not in this file); data quality (4,2,1,5,4)
- Chlorpyrifos: 1.06878e-6, 5.19185e-7, 8.40694e-6 kg (3 entries, compartments not in this file); data quality (3,2,1,1,4)
- arsenic: 1.89121e-9 kg; data quality (3,2,1,5,1)
- Flumioxazin: 7.11789e-7, 1.99943e-6, 3.39332e-7 kg (3 entries, compartments not in this file); data quality (4,2,1,5,4)
- IMAZETHAPYR, AMMON.: 5.31411e-8, 1.8918e-8, 9.01878e-9 kg (3 entries, compartments not in this file); data quality (4,2,1,5,4)
- PYRACLOSTROBIN: 3.92694e-7, 4.40993e-7, 1.61678e-8 kg (3 entries, compartments not in this file); data quality (3,2,1,1,4)
- LACTOFEN: 6.37693e-7, 1.08225e-7, 2.27016e-7 kg (3 entries, compartments not in this file); data quality (4,2,1,5,4)
- 2,4-D: 2.95593e-8, 8.3033e-8, 1.40918e-8 kg (3 entries, compartments not in this file); data quality (4,2,1,5,4)
- Dicamba: 4.90396e-8, 1.02866e-7, 2.88955e-7 kg (3 entries, compartments not in this file); data quality (4,2,1,5,4)
- Trifluralin: 4.41103e-7, 5.68261e-6, 6.77064e-7 kg (3 entries, compartments not in this file); data quality (3,2,1,1,4)
- FLUTHIACET-METHYL: 5.63674e-9, 3.32132e-8, 1.18237e-8 kg (3 entries, compartments not in this file); data quality (4,2,1,5,4)
- toluene: 1.6598e-6 kg; data quality (3,2,1,4,1)
- Esfenvalerate: 3.32132e-8, 1.18237e-8, 5.63674e-9 kg (3 entries, compartments not in this file); data quality (4,2,1,5,4)
- Acetochlor: 4.88884e-7, 1.83065e-7, 2.63663e-6 kg (3 entries, compartments not in this file); data quality (3,2,1,1,4)
- nitrogen oxides: 0.000626829 kg; data quality (3,2,1,1,1)
- Cypermethrin: 1.18237e-8, 3.32132e-8, 5.63674e-9 kg (3 entries, compartments not in this file); data quality (4,2,1,5,4)
- Diflubenzuron: 3.38204e-9, 1.99279e-8, 7.09424e-9 kg (3 entries, compartments not in this file); data quality (4,2,1,5,4)
- Glufosinate-ammonium: 8.75444e-7, 2.26513e-6, 1.50314e-6 kg (3 entries, compartments not in this file); data quality (3,2,1,1,4)
- o-Xylene: 2.23945e-7 kg; data quality (3,2,1,2,4)
- Pendimethalin: 7.80388e-6, 4.84943e-7, 5.47781e-11 kg (3 entries, compartments not in this file); data quality (3,2,1,1,4)
- FOMESAFEN SODIUM: 4.04174e-6, 2.60659e-6, 1.11455e-6 kg (3 entries, compartments not in this file); data quality (3,2,1,1,4)
- Fluazifop-p-butyl: 2.30563e-7, 6.47657e-7, 1.09916e-7 kg (3 entries, compartments not in this file); data quality (4,2,1,5,4)
- TRIFLOXYSTROBIN: 2.42456e-7, 4.11482e-8, 8.63133e-8 kg (3 entries, compartments not in this file); data quality (4,2,1,5,4)
- ACIFLUORFEN-SODIUM: 2.48298e-7, 6.97477e-7, 1.18372e-7 kg (3 entries, compartments not in this file); data quality (4,2,1,5,4)
- particulates, < 10 um: 0.0157164 kg; data quality (3,2,1,1,5)
- SAFLUFENACIL: 4.50939e-8, 2.65706e-7, 9.45899e-8 kg (3 entries, compartments not in this file); data quality (4,2,1,5,4)
- Sethoxydim: 3.55115e-8, 7.44895e-8, 2.09243e-7 kg (3 entries, compartments not in this file); data quality (4,2,1,5,4)
- sulfur dioxide: 1.17146e-6 kg; data quality (3,2,1,4,1)
- Chromium VI: 1.55041e-11 kg; data quality (3,2,1,5,1)
- Bifenthrin: 8.62421e-8, 5.08162e-7, 1.80903e-7 kg (3 entries, compartments not in this file); data quality (4,2,1,5,4)
- Benzo(b)fluoranthene: 4.22156e-11 kg; data quality (3,2,1,4,1)
- acenaphthene: 5.18868e-9 kg; data quality (3,2,1,4,1)
- ZETA-CYPERMETHRIN: 2.2547e-9, 1.32853e-8, 4.72949e-9 kg (3 entries, compartments not in this file); data quality (4,2,1,5,4)
- Paraquat: 4.28414e-7, 2.1107e-6, 1.10855e-6 kg (3 entries, compartments not in this file); data quality (3,2,1,1,4)
- manganese: 3.31593e-10 kg; data quality (3,2,1,5,1)
- Metolachlor: 1.58132e-6, 3.55439e-5, 1.53824e-6 kg (3 entries, compartments not in this file); data quality (3,2,1,1,4)
- Flumetsulam: 7.89143e-9, 1.65532e-8, 4.64985e-8 kg (3 entries, compartments not in this file); data quality (4,2,1,5,4)
- Imazethapyr: 6.80871e-7, 1.15553e-7, 2.42387e-7 kg (3 entries, compartments not in this file); data quality (4,2,1,5,4)
- Cyfluthrin: 5.67539e-8, 1.59423e-7, 2.70563e-8 kg (3 entries, compartments not in this file); data quality (4,2,1,5,4)
- TETRACONAZOLE: 9.58245e-9, 2.01003e-8, 5.64624e-8 kg (3 entries, compartments not in this file); data quality (4,2,1,5,4)
- Nitrogen: 0.000369546 kg; data quality (3,2,1,4,5)
- Dimethoate: 1.55574e-7, 9.16684e-7, 3.26335e-7 kg (3 entries, compartments not in this file); data quality (4,2,1,5,4)
- Metribuzin: 7.75831e-7, 1.64806e-6, 4.10043e-7 kg (3 entries, compartments not in this file); data quality (3,2,1,1,4)
- Chlorimuron-ethyl: 2.21104e-7, 1.05407e-7, 6.21087e-7 kg (3 entries, compartments not in this file); data quality (4,2,1,5,4)
- Rimsulfuron: 1.32853e-8, 4.72949e-9, 2.2547e-9 kg (3 entries, compartments not in this file); data quality (4,2,1,5,4)
- butadiene: 1.77921e-7 kg; data quality (3,2,1,4,1)
- 2,2,4-trimethylpentane: 2.97294e-7 kg; data quality (3,2,1,4,1)
- Glyphosate-isopropylammonium: 2.98091e-5, 3.35593e-5 kg (2 entries, compartments not in this file); data quality (3,2,1,1,4)
- benzene, chloro-: 1.05627e-7 kg; data quality (3,2,1,1,5)
- Benzo(k)fluoranthene: 3.4994e-11 kg; data quality (3,2,1,4,1)
- Imazamox: 3.38204e-9, 1.99279e-8, 7.09424e-9 kg (3 entries, compartments not in this file); data quality (4,2,1,5,4)
- naphthalene: 1.18036e-7 kg; data quality (3,2,1,3,3)
- 2,4-D, 2-ETHYLHEXYL ESTER: 2.9092e-6, 7.02743e-6, 1.27976e-5 kg (3 entries, compartments not in this file); data quality (3,2,1,1,4)
- THIFENSULFURON: 1.74739e-8, 1.02961e-7, 3.66536e-8 kg (3 entries, compartments not in this file); data quality (4,2,1,5,4)
- Flumiclorac-pentyl: 4.13831e-8, 1.97286e-8, 1.16246e-7 kg (3 entries, compartments not in this file); data quality (4,2,1,5,4)
- Imidacloprid: 7.32776e-9, 4.31772e-8, 1.53709e-8 kg (3 entries, compartments not in this file); data quality (4,2,1,5,4)
- 2,4-D, DIMETHYLAMINE SALT: 2.42986e-6, 4.24344e-6, 1.68067e-9 kg (3 entries, compartments not in this file); data quality (3,2,1,1,4)
- acenaphthylene: 4.84422e-9 kg; data quality (3,2,1,4,1)
- THIAMETHOXAM: 6.31051e-8, 1.07098e-8, 2.24651e-8 kg (3 entries, compartments not in this file); data quality (4,2,1,5,4)
- 2,4-D, BUTOXYETHYL ESTER: 3.83298e-8, 8.04014e-8, 2.2585e-7 kg (3 entries, compartments not in this file); data quality (4,2,1,5,4)
- GAMMA-CYHALOTHRIN: 1.99279e-8, 3.38204e-9, 7.09424e-9 kg (3 entries, compartments not in this file); data quality (4,2,1,5,4)
- Acephate: 1.90786e-7, 3.70638e-6 kg (2 entries, compartments not in this file); data quality (3,2,1,1,4)
- Chrysene: 1.11455e-10 kg; data quality (3,2,1,4,1)
- Carfentrazone ethyl ester: 5.63674e-10, 1.18237e-9, 3.32132e-9 kg (3 entries, compartments not in this file); data quality (4,2,1,5,4)
- FLUBENDIAMIDE: 6.97477e-8, 1.18372e-8, 2.48298e-8 kg (3 entries, compartments not in this file); data quality (4,2,1,5,4)
- particulates, < 2.5 um: 0.00396153 kg; data quality (3,2,1,1,5)
- para-xylene: 1.82011e-7 kg; data quality (3,2,1,1,5)
- Glyphosate: 8.70415e-8, 0.000149021, 6.6631e-6 kg (3 entries, compartments not in this file); data quality (3,2,1,1,4)
- Sulfentrazone: 3.09984e-6, 1.83621e-12, 1.56971e-6 kg (3 entries, compartments not in this file); data quality (3,2,1,1,4)
- Tribenuron-methyl: 1.18237e-8, 3.32132e-8, 5.63674e-9 kg (3 entries, compartments not in this file); data quality (4,2,1,5,4)
- methanol: 5.30509e-10 kg; data quality (3,2,1,1,5)
- styrene: 3.86609e-8 kg; data quality (3,2,1,4,1)
- acrolein: 5.68789e-7 kg; data quality (3,2,1,2,4)
- ammonia: 0.00138182 kg; data quality (3,2,1,1,5)
- Azoxystrobin: 9.33804e-7, 1.96215e-7, 5.09848e-7 kg (3 entries, compartments not in this file); data quality (3,2,1,1,4)
- isophorone: 6.51756e-10 kg; data quality (3,2,1,1,5)
- Indeno(1,2,3-cd)pyrene: 1.67356e-11 kg; data quality (3,2,1,4,1)
- 1,4-dichlorobenzene: 2.84489e-8 kg; data quality (3,2,1,1,5)
- formaldehyde: 6.69042e-6 kg; data quality (3,2,1,4,1)
- ethene, tetrachloro-: 2.69659e-10 kg; data quality (3,2,1,1,5)
- lead: 1.04227e-9 kg; data quality (3,2,1,1,5)
- Phosphorus: 0.00144552 kg; data quality (3,2,1,4,5)
- hexane: 2.37554e-7 kg; data quality (3,2,1,4,1)
- carbon monoxide: 0.000586207 kg; data quality (3,2,1,1,1)
- IMAZAQUIN, MON. SALT: 6.20041e-9, 3.65345e-8, 1.30061e-8 kg (3 entries, compartments not in this file); data quality (4,2,1,5,4)
- mercury: 1.63819e-11 kg; data quality (3,2,1,5,1)
- Clethodim: 1.74037e-6, 2.95365e-7, 6.19564e-7 kg (3 entries, compartments not in this file); data quality (4,2,1,5,4)
- m-xylene: 2.81119e-7 kg; data quality (3,2,1,2,4)
- methyl isobutyl ketone: 4.66704e-7 kg; data quality (3,2,1,1,5)
- benz[a]anthracene: 5.1543e-11 kg; data quality (3,2,1,4,1)
- VOC, volatile organic compounds: 0.00186176 kg; data quality (3,2,1,1,5)
- nickel: 3.46913e-10 kg; data quality (3,2,1,5,1)
- Dinitrogen monoxide: 0.00116981 kg; data quality (4,2,1,4,1)
- CLORANSULAM-METHYL: 2.7567e-7, 4.67849e-8, 9.8137e-8 kg (3 entries, compartments not in this file); data quality (4,2,1,5,4)
- Dibenz(a,h)anthracene: 1.96615e-13 kg; data quality (3,2,1,4,1)
- benzo(a)pyrene: 3.29803e-11 kg; data quality (3,2,1,4,1)
- Carbon dioxide: 0.209795 kg; data quality (4,2,1,4,1)
- phenanthrene: 1.35888e-8 kg; data quality (3,2,1,4,1)
- Hydrocarbons, aromatic: 1.10728e-7 kg; data quality (3,2,1,4,1)
- Triethyl amine: 3.18308e-10 kg; data quality (3,2,1,1,5)
- Chromium, ion: 5.35293e-11 kg; data quality (3,2,1,5,1)
- Benzo(g,h,i)perylene: 5.11048e-11 kg; data quality (3,2,1,4,1)
- Xylene: 1.15331e-6 kg; data quality (3,2,1,4,1)
- propanal: 6.31972e-7 kg; data quality (3,2,1,4,1)
- Quintozene: 2.12201e-10 kg; data quality (3,2,1,1,5)
- acetaldehyde: 3.06132e-6 kg; data quality (3,2,1,4,1)
- benzene, ethyl-: 3.43693e-7 kg; data quality (3,2,1,4,1)
- benzene: 2.181e-6 kg; data quality (3,2,1,3,2)
- fluoranthene: 1.00321e-9 kg; data quality (3,2,1,4,1)
- PHOSPHORUS: 2.92846e-7 kg; data quality (3,2,1,1,5)
- Methane: 1.67069e-5 kg; data quality (4,2,1,4,1)

## Inventory method
Input-output

## Modelling constants
The reference unit of all processes is 1 USD2013 of the good or service. The technosphere inputs are based on the US BEA detailed input-output tables for 2007. The IO tables are combined to develop a commodity-by-commodity model based on the the industry-technology assumption (see Suh et al., 2010), which assumes all commodities produced by a given industry have the same input structure, but that multiple industries can produce the same commodity. Thus, model technosphere flows represent commodity outputs (and not industry outputs) from other processes in the model. There are no by-products included in these processes. All commodity production is based on US-conditions, despite in reality that some goods and services are produced overseas, as USEEIO v1.1 is a single-region IO model.

## Completeness
The input-output approach assures that all purchased inputs associated with the sectors making these commodities as reported in the US census for 2007 are included. The direct resources extracted including minerals, energy sources, water and land occupied are included. Emissions to air include all critieria air pollutants, greenhouse gases, and hazardous and toxic air pollutants as defined by US EPA. Releases to water include toxics, total nitrogen and total phosphorus, and water discharges. Releases to soil or groundwater include toxics and agriculutural pesticides. Some metal releases to air, water and soil are not included because they could not be speciated. Solid hazardous and non-hazardous wastes generated are not included as an elementary flows although purchases of waste services are included.

## Data treatment
Greenhouse gases are primarily from the US Greenhouse Gas Emission Inventory (USEPA 2016a). Biogenic C uptake is not included (change from version 1.0), as biogenic C emission are not included. Toxic releases to air, water and soil (except pesticides) are from the 2013 Toxic Release Inventory (USEPA 2015a). Criteria air pollutants and hazardous air pollutants are from the 2011 National Emissions Inventory (USEPA 2015b). All estimates are normalized by industry based on sector output in the data year, then converted to 2013 USD using relative sector-specific CPIs (if data year is not 2013). Energy use represent raw renewables or fossil fuel energies and is based on EIA data for 2014. See Table 1 in Yang, Ingwersen et al. 2017 and Supporting Information 1, and the v1.1 data update notes (Ingwersen et al. 2017) for all details on environmental data sources used.N and P releases to water are based on feritlizer application (USDA 2016) and land use (USDA 2014) data from the Agricultural Census and releases estimated using national runs of the EPIC model (USDA 2006). Pesticide releases are based on pesticide application data from USDA (USDA 2016) and modeled releases using PestLCI as described in a draft paper (Ingwersen et al. DRAFT). Water use is based on USDA's Farm and Ranch Irrigation Survey (USDA 2009b). Land use is based on the Census of Agriculture (USDA 2009a).

## Data collection
2015-2016

## Sampling procedure
US federal government sources, including surveys and US EPA emissions databases are used as the primary sources. From these sources, data for US reporting establishments/facilities are aggregated by the NAICS sector as defined in the BEA detailed 2007 input-output tables. When level of sector aggregation differs, or when direct emissions are not reported but modeled, additional sources are used to make allocations and estimates.

## Review details
In regard to quality assurance and peer-review, each dataset created went through Quality Assurance as defined in a quality assurance project plans at US EPA, CSRA or ERG. The model was assembled with the IO model builder model (USEPA 2016c). Validation functions were used to check that all the model components were properly assembled and harmonized. Bayou Demeke and Santosh Ghimire provided internal peer review of the model methodology and the manuscript underwent standard EPA management review. An editor and two anonymous reviewers at the Journal of Cleaner Production reviewed the model. In regard to data quality evaluation, data quality assessment was performed at the flow and process levels according to the updated US EPA data quality assessment guidelines as defined in US EPA (2016b).

## Intended application
The primary application is for use in the US Environmentally-Extended Input-Ouput model, USEEIO, version 1.1. This model is being used by the US EPA for supporting tools that prioritize goods and services based on potential environmental impacts, resource use or emissions for large regions, including the US and US states, and as a strealined tool for organizations as a starting point to consider sustainable materials management. Model results are designed to provide meso/macro-level decision support.

## Project
USEEIO v1.1 was developed by the US EPA with CSRA and ERG with Wesley W. Ingwersen and David E. Meyer as research leads. Yi Yang was the technical lead on the work for CSRA (contract EP-C-15-012); Troy Hawkins was lead for ERG (contract EP-C-12-021).

## Sources
- BEA 2015
- USDA 2009b
- EIA 2015
- USDA 2006
- Maupin et al. 2014
- Macknick et al. 2011
- USEPA 2016a
- Blackhurst et al. 2010
- EIA 2017
- USDA 2009a
- USDA 2016
- Nickerson et al. 2011
- USEPA 2016c
- EIA 2013
- USEPA 2016b
- Statistics Canada 2010
- Kim et el. 2013
- BLM 2008
- USGS 2015
- Edelen and Ingwersen 2017
- USGS 2016
- Goebes et al. 2003
- USEPA 2015a
- EIA 2016
- USDA 2014
- Ingwersen et al. 2017
- Yienger et al. 1995
- USEPA 2015b
- Torcellini et al. 2003
- Lovelace 2009
- Ingwersen et al. DRAFT
