# Business support

Dataset: openLCA process, unit process
Category: 5614: Business Support Services
Geography: United States
Time period: 2017-01-01 to 2017-12-31
Data quality: US EPA - Process Pedigree Matrix (1;1)
Exchange data quality scheme: US EPA - Flow Pedigree Matrix
Generated by: US EPA with CSRA and ERG
Owner: US EPA
Published in: Yang, Ingwersen et al. 2017
restrictionsDescription: This model shold be appropriately cited (see Yang, Ingwersen et al. 2017 source or Publication field) when used. Any changes or derivations of this model by the user should be documented. The model itself and any results from use of this model shall not be construed to consitute US EPA opinion or policy.
copyright: false

## General comment
BEA Code & Name is '561400:Business support services'. Description of the primary industry producing this good or service, adapted from the Census Bureau NAICS 2007 descriptions: This industry group comprises establishments engaged in performing activities that are ongoing routine business support functions that businesses and organizations traditionally do for themselves.

## Technology
The process describes the average US production of this good or service within this NAICS-based grouping defined in the BEA 2007 detailed input-output tables (BEA 2015). Distribution, wholesale and retailing of this good or service, use, and final disposal are not included. Creation of a product system with this process will enable modeling of all upstream (supply-chain) activities.

## Geography
Data represent the 50 US states

## Time period
2017 was the year in which this version of USEEIO was released and is the target date for the model

## Reference product
- Business support: 1 USD

## Inputs from technosphere
All rows: data quality (1,3,1,1,1)
- Wholesale trade: 0.00533761 USD
- Unrefined oil and gas; at extraction site: 3.04397e-5 USD
- Waste management and remediation: 0.000923344 USD
- Automatic controls for HVAC and refrigeration equipment; at manufacturer: 0.000203916 USD
- Machine shops; at manufacturer: 0.000885259 USD
- Insurance carriers: 0.0106349 USD
- Civic, social, professional, and similar organizations: 0.000754664 USD
- Plastic pipe, fittings, and sausage casings; at manufacturer: 9.45811e-5 USD
- Cardboard; at manufacturer: 0.000826868 USD
- Magazines and journals; at publisher: 0.000797198 USD
- Coal; at mine: 5.66826e-7 USD
- Household goods repair: 0.00123903 USD
- Photography and photocopying equipment; at manufacturer: 0.000644177 USD
- Facilities support: 0.0013927 USD
- Hotels and campgrounds: 0.00572511 USD
- Legal services: 0.00817217 USD
- Analytical laboratory instruments; at manufacturer: 0.000149538 USD
- Investigation and security: 0.00168634 USD
- Marketing research and all other miscellaneous professional, scientific, and technical services: 0.00302648 USD
- Primary iron, steel, and ferroalloy products; at manufacturer: 3.75188e-6 USD
- Performances: 0.00076595 USD
- Electricity; at consumer: 0.00249056 USD
- External hard drives, CDs, other storage media; at manufacturer: 0.00113799 USD
- Corn products; at manufacturer: 0.000104058 USD
- Chemicals (except basic chemicals, agrichemicals, polymers, paints, pharmaceuticals,soaps, cleaning compounds); at manufacturer: 0.00153384 USD
- Satellite, telecommunications resellers, and all other telecommunications: 0.00213261 USD
- Vehicles and parts sales: 0.000105286 USD
- Movies and film: 0.000120658 USD
- Industrial process variable instruments; at manufacturer: 0.000743314 USD
- Abrasive products; at manufacturer: 5.69227e-5 USD
- Computer storage device readers; at manufacturer: 0.00016879 USD
- Plastic bottles; at manufacturer: 0.000107631 USD
- Paints and coatings; at manufacturer: 4.9997e-5 USD
- Sound recording: 5.66826e-7 USD
- Custom computer programming: 1.20063e-5 USD
- Carbon and graphite products; at manufacturer: 0.000666125 USD
- Telecommunications: 0.0156977 USD
- Other educational services: 0.000130413 USD
- Audio and video equipment; at manufacturer: 0.000111545 USD
- Nondepository credit intermediation and related activities: 0.00434452 USD
- Fluid meters and counting devices; at manufacturer: 1.41612e-5 USD
- Polystyrene foam products; at manufacturer: 0.000170716 USD
- Lessors of nonfinancial intangible assets: 0.00535677 USD
- Securities and commodities brokerage and exchanges: 0.00512007 USD
- Metal hinges, keys, lock, and other hardware; at manufacturer: 0.000139345 USD
- Vehicle rental and leasing: 0.00425978 USD
- Compressed Gases; at manufacturer: 0.000220911 USD
- Vehicle seating and interior trim (upholstery); at manufacturer: 1.3893e-7 USD
- Commercial equipment rental: 0.00202324 USD
- Watches, clocks, and other measuring and controlling devices; at manufacturer: 1.41612e-5 USD
- Software: 0.00109581 USD
- Water transport (boats, ships, ferries): 4.57124e-5 USD
- Vehicle engines and engine parts; at manufacturer: 0.000687066 USD
- Communications equipment; at manufacturer: 8.53841e-5 USD
- Finished and coated fabric; at manufacturer: 0.000142661 USD
- Full-service restaurants: 0.0066428 USD
- Leather; at manufacturer: 8.07181e-5 USD
- Commercial machinery repair: 0.00268844 USD
- Semiconductors; at manufacturer: 0.000424989 USD
- Noncomparable imports: 0.00332336 USD
- Gasoline, fuels, and by-products of petroleum refining; at manufacturer: 0.00191062 USD
- Books; at publisher: 2.91449e-5 USD
- Metal coatings, engravings, and heat treatments; at manufacturer: 0.000162469 USD
- Rubber and plastic belts and hoses; at manufacturer: 3.90392e-5 USD
- Other vehicle parts; at manufacturer: 0.00113854 USD
- Air conditioning, refrigeration, and warm air heating equipment; at manufacturer: 5.80016e-5 USD
- Veneer, plywood, and engineered wood; at manufacturer: 0.000266357 USD
- Promoters and agents: 0.000453871 USD
- Motor vehicle steering, suspension components (except spring), and brake systems; at manufacturer: 0.000725452 USD
- Newspapers; at publisher: 2.71888e-5 USD
- Monetary authorities and depository credit intermediation: 0.0086596 USD
- Nonresidential building repair and maintanence: 0.000214206 USD
- Fiber, yarn, and thread; at manufacturer: 1.06976e-5 USD
- Laminated plastic plates and shapes; at manufacturer: 0.000235502 USD
- Electronic capacitors, resistors, coils, transformers, connectors and other components (except semiconductors and printed circuit assemblies); at manufacturer: 6.2162e-6 USD
- Transmission and power train parts; at manufacturer: 0.00111947 USD
- Vehicle repair: 0.00139503 USD
- Scientific research and development: 2.31816e-6 USD
- Screws, nuts, and bolts; at manufacturer: 8.64316e-5 USD
- Specialty transformers; at manufacturer: 0.000149538 USD
- Secondary steel products; at manufacturer: 1.27258e-6 USD
- Light gauge metal cans, boxes, and containers; at manufacturer: 5.66826e-7 USD
- Specialized design: 0.000760094 USD
- Management consulting: 0.00783795 USD
- Stationery; at manufacturer: 0.000254869 USD
- Gaskets, seals, musical instruments, fasteners, brooms, brushes, mop and other misc. goods; at manufacturer: 0.000143857 USD
- Printed circuit and electronic assembly; at manufacturer: 0.000317155 USD
- Cardboard containers; at manufacturer: 0.00111608 USD
- Office administration: 0.00333154 USD
- Other support services: 0.0047365 USD
- Ink and ink cartridges; at manufacturer: 0.000345923 USD
- Springs and wires; at manufacturer: 2.94561e-5 USD
- Jewelry and silverware; at manufacturer: 7.08061e-5 USD
- Travel arrangement and reservation: 0.000943849 USD
- Hydraulic pumps, motors, cylinders and actuators; at manufacturer: 4.45964e-5 USD
- Sporting and athletic goods; at manufacturer: 1.41612e-5 USD
- Internet publishing and broadcasting: 0.0133357 USD
- All other forging, stamping, and sintering; at manufacturer: 1.41612e-5 USD
- Material handling equipment; at manufacturer: 0.000102746 USD
- Other engine equipment; at manufacturer: 1.41612e-5 USD
- Amusement parks and arcades: 3.74105e-5 USD
- Architectural, engineering, and related services: 0.00450137 USD
- Scenic and sightseeing transportation and support activities for transportation: 0.00887279 USD
- Other retail: 0.00119318 USD
- Food and beverage stores: 5.35869e-5 USD
- Wireless telecommunications: 0.00813601 USD
- General merchandise stores: 0.000183675 USD
- Other textiles; at manufacturer: 5.66826e-7 USD
- Cutting and machine tool accessory, rolling mill, and other metalworking machines; at manufacturer: 8.37456e-5 USD
- Insurance agencies and brokerages: 0.00121663 USD
- Electronic equipment repair and maintenance: 0.00112862 USD
- Limited-service restaurants: 0.00307613 USD
- Truck transport: 0.00262185 USD
- Urethane and other foam products; at manufacturer: 6.00647e-5 USD
- Warehousing: 0.00368921 USD
- News syndicates, libraries, archives, Internet publishing and all other information services: 0.0001654 USD
- Computer terminals and other computer peripheral equipment; at manufacturer: 0.00144342 USD
- Storage batteries; at manufacturer: 0.000168234 USD
- Glass and glass products; at manufacturer: 0.0004979 USD
- Dry-cleaning and laundry: 0.00025151 USD
- Other real estate: 0.0325751 USD
- Business support: 0.0071866 USD
- Other concrete products; at manufacturer: 4.07832e-5 USD
- Buildings and dwellings services: 0.00289325 USD
- Relay and industrial controls; at manufacturer: 1.56118e-5 USD
- Vehicle electrical and electronic equipment; at manufacturer: 0.000898051 USD
- Paper; at manufacturer: 0.00158502 USD
- Metal pipe fittings, ball and roller bearings, industrial patterns, metal bath fixtures, other misc. fabricated metals; at manufacturer: 0.00116921 USD
- Light bulbs; at manufacturer: 1.35944e-5 USD
- Golf courses, marinas, ski resorts, fitness and other rec centers and industries: 0.00130748 USD
- Greenhouse crops, mushrooms, nurseries, and flowers; at farm: 1.41612e-5 USD
- Pipeline transport: 1.59673e-5 USD
- Couriers and messengers: 0.0122908 USD
- Other plastic products; at manufacturer: 0.000978838 USD
- Independent artists, writers, and performers: 0.000538977 USD
- Company and enterprise management: 0.010749 USD
- Plastic bags, films, and sheets; at manufacturer: 0.000240623 USD
- Rubber tires; at manufacturer: 0.000504691 USD
- Petrochemicals; at manufacturer: 0.000169368 USD
- Wooden windows, door, and flooring; at manufacturer: 0.000420161 USD
- Clothing; at manufacturer: 7.22655e-5 USD
- Lumber and treated lumber; at manufacturer: 4.24837e-5 USD
- Machinery for the paper, textile, food or other industries (except semiconductor machinery); at manufacturer: 0.000148645 USD
- Ambulances: 3.62769e-5 USD
- Fabric; at manufacturer: 4.27126e-5 USD
- Wireless communications; at manufacturer: 0.000495354 USD
- Rail transport: 0.000242652 USD
- Accounting, tax preparation, bookkeeping, and payroll: 0.00630952 USD
- Communication and energy wire and cable; at manufacturer: 0.000449749 USD
- Books, newspapers, magazines, and other print media; at manufacturer: 0.0102974 USD
- Synthetic dyes and pigments; at manufacturer: 5.55112e-5 USD
- Welding and Soldering Equipment, Scales and Balances, and other general purpose machinery; at manufacturer: 4.26226e-5 USD
- Postal service: 0.0125631 USD
- Directory, mailing list, and other publishers; at publisher: 0.00371244 USD
- Colleges, universities, junior colleges, and professional schools: 6.25184e-6 USD
- Air transport: 0.00879623 USD
- Other computer related services, including facilities management: 0.00634878 USD
- Switchgear and switchboards; at manufacturer: 0.000638936 USD
- Timber and raw forest products; at forest: 4.00211e-6 USD
- All other converted paper products; at manufacturer: 5.66826e-7 USD
- Data processing and hosting: 0.00742001 USD
- Passenger ground transport: 0.00248604 USD
- Investment advice, portfolio management, and other financial advising services: 0.00044435 USD
- Consumer goods and general rental centers: 0.000757606 USD
- Adhesives; at manufacturer: 7.45845e-5 USD
- Other rubber products; at manufacturer: 2.75081e-5 USD
- Sports: 0.000497233 USD
- Cutlery and handtools; at manufacturer: 0.000140606 USD
- Paper bags and coated paper; at manufacturer: 0.00169798 USD
- Drinking water and wastewater treatment; at consumer: 0.000304073 USD
- Printing support; at manufacturer: 0.00067036 USD
- Other basic inorganic chemicals; at manufacturer: 2.88893e-5 USD
- Light fixtures; at manufacturer: 0.000535859 USD
- State and local government enterprises: 0.000875577 USD
- Natural gas; at consumer: 0.000277833 USD
- Pet care, photofinishing, parking and other sundry services: 0.0021978 USD
- Advertising and public relations: 0.014837 USD
- Photographers: 0.000798271 USD
- Other petroleum and coal products; at manufacturer: 0.000451288 USD
- All other food and drinking places: 0.00184732 USD
- Office supplies (not paper); at manufacturer: 0.000341827 USD
- Other basic organic chemicals; at manufacturer: 0.00067566 USD
- Metal structural products; at manufacturer: 0.000231105 USD
- Employment services: 0.0129904 USD
- Environmental and other technical consulting services: 0.00161059 USD
- Soap and cleaning compounds; at manufacturer: 0.000135387 USD
- Computer systems design: 0.0119321 USD

## Inputs from nature
- Water, fresh: 0.000112339, 0.000195971 m3 (2 entries, compartments not in this file); data quality (1,2,1,4,2)
- Energy, wind: 0.000107676 MJ; data quality (3,1,1,1,1)
- Occupation, urban, discontinuously built: 0.0010179 m2*a; data quality (4,2,1,1,1)
- Occupation, industrial area: 1.66173e-5 m2*a; data quality (4,2,1,1,1)
- Water, saline: 2.16965e-7 m3; data quality (4,2,1,4,2)
- Occupation, industrial area, built up: 5.53909e-6 m2*a; data quality (4,2,1,1,1)

## Emissions to nature
- cadmium: 4.42791e-12 kg; data quality (3,2,1,1,5)
- carbon tetrachloride: 8.74831e-14 kg; data quality (4,2,1,1,5)
- VOC, volatile organic compounds: 7.22229e-6 kg; data quality (3,2,1,1,4)
- Dibenz(a,h)anthracene: 3.046e-14 kg; data quality (2,2,1,2,3)
- diethanolamine: 4.81673e-10 kg; data quality (3,2,1,1,5)
- toluene: 7.48915e-7 kg; data quality (4,2,1,1,5)
- anthracene: 1.28759e-11 kg; data quality (3,2,1,4,1)
- Propane, 1,1,1,3,3,3-hexafluoro-, HCFC-236fa: 2.4338e-10 kg; data quality (4,2,1,4,1)
- 1,1,1-trichloroethane: 2.29812e-9 kg; data quality (4,2,1,1,5)
- mercury: 6.40758e-13 kg; data quality (2,2,1,1,5)
- aniline: 5.17473e-11 kg; data quality (4,2,1,1,5)
- Benzo(a)anthracene: 1.417e-15 kg; data quality (2,2,1,1,5)
- ethylene glycol: 4.41481e-8 kg; data quality (5,2,1,1,5)
- Cobalt: 3.70708e-10 kg; data quality (3,2,1,1,5)
- chlorine: 1.78149e-9 kg; data quality (4,2,1,1,5)
- Chrysene: 1.85045e-12 kg; data quality (3,2,1,4,1)
- para-xylene: 5.79939e-11 kg; data quality (3,2,1,4,2)
- Xylene: 1.46983e-7 kg; data quality (4,2,1,2,3)
- 2-METHOXYETHANOL: 7.14711e-11 kg; data quality (5,1,1,1,5)
- 3-methylcholanthrene: 1.725e-16 kg; data quality (2,2,1,1,5)
- hexachlorobenzene: 6.22368e-12 kg; data quality (3,2,1,1,5)
- acetaldehyde: 1.30877e-8 kg; data quality (3,2,1,4,1)
- chloroform: 1.25132e-11 kg; data quality (4,2,1,1,5)
- o-Xylene: 9.17491e-10 kg; data quality (3,2,1,4,1)
- 2,2,4-trimethylpentane: 2.38204e-8 kg; data quality (3,2,1,4,1)
- methane, dichloro-, hcc-30: 1.06211e-7 kg; data quality (4,2,1,1,5)
- hydroquinone: 1.24251e-10 kg; data quality (3,2,1,1,5)
- methylene diphenyl diisocyanate: 5.32488e-10 kg; data quality (4,2,1,1,5)
- 1,2-BUTYLENE OXIDE: 2.06023e-12 kg; data quality (4,2,1,1,5)
- methyl isobutyl ketone: 1.24648e-8 kg; data quality (4,2,1,1,5)
- trichloroethylene: 7.25939e-9 kg; data quality (4,2,1,1,5)
- o-toluidine: 1.8671e-11 kg; data quality (4,2,1,1,5)
- ethane, 1,2-dichloro-: 1.14155e-13 kg; data quality (3,2,1,1,5)
- beryllium: 1.04359e-13 kg; data quality (2,2,1,1,5)
- formaldehyde: 2.84509e-8 kg; data quality (3,2,1,4,1)
- 2-(2-ETHOXYETHOXY) ETHYL ACETATE: 1.30533e-12 kg; data quality (5,2,1,1,5)
- ethylene oxide: 4.49675e-8 kg; data quality (3,2,1,1,5)
- acetonitrile: 1.49368e-10 kg; data quality (3,2,1,1,5)
- 1-Methyl-2-pyrrolidinone: 1.45402e-9 kg; data quality (5,1,1,1,5)
- nickel: 9.12911e-10 kg; data quality (3,2,1,1,5)
- Chromium VI: 5.35685e-12 kg; data quality (3,2,1,2,4)
- biphenyl: 6.32241e-12 kg; data quality (4,2,1,1,5)
- Hydrocarbons, aromatic: 6.00378e-10 kg; data quality (3,2,1,4,1)
- AZIRIDINE: 4.85518e-14 kg; data quality (5,2,1,1,5)
- Ethylene glycol monoethyl ether: 2.72082e-10 kg; data quality (4,2,1,1,5)
- 1,4-dichlorobenzene: 2.12921e-14 kg; data quality (2,2,1,1,5)
- acrolein: 1.06611e-9 kg; data quality (3,2,1,4,1)
- Dinitrogen monoxide: 1.08438e-8 kg; data quality (4,2,1,4,1)
- methanol: 8.35853e-8 kg; data quality (4,2,1,1,5)
- AMMONIA: 2.38975e-10 kg; data quality (3,1,1,1,5)
- benzene, ethyl-: 3.01982e-8 kg; data quality (3,2,1,3,3)
- butadiene: 6.99856e-9 kg; data quality (3,2,1,4,1)
- benzo(a)pyrene: 1.8034e-12 kg; data quality (3,2,1,4,1)
- acenaphthene: 1.96321e-11 kg; data quality (3,2,1,4,1)
- Ethanol, 2-butoxy-: 4.81539e-13 kg; data quality (5,2,1,1,5)
- toluene-2,4-diisocyante: 4.79095e-13 kg; data quality (3,2,1,1,5)
- benzene, chloro-: 6.28777e-12 kg; data quality (4,2,1,1,5)
- Phthalate, dibutyl-: 3.19284e-11 kg; data quality (4,2,1,1,5)
- Nitrogen: 1.32016e-9 kg; data quality (4,2,1,1,5)
- PHOSPHORUS: 7.85747e-14 kg; data quality (2,2,1,1,5)
- fluoranthene: 1.77744e-11 kg; data quality (3,2,1,4,1)
- copper: 7.5973e-12 kg; data quality (4,1,1,1,5)
- Indeno(1,2,3-cd)pyrene: 1.56009e-12 kg; data quality (3,2,1,4,1)
- ethene, tetrachloro-: 6.53153e-9 kg; data quality (3,2,1,1,5)
- particulates, < 10 um: 8.81069e-8 kg; data quality (3,2,1,1,5)
- Benzo(k)fluoranthene: 1.89721e-12 kg; data quality (3,2,1,4,1)
- methane, monochloro-, r-40: 1.16255e-10 kg; data quality (3,2,1,1,5)
- 1,1,2,2-tetrachloroethane: 9.26751e-14 kg; data quality (3,2,1,1,5)
- acrylonitrile: 1.59186e-14 kg; data quality (4,2,1,1,5)
- particulates, < 2.5 um: 4.59219e-7 kg; data quality (3,2,1,2,4)
- fluorene: 3.42162e-11 kg; data quality (3,2,1,4,1)
- Diethylene glycol butyl ether: 4.04073e-9 kg; data quality (4,2,1,1,5)
- m-cresol: 3.73421e-11 kg; data quality (4,2,1,1,5)
- cumene: 2.87032e-9 kg; data quality (4,2,1,1,5)
- monochloroethane: 1.05358e-15 kg; data quality (3,2,1,1,5)
- Chromium, ion: 1.48215e-11 kg; data quality (2,2,1,2,4)
- arsenic: 5.59176e-12 kg; data quality (3,2,1,4,2)
- 2-ethoxyethyl acetate: 2.02746e-10 kg; data quality (5,2,1,1,5)
- Triethyl amine: 5.27361e-11 kg; data quality (4,2,1,1,5)
- pyrene: 2.16493e-11 kg; data quality (3,2,1,4,1)
- Propane, 1,2-dichloro-: 6.23351e-14 kg; data quality (4,2,1,1,5)
- manganese: 1.00817e-10 kg; data quality (3,2,1,1,5)
- ammonia: 2.98401e-8 kg; data quality (3,2,1,2,4)
- Ethane, 1,1,1,2-tetrafluoro-, HFC-134a: 7.93626e-8 kg; data quality (4,2,1,4,1)
- selenium: 4.53501e-13 kg; data quality (2,2,1,1,5)
- m-xylene: 2.71755e-9 kg; data quality (3,2,1,4,1)
- cyanide: 5.66544e-11 kg; data quality (3,2,1,1,5)
- Ethane, pentafluoro-, HFC-125: 2.1056e-8 kg; data quality (4,2,1,4,1)
- 2-PHENOXYETHANOL: 3.17577e-11 kg; data quality (5,2,1,1,5)
- benz[a]anthracene: 1.92711e-12 kg; data quality (3,2,1,4,1)
- diisocyanates: 1.03436e-10 kg; data quality (4,1,1,1,5)
- epichlorohydrin: 1.71921e-11 kg; data quality (3,2,1,1,5)
- methyl methacrylate: 7.50026e-11 kg; data quality (4,2,1,1,5)
- hexane: 2.66538e-8 kg; data quality (3,2,1,3,3)
- Water, fresh: 0.000260789 m3; data quality (1,2,1,4,2)
- isophorone: 5.72854e-10 kg; data quality (2,2,1,1,5)
- acrylic acid: 2.10876e-10 kg; data quality (4,2,1,1,5)
- 2-(2-BUTOXYETHOXY) ETHYL ACETATE: 5.41233e-14 kg; data quality (5,2,1,1,5)
- Phosphorus: 2.13399e-10 kg; data quality (2,1,1,1,5)
- 1,2,4-trimethylbenzene: 2.18638e-9 kg; data quality (5,1,1,1,5)
- naphthalene: 3.62181e-9 kg; data quality (3,2,1,2,3)
- Propene, 1,3-dichloro-: 6.12068e-14 kg; data quality (3,2,1,1,5)
- propanal: 2.79037e-9 kg; data quality (3,2,1,4,1)
- hydrogen fluoride: 1.26069e-10 kg; data quality (2,2,1,1,5)
- Xylene: 7.96582e-14 kg; data quality (4,1,1,1,5)
- BUTYL ISOCYANATE: 1.09043e-13 kg; data quality (4,2,1,1,5)
- dimethyl formamide: 4.86877e-12 kg; data quality (4,1,1,1,5)
- benzene: 4.47634e-8 kg; data quality (3,2,1,4,1)
- ethane, 1,2-dibromo-: 1.0553e-13 kg; data quality (2,2,1,1,5)
- ethane, 1,1,2-trichloro-: 7.36689e-14 kg; data quality (4,2,1,1,5)
- Carbon dioxide: 0.00278312 kg; data quality (4,2,1,4,1)
- lead: 1.07417e-10 kg; data quality (3,2,1,1,5)
- ethyl acrylate: 1.88802e-11 kg; data quality (4,2,1,1,5)
- 2-methylnaphthalene: 8.53135e-14 kg; data quality (2,2,1,1,5)
- 1,2,4-trichlorobenzene: 2.18085e-12 kg; data quality (4,2,1,1,5)
- sulfur dioxide: 9.94561e-8 kg; data quality (2,2,1,1,5)
- 1,4-dioxane: 2.8634e-11 kg; data quality (4,2,1,1,5)
- Methane: 1.66182e-7 kg; data quality (4,2,1,4,1)
- Benzo(b)fluoranthene: 1.93419e-12 kg; data quality (3,2,1,4,1)
- Water, saline: 1.09935e-7 m3; data quality (4,2,1,4,2)
- nitric acid: 2.95763e-10 kg; data quality (3,1,1,1,5)
- phenanthrene: 6.33085e-11 kg; data quality (3,2,1,4,1)
- acenaphthylene: 6.69402e-11 kg; data quality (3,2,1,4,1)
- maleic anhydride: 2.76331e-10 kg; data quality (2,2,1,1,5)
- Methane, difluoro-, HFC-32: 1.2262e-8 kg; data quality (4,2,1,4,1)
- Benzo(g,h,i)perylene: 3.29663e-11 kg; data quality (3,2,1,1,4)
- carbon monoxide: 2.94196e-5 kg; data quality (3,2,1,1,1)
- antimony: 1.61916e-12 kg; data quality (3,2,1,1,5)
- styrene: 1.08298e-9 kg; data quality (3,2,1,2,3)
- vinyl acetate: 4.33571e-10 kg; data quality (4,2,1,1,5)
- hydrogen chloride: 5.91938e-9 kg; data quality (2,2,1,1,5)
- butanol: 3.32812e-10 kg; data quality (5,1,1,1,5)
- phenol: 1.64573e-10 kg; data quality (4,2,1,1,5)
- Ethane, 1,1,1-trifluoro-, HFC-143a: 9.00898e-9 kg; data quality (4,2,1,4,1)
- nitrogen oxides: 2.8952e-6 kg; data quality (3,2,1,1,3)
- Ethene, chloro-: 1.78775e-13 kg; data quality (3,2,1,1,5)

## Inventory method
Input-output

## Modelling constants
The reference unit of all processes is 1 USD2013 of the good or service. The technosphere inputs are based on the US BEA detailed input-output tables for 2007. The IO tables are combined to develop a commodity-by-commodity model based on the the industry-technology assumption (see Suh et al., 2010), which assumes all commodities produced by a given industry have the same input structure, but that multiple industries can produce the same commodity. Thus, model technosphere flows represent commodity outputs (and not industry outputs) from other processes in the model. There are no by-products included in these processes. All commodity production is based on US-conditions, despite in reality that some goods and services are produced overseas, as USEEIO v1.1 is a single-region IO model.

## Completeness
The input-output approach assures that all purchased inputs associated with the sectors making these commodities as reported in the US census for 2007 are included. The direct resources extracted including minerals, energy sources, water and land occupied are included. Emissions to air include all critieria air pollutants, greenhouse gases, and hazardous and toxic air pollutants as defined by US EPA. Releases to water include toxics, total nitrogen and total phosphorus, and water discharges. Releases to soil or groundwater include toxics and agriculutural pesticides. Some metal releases to air, water and soil are not included because they could not be speciated. Solid hazardous and non-hazardous wastes generated are not included as an elementary flows although purchases of waste services are included.

## Data treatment
Greenhouse gases are primarily from the US Greenhouse Gas Emission Inventory (USEPA 2016a). Biogenic C uptake is not included (change from version 1.0), as biogenic C emission are not included. Toxic releases to air, water and soil (except pesticides) are from the 2013 Toxic Release Inventory (USEPA 2015a). Criteria air pollutants and hazardous air pollutants are from the 2011 National Emissions Inventory (USEPA 2015b). All estimates are normalized by industry based on sector output in the data year, then converted to 2013 USD using relative sector-specific CPIs (if data year is not 2013). Energy use represent raw renewables or fossil fuel energies and is based on EIA data for 2014. See Table 1 in Yang, Ingwersen et al. 2017 and Supporting Information 1, and the v1.1 data update notes (Ingwersen et al. 2017) for all details on environmental data sources used.Land occupation for commercial buildings was estimated based on the building floorspace data provided by the U.S. Energy Information Administration 2012 Commercial Building Energy Consumption Survey (CBECS) (EIA 2015). Total commercial public supply water use is reported by USGS (Maupin et al. 2014). Water use is allocated across commercial sectors based on their use of water, sewage, and other services in USD based on the 2007 Benchmark Use Table before redefinitions (BEA 2015).

## Data collection
2015-2016

## Sampling procedure
US federal government sources, including surveys and US EPA emissions databases are used as the primary sources. From these sources, data for US reporting establishments/facilities are aggregated by the NAICS sector as defined in the BEA detailed 2007 input-output tables. When level of sector aggregation differs, or when direct emissions are not reported but modeled, additional sources are used to make allocations and estimates.

## Review details
In regard to quality assurance and peer-review, each dataset created went through Quality Assurance as defined in a quality assurance project plans at US EPA, CSRA or ERG. The model was assembled with the IO model builder model (USEPA 2016c). Validation functions were used to check that all the model components were properly assembled and harmonized. Bayou Demeke and Santosh Ghimire provided internal peer review of the model methodology and the manuscript underwent standard EPA management review. An editor and two anonymous reviewers at the Journal of Cleaner Production reviewed the model. In regard to data quality evaluation, data quality assessment was performed at the flow and process levels according to the updated US EPA data quality assessment guidelines as defined in US EPA (2016b).

## Intended application
The primary application is for use in the US Environmentally-Extended Input-Ouput model, USEEIO, version 1.1. This model is being used by the US EPA for supporting tools that prioritize goods and services based on potential environmental impacts, resource use or emissions for large regions, including the US and US states, and as a strealined tool for organizations as a starting point to consider sustainable materials management. Model results are designed to provide meso/macro-level decision support.

## Project
USEEIO v1.1 was developed by the US EPA with CSRA and ERG with Wesley W. Ingwersen and David E. Meyer as research leads. Yi Yang was the technical lead on the work for CSRA (contract EP-C-15-012); Troy Hawkins was lead for ERG (contract EP-C-12-021).

## Sources
- Maupin et al. 2014
- USDA 2009a
- Macknick et al. 2011
- Goebes et al. 2003
- Statistics Canada 2010
- Kim et el. 2013
- Edelen and Ingwersen 2017
- USEPA 2015a
- USGS 2015
- Blackhurst et al. 2010
- Nickerson et al. 2011
- USEPA 2016a
- USDA 2006
- Torcellini et al. 2003
- USEPA 2015b
- Yienger et al. 1995
- BEA 2015
- BLM 2008
- USEPA 2016c
- EIA 2016
- Ingwersen et al. 2017
- Ingwersen et al. DRAFT
- EIA 2017
- EIA 2015
- USDA 2009b
- EIA 2013
- USGS 2016
- Lovelace 2009
- USEPA 2016b
- USDA 2014
- USDA 2016
