# Tobacco products; at manufacturer

Dataset: openLCA process, unit process
Category: 3122: Tobacco Manufacturing
Geography: United States
Time period: 2017-01-01 to 2017-12-31
Data quality: US EPA - Process Pedigree Matrix (1;1)
Exchange data quality scheme: US EPA - Flow Pedigree Matrix
Generated by: US EPA with CSRA and ERG
Owner: US EPA
Published in: Yang, Ingwersen et al. 2017
restrictionsDescription: This model shold be appropriately cited (see Yang, Ingwersen et al. 2017 source or Publication field) when used. Any changes or derivations of this model by the user should be documented. The model itself and any results from use of this model shall not be construed to consitute US EPA opinion or policy.
copyright: false

## General comment
BEA Code & Name is '312200:Tobacco product manufacturing'. Description of the primary industry producing this good or service, adapted from the Census Bureau NAICS 2007 descriptions: This industry comprises establishments primarily engaged in manufacturing cigarettes, cigars, smoking and chewing tobacco, and reconstituted tobacco.

## Technology
The process describes the average US production of this good or service within this NAICS-based grouping defined in the BEA 2007 detailed input-output tables (BEA 2015). Distribution, wholesale and retailing of this good or service, use, and final disposal are not included. Creation of a product system with this process will enable modeling of all upstream (supply-chain) activities.

## Geography
Data represent the 50 US states

## Time period
2017 was the year in which this version of USEEIO was released and is the target date for the model

## Reference product
- Tobacco products; at manufacturer: 1 USD

## Inputs from technosphere
All rows: data quality (1,3,1,1,1)
- Monetary authorities and depository credit intermediation: 0.000709318 USD
- Machine shops; at manufacturer: 0.000650208 USD
- Employment services: 0.000334956 USD
- Primary copper; at manufacturer: 0.000374362 USD
- Valve and fittings (except for plumbing); at manufacturer: 0.000926054 USD
- Electronic capacitors, resistors, coils, transformers, connectors and other components (except semiconductors and printed circuit assemblies); at manufacturer: 0.000275846 USD
- Aluminum; at manufacturer: 0.000137923 USD
- Clay and ceramic products; at manufacturer: 9.85163e-5 USD
- Investigation and security: 3.94065e-5 USD
- Synthetic rubber and artificial and synthetic fibers; at manufacturer: 0.0179891 USD
- Tobacco, cotton, sugarcane, peanuts, sugar beets, herbs and spices, and other crops; at farm: 0.0294958 USD
- Other plastic products; at manufacturer: 9.85163e-5 USD
- Vehicle rental and leasing: 0.000137923 USD
- Securities and commodities brokerage and exchanges: 1.97033e-5 USD
- Speed changers, industrial high-speed drives, and gears; at manufacturer: 0.000551692 USD
- Tobacco products; at manufacturer: 0.078222 USD
- Air conditioning, refrigeration, and warm air heating equipment; at manufacturer: 0.000236439 USD
- Natural gas; at consumer: 0.00199003 USD
- Vehicle repair: 0.000236439 USD
- Rail transport: 0.000295549 USD
- Other support services: 1.97033e-5 USD
- Marketing research and all other miscellaneous professional, scientific, and technical services: 0.000197033 USD
- Books, newspapers, magazines, and other print media; at manufacturer: 0.00011822 USD
- Cardboard; at manufacturer: 0.000650208 USD
- Paper; at manufacturer: 1.97033e-5 USD
- Nonresidential building repair and maintanence: 0.000630505 USD
- Transmission and power train parts; at manufacturer: 5.91098e-5 USD
- Pipeline transport: 1.97033e-5 USD
- External hard drives, CDs, other storage media; at manufacturer: 0.00011822 USD
- Full-service restaurants: 5.91098e-5 USD
- Printed circuit and electronic assembly; at manufacturer: 0.000137923 USD
- Architectural, engineering, and related services: 0.000413769 USD
- Watches, clocks, and other measuring and controlling devices; at manufacturer: 0.000197033 USD
- Electricity; at consumer: 0.00163537 USD
- Air transport: 0.000315252 USD
- Metal coatings, engravings, and heat treatments; at manufacturer: 0.000866944 USD
- Nondepository credit intermediation and related activities: 0.000866944 USD
- Plastic pipe, fittings, and sausage casings; at manufacturer: 0.000256142 USD
- Consumer goods and general rental centers: 1.97033e-5 USD
- Data processing and hosting: 0.000315252 USD
- Buildings and dwellings services: 0.000768427 USD
- Insurance carriers: 0.00110338 USD
- Storage batteries; at manufacturer: 0.000630505 USD
- Waste management and remediation: 0.000374362 USD
- Vegetable oils and by-products; at manufacturer: 0.000315252 USD
- Wholesale trade: 0.0241365 USD
- Other engine equipment; at manufacturer: 5.91098e-5 USD
- Other computer related services, including facilities management: 1.97033e-5 USD
- Golf courses, marinas, ski resorts, fitness and other rec centers and industries: 1.97033e-5 USD
- Noncomparable imports: 0.00293579 USD
- Environmental and other technical consulting services: 0.000571395 USD
- Independent artists, writers, and performers: 1.97033e-5 USD
- Hotels and campgrounds: 5.91098e-5 USD
- Custom computer programming: 0.000197033 USD
- Mineral wool; at manufacturer: 0.000177329 USD
- Investment advice, portfolio management, and other financial advising services: 1.97033e-5 USD
- Soap and cleaning compounds; at manufacturer: 0.000413769 USD
- Material handling equipment; at manufacturer: 5.91098e-5 USD
- Accounting, tax preparation, bookkeeping, and payroll: 0.000295549 USD
- Other vehicle parts; at manufacturer: 0.000669911 USD
- Commercial machinery repair: 0.000472878 USD
- Other retail: 1.97033e-5 USD
- Civic, social, professional, and similar organizations: 1.97033e-5 USD
- Warehousing: 0.000630505 USD
- Primary iron, steel, and ferroalloy products; at manufacturer: 0.000827537 USD
- Laminated plastic plates and shapes; at manufacturer: 0.000216736 USD
- Coal; at mine: 0.000453175 USD
- Lumber and treated lumber; at manufacturer: 0.000847241 USD
- State and local government enterprises: 0.000157626 USD
- Limited-service restaurants: 7.88131e-5 USD
- Legal services: 0.000847241 USD
- Chemicals (except basic chemicals, agrichemicals, polymers, paints, pharmaceuticals,soaps, cleaning compounds); at manufacturer: 0.000334956 USD
- Metal pipe fittings, ball and roller bearings, industrial patterns, metal bath fixtures, other misc. fabricated metals; at manufacturer: 0.000650208 USD
- Wireless telecommunications: 0.000177329 USD
- Glass and glass products; at manufacturer: 7.88131e-5 USD
- Satellite, telecommunications resellers, and all other telecommunications: 3.94065e-5 USD
- Office administration: 0.000315252 USD
- Computer systems design: 7.88131e-5 USD
- Specialized design: 1.97033e-5 USD
- Cardboard containers; at manufacturer: 0.0263433 USD
- Mechanical power transmission equipment; at manufacturer: 0.000492582 USD
- Commercial equipment rental: 0.00011822 USD
- Other petroleum and coal products; at manufacturer: 0.000334956 USD
- Management consulting: 0.00244321 USD
- Carbon and graphite products; at manufacturer: 0.000137923 USD
- Other real estate: 0.000354659 USD
- Gasoline, fuels, and by-products of petroleum refining; at manufacturer: 0.00163537 USD
- Light fixtures; at manufacturer: 0.000354659 USD
- Other textiles; at manufacturer: 0.000334956 USD
- Telecommunications: 0.000551692 USD
- Company and enterprise management: 0.0338502 USD
- Truck transport: 0.00573365 USD
- Fabric; at manufacturer: 0.000216736 USD
- Household goods repair: 7.88131e-5 USD
- Other basic organic chemicals; at manufacturer: 3.94065e-5 USD
- Insurance agencies and brokerages: 0.000394065 USD
- Business support: 0.000295549 USD
- Water transport (boats, ships, ferries): 0.000334956 USD
- Lessors of nonfinancial intangible assets: 0.00157626 USD
- Electronic equipment repair and maintenance: 0.000157626 USD
- Passenger ground transport: 3.94065e-5 USD
- Light gauge metal cans, boxes, and containers; at manufacturer: 0.00730991 USD
- Advertising and public relations: 0.00216736 USD
- Drinking water and wastewater treatment; at consumer: 0.000137923 USD
- Finished and coated fabric; at manufacturer: 3.94065e-5 USD
- Gaskets, seals, musical instruments, fasteners, brooms, brushes, mop and other misc. goods; at manufacturer: 0.00011822 USD

## Inputs from nature
- Occupation, urban, discontinuously built: 1.98943e-5 m2*a; data quality (4,2,1,1,1)
- Water, fresh: 0.000132935 m3; data quality (3,2,1,4,2)
- Water, saline: 3.44503e-5 m3; data quality (4,2,1,4,2)
- Occupation, industrial area: 9.06081e-5 m2*a; data quality (4,2,1,1,1)
- Occupation, industrial area, built up: 3.02027e-5 m2*a; data quality (4,2,1,1,1)
- Water, fresh: 0.000477186 m3; data quality (4,2,1,4,2)

## Emissions to nature
- Propane, 1,1,1,3,3,3-hexafluoro-, HCFC-236fa: 4.21706e-10 kg; data quality (4,2,1,4,1)
- Phosphorus: 1.39479e-9 kg; data quality (2,1,1,1,5)
- fluorene: 5.90721e-11 kg; data quality (3,2,1,2,3)
- 1,1,2,2-tetrachloroethane: 1.06858e-13 kg; data quality (3,2,1,1,4)
- Phthalate, dibutyl-: 3.54678e-11 kg; data quality (3,2,1,1,4)
- benzene, ethyl-: 2.01201e-9 kg; data quality (3,2,1,3,2)
- Chrysene: 4.57515e-13 kg; data quality (3,2,1,3,2)
- ammonia: 1.79377e-6 kg; data quality (3,2,1,1,4)
- arsenic: 7.36755e-11 kg; data quality (3,2,1,1,4)
- AMMONIA: 1.08951e-7 kg; data quality (3,1,1,1,4)
- Hydrocarbons, aromatic: 4.395e-10 kg; data quality (3,2,1,4,1)
- naphthalene: 8.16784e-9 kg; data quality (3,2,1,1,4)
- NICOTINE: 1.82402e-9, 1.71155e-6, 9.16894e-7 kg (3 entries, compartments not in this file); data quality (2,1,1,1,4)
- acenaphthene: 2.23268e-11 kg; data quality (3,2,1,2,3)
- para-xylene: 3.28653e-11 kg; data quality (3,2,1,4,1)
- Chromium, ion: 1.37569e-10 kg; data quality (2,2,1,1,4)
- ethylene oxide: 1.20955e-10 kg; data quality (3,2,1,1,4)
- PHOSPHORUS: 3.81636e-12 kg; data quality (2,2,1,1,4)
- sulfur dioxide: 1.46055e-5 kg; data quality (2,2,1,1,4)
- hydrogen fluoride: 2.2311e-9 kg; data quality (2,2,1,1,4)
- VOC, volatile organic compounds: 1.53294e-5 kg; data quality (3,2,1,1,4)
- phenanthrene: 2.34611e-10 kg; data quality (3,2,1,1,4)
- Benzo(b)fluoranthene: 2.06701e-13 kg; data quality (3,2,1,3,2)
- anthracene: 4.51325e-11 kg; data quality (3,2,1,1,4)
- selenium: 2.294e-12 kg; data quality (2,2,1,1,4)
- chloroform: 2.63125e-10 kg; data quality (4,2,1,1,4)
- n-nitrosomorpholine: 3.10658e-18 kg; data quality (4,2,1,1,4)
- Cresol: 3.77269e-9 kg; data quality (4,2,1,1,4)
- acrolein: 5.7484e-9 kg; data quality (2,2,1,1,4)
- styrene: 4.56207e-9 kg; data quality (3,2,1,1,4)
- particulates, < 10 um: 1.46799e-6 kg; data quality (3,2,1,1,4)
- particulates, < 2.5 um: 1.36385e-6 kg; data quality (3,2,1,1,4)
- ammonia: 6.76755e-10 kg; data quality (3,1,1,1,4)
- methane, dichloro-, hcc-30: 1.13198e-9 kg; data quality (4,2,1,1,4)
- 4-nitrophenol: 1.13605e-10 kg; data quality (3,2,1,1,4)
- Cobalt: 3.8372e-12 kg; data quality (3,2,1,1,4)
- nitrogen oxides: 1.38755e-5 kg; data quality (2,2,1,1,3)
- lead: 1.97045e-10 kg; data quality (3,2,1,1,4)
- Phosphine: 5.01521e-9 kg; data quality (4,2,1,1,4)
- acetaldehyde: 5.16645e-8 kg; data quality (3,2,1,1,4)
- benzene: 1.41322e-8 kg; data quality (3,2,1,2,3)
- Methane, difluoro-, HFC-32: 2.12465e-8 kg; data quality (4,2,1,4,1)
- antimony: 2.12072e-12 kg; data quality (3,2,1,1,4)
- Water, saline: 1.74559e-5 m3; data quality (4,2,1,4,2)
- p-cresol: 5.99962e-11 kg; data quality (3,2,1,1,4)
- carbon disulfide: 2.131e-10 kg; data quality (4,2,1,1,4)
- cadmium: 2.11049e-11 kg; data quality (3,2,1,1,4)
- methanol: 3.58811e-8 kg; data quality (4,2,1,1,4)
- Carbon dioxide: 0.00658479 kg; data quality (4,2,1,4,1)
- Dinitrogen monoxide: 2.07038e-8 kg; data quality (4,2,1,4,1)
- acetophenone: 4.27596e-11 kg; data quality (3,2,1,1,4)
- benz[a]anthracene: 1.33635e-11 kg; data quality (3,2,1,1,4)
- nickel: 1.80846e-10 kg; data quality (3,2,1,1,4)
- pyrene: 6.75217e-11 kg; data quality (3,2,1,1,4)
- hexane: 5.00508e-8 kg; data quality (3,2,1,1,4)
- manganese: 1.28581e-10 kg; data quality (3,2,1,1,4)
- beryllium: 8.27859e-12 kg; data quality (2,2,1,1,4)
- phenol: 1.02609e-9 kg; data quality (4,2,1,1,4)
- Ethane, 1,1,1-trifluoro-, HFC-143a: 1.56099e-8 kg; data quality (4,2,1,4,1)
- o-cresol: 2.98353e-11 kg; data quality (3,2,1,1,4)
- ethane, 1,2-dichloro-: 2.29791e-10 kg; data quality (3,2,1,1,4)
- formaldehyde: 4.37244e-8 kg; data quality (2,2,1,2,3)
- propanal: 2.62894e-9 kg; data quality (3,2,1,3,2)
- toluene: 1.97377e-8 kg; data quality (3,2,1,2,3)
- 1,4-dichlorobenzene: 6.47466e-12 kg; data quality (2,2,1,1,4)
- Water, fresh: 0.000528342 m3; data quality (4,2,1,4,2)
- butadiene: 7.06255e-10 kg; data quality (3,2,1,4,1)
- acenaphthylene: 1.9647e-10 kg; data quality (3,2,1,1,4)
- Xylene: 3.86604e-9 kg; data quality (3,2,1,4,1)
- vinyl acetate: 1.41859e-8 kg; data quality (4,2,1,1,4)
- 2,2,4-trimethylpentane: 7.72152e-9 kg; data quality (3,2,1,2,3)
- hydrogen chloride: 1.54146e-6 kg; data quality (2,2,1,1,4)
- o-Xylene: 8.37875e-10 kg; data quality (3,2,1,2,3)
- carbon monoxide: 1.29403e-5 kg; data quality (3,2,1,1,2)
- benzo(a)pyrene: 1.09185e-11 kg; data quality (3,2,1,1,4)
- Methane: 1.5092e-7 kg; data quality (4,2,1,4,1)
- trichloroethylene: 2.20762e-8 kg; data quality (4,2,1,1,4)
- mercury: 9.71721e-12 kg; data quality (2,2,1,1,4)
- Ethane, 1,1,1,2-tetrafluoro-, HFC-134a: 1.37512e-7 kg; data quality (4,2,1,4,1)
- biphenyl: 1.08901e-10 kg; data quality (3,2,1,1,4)
- fluoranthene: 5.09065e-11 kg; data quality (3,2,1,1,4)
- chlorine: 1.72617e-9 kg; data quality (4,2,1,1,4)
- Indeno(1,2,3-cd)pyrene: 9.59344e-12 kg; data quality (3,2,1,1,4)
- Phthalate, dimethyl-: 1.75435e-9 kg; data quality (4,2,1,1,4)
- Benzo(g,h,i)perylene: 1.00236e-11 kg; data quality (3,2,1,1,4)
- Chromium VI: 2.01259e-11 kg; data quality (3,2,1,1,4)
- Ethane, pentafluoro-, HFC-125: 3.64838e-8 kg; data quality (4,2,1,4,1)
- 1,1,1-trichloroethane: 9.58998e-14 kg; data quality (4,2,1,1,4)
- Benzo(k)fluoranthene: 1.56102e-13 kg; data quality (3,2,1,4,1)
- 2-METHOXYETHANOL: 2.19728e-10 kg; data quality (4,2,1,1,4)
- 2-methylnaphthalene: 1.50571e-13 kg; data quality (2,2,1,1,4)
- m-xylene: 7.90916e-10 kg; data quality (3,2,1,4,1)
- Dibenz(a,h)anthracene: 8.9052e-16 kg; data quality (2,2,1,2,3)
- Nitrogen: 1.73358e-9 kg; data quality (3,2,1,1,5)

## Inventory method
Input-output

## Modelling constants
The reference unit of all processes is 1 USD2013 of the good or service. The technosphere inputs are based on the US BEA detailed input-output tables for 2007. The IO tables are combined to develop a commodity-by-commodity model based on the the industry-technology assumption (see Suh et al., 2010), which assumes all commodities produced by a given industry have the same input structure, but that multiple industries can produce the same commodity. Thus, model technosphere flows represent commodity outputs (and not industry outputs) from other processes in the model. There are no by-products included in these processes. All commodity production is based on US-conditions, despite in reality that some goods and services are produced overseas, as USEEIO v1.1 is a single-region IO model.

## Completeness
The input-output approach assures that all purchased inputs associated with the sectors making these commodities as reported in the US census for 2007 are included. The direct resources extracted including minerals, energy sources, water and land occupied are included. Emissions to air include all critieria air pollutants, greenhouse gases, and hazardous and toxic air pollutants as defined by US EPA. Releases to water include toxics, total nitrogen and total phosphorus, and water discharges. Releases to soil or groundwater include toxics and agriculutural pesticides. Some metal releases to air, water and soil are not included because they could not be speciated. Solid hazardous and non-hazardous wastes generated are not included as an elementary flows although purchases of waste services are included.

## Data treatment
Greenhouse gases are primarily from the US Greenhouse Gas Emission Inventory (USEPA 2016a). Biogenic C uptake is not included (change from version 1.0), as biogenic C emission are not included. Toxic releases to air, water and soil (except pesticides) are from the 2013 Toxic Release Inventory (USEPA 2015a). Criteria air pollutants and hazardous air pollutants are from the 2011 National Emissions Inventory (USEPA 2015b). All estimates are normalized by industry based on sector output in the data year, then converted to 2013 USD using relative sector-specific CPIs (if data year is not 2013). Energy use represent raw renewables or fossil fuel energies and is based on EIA data for 2014. See Table 1 in Yang, Ingwersen et al. 2017 and Supporting Information 1, and the v1.1 data update notes (Ingwersen et al. 2017) for all details on environmental data sources used.Land occupation associated with manufacturing buildings was estimated based on the building floorspace data provided by the U.S. Energy Information Administration in the 2010 Manufacturing Energy Consumption Survey (EIA 2013). Portions of total renewable energy (EIA 2016) based on EIA-923 reports for 2014 (EIA 2017) are included. Nitrogen and Phosphorus releases are modeled in total N and total P equivalents as estimated by the Discharge Monitoring Report Nutrient Loading tool (USEPA 2016b). Self-supplied withdrawals were assigned to industrial sectors based on water use statistics for Canadian industries by NAICS 3-digit sector scaled to US production levels based on gross domestic product by industry (BEA 2015; Statistics Canada 2010), and further disaggregated to the manufacturing sectors based on compensation of employees as provided by the 2007 IO tables (BEA 2015). Water withdrawals associated with public supply were allocated to sectors based on their use of water, sewage, and other services in USD based on the IO tables (BEA 2015). Portions of total renewable energy (EIA 2016) by type are assigned to sectors (hydro, wind, solar, or) based on EIA-923 reports for 2014 (EIA 2017).

## Data collection
2015-2016

## Sampling procedure
US federal government sources, including surveys and US EPA emissions databases are used as the primary sources. From these sources, data for US reporting establishments/facilities are aggregated by the NAICS sector as defined in the BEA detailed 2007 input-output tables. When level of sector aggregation differs, or when direct emissions are not reported but modeled, additional sources are used to make allocations and estimates.

## Review details
In regard to quality assurance and peer-review, each dataset created went through Quality Assurance as defined in a quality assurance project plans at US EPA, CSRA or ERG. The model was assembled with the IO model builder model (USEPA 2016c). Validation functions were used to check that all the model components were properly assembled and harmonized. Bayou Demeke and Santosh Ghimire provided internal peer review of the model methodology and the manuscript underwent standard EPA management review. An editor and two anonymous reviewers at the Journal of Cleaner Production reviewed the model. In regard to data quality evaluation, data quality assessment was performed at the flow and process levels according to the updated US EPA data quality assessment guidelines as defined in US EPA (2016b).

## Intended application
The primary application is for use in the US Environmentally-Extended Input-Ouput model, USEEIO, version 1.1. This model is being used by the US EPA for supporting tools that prioritize goods and services based on potential environmental impacts, resource use or emissions for large regions, including the US and US states, and as a strealined tool for organizations as a starting point to consider sustainable materials management. Model results are designed to provide meso/macro-level decision support.

## Project
USEEIO v1.1 was developed by the US EPA with CSRA and ERG with Wesley W. Ingwersen and David E. Meyer as research leads. Yi Yang was the technical lead on the work for CSRA (contract EP-C-15-012); Troy Hawkins was lead for ERG (contract EP-C-12-021).

## Sources
- Nickerson et al. 2011
- Lovelace 2009
- EIA 2016
- USEPA 2015b
- USDA 2006
- USDA 2014
- Kim et el. 2013
- EIA 2013
- BLM 2008
- Goebes et al. 2003
- USEPA 2015a
- Maupin et al. 2014
- EIA 2015
- Ingwersen et al. 2017
- USGS 2016
- Yienger et al. 1995
- Blackhurst et al. 2010
- Ingwersen et al. DRAFT
- USGS 2015
- USDA 2009a
- USEPA 2016b
- Torcellini et al. 2003
- Statistics Canada 2010
- BEA 2015
- USDA 2009b
- Edelen and Ingwersen 2017
- USDA 2016
- USEPA 2016c
- USEPA 2016a
- Macknick et al. 2011
- EIA 2017
