# Tobacco, cotton, sugarcane, peanuts, sugar beets, herbs and spices, and other crops; at farm

Dataset: openLCA process, unit process
Category: 1119: Other Crop Farming
Geography: United States
Time period: 2017-01-01 to 2017-12-31
Data quality: US EPA - Process Pedigree Matrix (1;1)
Exchange data quality scheme: US EPA - Flow Pedigree Matrix
Generated by: US EPA with CSRA and ERG
Owner: US EPA
Published in: Yang, Ingwersen et al. 2017
restrictionsDescription: This model shold be appropriately cited (see Yang, Ingwersen et al. 2017 source or Publication field) when used. Any changes or derivations of this model by the user should be documented. The model itself and any results from use of this model shall not be construed to consitute US EPA opinion or policy.
copyright: false

## General comment
BEA Code & Name is '111900:Other crop farming'. Description of the primary industry producing this good or service, adapted from the Census Bureau NAICS 2007 descriptions: This industry group comprises establishments primarily engaged in (1) growing crops (except oilseed and/or grain; vegetable and/or melon; fruit and tree nut; and greenhouse, nursery, and/or floriculture products). These establishments grow crops, such as tobacco, cotton, sugarcane, hay, sugar beets, peanuts, agave, herbs and spices, and hay and grass seeds; or (2) growing a combination of crops (except a combination of oilseed(s) and grain(s) and a combination of fruit(s) and tree nut(s)).

## Technology
The process describes the average US production of this good or service within this NAICS-based grouping defined in the BEA 2007 detailed input-output tables (BEA 2015). Distribution, wholesale and retailing of this good or service, use, and final disposal are not included. Creation of a product system with this process will enable modeling of all upstream (supply-chain) activities.

## Geography
Data represent the 50 US states

## Time period
2017 was the year in which this version of USEEIO was released and is the target date for the model

## Reference product
- Tobacco, cotton, sugarcane, peanuts, sugar beets, herbs and spices, and other crops; at farm: 1 USD

## Inputs from technosphere
All rows: data quality (1,3,1,1,1)
- Civic, social, professional, and similar organizations: 0.000629998 USD
- Electronic equipment repair and maintenance: 0.000436152 USD
- Lawn and garden equipment; at manufacturer: 0.000242307 USD
- Plastic bags, films, and sheets; at manufacturer: 0.000339229 USD
- Tobacco, cotton, sugarcane, peanuts, sugar beets, herbs and spices, and other crops; at farm: 0.0242307 USD
- Books, newspapers, magazines, and other print media; at manufacturer: 0.000145384 USD
- Machine shops; at manufacturer: 0.000145384 USD
- Electricity; at consumer: 0.00848074 USD
- Soap and cleaning compounds; at manufacturer: 0.000339229 USD
- Insurance carriers: 0.0355706 USD
- Computer terminals and other computer peripheral equipment; at manufacturer: 4.84614e-5 USD
- Veneer, plywood, and engineered wood; at manufacturer: 0.000484614 USD
- Other support services: 0.000290768 USD
- Welding and Soldering Equipment, Scales and Balances, and other general purpose machinery; at manufacturer: 0.000387691 USD
- Sports: 9.69227e-5 USD
- Investment advice, portfolio management, and other financial advising services: 0.000387691 USD
- Water transport (boats, ships, ferries): 0.00179307 USD
- Rail transport: 0.00242307 USD
- Other vehicle parts; at manufacturer: 0.00135692 USD
- Vehicle rental and leasing: 0.00949843 USD
- Farm machinery and equipment; at manufacturer: 0.0094015 USD
- Plastic pipe, fittings, and sausage casings; at manufacturer: 0.000484614 USD
- Commercial machinery repair: 0.000145384 USD
- Limited-service restaurants: 0.000339229 USD
- Animal farms and aquaculture ponds (except cattle and poultry): 0.00135692 USD
- Power tools; at manufacturer: 0.00140538 USD
- Light bulbs; at manufacturer: 4.84614e-5 USD
- Fertilizers; at manufacturer: 0.0297553 USD
- Accounting, tax preparation, bookkeeping, and payroll: 0.00329537 USD
- Vehicle electrical and electronic equipment; at manufacturer: 0.00135692 USD
- Wooden windows, door, and flooring; at manufacturer: 0.000193845 USD
- Nondepository credit intermediation and related activities: 0.00232614 USD
- Secondary steel products; at manufacturer: 0.000242307 USD
- Cattle ranches and feedlots: 0.000872304 USD
- Lessors of nonfinancial intangible assets: 0.00072692 USD
- Metal pipe fittings, ball and roller bearings, industrial patterns, metal bath fixtures, other misc. fabricated metals; at manufacturer: 0.000775382 USD
- Securities and commodities brokerage and exchanges: 0.00121153 USD
- Drinking water and wastewater treatment; at consumer: 0.0115823 USD
- Architectural, engineering, and related services: 0.000145384 USD
- Rubber tires; at manufacturer: 0.00242307 USD
- Cardboard containers; at manufacturer: 0.000581536 USD
- Fresh soybeans, canola, flaxseeds, and other oilseeds; at farm: 0.000290768 USD
- Legal services: 0.00203538 USD
- Warehousing: 0.00271384 USD
- All other food and drinking places: 9.69227e-5 USD
- Wireless telecommunications: 0.000339229 USD
- Telecommunications: 0.000193845 USD
- Computer systems design: 0.000484614 USD
- Cutlery and handtools; at manufacturer: 0.00237461 USD
- Sand, gravel, clay, phosphate, other nonmetallic minerals; at mine: 0.00232614 USD
- Travel arrangement and reservation: 0.000193845 USD
- Machinery for the paper, textile, food or other industries (except semiconductor machinery); at manufacturer: 0.000629998 USD
- Rubber and plastic belts and hoses; at manufacturer: 0.000193845 USD
- Computers; at manufacturer: 9.69227e-5 USD
- Software: 9.69227e-5 USD
- Gasoline, fuels, and by-products of petroleum refining; at manufacturer: 0.0623698 USD
- Monetary authorities and depository credit intermediation: 0.0159922 USD
- Metal structural products; at manufacturer: 0.000387691 USD
- Other basic organic chemicals; at manufacturer: 0.0117761 USD
- Marketing research and all other miscellaneous professional, scientific, and technical services: 0.00111461 USD
- General merchandise stores: 4.84614e-5 USD
- Advertising and public relations: 9.69227e-5 USD
- Motors and generators; at manufacturer: 9.69227e-5 USD
- Vehicle seating and interior trim (upholstery); at manufacturer: 4.84614e-5 USD
- Performances: 4.84614e-5 USD
- Stationery; at manufacturer: 4.84614e-5 USD
- Wholesale trade: 0.030773 USD
- Business support: 4.84614e-5 USD
- Other computer related services, including facilities management: 0.000920766 USD
- Postal service: 0.000145384 USD
- Chemicals (except basic chemicals, agrichemicals, polymers, paints, pharmaceuticals,soaps, cleaning compounds); at manufacturer: 0.000581536 USD
- Magazines and journals; at publisher: 0.000290768 USD
- Truck transport: 0.00770535 USD
- Other retail: 0.00072692 USD
- Storage batteries; at manufacturer: 0.00155076 USD
- Used and secondhand goods: 4.84614e-5 USD
- Vehicle repair: 0.000823843 USD
- Pipeline transport: 0.000629998 USD
- Commercial equipment rental: 0.00872304 USD
- Pesticides; at manufacturer: 0.0283014 USD
- Other plastic products; at manufacturer: 0.000533075 USD
- Nonresidential building repair and maintanence: 0.0142476 USD
- Colleges, universities, junior colleges, and professional schools: 0.000339229 USD
- Dimensional stone; at mine: 0.00290768 USD
- Promoters and agents: 4.84614e-5 USD
- Poultry farms: 0.000145384 USD
- Concrete pipe, bricks, and blocks; at manufacturer: 0.000775382 USD
- Fresh wheat, corn, rice, and other grains; at farm: 0.00881997 USD
- Sanitary paper (tissues, napkins, diapers, etc.); at manufacturer: 9.69227e-5 USD
- Adhesives; at manufacturer: 0.000145384 USD
- Gaskets, seals, musical instruments, fasteners, brooms, brushes, mop and other misc. goods; at manufacturer: 0.000436152 USD
- Material handling equipment; at manufacturer: 0.00121153 USD
- Natural gas; at consumer: 0.00697843 USD
- Other real estate: 0.00416768 USD
- Air transport: 0.000872304 USD
- Other textiles; at manufacturer: 0.00116307 USD
- Satellite, telecommunications resellers, and all other telecommunications: 9.69227e-5 USD
- Insurance agencies and brokerages: 0.00106615 USD
- Agriculture and forestry support: 0.095905 USD
- Other basic inorganic chemicals; at manufacturer: 0.00203538 USD
- Buildings and dwellings services: 0.00208384 USD
- Golf courses, marinas, ski resorts, fitness and other rec centers and industries: 9.69227e-5 USD
- Vehicle engines and engine parts; at manufacturer: 0.000193845 USD

## Inputs from nature
- Occupation, permanent crop: 0.166313 m2*a; data quality (2,3,1,1,1)
- Energy, hydraulic potential: 0.00586869 MJ; data quality (3,1,1,1,1)
- Occupation, annual crop: 15.8006 m2*a; data quality (2,3,1,1,1)
- Water, fresh: 2.41271, 1.14034 m3 (2 entries, compartments not in this file); data quality (4,3,1,4,2)
- Occupation, urban, discontinuously built: 0.000382208 m2*a; data quality (4,2,1,1,1)

## Emissions to nature
- Clethodim: 2.62592e-8, 1.54726e-7, 5.50818e-8 kg (3 entries, compartments not in this file); data quality (4,3,1,5,4)
- Flumiclorac-pentyl: 1.62245e-9, 7.73472e-10, 4.55751e-9 kg (3 entries, compartments not in this file); data quality (4,3,1,5,4)
- Cyfluthrin: 1.3149e-8, 7.74777e-8, 2.75817e-8 kg (3 entries, compartments not in this file); data quality (4,3,1,5,4)
- IMAZAPIC: 7.08224e-8, 2.52124e-8, 1.20195e-8 kg (3 entries, compartments not in this file); data quality (4,2,1,5,4)
- Metalaxyl-M: 1.62245e-9, 4.55751e-9, 7.73472e-10 kg (3 entries, compartments not in this file); data quality (4,3,1,5,4)
- Thidiazuron: 4.05613e-7, 1.93368e-7, 1.13938e-6 kg (3 entries, compartments not in this file); data quality (4,3,1,5,4)
- TRIFLOXYSULFURON-SOD: 1.36725e-8, 2.32042e-9, 4.86735e-9 kg (3 entries, compartments not in this file); data quality (4,3,1,5,4)
- propanal: 1.49254e-6 kg; data quality (3,2,1,4,1)
- Prometryn: 6.89542e-7, 3.28726e-7, 1.93694e-6 kg (3 entries, compartments not in this file); data quality (4,3,1,5,4)
- Sethoxydim: 3.54112e-8, 6.00977e-9, 1.26062e-8 kg (3 entries, compartments not in this file); data quality (4,2,1,5,4)
- Paraquat: 2.39436e-6, 1.23386e-6, 4.83657e-6 kg (3 entries, compartments not in this file); data quality (3,3,1,1,4)
- Tebuconazole: 1.98353e-6, 2.61553e-7, 7.36425e-7 kg (3 entries, compartments not in this file); data quality (3,2,1,1,4)
- FLONICAMID: 1.13572e-8, 5.41431e-9, 3.19026e-8 kg (3 entries, compartments not in this file); data quality (4,3,1,5,4)
- 2,4-D, 2-ETHYLHEXYL ESTER: 2.23486e-7, 1.13273e-7, 6.95073e-7 kg (3 entries, compartments not in this file); data quality (3,3,1,1,4)
- o-Xylene: 1.44304e-7 kg; data quality (3,2,1,3,2)
- SPIROMESIFEN: 7.73472e-10, 1.62245e-9, 4.55751e-9 kg (3 entries, compartments not in this file); data quality (4,3,1,5,4)
- hydrogen chloride: 2.61477e-9 kg; data quality (2,2,1,1,5)
- MEPIQUAT PENTABORATE: 1.85633e-8, 1.0938e-7, 3.89388e-8 kg (3 entries, compartments not in this file); data quality (4,3,1,5,4)
- TRIFLOXYSTROBIN: 2.10104e-9, 1.00163e-9, 5.90187e-9 kg (3 entries, compartments not in this file); data quality (4,2,1,5,4)
- Flumioxazin: 6.12546e-7, 2.18063e-7, 1.03957e-7 kg (3 entries, compartments not in this file); data quality (4,2,1,5,4)
- methanol: 7.63485e-7 kg; data quality (3,2,1,1,5)
- Acephate: 9.43076e-6, 2.48035e-7 kg (2 entries, compartments not in this file); data quality (3,3,1,1,4)
- 2,4-D, DIMETHYLAMINE SALT: 1.01222e-6, 8.14067e-7, 2.69966e-7 kg (3 entries, compartments not in this file); data quality (3,3,1,1,4)
- Benzo(b)fluoranthene: 9.5516e-11 kg; data quality (3,2,1,4,1)
- Endosulfan: 3.86736e-8, 8.11225e-8, 2.27875e-7 kg (3 entries, compartments not in this file); data quality (4,3,1,5,4)
- Chlorothalonil: 6.98274e-6, 7.78209e-6, 9.314e-6 kg (3 entries, compartments not in this file); data quality (3,2,1,1,4)
- benzene: 1.90084e-5 kg; data quality (3,2,1,2,4)
- LACTOFEN: 2.00326e-9, 1.18037e-8, 4.20207e-9 kg (3 entries, compartments not in this file); data quality (4,2,1,5,4)
- Oxamyl: 6.73079e-9, 1.77031e-7, 4.40418e-7 kg (3 entries, compartments not in this file); data quality (3,3,1,1,4)
- Aldicarb: 1.59048e-7, 5.84666e-6, 1.7742e-6 kg (3 entries, compartments not in this file); data quality (3,3,1,1,4)
- SULFUR: 5.27709e-8 kg; data quality (3,2,1,2,4)
- PROTHIOCONAZOLE: 1.09254e-7, 3.06897e-7, 5.20847e-8 kg (3 entries, compartments not in this file); data quality (4,2,1,5,4)
- Ethephon: 9.67737e-7, 4.07104e-5, 1.85194e-5 kg (3 entries, compartments not in this file); data quality (3,3,1,1,4)
- Fluometuron: 1.61792e-6, 5.7597e-7, 2.74583e-7 kg (3 entries, compartments not in this file); data quality (4,3,1,5,4)
- Glyphosate: 6.68587e-6, 2.42684e-6, 3.34058e-6 kg (3 entries, compartments not in this file); data quality (3,3,1,1,4)
- Cyclanilide: 1.89827e-7, 5.33229e-7, 9.04963e-8 kg (3 entries, compartments not in this file); data quality (4,3,1,5,4)
- 2,4-DB: 1.06234e-6, 1.80293e-7, 3.78186e-7 kg (3 entries, compartments not in this file); data quality (4,2,1,5,4)
- FOMESAFEN SODIUM: 3.72162e-7, 1.25086e-6, 5.37875e-7 kg (3 entries, compartments not in this file); data quality (3,3,1,1,4)
- carbon monoxide: 0.00315773 kg; data quality (3,2,1,1,3)
- butadiene: 7.9564e-6 kg; data quality (3,2,1,1,5)
- Pyrithiobac sodium salt: 1.86858e-7, 6.65205e-8, 3.17124e-8 kg (3 entries, compartments not in this file); data quality (4,3,1,5,4)
- Propiconazole: 4.8528e-7, 9.87845e-8, 1.52895e-7 kg (3 entries, compartments not in this file); data quality (3,2,1,2,4)
- m-xylene: 2.6604e-7 kg; data quality (3,2,1,3,2)
- acenaphthylene: 1.09604e-8 kg; data quality (3,2,1,4,1)
- ACIFLUORFEN-SODIUM: 1.29841e-7, 2.20358e-8, 4.62228e-8 kg (3 entries, compartments not in this file); data quality (4,2,1,5,4)
- toluene: 1.34298e-5 kg; data quality (3,2,1,2,4)
- avermectin B1: 1.62245e-9, 7.73472e-10, 4.55751e-9 kg (3 entries, compartments not in this file); data quality (4,3,1,5,4)
- Bifenthrin: 1.45355e-7, 4.08307e-7, 6.92953e-8 kg (3 entries, compartments not in this file); data quality (4,3,1,5,4)
- S,S,S-tributyl phosphorotrithioate: 2.90312e-6, 3.52323e-7, 1.35621e-5 kg (3 entries, compartments not in this file); data quality (3,3,1,1,4)
- pyrene: 1.49648e-7 kg; data quality (3,2,1,1,5)
- Mepiquat chloride: 8.79599e-7, 3.13133e-7, 1.4928e-7 kg (3 entries, compartments not in this file); data quality (4,3,1,5,4)
- Dimethoate: 2.59592e-8, 7.29201e-8, 1.23756e-8 kg (3 entries, compartments not in this file); data quality (4,3,1,5,4)
- sulfur dioxide: 2.00961e-5 kg; data quality (3,2,1,1,4)
- selenium: 7.37053e-12 kg; data quality (2,2,1,1,5)
- Cypermethrin: 4.21837e-8, 2.01103e-8, 1.18495e-7 kg (3 entries, compartments not in this file); data quality (4,3,1,5,4)
- DICAMBA SODIUM SALT: 3.2449e-8, 1.54694e-8, 9.11502e-8 kg (3 entries, compartments not in this file); data quality (4,3,1,5,4)
- Triethyl amine: 3.18308e-10 kg; data quality (3,2,1,1,5)
- Chrysene: 8.53339e-8 kg; data quality (3,2,1,1,5)
- Propane, 1,2-dichloro-: 3.06739e-12 kg; data quality (4,2,1,1,5)
- THIFENSULFURON: 1.62245e-9, 4.55751e-9, 7.73472e-10 kg (3 entries, compartments not in this file); data quality (4,3,1,5,4)
- Ethalfluralin: 4.39116e-7, 1.23349e-6, 2.0934e-7 kg (3 entries, compartments not in this file); data quality (4,2,1,5,4)
- Diflubenzuron: 8.8528e-8, 3.15155e-8, 1.50244e-8 kg (3 entries, compartments not in this file); data quality (4,2,1,5,4)
- SODIUM CHLORATE: 1.97358e-7, 6.48455e-7, 3.78922e-7 kg (3 entries, compartments not in this file); data quality (3,3,1,1,4)
- Water, fresh: 0.804301 m3; data quality (4,3,1,1,2)
- Linuron: 1.7847e-8, 5.01326e-8, 8.5082e-9 kg (3 entries, compartments not in this file); data quality (4,3,1,5,4)
- Malathion: 3.06246e-6, 3.08694e-7, 1.20995e-5 kg (3 entries, compartments not in this file); data quality (3,3,1,1,4)
- FLUBENDIAMIDE: 2.10104e-9, 1.00163e-9, 5.90187e-9 kg (3 entries, compartments not in this file); data quality (4,2,1,5,4)
- PENTHIOPYRAD: 6.51321e-8, 3.10505e-8, 1.82958e-7 kg (3 entries, compartments not in this file); data quality (4,2,1,5,4)
- MSMA: 4.46174e-7, 1.25332e-6, 2.12705e-7 kg (3 entries, compartments not in this file); data quality (4,3,1,5,4)
- Flutolanil: 3.97096e-7, 1.89308e-7, 1.11545e-6 kg (3 entries, compartments not in this file); data quality (4,2,1,5,4)
- PHOSPHORUS: 2.22986e-7 kg; data quality (3,2,1,1,5)
- methyl isobutyl ketone: 4.66704e-7 kg; data quality (3,2,1,1,5)
- Pendimethalin: 4.89689e-7, 1.20234e-5 kg (2 entries, compartments not in this file); data quality (3,3,1,1,4)
- PYRAFLUFEN-ETHYL: 1.54694e-9, 3.2449e-9, 9.11502e-9 kg (3 entries, compartments not in this file); data quality (4,3,1,5,4)
- particulates, < 2.5 um: 0.00844874 kg; data quality (3,2,1,1,5)
- 4-nitrophenol: 1.02246e-14 kg; data quality (2,2,1,1,5)
- ACETAMIPRID: 4.55751e-8, 7.73472e-9, 1.62245e-8 kg (3 entries, compartments not in this file); data quality (4,3,1,5,4)
- arsenic: 4.32122e-9 kg; data quality (3,2,1,5,1)
- Chlorpyrifos: 4.44716e-7, 1.66623e-8, 1.75734e-7 kg (3 entries, compartments not in this file); data quality (3,2,1,2,4)
- antimony: 5.80504e-13 kg; data quality (3,2,1,1,5)
- acenaphthene: 1.17398e-8 kg; data quality (3,2,1,4,1)
- methane, monochloro-, r-40: 9.10309e-8 kg; data quality (3,2,1,1,5)
- Indeno(1,2,3-cd)pyrene: 4.25788e-8 kg; data quality (3,2,1,1,5)
- VOC, volatile organic compounds: 0.00170988 kg; data quality (3,2,1,1,5)
- acrolein: 8.70328e-7 kg; data quality (3,2,1,2,3)
- Acetochlor: 1.85423e-7, 3.33038e-9, 6.89187e-8 kg (3 entries, compartments not in this file); data quality (3,3,1,1,4)
- Imidacloprid: 4.0905e-8, 8.58032e-8, 2.41024e-7 kg (3 entries, compartments not in this file); data quality (4,3,1,5,4)
- PETROLEUM DISTILLATE: 2.22276e-7, 1.05966e-7, 6.24379e-7 kg (3 entries, compartments not in this file); data quality (4,3,1,5,4)
- Glufosinate-ammonium: 6.83909e-7, 7.45819e-7, 4.83081e-7 kg (3 entries, compartments not in this file); data quality (3,3,1,1,4)
- 1,1,1-trichloroethane: 2.88148e-12 kg; data quality (4,2,1,1,5)
- DICHLOROPROPENE: 1.62078e-7, 1.92757e-5, 2.45027e-7 kg (3 entries, compartments not in this file); data quality (3,3,1,1,4)
- IMAZAPIC-AMMONIUM: 6.093e-8, 1.71154e-7, 2.90472e-8 kg (3 entries, compartments not in this file); data quality (4,2,1,5,4)
- Clomazone: 2.09449e-8, 1.07974e-8, 4.32737e-11 kg (3 entries, compartments not in this file); data quality (3,3,1,2,4)
- Metolachlor: 1.76851e-6, 5.39053e-7 kg (2 entries, compartments not in this file); data quality (3,2,1,1,4)
- formaldehyde: 8.70365e-5 kg; data quality (3,2,1,2,4)
- hexane: 5.83081e-7 kg; data quality (3,2,1,4,1)
- Phorate: 2.16886e-7, 4.54944e-7, 1.27795e-6 kg (3 entries, compartments not in this file); data quality (4,2,1,5,4)
- MONOCARBAMIDE DIHYD.: 8.12848e-7, 3.8751e-7, 2.28331e-6 kg (3 entries, compartments not in this file); data quality (4,3,1,5,4)
- Esfenvalerate: 1.7751e-9, 3.72349e-9, 1.04594e-8 kg (3 entries, compartments not in this file); data quality (4,2,1,5,4)
- Bentazone: 1.36567e-7, 6.51058e-8, 3.83621e-7 kg (3 entries, compartments not in this file); data quality (4,2,1,5,4)
- Pendimethalin: 7.90999e-7 kg; data quality (5,1,1,1,5)
- methane, bromo-, halon 1001: 1.14542e-9 kg; data quality (3,2,1,1,5)
- pentachlorophenol: 4.74051e-15 kg; data quality (3,2,1,1,5)
- ETOXAZOLE: 4.55751e-9, 7.73472e-10, 1.62245e-9 kg (3 entries, compartments not in this file); data quality (4,3,1,5,4)
- Glyphosate-isopropylammonium: 6.42293e-8, 1.6997e-5, 9.62407e-6 kg (3 entries, compartments not in this file); data quality (3,3,1,1,4)
- acetaldehyde: 3.78688e-5 kg; data quality (3,2,1,2,4)
- Diuron: 4.98052e-6, 5.09893e-7, 1.11029e-6 kg (3 entries, compartments not in this file); data quality (3,3,1,1,4)
- phenol: 3.85511e-10 kg; data quality (3,2,1,1,5)
- benz[a]anthracene: 8.51984e-8 kg; data quality (3,2,1,1,5)
- para-xylene: 6.43225e-8 kg; data quality (3,2,1,2,4)
- Chromium, ion: 1.21114e-10 kg; data quality (3,2,1,5,1)
- DICLOSULAM: 8.40414e-9, 4.00651e-9, 2.36075e-8 kg (3 entries, compartments not in this file); data quality (4,2,1,5,4)
- Trifluralin: 6.15766e-6, 7.49745e-7, 2.00844e-5 kg (3 entries, compartments not in this file); data quality (3,3,1,1,4)
- mercury: 4.38647e-11 kg; data quality (3,2,1,4,2)
- Carfentrazone ethyl ester: 1.93368e-8, 4.05613e-8, 1.13938e-7 kg (3 entries, compartments not in this file); data quality (4,3,1,5,4)
- particulates, < 10 um: 0.0327148 kg; data quality (3,2,1,1,5)
- lead: 1.06798e-9 kg; data quality (3,2,1,1,5)
- NOVALURON: 9.11502e-8, 1.54694e-8, 3.2449e-8 kg (3 entries, compartments not in this file); data quality (4,3,1,5,4)
- Nitrogen: 0.00305612 kg; data quality (3,2,1,4,5)
- Azoxystrobin: 2.10251e-7, 2.24261e-7, 2.1417e-7 kg (3 entries, compartments not in this file); data quality (3,2,1,2,4)
- Dinitrogen monoxide: 0.0025378 kg; data quality (4,2,1,4,1)
- ethane, 1,2-dichloro-: 3.03232e-12 kg; data quality (3,2,1,1,5)
- Lambda-cyhalothrin: 4.15184e-8, 1.16626e-7, 1.97931e-8 kg (3 entries, compartments not in this file); data quality (4,3,1,5,4)
- cadmium: 3.67928e-11 kg; data quality (3,2,1,1,5)
- METHOXYFENOZIDE: 4.58706e-8, 7.78487e-9, 1.63297e-8 kg (3 entries, compartments not in this file); data quality (4,2,1,5,4)
- Dicrotophos: 1.70511e-7, 2.51299e-9, 6.06907e-6 kg (3 entries, compartments not in this file); data quality (3,3,1,1,4)
- ammonia: 0.00255319 kg; data quality (3,2,1,1,5)
- PYRACLOSTROBIN: 9.93201e-8, 6.33371e-8, 1.08667e-7 kg (3 entries, compartments not in this file); data quality (3,2,1,2,4)
- Pendimethalin: 5.936e-7 kg; data quality (3,2,1,1,4)
- acetophenone: 2.97444e-16 kg; data quality (4,2,1,1,5)
- Metolachlor: 1.46034e-5 kg; data quality (3,3,1,1,4)
- THIAMETHOXAM: 2.39776e-8, 1.41283e-7, 5.0296e-8 kg (3 entries, compartments not in this file); data quality (4,3,1,5,4)
- Benzo(g,h,i)perylene: 8.50554e-8 kg; data quality (3,2,1,1,5)
- Sulfur: 2.36692e-8, 1.98662e-8 kg (2 entries, compartments not in this file); data quality (3,2,1,2,4)
- fluorene: 1.20087e-8 kg; data quality (3,2,1,4,1)
- 2,4-dinitrophenol: 1.67312e-14 kg; data quality (5,2,1,1,5)
- Naphthalene: 2.06002e-9 kg; data quality (4,1,1,1,5)
- Dibenz(a,h)anthracene: 4.44857e-13 kg; data quality (3,2,1,4,1)
- Atrazine: 5.05806e-6 kg; data quality (2,1,1,1,5)
- anthracene: 8.40607e-8 kg; data quality (3,2,1,1,5)
- SULFOSATE: 1.75225e-7, 4.92211e-7, 8.3535e-8 kg (3 entries, compartments not in this file); data quality (4,3,1,5,4)
- Ametryn: 1.26043e-6 kg; data quality (2,1,1,1,5)
- chloroform: 2.60263e-12 kg; data quality (4,2,1,1,5)
- ZETA-CYPERMETHRIN: 1.29796e-8, 6.18778e-9, 3.64601e-8 kg (3 entries, compartments not in this file); data quality (4,3,1,5,4)
- 2,2,4-trimethylpentane: 6.72651e-7 kg; data quality (3,2,1,4,1)
- ethane, 1,2-dibromo-: 2.9255e-14 kg; data quality (2,2,1,1,5)
- beryllium: 8.08296e-14 kg; data quality (2,2,1,1,5)
- phenanthrene: 2.39196e-7 kg; data quality (3,2,1,1,4)
- acetonitrile: 6.86714e-8 kg; data quality (3,2,1,1,5)
- Carbon dioxide: 0.326913 kg; data quality (4,2,1,4,1)
- benzo(a)pyrene: 6.42716e-8 kg; data quality (3,2,1,1,5)
- trichloroethylene: 2.78853e-12 kg; data quality (4,2,1,1,5)
- Quintozene: 2.12201e-10 kg; data quality (3,2,1,1,5)
- Xylene: 2.4545e-6 kg; data quality (3,2,1,4,1)
- cumene: 3.34673e-10 kg; data quality (3,2,1,1,5)
- isophorone: 6.51756e-10 kg; data quality (3,2,1,1,5)
- Methyl iodide: 3.80771e-10 kg; data quality (3,2,1,1,5)
- Ethene, chloro-: 1.67312e-12 kg; data quality (3,2,1,1,5)
- Acephate: 1.54219e-8 kg; data quality (3,2,1,2,4)
- Chromium VI: 4.62727e-11 kg; data quality (3,2,1,4,2)
- Hydrocarbons, aromatic: 2.50772e-7 kg; data quality (3,2,1,4,1)
- nitrogen oxides: 0.00152991 kg; data quality (3,2,1,1,1)
- chlorine: 9.6751e-11 kg; data quality (4,2,1,1,5)
- Methane: 2.71096e-5 kg; data quality (4,2,1,4,1)
- benzene, chloro-: 1.04604e-7 kg; data quality (3,2,1,1,5)
- methane, dichloro-, hcc-30: 2.69558e-11 kg; data quality (4,2,1,1,5)
- benzene, ethyl-: 7.88305e-7 kg; data quality (3,2,1,4,1)
- ethene, tetrachloro-: 2.73191e-10 kg; data quality (3,2,1,1,5)
- Phosphorus: 0.000264811 kg; data quality (3,2,1,4,5)
- naphthalene: 1.99727e-7 kg; data quality (3,2,1,3,2)
- Cobalt: 4.68264e-13 kg; data quality (3,2,1,1,5)
- carbon tetrachloride: 4.18281e-12 kg; data quality (4,2,1,1,5)
- Dicamba: 2.34151e-7, 6.61876e-7, 1.17903e-7 kg (3 entries, compartments not in this file); data quality (4,3,1,5,4)
- styrene: 1.02777e-7 kg; data quality (3,2,1,4,2)
- nickel: 8.35444e-10 kg; data quality (3,2,1,5,1)
- Benzo(k)fluoranthene: 4.26201e-8 kg; data quality (3,2,1,1,5)
- manganese: 8.47931e-10 kg; data quality (3,2,1,5,1)
- fluoranthene: 1.84742e-7 kg; data quality (3,2,1,1,5)
- 1,4-dichlorobenzene: 2.84489e-8 kg; data quality (3,2,1,1,5)
- phthalate, dioctyl-: 4.36869e-15 kg; data quality (3,2,1,1,5)

## Inventory method
Input-output

## Modelling constants
The reference unit of all processes is 1 USD2013 of the good or service. The technosphere inputs are based on the US BEA detailed input-output tables for 2007. The IO tables are combined to develop a commodity-by-commodity model based on the the industry-technology assumption (see Suh et al., 2010), which assumes all commodities produced by a given industry have the same input structure, but that multiple industries can produce the same commodity. Thus, model technosphere flows represent commodity outputs (and not industry outputs) from other processes in the model. There are no by-products included in these processes. All commodity production is based on US-conditions, despite in reality that some goods and services are produced overseas, as USEEIO v1.1 is a single-region IO model.

## Completeness
The input-output approach assures that all purchased inputs associated with the sectors making these commodities as reported in the US census for 2007 are included. The direct resources extracted including minerals, energy sources, water and land occupied are included. Emissions to air include all critieria air pollutants, greenhouse gases, and hazardous and toxic air pollutants as defined by US EPA. Releases to water include toxics, total nitrogen and total phosphorus, and water discharges. Releases to soil or groundwater include toxics and agriculutural pesticides. Some metal releases to air, water and soil are not included because they could not be speciated. Solid hazardous and non-hazardous wastes generated are not included as an elementary flows although purchases of waste services are included.

## Data treatment
Greenhouse gases are primarily from the US Greenhouse Gas Emission Inventory (USEPA 2016a). Biogenic C uptake is not included (change from version 1.0), as biogenic C emission are not included. Toxic releases to air, water and soil (except pesticides) are from the 2013 Toxic Release Inventory (USEPA 2015a). Criteria air pollutants and hazardous air pollutants are from the 2011 National Emissions Inventory (USEPA 2015b). All estimates are normalized by industry based on sector output in the data year, then converted to 2013 USD using relative sector-specific CPIs (if data year is not 2013). Energy use represent raw renewables or fossil fuel energies and is based on EIA data for 2014. See Table 1 in Yang, Ingwersen et al. 2017 and Supporting Information 1, and the v1.1 data update notes (Ingwersen et al. 2017) for all details on environmental data sources used.N and P releases to water are based on feritlizer application (USDA 2016) and land use (USDA 2014) data from the Agricultural Census and releases estimated using national runs of the EPIC model (USDA 2006). Pesticide releases are based on pesticide application data from USDA (USDA 2016) and modeled releases using PestLCI as described in a draft paper (Ingwersen et al. DRAFT). Water use is based on USDA's Farm and Ranch Irrigation Survey (USDA 2009b). Land use is based on the Census of Agriculture (USDA 2009a).

## Data collection
2015-2016

## Sampling procedure
US federal government sources, including surveys and US EPA emissions databases are used as the primary sources. From these sources, data for US reporting establishments/facilities are aggregated by the NAICS sector as defined in the BEA detailed 2007 input-output tables. When level of sector aggregation differs, or when direct emissions are not reported but modeled, additional sources are used to make allocations and estimates.

## Review details
In regard to quality assurance and peer-review, each dataset created went through Quality Assurance as defined in a quality assurance project plans at US EPA, CSRA or ERG. The model was assembled with the IO model builder model (USEPA 2016c). Validation functions were used to check that all the model components were properly assembled and harmonized. Bayou Demeke and Santosh Ghimire provided internal peer review of the model methodology and the manuscript underwent standard EPA management review. An editor and two anonymous reviewers at the Journal of Cleaner Production reviewed the model. In regard to data quality evaluation, data quality assessment was performed at the flow and process levels according to the updated US EPA data quality assessment guidelines as defined in US EPA (2016b).

## Intended application
The primary application is for use in the US Environmentally-Extended Input-Ouput model, USEEIO, version 1.1. This model is being used by the US EPA for supporting tools that prioritize goods and services based on potential environmental impacts, resource use or emissions for large regions, including the US and US states, and as a strealined tool for organizations as a starting point to consider sustainable materials management. Model results are designed to provide meso/macro-level decision support.

## Project
USEEIO v1.1 was developed by the US EPA with CSRA and ERG with Wesley W. Ingwersen and David E. Meyer as research leads. Yi Yang was the technical lead on the work for CSRA (contract EP-C-15-012); Troy Hawkins was lead for ERG (contract EP-C-12-021).

## Sources
- USDA 2009b
- Goebes et al. 2003
- USDA 2009a
- Lovelace 2009
- USEPA 2016b
- USEPA 2016a
- Blackhurst et al. 2010
- EIA 2015
- Ingwersen et al. 2017
- USDA 2014
- USDA 2016
- Kim et el. 2013
- EIA 2016
- Yienger et al. 1995
- EIA 2017
- USEPA 2015a
- BLM 2008
- Ingwersen et al. DRAFT
- Maupin et al. 2014
- Nickerson et al. 2011
- Macknick et al. 2011
- BEA 2015
- Statistics Canada 2010
- Torcellini et al. 2003
- USGS 2016
- USEPA 2015b
- USEPA 2016c
- USDA 2006
- USGS 2015
- Edelen and Ingwersen 2017
- EIA 2013
