# Postal service

Dataset: openLCA process, unit process
Category: 48-49: Transportation and Warehousing
Geography: United States
Time period: 2017-01-01 to 2017-12-31
Data quality: US EPA - Process Pedigree Matrix (1;1)
Exchange data quality scheme: US EPA - Flow Pedigree Matrix
Generated by: US EPA with CSRA and ERG
Owner: US EPA
Published in: Yang, Ingwersen et al. 2017
restrictionsDescription: This model shold be appropriately cited (see Yang, Ingwersen et al. 2017 source or Publication field) when used. Any changes or derivations of this model by the user should be documented. The model itself and any results from use of this model shall not be construed to consitute US EPA opinion or policy.
copyright: false

## General comment
BEA Code & Name is '491000:Postal service'. Description of the primary industry producing this good or service, adapted from the Census Bureau NAICS 2007 descriptions: The Postal Service subsector includes the activities of the National Post Office and its subcontractors operating under a universal service obligation to provide mail services, and using the infrastructure required to fulfill that obligation. These services include delivering letters and small parcels. These articles can be described as those that can be handled by one person without using special equipment. This allows the collection, pick-up, and delivery operations to be done with limited labor costs and minimal equipment. Sorting and transportation activities, where necessary, are generally mechanized. The restriction to small parcels distinguishes these establishments from those in the transportation industries. These establishments may also provide express delivery services using the infrastructure established for provision of basic mail services. The traditional activity of the National Postal Service is described in this subsector. Subcontractors include rural post offices on contract to the Postal Service. Bulk transportation of mail on contract to the Postal Service is not included here, because it is usually done by transportation establishments that carry other customers' cargo as well. Establishments that provide courier and express delivery services without operating under a universal service obligation are classified in subsector 492, Couriers and Messengers.

## Technology
The process describes the average US production of this good or service within this NAICS-based grouping defined in the BEA 2007 detailed input-output tables (BEA 2015). Distribution, wholesale and retailing of this good or service, use, and final disposal are not included. Creation of a product system with this process will enable modeling of all upstream (supply-chain) activities.

## Geography
Data represent the 50 US states

## Time period
2017 was the year in which this version of USEEIO was released and is the target date for the model

## Reference product
- Postal service: 1 USD

## Inputs from technosphere
All rows: data quality (1,3,1,1,1)
- Securities and commodities brokerage and exchanges: 0.000534724 USD
- Monetary authorities and depository credit intermediation: 0.0163492 USD
- Noncomparable imports: 0.00216563 USD
- Leather; at manufacturer: 0.000668405 USD
- Investment advice, portfolio management, and other financial advising services: 0.000815454 USD
- Machine shops; at manufacturer: 0.00133681 USD
- Office administration: 0.00108282 USD
- Electronic equipment repair and maintenance: 0.000548092 USD
- Vending, commercial laundry, and other commercial and service industry machinery; at manufacturer: 0.000213889 USD
- Cardboard; at manufacturer: 0.000588196 USD
- Other plastic products; at manufacturer: 9.35766e-5 USD
- Lessors of nonfinancial intangible assets: 0.00185816 USD
- Data processing and hosting: 0.000227258 USD
- Transmission and power train parts; at manufacturer: 0.0106811 USD
- Other basic organic chemicals; at manufacturer: 0.000147049 USD
- Books, newspapers, magazines, and other print media; at manufacturer: 0.000307466 USD
- Travel arrangement and reservation: 0.00894325 USD
- News syndicates, libraries, archives, Internet publishing and all other information services: 0.000160417 USD
- Air transport: 0.0103469 USD
- Household goods repair: 0.00228594 USD
- Wholesale trade: 0.00577502 USD
- Buildings and dwellings services: 0.008462 USD
- Legal services: 0.0126863 USD
- Couriers and messengers: 0.00172448 USD
- Full-service restaurants: 0.00239289 USD
- Nondepository credit intermediation and related activities: 0.0113495 USD
- Drinking water and wastewater treatment; at consumer: 0.00196511 USD
- Satellite, telecommunications resellers, and all other telecommunications: 0.000213889 USD
- Other support services: 0.00133681 USD
- Computer systems design: 0.00110955 USD
- All other food and drinking places: 0.000213889 USD
- Promoters and agents: 1.33681e-5 USD
- Other vehicle parts; at manufacturer: 0.00398369 USD
- Metal pipe fittings, ball and roller bearings, industrial patterns, metal bath fixtures, other misc. fabricated metals; at manufacturer: 0.000775349 USD
- Employment services: 0.00303456 USD
- Dry-cleaning and laundry: 0.00211216 USD
- Ink and ink cartridges; at manufacturer: 0.000574828 USD
- Marketing research and all other miscellaneous professional, scientific, and technical services: 0.00167101 USD
- Vehicle engines and engine parts; at manufacturer: 0.00225921 USD
- Paper bags and coated paper; at manufacturer: 5.34724e-5 USD
- Limited-service restaurants: 0.00727224 USD
- Water transport (boats, ships, ferries): 0.00112292 USD
- Accounting, tax preparation, bookkeeping, and payroll: 0.00389011 USD
- Commercial equipment rental: 2.67362e-5 USD
- Gasoline, fuels, and by-products of petroleum refining; at manufacturer: 0.0185549 USD
- Commercial machinery repair: 9.35766e-5 USD
- Nonresidential building repair and maintanence: 0.00697814 USD
- Business support: 0.000681773 USD
- Metal coatings, engravings, and heat treatments; at manufacturer: 0.00213889 USD
- Investigation and security: 0.000721877 USD
- Wireless telecommunications: 0.000200521 USD
- Paper; at manufacturer: 5.34724e-5 USD
- Other real estate: 0.0179266 USD
- Rail transport: 0.00399706 USD
- Architectural, engineering, and related services: 0.00104271 USD
- Other computer related services, including facilities management: 0.000441147 USD
- Chemicals (except basic chemicals, agrichemicals, polymers, paints, pharmaceuticals,soaps, cleaning compounds); at manufacturer: 0.000106945 USD
- Pipeline transport: 0.000120313 USD
- Waste management and remediation: 0.000414411 USD
- Screws, nuts, and bolts; at manufacturer: 0.00028073 USD
- Scenic and sightseeing transportation and support activities for transportation: 0.00100261 USD
- Specialized design: 0.000160417 USD
- State and local government enterprises: 0.00338213 USD
- Vehicle repair: 0.00118976 USD
- Insurance carriers: 2.67362e-5 USD
- Pet care, photofinishing, parking and other sundry services: 0.00161754 USD
- Software: 0.000147049 USD
- Independent artists, writers, and performers: 0.000320834 USD
- Civic, social, professional, and similar organizations: 0.000695141 USD
- Management consulting: 0.00271372 USD
- Motor vehicle steering, suspension components (except spring), and brake systems; at manufacturer: 0.00245973 USD
- Truck transport: 0.00540071 USD
- Natural gas; at consumer: 0.00489272 USD
- Vehicle rental and leasing: 2.67362e-5 USD
- Electricity; at consumer: 0.00122986 USD
- Telecommunications: 0.00363612 USD
- Cardboard containers; at manufacturer: 0.000641668 USD
- Printing support; at manufacturer: 0.00511998 USD

## Inputs from nature
- Occupation, urban, discontinuously built: 0.00196668 m2*a; data quality (4,2,1,1,1)
- Water, fresh: 0.00130495, 0.000754047 m3 (2 entries, compartments not in this file); data quality (1,2,1,4,2)

## Emissions to nature
- lead: 4.11602e-13 kg; data quality (3,2,1,1,5)
- Ethylene glycol monoethyl ether: 8.03299e-10 kg; data quality (3,2,1,1,5)
- sulfur dioxide: 4.75113e-8 kg; data quality (3,2,1,4,2)
- 3-methylcholanthrene: 3.17019e-16 kg; data quality (2,2,1,1,5)
- trichloroethylene: 3.15941e-8 kg; data quality (3,2,1,1,5)
- particulates, < 2.5 um: 1.15311e-6 kg; data quality (3,2,1,4,1)
- acrolein: 1.08058e-8 kg; data quality (3,2,1,4,1)
- 2,2,4-trimethylpentane: 2.94293e-7 kg; data quality (3,2,1,4,1)
- o-Xylene: 9.96064e-9 kg; data quality (3,2,1,4,1)
- ethene, tetrachloro-: 4.5259e-9 kg; data quality (3,2,1,1,5)
- nickel: 8.87612e-11 kg; data quality (3,2,1,5,1)
- benzene: 5.26697e-7 kg; data quality (3,2,1,4,1)
- Benzo(a)anthracene: 2.8181e-15 kg; data quality (2,2,1,1,5)
- Chromium VI: 9.7854e-12 kg; data quality (3,2,1,5,1)
- benzene, ethyl-: 2.06866e-7 kg; data quality (3,2,1,4,1)
- Dinitrogen monoxide: 1.0737e-7 kg; data quality (4,2,1,4,1)
- Methane: 3.32245e-6 kg; data quality (4,2,1,4,1)
- carbon monoxide: 0.000312884 kg; data quality (3,2,1,1,1)
- hexane: 1.71076e-7 kg; data quality (3,2,1,4,1)
- Nitrogen: 1.24896e-9 kg; data quality (4,2,1,1,5)
- Indeno(1,2,3-cd)pyrene: 1.91552e-11 kg; data quality (3,2,1,4,1)
- styrene: 8.0763e-9 kg; data quality (3,2,1,4,1)
- fluorene: 3.75023e-10 kg; data quality (3,2,1,4,1)
- acetaldehyde: 1.34798e-7 kg; data quality (3,2,1,4,1)
- anthracene: 1.58114e-10 kg; data quality (3,2,1,4,1)
- toluene: 8.11091e-7 kg; data quality (3,2,1,4,1)
- Water, fresh: 0.00174339 m3; data quality (1,2,1,4,2)
- Benzo(g,h,i)perylene: 6.25289e-11 kg; data quality (3,2,1,4,1)
- particulates, < 10 um: 5.98473e-8 kg; data quality (3,2,1,4,1)
- methanol: 6.87311e-9 kg; data quality (3,2,1,1,5)
- methane, dichloro-, hcc-30: 1.55523e-8 kg; data quality (3,2,1,1,5)
- para-xylene: 5.19403e-10 kg; data quality (3,2,1,4,1)
- acenaphthene: 2.04066e-10 kg; data quality (3,2,1,4,1)
- acenaphthylene: 7.92317e-10 kg; data quality (3,2,1,4,1)
- VOC, volatile organic compounds: 1.63724e-5 kg; data quality (3,2,1,1,2)
- propanal: 2.94151e-8 kg; data quality (3,2,1,4,1)
- Hydrocarbons, aromatic: 5.80194e-9 kg; data quality (3,2,1,4,1)
- Chromium, ion: 3.32182e-11 kg; data quality (3,2,1,5,1)
- manganese: 2.9394e-11 kg; data quality (3,2,1,4,2)
- Cobalt: 6.30405e-14 kg; data quality (3,2,1,1,5)
- m-xylene: 2.77525e-8 kg; data quality (3,2,1,4,1)
- Benzo(k)fluoranthene: 2.32149e-11 kg; data quality (3,2,1,4,1)
- Dibenz(a,h)anthracene: 1.5506e-13 kg; data quality (3,2,1,4,1)
- Phosphorus: 1.98826e-10 kg; data quality (2,1,1,1,5)
- butadiene: 8.54108e-8 kg; data quality (3,2,1,4,1)
- selenium: 9.87295e-14 kg; data quality (2,2,1,1,5)
- 2-methylnaphthalene: 1.80122e-14 kg; data quality (2,2,1,1,5)
- Carbon dioxide: 0.0361128 kg; data quality (4,2,1,4,1)
- naphthalene: 1.79279e-8 kg; data quality (3,2,1,4,1)
- ammonia: 4.68061e-8 kg; data quality (3,2,1,4,1)
- Benzo(b)fluoranthene: 2.36177e-11 kg; data quality (3,2,1,4,1)
- fluoranthene: 2.10892e-10 kg; data quality (3,2,1,4,1)
- Xylene: 6.86583e-7 kg; data quality (3,2,1,4,1)
- Chrysene: 2.19624e-11 kg; data quality (3,2,1,4,1)
- beryllium: 3.89195e-14 kg; data quality (2,2,1,1,5)
- benz[a]anthracene: 2.29817e-11 kg; data quality (3,2,1,4,1)
- 1,1,1-trichloroethane: 4.66743e-8 kg; data quality (3,2,1,1,5)
- mercury: 8.69555e-13 kg; data quality (3,2,1,4,2)
- arsenic: 4.33047e-11 kg; data quality (3,2,1,5,1)
- methyl isobutyl ketone: 3.38905e-13 kg; data quality (4,2,1,1,5)
- benzo(a)pyrene: 2.19536e-11 kg; data quality (3,2,1,4,1)
- formaldehyde: 2.88235e-7 kg; data quality (3,2,1,4,1)
- phenanthrene: 6.72462e-10 kg; data quality (3,2,1,4,1)
- nitrogen oxides: 1.50845e-5 kg; data quality (3,2,1,1,1)
- cadmium: 8.77176e-13 kg; data quality (3,2,1,1,5)
- pyrene: 2.64991e-10 kg; data quality (3,2,1,4,1)

## Inventory method
Input-output

## Modelling constants
The reference unit of all processes is 1 USD2013 of the good or service. The technosphere inputs are based on the US BEA detailed input-output tables for 2007. The IO tables are combined to develop a commodity-by-commodity model based on the the industry-technology assumption (see Suh et al., 2010), which assumes all commodities produced by a given industry have the same input structure, but that multiple industries can produce the same commodity. Thus, model technosphere flows represent commodity outputs (and not industry outputs) from other processes in the model. There are no by-products included in these processes. All commodity production is based on US-conditions, despite in reality that some goods and services are produced overseas, as USEEIO v1.1 is a single-region IO model.

## Completeness
The input-output approach assures that all purchased inputs associated with the sectors making these commodities as reported in the US census for 2007 are included. The direct resources extracted including minerals, energy sources, water and land occupied are included. Emissions to air include all critieria air pollutants, greenhouse gases, and hazardous and toxic air pollutants as defined by US EPA. Releases to water include toxics, total nitrogen and total phosphorus, and water discharges. Releases to soil or groundwater include toxics and agriculutural pesticides. Some metal releases to air, water and soil are not included because they could not be speciated. Solid hazardous and non-hazardous wastes generated are not included as an elementary flows although purchases of waste services are included.

## Data treatment
Greenhouse gases are primarily from the US Greenhouse Gas Emission Inventory (USEPA 2016a). Biogenic C uptake is not included (change from version 1.0), as biogenic C emission are not included. Toxic releases to air, water and soil (except pesticides) are from the 2013 Toxic Release Inventory (USEPA 2015a). Criteria air pollutants and hazardous air pollutants are from the 2011 National Emissions Inventory (USEPA 2015b). All estimates are normalized by industry based on sector output in the data year, then converted to 2013 USD using relative sector-specific CPIs (if data year is not 2013). Energy use represent raw renewables or fossil fuel energies and is based on EIA data for 2014. See Table 1 in Yang, Ingwersen et al. 2017 and Supporting Information 1, and the v1.1 data update notes (Ingwersen et al. 2017) for all details on environmental data sources used.Total transportation land use is reported in the USGA Major Uses of Land for 2007 (Nickerson et al. 2011). Land use for roads was allocated to relevant transportation sectors based on the shares of Federal Highway Administration fees. Transportation land use for airports and railroads were each assumed 5% of the total use of urban land.

## Data collection
2015-2016

## Sampling procedure
US federal government sources, including surveys and US EPA emissions databases are used as the primary sources. From these sources, data for US reporting establishments/facilities are aggregated by the NAICS sector as defined in the BEA detailed 2007 input-output tables. When level of sector aggregation differs, or when direct emissions are not reported but modeled, additional sources are used to make allocations and estimates.

## Review details
In regard to quality assurance and peer-review, each dataset created went through Quality Assurance as defined in a quality assurance project plans at US EPA, CSRA or ERG. The model was assembled with the IO model builder model (USEPA 2016c). Validation functions were used to check that all the model components were properly assembled and harmonized. Bayou Demeke and Santosh Ghimire provided internal peer review of the model methodology and the manuscript underwent standard EPA management review. An editor and two anonymous reviewers at the Journal of Cleaner Production reviewed the model. In regard to data quality evaluation, data quality assessment was performed at the flow and process levels according to the updated US EPA data quality assessment guidelines as defined in US EPA (2016b).

## Intended application
The primary application is for use in the US Environmentally-Extended Input-Ouput model, USEEIO, version 1.1. This model is being used by the US EPA for supporting tools that prioritize goods and services based on potential environmental impacts, resource use or emissions for large regions, including the US and US states, and as a strealined tool for organizations as a starting point to consider sustainable materials management. Model results are designed to provide meso/macro-level decision support.

## Project
USEEIO v1.1 was developed by the US EPA with CSRA and ERG with Wesley W. Ingwersen and David E. Meyer as research leads. Yi Yang was the technical lead on the work for CSRA (contract EP-C-15-012); Troy Hawkins was lead for ERG (contract EP-C-12-021).

## Sources
- USEPA 2016a
- BLM 2008
- Edelen and Ingwersen 2017
- USGS 2016
- EIA 2015
- Maupin et al. 2014
- USEPA 2016b
- Ingwersen et al. 2017
- Statistics Canada 2010
- USDA 2016
- USEPA 2015b
- Kim et el. 2013
- Ingwersen et al. DRAFT
- USEPA 2015a
- Torcellini et al. 2003
- Nickerson et al. 2011
- Blackhurst et al. 2010
- Goebes et al. 2003
- USDA 2006
- Macknick et al. 2011
- BEA 2015
- EIA 2017
- EIA 2013
- EIA 2016
- Lovelace 2009
- USGS 2015
- Yienger et al. 1995
- USDA 2014
- USEPA 2016c
- USDA 2009b
- USDA 2009a
