# Funerary services

Dataset: openLCA process, unit process
Category: 8122: Death Care Services
Geography: United States
Time period: 2017-01-01 to 2017-12-31
Data quality: US EPA - Process Pedigree Matrix (1;1)
Exchange data quality scheme: US EPA - Flow Pedigree Matrix
Generated by: US EPA with CSRA and ERG
Owner: US EPA
Published in: Yang, Ingwersen et al. 2017
restrictionsDescription: This model shold be appropriately cited (see Yang, Ingwersen et al. 2017 source or Publication field) when used. Any changes or derivations of this model by the user should be documented. The model itself and any results from use of this model shall not be construed to consitute US EPA opinion or policy.
copyright: false

## General comment
BEA Code & Name is '812200:Death care services'. Description of the primary industry producing this good or service, adapted from the Census Bureau NAICS 2007 descriptions: This industry group comprises (1) Funeral Homes and Funeral Services, and (2) Cemeteries and Crematories.

## Technology
The process describes the average US production of this good or service within this NAICS-based grouping defined in the BEA 2007 detailed input-output tables (BEA 2015). Distribution, wholesale and retailing of this good or service, use, and final disposal are not included. Creation of a product system with this process will enable modeling of all upstream (supply-chain) activities.

## Geography
Data represent the 50 US states

## Time period
2017 was the year in which this version of USEEIO was released and is the target date for the model

## Reference product
- Funerary services: 1 USD

## Inputs from technosphere
All rows: data quality (1,3,1,1,1)
- Office administration: 0.000441136 USD
- Accounting, tax preparation, bookkeeping, and payroll: 0.0038048 USD
- Plastic pipe, fittings, and sausage casings; at manufacturer: 0.00126827 USD
- Gasoline, fuels, and by-products of petroleum refining; at manufacturer: 0.0038048 USD
- Warehousing: 0.00055142 USD
- Specialized design: 0.000165426 USD
- Facilities support: 0.000220568 USD
- Primary iron, steel, and ferroalloy products; at manufacturer: 0.000661704 USD
- Internet publishing and broadcasting: 0.000330852 USD
- General merchandise stores: 0.000110284 USD
- Paints and coatings; at manufacturer: 0.000330852 USD
- Investigation and security: 0.000385994 USD
- Postal service: 0.0010477 USD
- Golf courses, marinas, ski resorts, fitness and other rec centers and industries: 0.000330852 USD
- Natural gas; at consumer: 0.00192997 USD
- Chemicals (except basic chemicals, agrichemicals, polymers, paints, pharmaceuticals,soaps, cleaning compounds); at manufacturer: 0.000330852 USD
- Metal pipe fittings, ball and roller bearings, industrial patterns, metal bath fixtures, other misc. fabricated metals; at manufacturer: 0.000165426 USD
- External hard drives, CDs, other storage media; at manufacturer: 5.5142e-5 USD
- Light gauge metal cans, boxes, and containers; at manufacturer: 0.000110284 USD
- Limited-service restaurants: 0.00027571 USD
- Sports: 0.000110284 USD
- Hotels and campgrounds: 0.000165426 USD
- Environmental and other technical consulting services: 0.000385994 USD
- Buildings and dwellings services: 0.00369451 USD
- Other basic organic chemicals; at manufacturer: 0.000110284 USD
- News syndicates, libraries, archives, Internet publishing and all other information services: 5.5142e-5 USD
- Polystyrene foam products; at manufacturer: 0.000385994 USD
- Copper, nickel, lead, and zinc; at mine: 0.00115798 USD
- Unrefined oil and gas; at extraction site: 0.00027571 USD
- Telecommunications: 0.00385994 USD
- Insurance agencies and brokerages: 0.000220568 USD
- Cardboard containers; at manufacturer: 0.00435622 USD
- Company and enterprise management: 0.0111387 USD
- Urethane and other foam products; at manufacturer: 0.00055142 USD
- Other plastic products; at manufacturer: 0.00534877 USD
- Securities and commodities brokerage and exchanges: 5.5142e-5 USD
- Paper bags and coated paper; at manufacturer: 0.0020954 USD
- Truck transport: 0.0119107 USD
- Screws, nuts, and bolts; at manufacturer: 0.000882272 USD
- Other real estate: 0.0254205 USD
- Waste management and remediation: 0.00110284 USD
- Full-service restaurants: 0.00132341 USD
- Commercial machinery repair: 0.00242625 USD
- Management consulting: 0.00154398 USD
- Other retail: 0.000606562 USD
- Other computer related services, including facilities management: 0.000220568 USD
- Plastic bags, films, and sheets; at manufacturer: 0.00303281 USD
- Household goods repair: 0.000716846 USD
- Air conditioning, refrigeration, and warm air heating equipment; at manufacturer: 0.000496278 USD
- Used and secondhand goods: 0.0674938 USD
- Couriers and messengers: 0.00027571 USD
- Computer systems design: 0.000220568 USD
- Coal; at mine: 5.5142e-5 USD
- Noncomparable imports: 0.000992556 USD
- Business support: 0.000992556 USD
- Plastic bottles; at manufacturer: 0.00148883 USD
- Satellite, telecommunications resellers, and all other telecommunications: 0.000496278 USD
- Glass and glass products; at manufacturer: 0.00055142 USD
- All other converted paper products; at manufacturer: 5.5142e-5 USD
- Data processing and hosting: 0.000220568 USD
- Gaskets, seals, musical instruments, fasteners, brooms, brushes, mop and other misc. goods; at manufacturer: 0.0613179 USD
- Legal services: 0.00148883 USD
- Monetary authorities and depository credit intermediation: 0.000220568 USD
- Vehicle rental and leasing: 0.00430108 USD
- Commercial equipment rental: 0.00204025 USD
- Scenic and sightseeing transportation and support activities for transportation: 0.000165426 USD
- Rail transport: 0.000110284 USD
- Architectural, engineering, and related services: 5.5142e-5 USD
- Wireless telecommunications: 0.00231596 USD
- Other textiles; at manufacturer: 0.000110284 USD
- Nonresidential building repair and maintanence: 0.00286738 USD
- Other concrete products; at manufacturer: 0.0296664 USD
- Drinking water and wastewater treatment; at consumer: 0.000441136 USD
- Vehicle repair: 0.00121312 USD
- Consumer goods and general rental centers: 0.000441136 USD
- Veneer, plywood, and engineered wood; at manufacturer: 0.000606562 USD
- Software: 5.5142e-5 USD
- Wholesale trade: 0.0332506 USD
- Other basic inorganic chemicals; at manufacturer: 0.000110284 USD
- Secondary steel products; at manufacturer: 0.000165426 USD
- Employment services: 0.00259167 USD
- Wireless communications; at manufacturer: 5.5142e-5 USD
- Paper; at manufacturer: 0.0010477 USD
- State and local government enterprises: 0.000441136 USD
- Electronic equipment repair and maintenance: 0.00198511 USD
- Electricity; at consumer: 0.00545906 USD
- Air transport: 0.000716846 USD
- Computer terminals and other computer peripheral equipment; at manufacturer: 5.5142e-5 USD
- Stationery; at manufacturer: 5.5142e-5 USD
- All other food and drinking places: 0.000110284 USD
- Water transport (boats, ships, ferries): 0.000165426 USD
- Electronic capacitors, resistors, coils, transformers, connectors and other components (except semiconductors and printed circuit assemblies); at manufacturer: 5.5142e-5 USD
- Performances: 5.5142e-5 USD
- Insurance carriers: 0.00683761 USD
- Passenger ground transport: 0.000220568 USD
- Advertising and public relations: 0.0132892 USD
- Nondepository credit intermediation and related activities: 0.00055142 USD
- Books, newspapers, magazines, and other print media; at manufacturer: 0.0010477 USD

## Inputs from nature
- Water, fresh: 0.000237629, 0.00013731 m3 (2 entries, compartments not in this file); data quality (1,2,1,4,2)
- Occupation, urban, discontinuously built: 0.00148213 m2*a; data quality (4,2,1,1,1)

## Emissions to nature
- butadiene: 1.35556e-8 kg; data quality (3,2,1,4,1)
- methane, bromo-, halon 1001: 2.39199e-10 kg; data quality (3,2,1,1,5)
- 1,1,2,2-tetrachloroethane: 8.8245e-11 kg; data quality (3,2,1,1,5)
- m-xylene: 4.37935e-9 kg; data quality (3,2,1,4,1)
- Methane, difluoro-, HFC-32: 6.97981e-8 kg; data quality (4,2,1,4,1)
- Water, fresh: 0.000317466 m3; data quality (1,2,1,4,2)
- Propane, 1,1,1,3,3,3-hexafluoro-, HCFC-236fa: 1.38537e-9 kg; data quality (4,2,1,4,1)
- PHOSPHORUS: 2.11964e-15 kg; data quality (2,2,1,1,5)
- Benzo(k)fluoranthene: 3.68045e-12 kg; data quality (3,2,1,4,1)
- Xylene: 1.08691e-7 kg; data quality (3,2,1,4,1)
- selenium: 8.9693e-11 kg; data quality (2,2,1,1,5)
- hydrogen chloride: 2.81626e-7 kg; data quality (2,2,1,1,5)
- Asbestos: 4.7141e-13 kg; data quality (5,2,1,1,5)
- ethene, tetrachloro-: 3.25666e-11 kg; data quality (3,2,1,1,5)
- Ethene, chloro-: 1.33028e-11 kg; data quality (3,2,1,1,5)
- 2,2,4-trimethylpentane: 4.64442e-8 kg; data quality (3,2,1,4,1)
- fluorene: 5.95099e-11 kg; data quality (3,2,1,4,1)
- benz[a]anthracene: 3.10349e-8 kg; data quality (2,2,1,1,5)
- acenaphthene: 3.23002e-11 kg; data quality (3,2,1,4,1)
- Nitrogen: 1.60839e-11 kg; data quality (5,2,1,1,5)
- sulfur dioxide: 1.42205e-6 kg; data quality (2,2,1,1,5)
- particulates, < 10 um: 5.98729e-7 kg; data quality (3,2,1,1,5)
- Dinitrogen monoxide: 2.26134e-8 kg; data quality (4,2,1,4,1)
- o-Xylene: 1.5718e-9 kg; data quality (3,2,1,4,1)
- Cobalt: 3.94013e-12 kg; data quality (3,2,1,1,5)
- Propane, 1,2-dichloro-: 1.0667e-9 kg; data quality (4,2,1,1,5)
- benzene: 8.8099e-8 kg; data quality (3,2,1,4,1)
- fluoranthene: 1.54381e-7 kg; data quality (2,2,1,1,5)
- benzene, ethyl-: 3.39724e-8 kg; data quality (3,2,1,4,1)
- dibenzofuran: 8.6063e-15 kg; data quality (4,2,1,1,5)
- 2-methylnaphthalene: 1.23355e-14 kg; data quality (2,2,1,1,5)
- mercury: 7.81059e-9 kg; data quality (2,2,1,1,5)
- phenanthrene: 1.08093e-10 kg; data quality (3,2,1,4,1)
- ammonia: 1.4957e-8 kg; data quality (3,2,1,2,3)
- nickel: 3.85786e-10 kg; data quality (3,2,1,1,5)
- Benzo(b)fluoranthene: 3.7462e-12 kg; data quality (3,2,1,4,1)
- arsenic: 8.85133e-11 kg; data quality (3,2,1,1,5)
- antimony: 3.14865e-11 kg; data quality (3,2,1,1,5)
- VOC, volatile organic compounds: 3.03514e-6 kg; data quality (3,2,1,1,2)
- hydrogen fluoride: 3.85668e-9 kg; data quality (2,2,1,1,5)
- Ethane, 1,1,1-trifluoro-, HFC-143a: 5.12811e-8 kg; data quality (4,2,1,4,1)
- carbon tetrachloride: 4.63852e-11 kg; data quality (4,2,1,1,5)
- manganese: 5.97772e-12 kg; data quality (3,2,1,3,3)
- propanal: 4.64171e-9 kg; data quality (3,2,1,4,1)
- Methane: 8.2444e-7 kg; data quality (4,2,1,4,1)
- Ethane, 1,1,1,2-tetrafluoro-, HFC-134a: 4.5175e-7 kg; data quality (4,2,1,4,1)
- anthracene: 2.52399e-11 kg; data quality (3,2,1,4,1)
- particulates, < 2.5 um: 4.82901e-6 kg; data quality (3,2,1,1,5)
- para-xylene: 8.19619e-11 kg; data quality (3,2,1,4,1)
- ethane, 1,2-dibromo-: 3.90172e-12 kg; data quality (2,2,1,1,5)
- beryllium: 3.13322e-12 kg; data quality (2,2,1,1,5)
- cumene: 8.24266e-10 kg; data quality (4,2,1,1,5)
- ethane, 1,2-dichloro-: 7.40293e-10 kg; data quality (3,2,1,1,5)
- styrene: 1.27444e-9 kg; data quality (3,2,1,4,1)
- formaldehyde: 4.94741e-8 kg; data quality (3,2,1,4,1)
- methane, monochloro-, r-40: 2.90918e-10 kg; data quality (3,2,1,1,5)
- naphthalene: 1.22761e-8 kg; data quality (3,2,1,2,4)
- acenaphthylene: 1.25127e-10 kg; data quality (3,2,1,4,1)
- cadmium: 2.76091e-9 kg; data quality (3,2,1,1,5)
- acrolein: 1.71147e-9 kg; data quality (3,2,1,4,1)
- Indeno(1,2,3-cd)pyrene: 3.04079e-12 kg; data quality (3,2,1,4,1)
- trichloroethylene: 2.63442e-11 kg; data quality (4,2,1,1,5)
- chloroform: 4.40417e-11 kg; data quality (4,2,1,1,5)
- Carbon dioxide: 0.00910902 kg; data quality (4,2,1,4,1)
- pyrene: 4.19571e-11 kg; data quality (3,2,1,4,1)
- hexane: 2.8593e-8 kg; data quality (3,2,1,4,1)
- bromoform: 2.35967e-11 kg; data quality (3,2,1,1,5)
- lead: 1.18754e-9 kg; data quality (3,2,1,1,5)
- 1,1,1-trichloroethane: 3.41839e-11 kg; data quality (4,2,1,1,5)
- acetaldehyde: 2.9209e-8 kg; data quality (3,2,1,3,2)
- Hydrocarbons, aromatic: 9.18069e-10 kg; data quality (3,2,1,4,1)
- Ethane, pentafluoro-, HFC-125: 1.19855e-7 kg; data quality (4,2,1,4,1)
- toluene: 1.32299e-7 kg; data quality (3,2,1,4,1)
- chlorine: 3.72771e-11 kg; data quality (4,2,1,1,5)
- Chrysene: 4.2025e-8 kg; data quality (2,2,1,1,5)
- Chromium VI: 1.44645e-10 kg; data quality (3,2,1,1,5)
- Benzo(g,h,i)perylene: 9.89014e-12 kg; data quality (3,2,1,4,1)
- 1,1-DICHLOROETHYLENE: 5.83025e-11 kg; data quality (3,2,1,1,5)
- carbon monoxide: 5.83644e-5 kg; data quality (3,2,1,1,2)
- nitrogen oxides: 6.48726e-6 kg; data quality (2,2,1,1,4)
- methane, dichloro-, hcc-30: 5.44662e-10 kg; data quality (4,2,1,1,5)
- Chromium, ion: 2.12907e-11 kg; data quality (2,2,1,2,4)
- Dibenz(a,h)anthracene: 3.95294e-14 kg; data quality (3,2,1,3,3)
- benzo(a)pyrene: 5.43412e-9 kg; data quality (2,2,1,1,5)

## Inventory method
Input-output

## Modelling constants
The reference unit of all processes is 1 USD2013 of the good or service. The technosphere inputs are based on the US BEA detailed input-output tables for 2007. The IO tables are combined to develop a commodity-by-commodity model based on the the industry-technology assumption (see Suh et al., 2010), which assumes all commodities produced by a given industry have the same input structure, but that multiple industries can produce the same commodity. Thus, model technosphere flows represent commodity outputs (and not industry outputs) from other processes in the model. There are no by-products included in these processes. All commodity production is based on US-conditions, despite in reality that some goods and services are produced overseas, as USEEIO v1.1 is a single-region IO model.

## Completeness
The input-output approach assures that all purchased inputs associated with the sectors making these commodities as reported in the US census for 2007 are included. The direct resources extracted including minerals, energy sources, water and land occupied are included. Emissions to air include all critieria air pollutants, greenhouse gases, and hazardous and toxic air pollutants as defined by US EPA. Releases to water include toxics, total nitrogen and total phosphorus, and water discharges. Releases to soil or groundwater include toxics and agriculutural pesticides. Some metal releases to air, water and soil are not included because they could not be speciated. Solid hazardous and non-hazardous wastes generated are not included as an elementary flows although purchases of waste services are included.

## Data treatment
Greenhouse gases are primarily from the US Greenhouse Gas Emission Inventory (USEPA 2016a). Biogenic C uptake is not included (change from version 1.0), as biogenic C emission are not included. Toxic releases to air, water and soil (except pesticides) are from the 2013 Toxic Release Inventory (USEPA 2015a). Criteria air pollutants and hazardous air pollutants are from the 2011 National Emissions Inventory (USEPA 2015b). All estimates are normalized by industry based on sector output in the data year, then converted to 2013 USD using relative sector-specific CPIs (if data year is not 2013). Energy use represent raw renewables or fossil fuel energies and is based on EIA data for 2014. See Table 1 in Yang, Ingwersen et al. 2017 and Supporting Information 1, and the v1.1 data update notes (Ingwersen et al. 2017) for all details on environmental data sources used.Land occupation for commercial buildings was estimated based on the building floorspace data provided by the U.S. Energy Information Administration 2012 Commercial Building Energy Consumption Survey (CBECS) (EIA 2015). Total commercial public supply water use is reported by USGS (Maupin et al. 2014). Water use is allocated across commercial sectors based on their use of water, sewage, and other services in USD based on the 2007 Benchmark Use Table before redefinitions (BEA 2015).

## Data collection
2015-2016

## Sampling procedure
US federal government sources, including surveys and US EPA emissions databases are used as the primary sources. From these sources, data for US reporting establishments/facilities are aggregated by the NAICS sector as defined in the BEA detailed 2007 input-output tables. When level of sector aggregation differs, or when direct emissions are not reported but modeled, additional sources are used to make allocations and estimates.

## Review details
In regard to quality assurance and peer-review, each dataset created went through Quality Assurance as defined in a quality assurance project plans at US EPA, CSRA or ERG. The model was assembled with the IO model builder model (USEPA 2016c). Validation functions were used to check that all the model components were properly assembled and harmonized. Bayou Demeke and Santosh Ghimire provided internal peer review of the model methodology and the manuscript underwent standard EPA management review. An editor and two anonymous reviewers at the Journal of Cleaner Production reviewed the model. In regard to data quality evaluation, data quality assessment was performed at the flow and process levels according to the updated US EPA data quality assessment guidelines as defined in US EPA (2016b).

## Intended application
The primary application is for use in the US Environmentally-Extended Input-Ouput model, USEEIO, version 1.1. This model is being used by the US EPA for supporting tools that prioritize goods and services based on potential environmental impacts, resource use or emissions for large regions, including the US and US states, and as a strealined tool for organizations as a starting point to consider sustainable materials management. Model results are designed to provide meso/macro-level decision support.

## Project
USEEIO v1.1 was developed by the US EPA with CSRA and ERG with Wesley W. Ingwersen and David E. Meyer as research leads. Yi Yang was the technical lead on the work for CSRA (contract EP-C-15-012); Troy Hawkins was lead for ERG (contract EP-C-12-021).

## Sources
- EIA 2013
- Edelen and Ingwersen 2017
- USEPA 2015a
- EIA 2016
- Lovelace 2009
- BEA 2015
- USEPA 2016b
- USGS 2016
- EIA 2015
- BLM 2008
- USDA 2006
- USDA 2009b
- EIA 2017
- Maupin et al. 2014
- Kim et el. 2013
- USEPA 2016c
- Ingwersen et al. DRAFT
- Ingwersen et al. 2017
- Macknick et al. 2011
- USEPA 2015b
- USEPA 2016a
- USDA 2014
- Goebes et al. 2003
- USDA 2016
- Nickerson et al. 2011
- Blackhurst et al. 2010
- USDA 2009a
- Statistics Canada 2010
- USGS 2015
- Torcellini et al. 2003
- Yienger et al. 1995
