# Federal government (defense)

Dataset: openLCA process, unit process
Category: Government
Geography: United States
Time period: 2017-01-01 to 2017-12-31
Data quality: US EPA - Process Pedigree Matrix (1;1)
Exchange data quality scheme: US EPA - Flow Pedigree Matrix
Generated by: US EPA with CSRA and ERG
Owner: US EPA
Published in: Yang, Ingwersen et al. 2017
restrictionsDescription: This model shold be appropriately cited (see Yang, Ingwersen et al. 2017 source or Publication field) when used. Any changes or derivations of this model by the user should be documented. The model itself and any results from use of this model shall not be construed to consitute US EPA opinion or policy.
copyright: false

## General comment
BEA Code & Name is 'S00500:Federal general government (defense)'.

## Technology
The process describes the average US production of this good or service within this NAICS-based grouping defined in the BEA 2007 detailed input-output tables (BEA 2015). Distribution, wholesale and retailing of this good or service, use, and final disposal are not included. Creation of a product system with this process will enable modeling of all upstream (supply-chain) activities.

## Geography
Data represent the 50 US states

## Time period
2017 was the year in which this version of USEEIO was released and is the target date for the model

## Reference product
- Federal government (defense): 1 USD

## Inputs from technosphere
All rows: data quality (1,3,1,1,1)
- Air transport: 0.0149448 USD
- Mining and oil/gas field machinery; at manufacturer: 8.93419e-5 USD
- Fruit and vegetable preservation; at manufacturer: 0.000133062 USD
- Warehousing: 0.0004258 USD
- Buildings and dwellings services: 7.41348e-5 USD
- Environmental and other technical consulting services: 4.75223e-5 USD
- Aluminum; at manufacturer: 0.000190089 USD
- Other textiles; at manufacturer: 0.00166138 USD
- Legal services: 0.00244074 USD
- Seasonings and dressings; at manufacturer: 2.47116e-5 USD
- Management consulting: 0.00996257 USD
- Accounting, tax preparation, bookkeeping, and payroll: 0.00673296 USD
- Mechanical power transmission equipment; at manufacturer: 3.80178e-6 USD
- Distilleries and spirits; at manufacturer: 1.90089e-6 USD
- All other converted paper products; at manufacturer: 1.90089e-6 USD
- Transmission and power train parts; at manufacturer: 0.00235901 USD
- Wholesale trade: 0.0142947 USD
- Bread and other baked goods; at manufacturer: 0.000169179 USD
- Office machinery; at manufacturer: 0.00019199 USD
- Snack foods; at manufacturer: 1.33062e-5 USD
- Other real estate: 0.000364971 USD
- Limited-service restaurants: 0.0012888 USD
- Wireless communications; at manufacturer: 0.00434544 USD
- Data processing and hosting: 0.0144202 USD
- Other aircraft parts; at manufacturer: 0.00253579 USD
- Hydraulic pumps, motors, cylinders and actuators; at manufacturer: 0.000562664 USD
- Scientific research and development: 0.00110062 USD
- Golf courses, marinas, ski resorts, fitness and other rec centers and industries: 0.00141806 USD
- Architectural, engineering, and related services: 0.0491951 USD
- Relay and industrial controls; at manufacturer: 0.000509439 USD
- Rubber tires; at manufacturer: 0.00136294 USD
- Specialized design: 0.000347863 USD
- Paper; at manufacturer: 1.90089e-6 USD
- Packaged poultry; at manufacturer: 0.000201494 USD
- Switchgear and switchboards; at manufacturer: 0.000528448 USD
- Other rubber products; at manufacturer: 0.00157014 USD
- Primary copper; at manufacturer: 7.60357e-6 USD
- Screws, nuts, and bolts; at manufacturer: 1.33062e-5 USD
- Sugar, candy, and chocolate; at manufacturer: 8.93419e-5 USD
- Aluminum products; at manufacturer: 9.50446e-6 USD
- Other vehicle parts; at manufacturer: 0.00135724 USD
- Leather; at manufacturer: 0.000115954 USD
- Gaskets, seals, musical instruments, fasteners, brooms, brushes, mop and other misc. goods; at manufacturer: 2.85134e-5 USD
- Sound recording: 2.47116e-5 USD
- Household goods repair: 0.000241413 USD
- Ships and ship repair; at manufacturer: 0.00536812 USD
- Pharmaceutical products (pills, powders, solutions, etc.); at manufacturer: 0.00199023 USD
- Other transportation equipment; at manufacturer: 0.000669114 USD
- Guided missiles and space vehicles; at manufacturer: 0.00210619 USD
- Metal hinges, keys, lock, and other hardware; at manufacturer: 0.000499934 USD
- Semiconductors; at manufacturer: 0.00638509 USD
- Curtains and linens; at manufacturer: 0.000112153 USD
- Gasoline, fuels, and by-products of petroleum refining; at manufacturer: 0.0444637 USD
- Other support services: 0.00504306 USD
- Veneer, plywood, and engineered wood; at manufacturer: 5.3225e-5 USD
- Breakfast cereals; at manufacturer: 0.000125459 USD
- Pipeline transport: 0.000275629 USD
- Movies and film: 0.00338359 USD
- Vehicle rental and leasing: 0.000593078 USD
- Postal service: 1.90089e-6 USD
- Surgical and medical instruments; at manufacturer: 0.000209098 USD
- Primary batteries; at manufacturer: 1.90089e-5 USD
- Motors and generators; at manufacturer: 0.000247116 USD
- Propulsion units and parts for space vehicles and guided missiles; at manufacturer: 0.00129451 USD
- Cutlery and handtools; at manufacturer: 0.00163287 USD
- Computer terminals and other computer peripheral equipment; at manufacturer: 0.000323152 USD
- Heating equipment other than warm air furnaces; at manufacturer: 5.70267e-6 USD
- Other basic inorganic chemicals; at manufacturer: 0.00188759 USD
- Telecommunications: 0.00464008 USD
- Other basic organic chemicals; at manufacturer: 1.90089e-6 USD
- Software: 0.00118235 USD
- Motor vehicle steering, suspension components (except spring), and brake systems; at manufacturer: 0.000347863 USD
- Other petroleum and coal products; at manufacturer: 0.000186287 USD
- Commercial machinery repair: 0.000714735 USD
- External hard drives, CDs, other storage media; at manufacturer: 0.000254719 USD
- Valve and fittings (except for plumbing); at manufacturer: 0.00044861 USD
- Abrasive products; at manufacturer: 1.90089e-6 USD
- Electronic capacitors, resistors, coils, transformers, connectors and other components (except semiconductors and printed circuit assemblies); at manufacturer: 0.00137815 USD
- Light bulbs; at manufacturer: 1.90089e-6 USD
- Toiletries; at manufacturer: 4.75223e-5 USD
- Fluid meters and counting devices; at manufacturer: 5.70267e-6 USD
- Veterinarians: 0.000230008 USD
- Electronic equipment repair and maintenance: 0.00235901 USD
- Watches, clocks, and other measuring and controlling devices; at manufacturer: 0.000133062 USD
- Investigation and security: 0.00072424 USD
- Motorcycle, bicycle, and parts; at manufacturer: 1.14053e-5 USD
- Pesticides; at manufacturer: 1.90089e-6 USD
- Special tools, dies, jigs, and fixtures; at manufacturer: 1.90089e-6 USD
- Marketing research and all other miscellaneous professional, scientific, and technical services: 0.00263654 USD
- Paper bags and coated paper; at manufacturer: 0.00029844 USD
- Other residential structures: 0.000940941 USD
- State and local government enterprises: 0.0010626 USD
- Glass and glass products; at manufacturer: 3.80178e-6 USD
- Vehicle repair: 6.08285e-5 USD
- Wooden windows, door, and flooring; at manufacturer: 9.50446e-6 USD
- Rubber and plastic belts and hoses; at manufacturer: 4.37205e-5 USD
- Wiring devices; at manufacturer: 2.47116e-5 USD
- Cutting and machine tool accessory, rolling mill, and other metalworking machines; at manufacturer: 1.90089e-6 USD
- Fertilizers; at manufacturer: 3.80178e-6 USD
- Magazines and journals; at publisher: 3.80178e-6 USD
- Printing support; at manufacturer: 3.80178e-6 USD
- Lids, jars, bottle caps, other metal closures and crowns; at manufacturer: 0.000401088 USD
- Used and secondhand goods: -1.52071e-5 USD
- Seafood; at manufacturer: 0.000142567 USD
- Vehicle engines and engine parts; at manufacturer: 0.00031935 USD
- Lumber and treated lumber; at manufacturer: 5.70267e-6 USD
- Dry-cleaning and laundry: 9.69455e-5 USD
- Clothing; at manufacturer: 9.12428e-5 USD
- Nonresidential building repair and maintanence: 0.00451462 USD
- Cheese; at manufacturer: 0.000197693 USD
- Cut stone and stone products; at manufacturer: 8.36392e-5 USD
- Computer storage device readers; at manufacturer: 0.000216702 USD
- Chemicals (except basic chemicals, agrichemicals, polymers, paints, pharmaceuticals,soaps, cleaning compounds); at manufacturer: 0.00116715 USD
- Other retail: 3.80178e-6 USD
- Clay and ceramic products; at manufacturer: 1.90089e-6 USD
- Hotels and campgrounds: 0.00264604 USD
- Radio and television: 0.000169179 USD
- Independent artists, writers, and performers: 0.00190089 USD
- Business support: 0.00395385 USD
- other miscellaneous electrical equipment and components; at manufacturer: 7.22339e-5 USD
- Other computer related services, including facilities management: 0.00321631 USD
- Navigation instruments; at manufacturer: 0.0174198 USD
- Wineries and wine; at manufacturer: 1.90089e-6 USD
- Printed circuit and electronic assembly; at manufacturer: 7.60357e-6 USD
- Electricity; at consumer: 0.00184767 USD
- Wireless telecommunications: 0.00281142 USD
- Facilities support: 0.00382649 USD
- Fabric; at manufacturer: 0.000378277 USD
- Full-service restaurants: 0.000644402 USD
- Employment services: 0.00140856 USD
- Other nonmetallic mineral products; at manufacturer: 3.80178e-6 USD
- Vaccines and other biological medical products; at manufacturer: 3.80178e-6 USD
- Rail transport: 0.00057597 USD
- Soft drinks, bottled water, and ice; at manufacturer: 4.75223e-5 USD
- Automatic controls for HVAC and refrigeration equipment; at manufacturer: 9.50446e-6 USD
- Cardboard containers; at manufacturer: 8.55401e-5 USD
- Communication and energy wire and cable; at manufacturer: 0.00012736 USD
- Passenger ground transport: 0.000133062 USD
- Ammunition, arms, ordnance, and related accessories; at manufacturer: 0.0036174 USD
- Secondary copper products; at manufacturer: 1.90089e-6 USD
- Animal farms and aquaculture ponds (except cattle and poultry): 5.70267e-6 USD
- Sporting and athletic goods; at manufacturer: 1.90089e-6 USD
- All other foods; at manufacturer: 0.00010645 USD
- Aircraft; at manufacturer: 0.0237459 USD
- Soap and cleaning compounds; at manufacturer: 3.23152e-5 USD
- Cookies, crackers, pastas, and tortillas; at manufacturer: 9.50446e-6 USD
- Other plastic products; at manufacturer: 5.70267e-6 USD
- Air purification and ventilation equipment; at manufacturer: 5.70267e-6 USD
- Industrial process furnaces and ovens; at manufacturer: 4.56214e-5 USD
- Ball and roller bearings; at manufacturer: 0.000750852 USD
- News syndicates, libraries, archives, Internet publishing and all other information services: 0.00049043 USD
- Truck transport: 0.00829359 USD
- Waste management and remediation: 0.000762257 USD
- Advertising and public relations: 0.0038379 USD
- Metal pipe fittings, ball and roller bearings, industrial patterns, metal bath fixtures, other misc. fabricated metals; at manufacturer: 7.60357e-6 USD
- All other food and drinking places: 8.7441e-5 USD
- Books, newspapers, magazines, and other print media; at manufacturer: 0.00182486 USD
- Travel arrangement and reservation: 0.00480545 USD
- Office administration: 0.00749141 USD
- Metal structural products; at manufacturer: 0.000117855 USD
- Springs and wires; at manufacturer: 5.70267e-6 USD
- Plastic bags, films, and sheets; at manufacturer: 1.14053e-5 USD
- Directory, mailing list, and other publishers; at publisher: 8.55401e-5 USD
- Fiber, yarn, and thread; at manufacturer: 0.000136864 USD
- Drinking water and wastewater treatment; at consumer: 0.00121277 USD
- Industrial process variable instruments; at manufacturer: 9.50446e-6 USD
- Stationery; at manufacturer: 1.90089e-5 USD
- Air conditioning, refrigeration, and warm air heating equipment; at manufacturer: 5.51258e-5 USD
- Home refrigerators and freezers; at manufacturer: 7.60357e-6 USD
- Other animal food; at manufacturer: 1.90089e-5 USD
- Welding and Soldering Equipment, Scales and Balances, and other general purpose machinery; at manufacturer: 5.70267e-6 USD
- Packaged meat (except poultry); at manufacturer: 0.00119946 USD
- Residential building repair and maintanence: 0.001285 USD
- Commercial equipment rental: 7.60357e-6 USD
- Other engine equipment; at manufacturer: 0.000325052 USD
- Couriers and messengers: 1.90089e-6 USD
- Noncomparable imports: 0.0319654 USD
- Carbon and graphite products; at manufacturer: 1.90089e-6 USD
- Synthetic rubber and artificial and synthetic fibers; at manufacturer: 5.70267e-6 USD
- Water transport (boats, ships, ferries): 0.00125839 USD
- Turbines and turbine generator sets; at manufacturer: 9.50446e-6 USD
- Light gauge metal cans, boxes, and containers; at manufacturer: 4.94232e-5 USD
- Dolls, toys, and games; at manufacturer: 5.70267e-6 USD
- Aircraft engines and parts; at manufacturer: 0.0021309 USD
- Office supplies (not paper); at manufacturer: 7.60357e-6 USD
- Metal windows, doors, and architectural products; at manufacturer: 0.000152071 USD
- Refined vegetable, olive, and seed oils; at manufacturer: 1.90089e-6 USD
- Computer systems design: 0.0176099 USD
- Satellite, telecommunications resellers, and all other telecommunications: 0.00034216 USD
- Other educational services: 0.0016975 USD
- Natural gas; at consumer: 0.00178114 USD
- Speed changers, industrial high-speed drives, and gears; at manufacturer: 1.14053e-5 USD
- Vehicle electrical and electronic equipment; at manufacturer: 0.00349004 USD
- Surgical appliance and supplies; at manufacturer: 0.000176783 USD

## Inputs from nature
- Occupation, urban, discontinuously built: 0.000189651 m2*a; data quality (4,2,1,1,1)
- Energy, solar: 0.00396875 MJ; data quality (3,1,1,1,1)
- Occupation, industrial area: 0.153748 m2*a; data quality (2,3,1,1,1)
- Water, fresh: 0.000324389, 0.000561388 m3 (2 entries, compartments not in this file); data quality (1,2,1,4,2)
- Energy, wind: 0.000701532 MJ; data quality (3,1,1,1,1)

## Emissions to nature
- formic acid: 4.72528e-11 kg; data quality (3,1,1,1,5)
- diethanolamine: 6.07229e-11 kg; data quality (3,2,1,1,5)
- benzene, ethyl-: 3.38584e-7 kg; data quality (3,2,1,4,1)
- Benzo(b)fluoranthene: 3.81151e-11 kg; data quality (3,2,1,4,1)
- ethane, 1,1,2-trichloro-: 1.69637e-12 kg; data quality (4,2,1,1,5)
- 1,1,1-trichloroethane: 2.72544e-10 kg; data quality (4,2,1,1,5)
- benzene: 7.76198e-14 kg; data quality (3,1,1,1,5)
- nitric acid: 3.88398e-8, 1.36175e-13 kg (2 entries, compartments not in this file); data quality (3,1,1,1,5)
- Propane, 1,2-dichloro-: 8.7035e-12 kg; data quality (4,2,1,1,5)
- ethylene oxide: 1.98341e-12 kg; data quality (3,2,1,1,5)
- 2-methylnaphthalene: 2.24251e-12 kg; data quality (2,2,1,1,5)
- acetaldehyde: 2.19142e-7 kg; data quality (3,2,1,4,1)
- arsenic: 1.52708e-10 kg; data quality (3,2,1,3,3)
- Xylene: 5.03848e-13 kg; data quality (4,1,1,1,5)
- Chromium VI: 1.74494e-10 kg; data quality (3,2,1,1,5)
- Chromium, ion: 3.77245e-10 kg; data quality (2,2,1,2,4)
- particulates, < 10 um: 1.02958e-6 kg; data quality (3,2,1,1,5)
- Hydrocarbons, aromatic: 9.96896e-9 kg; data quality (3,2,1,4,1)
- butadiene: 1.37788e-7 kg; data quality (3,2,1,4,1)
- Benzo(k)fluoranthene: 3.73541e-11 kg; data quality (3,2,1,4,1)
- acrylic acid: 1.10315e-13 kg; data quality (4,2,1,1,5)
- o-Xylene: 1.61614e-8 kg; data quality (3,2,1,4,1)
- 2,4-dinitrophenol: 2.15112e-14 kg; data quality (5,2,1,1,5)
- lead: 1.91993e-11, 2.37629e-7 kg (2 entries, compartments not in this file); data quality (3,1,1,1,5)
- NITROGLYCERIN: 7.87855e-9, 1.91601e-8, 5.03892e-9 kg (3 entries, compartments not in this file); data quality (5,1,1,1,5)
- NITROUS ACID: 1.36175e-13 kg; data quality (5,1,1,1,5)
- dibenzofuran: 3.72387e-12 kg; data quality (4,2,1,1,5)
- propanal: 4.73564e-8 kg; data quality (3,2,1,4,1)
- Ethane, 1,1,1-trifluoro-, HFC-143a: 4.14923e-9 kg; data quality (4,2,1,4,1)
- fluorene: 6.07286e-10 kg; data quality (3,2,1,4,1)
- Hydrazine: 5.36686e-12 kg; data quality (4,2,1,1,5)
- ethane, 1,2-dichloro-: 2.72829e-10 kg; data quality (3,2,1,1,5)
- ethylbenzene: 9.55135e-10 kg; data quality (4,1,1,1,5)
- 1,4-dichlorobenzene: 5.90006e-11 kg; data quality (2,2,1,1,5)
- Xylene: 1.11827e-6 kg; data quality (3,2,1,4,1)
- fluoranthene: 3.55857e-10 kg; data quality (3,2,1,4,1)
- 2-NITROPROPANE: 6.80876e-13 kg; data quality (5,1,1,1,5)
- hexane: 2.87915e-7 kg; data quality (3,2,1,4,1)
- toluene: 1.32243e-6 kg; data quality (3,2,1,4,1)
- ALLYL CHLORIDE: 2.06361e-16 kg; data quality (3,2,1,1,5)
- selenium: 8.58568e-11 kg; data quality (2,2,1,1,5)
- NITRIC ACID: 1.01205e-10 kg; data quality (3,1,1,1,5)
- 7-OXABICYCLO[2,2,1]HEPTANE-2,3-DICARBOXYLIC ACID, DIPOTASSIUM SALT: 2.18085e-9 kg; data quality (5,1,1,1,5)
- ammonia: 1.17968e-7 kg; data quality (3,2,1,3,3)
- benzidine: 5.30322e-12 kg; data quality (2,2,1,1,5)
- Dibenz(a,h)anthracene: 2.47735e-13 kg; data quality (3,2,1,4,1)
- ethane, 1,2-dibromo-: 1.42122e-12 kg; data quality (2,2,1,1,5)
- hydrogen sulfide: 1.27357e-10 kg; data quality (3,2,1,1,5)
- manganese: 2.66244e-11, 1.65126e-9 kg (2 entries, compartments not in this file); data quality (4,1,1,1,5)
- Nitrobenzene: 2.74871e-13 kg; data quality (4,2,1,1,5)
- chromium: 2.05829e-9, 1.74863e-11, 2.12771e-12 kg (3 entries, compartments not in this file); data quality (4,1,1,1,5)
- epichlorohydrin: 5.04434e-12 kg; data quality (3,2,1,1,5)
- ETHYLENETHIOUREA: 4.24257e-14 kg; data quality (5,2,1,1,5)
- 2-METHOXYETHANOL: 6.16101e-14 kg; data quality (4,2,1,1,5)
- 2-ethoxyethyl acetate: 5.19091e-11 kg; data quality (5,2,1,1,5)
- hexachloro-1,3-butadiene: 2.37432e-12 kg; data quality (4,2,1,1,5)
- nickel: 5.80106e-14, 3.09513e-9 kg (2 entries, compartments not in this file); data quality (4,1,1,1,5)
- Cobalt: 3.87748e-10 kg; data quality (3,2,1,1,5)
- mercury: 2.12151e-11 kg; data quality (2,2,1,1,5)
- 1,4-dioxane: 2.21256e-12 kg; data quality (4,2,1,1,5)
- ethyl acrylate: 3.05549e-10 kg; data quality (4,2,1,1,5)
- 3-methylcholanthrene: 1.11249e-15 kg; data quality (2,2,1,1,5)
- hydrogen chloride: 4.77061e-8 kg; data quality (2,2,1,1,5)
- Naphthalene: 1.61037e-10 kg; data quality (4,1,1,1,5)
- cadmium: 3.40781e-11 kg; data quality (3,2,1,1,5)
- Triethyl amine: 5.62379e-12 kg; data quality (4,2,1,1,5)
- CHLORONAPHTHALENE: 1.64597e-18 kg; data quality (1,2,1,1,5)
- naphthalene: 2.98985e-8 kg; data quality (3,2,1,4,1)
- monochloroethane: 1.57946e-10 kg; data quality (3,2,1,1,5)
- Water, fresh: 0.00075 m3; data quality (1,2,1,4,2)
- methylene diphenyl diisocyanate: 8.5408e-10 kg; data quality (4,2,1,1,5)
- methane, monochloro-, r-40: 4.45203e-11 kg; data quality (3,2,1,1,5)
- biphenyl: 4.93415e-11 kg; data quality (4,2,1,1,5)
- cyanide: 1.27002e-9 kg; data quality (2,2,1,1,5)
- Hexachlorocyclopentadiene: 5.22119e-13 kg; data quality (3,2,1,1,5)
- o-cresol: 1.93968e-14 kg; data quality (4,2,1,1,5)
- Methane, difluoro-, HFC-32: 5.64747e-9 kg; data quality (4,2,1,4,1)
- Triethylene glycol: 1.90651e-14 kg; data quality (5,2,1,1,5)
- phthalate, dioctyl-: 7.53239e-11 kg; data quality (3,2,1,1,5)
- copper: 2.77604e-10, 5.89944e-7, 2.73896e-9 kg (3 entries, compartments not in this file); data quality (4,1,1,1,5)
- Methane: 1.61264e-6 kg; data quality (4,2,1,4,1)
- 3,3'-dimethylbenzidine: 3.15858e-14 kg; data quality (1,2,1,1,5)
- styrene: 1.38698e-8 kg; data quality (3,2,1,4,1)
- Chrysene, 5-methyl-: 9.67532e-16 kg; data quality (2,2,1,1,5)
- methyl methacrylate: 3.44115e-12 kg; data quality (4,2,1,1,5)
- methyl isobutyl ketone: 7.35216e-9 kg; data quality (4,2,1,1,5)
- anthracene: 2.54966e-10 kg; data quality (3,2,1,4,1)
- Dimethylcarbamyl chloride: 2.06361e-16 kg; data quality (5,2,1,1,5)
- methane, dichloro-, hcc-30: 3.02819e-8 kg; data quality (4,2,1,1,5)
- Phthalate, dibutyl-: 2.76077e-11 kg; data quality (4,2,1,1,5)
- Aluminum: 3.60864e-11 kg; data quality (4,1,1,1,5)
- Dinitrotoluene, technical grade (2,4 (77%)- and 2,6 (19%)-): 1.36175e-13, 1.27502e-8 kg (2 entries, compartments not in this file); data quality (5,1,1,1,5)
- phenanthrene: 1.11698e-9 kg; data quality (3,2,1,4,1)
- antimony: 1.22547e-10 kg; data quality (3,2,1,1,5)
- phenol: 6.13583e-9 kg; data quality (4,2,1,1,5)
- 1,4-BENZOQUINONE: 5.94265e-16 kg; data quality (3,2,1,1,5)
- nitrogen oxides: 2.8356e-5 kg; data quality (3,2,1,1,2)
- Phosphorus: 6.01639e-7 kg; data quality (2,1,1,1,5)
- 2,4,5-trichlorophenol: 2.65161e-14 kg; data quality (2,2,1,1,5)
- Dimethyl sulfate: 4.12811e-12 kg; data quality (2,2,1,1,5)
- Indeno(1,2,3-cd)pyrene: 3.08322e-11 kg; data quality (3,2,1,4,1)
- 1,1-DICHLOROETHYLENE: 7.69878e-12 kg; data quality (3,2,1,1,5)
- benzene, chloro-: 2.58736e-11 kg; data quality (4,2,1,1,5)
- 1,2,4-trichlorobenzene: 1.79936e-12 kg; data quality (4,2,1,1,5)
- acenaphthylene: 1.2764e-9 kg; data quality (3,2,1,4,1)
- hexachlorobenzene: 6.47413e-12 kg; data quality (3,2,1,1,5)
- ethylene glycol: 4.42569e-11 kg; data quality (5,1,1,1,5)
- nickel: 8.79059e-10 kg; data quality (3,2,1,2,4)
- Propene: 6.80876e-12 kg; data quality (3,1,1,1,5)
- Ethene, chloro-: 5.72386e-10 kg; data quality (3,2,1,1,5)
- pyrene: 4.27668e-10 kg; data quality (3,2,1,4,1)
- cumene: 2.3183e-10 kg; data quality (4,2,1,1,5)
- 1-Methyl-2-pyrrolidinone: 1.40763e-9, 1.05808e-10 kg (2 entries, compartments not in this file); data quality (5,1,1,1,5)
- Cresol: 1.8266e-11 kg; data quality (4,2,1,1,5)
- toluene, 2,4-dinitro-: 2.17369e-14 kg; data quality (5,2,1,1,5)
- Phthalate, dibutyl-: 4.67571e-9 kg; data quality (4,1,1,1,5)
- Ethane, pentafluoro-, HFC-125: 9.69767e-9 kg; data quality (4,2,1,4,1)
- toluene-2,4-diisocyante: 1.43926e-12 kg; data quality (3,2,1,1,5)
- m-xylene: 4.47691e-8 kg; data quality (3,2,1,4,1)
- carbon monoxide: 0.000506041 kg; data quality (3,2,1,1,1)
- barium: 3.4135e-13 kg; data quality (4,1,1,1,5)
- ammonia: 3.47185e-10 kg; data quality (3,1,1,1,5)
- acetophenone: 8.1843e-13 kg; data quality (4,2,1,1,5)
- bis(2-chloroethyl)ether: 3.55316e-17 kg; data quality (3,2,1,1,5)
- Benzo(a)anthracene: 8.71825e-15 kg; data quality (2,2,1,1,5)
- Dinitrogen monoxide: 9.38356e-8 kg; data quality (4,2,1,4,1)
- carbonyl sulfide: 1.06263e-11 kg; data quality (4,2,1,1,5)
- BUTYL ISOCYANATE: 1.31034e-10 kg; data quality (4,2,1,1,5)
- 2,4-D: 1.64579e-10 kg; data quality (3,2,1,1,5)
- methanol: 1.1189e-9 kg; data quality (4,2,1,1,5)
- Ethylene glycol monoethyl ether: 1.98123e-11 kg; data quality (4,2,1,1,5)
- chlorine: 5.56128e-9 kg; data quality (4,2,1,1,5)
- bromoform: 2.11749e-12 kg; data quality (3,2,1,1,5)
- 1,1,2,2-tetrachloroethane: 5.82082e-11 kg; data quality (3,2,1,1,5)
- Ethylene glycol: 4.59605e-9 kg; data quality (5,1,1,1,5)
- methane, bromo-, halon 1001: 2.19775e-10 kg; data quality (3,2,1,1,5)
- Toluene, 2,4-dinitro-: 2.7235e-13 kg; data quality (5,1,1,1,5)
- Propane, 1,1,1,3,3,3-hexafluoro-, HCFC-236fa: 1.12093e-10 kg; data quality (4,2,1,4,1)
- Propene, 1,3-dichloro-: 1.07482e-11 kg; data quality (3,2,1,1,5)
- para-xylene: 9.03261e-10 kg; data quality (3,2,1,4,1)
- 1-METHYLNAPTHALENE: 4.05535e-14 kg; data quality (2,2,1,1,5)
- benzo(a)pyrene: 3.58632e-11 kg; data quality (3,2,1,4,1)
- phenol: 1.6341e-12 kg; data quality (3,1,1,1,5)
- lead: 5.09582e-9 kg; data quality (3,2,1,1,5)
- beryllium: 5.10722e-12 kg; data quality (2,2,1,1,5)
- polychlorinated biphenyls: 2.918e-17 kg; data quality (3,2,1,1,5)
- trichloroethylene: 3.3141e-9 kg; data quality (4,2,1,1,5)
- acetonitrile: 3.50454e-11 kg; data quality (3,2,1,1,5)
- Phosphorus: 1.34813e-10 kg; data quality (4,1,1,1,5)
- carbon tetrachloride: 1.64124e-10 kg; data quality (4,2,1,1,5)
- Carbon dioxide: 0.0321447 kg; data quality (4,2,1,4,1)
- PYRENE, 1-NITRO-: 1.90711e-15 kg; data quality (2,2,1,1,5)
- Nitrogen: 6.85796e-7 kg; data quality (4,2,1,1,5)
- propylene oxide: 9.78556e-12 kg; data quality (3,2,1,1,5)
- Asbestos: 3.28273e-13 kg; data quality (5,2,1,1,5)
- acetamide: 2.65161e-14 kg; data quality (5,2,1,1,5)
- butanol: 1.09798e-8 kg; data quality (5,1,1,1,5)
- carbon disulfide: 2.91828e-11 kg; data quality (4,2,1,1,5)
- isophorone: 9.13113e-11 kg; data quality (2,2,1,1,5)
- 2,2,4-trimethylpentane: 4.73997e-7 kg; data quality (3,2,1,4,1)
- 2-chloro-1-phenylethanone: 3.76366e-13 kg; data quality (2,2,1,1,5)
- Urethane: 1.55058e-14 kg; data quality (5,2,1,1,5)
- p-phenylenediamine: 2.65161e-12 kg; data quality (5,2,1,1,5)
- hexachloroethane: 1.3258e-13 kg; data quality (4,2,1,1,5)
- hydrogen fluoride: 3.79633e-9 kg; data quality (2,2,1,1,5)
- Benzo(g,h,i)perylene: 1.11933e-10 kg; data quality (3,2,1,4,1)
- vinyl acetate: 6.44469e-12 kg; data quality (4,2,1,1,5)
- Propane sultone: 2.65161e-14 kg; data quality (5,2,1,1,5)
- 1,2,4-trimethylbenzene: 1.03765e-10 kg; data quality (5,1,1,1,5)
- particulates, < 2.5 um: 2.79703e-6 kg; data quality (3,2,1,3,2)
- acrylonitrile: 1.45552e-10 kg; data quality (4,2,1,1,5)
- VOC, volatile organic compounds: 2.35922e-5 kg; data quality (3,2,1,1,1)
- 2-nitropropane: 6.26575e-18 kg; data quality (5,2,1,1,5)
- benzyl chloride: 3.76364e-11 kg; data quality (2,2,1,1,5)
- hydroquinone: 4.12632e-11 kg; data quality (3,2,1,1,5)
- Ethane, 1,1,1,2-tetrafluoro-, HFC-134a: 3.65517e-8 kg; data quality (4,2,1,4,1)
- ethylene glycol: 4.01129e-9 kg; data quality (5,2,1,1,5)
- Propoxur: 2.65161e-14 kg; data quality (5,2,1,1,5)
- acenaphthene: 3.29802e-10 kg; data quality (3,2,1,4,1)
- dimethyl formamide: 6.49222e-10 kg; data quality (4,2,1,1,5)
- Diethylene glycol butyl ether: 5.28402e-10 kg; data quality (4,2,1,1,5)
- ethene, tetrachloro-: 3.08784e-9 kg; data quality (3,2,1,1,5)
- benz[a]anthracene: 8.70888e-11 kg; data quality (2,2,1,2,3)
- sulfur dioxide: 3.00383e-6 kg; data quality (2,2,1,1,5)
- chloroform: 5.80558e-10 kg; data quality (4,2,1,1,5)
- Hydrazine, methyl-: 8.30981e-12 kg; data quality (2,2,1,1,5)
- t-butyl methyl ether: 3.96964e-9 kg; data quality (3,2,1,1,5)
- acrolein: 1.83367e-8 kg; data quality (3,2,1,4,1)
- benzene: 8.53683e-7 kg; data quality (3,2,1,4,1)
- formaldehyde: 4.70584e-7 kg; data quality (3,2,1,4,1)
- cyclohexane: 1.36175e-13 kg; data quality (4,1,1,1,5)
- PHOSPHORUS: 1.51126e-9 kg; data quality (2,2,1,1,5)
- Phthalate, dimethyl-: 8.79225e-12 kg; data quality (4,2,1,1,5)
- 2-Acetylaminofluorene: 2.65161e-12 kg; data quality (5,2,1,1,5)
- pentachlorophenol: 1.65313e-16 kg; data quality (3,2,1,1,5)
- Chrysene: 4.73445e-11 kg; data quality (3,2,1,3,2)
- 4-nitrophenol: 1.86441e-14 kg; data quality (2,2,1,1,5)
- manganese: 8.67446e-10 kg; data quality (3,2,1,1,5)
- 2-(2-BUTOXYETHOXY) ETHYL ACETATE: 5.84954e-11 kg; data quality (5,2,1,1,5)
- Sulfuric acid: 2.06339e-8 kg; data quality (2,1,1,1,5)
- 1,2-BUTYLENE OXIDE: 1.56365e-11 kg; data quality (4,2,1,1,5)
- chlorine: 1.96092e-11 kg; data quality (2,1,1,1,5)
- aniline: 3.50012e-15 kg; data quality (4,2,1,1,5)

## Inventory method
Input-output

## Modelling constants
The reference unit of all processes is 1 USD2013 of the good or service. The technosphere inputs are based on the US BEA detailed input-output tables for 2007. The IO tables are combined to develop a commodity-by-commodity model based on the the industry-technology assumption (see Suh et al., 2010), which assumes all commodities produced by a given industry have the same input structure, but that multiple industries can produce the same commodity. Thus, model technosphere flows represent commodity outputs (and not industry outputs) from other processes in the model. There are no by-products included in these processes. All commodity production is based on US-conditions, despite in reality that some goods and services are produced overseas, as USEEIO v1.1 is a single-region IO model.

## Completeness
The input-output approach assures that all purchased inputs associated with the sectors making these commodities as reported in the US census for 2007 are included. The direct resources extracted including minerals, energy sources, water and land occupied are included. Emissions to air include all critieria air pollutants, greenhouse gases, and hazardous and toxic air pollutants as defined by US EPA. Releases to water include toxics, total nitrogen and total phosphorus, and water discharges. Releases to soil or groundwater include toxics and agriculutural pesticides. Some metal releases to air, water and soil are not included because they could not be speciated. Solid hazardous and non-hazardous wastes generated are not included as an elementary flows although purchases of waste services are included.

## Data treatment
Greenhouse gases are primarily from the US Greenhouse Gas Emission Inventory (USEPA 2016a). Biogenic C uptake is not included (change from version 1.0), as biogenic C emission are not included. Toxic releases to air, water and soil (except pesticides) are from the 2013 Toxic Release Inventory (USEPA 2015a). Criteria air pollutants and hazardous air pollutants are from the 2011 National Emissions Inventory (USEPA 2015b). All estimates are normalized by industry based on sector output in the data year, then converted to 2013 USD using relative sector-specific CPIs (if data year is not 2013). Energy use represent raw renewables or fossil fuel energies and is based on EIA data for 2014. See Table 1 in Yang, Ingwersen et al. 2017 and Supporting Information 1, and the v1.1 data update notes (Ingwersen et al. 2017) for all details on environmental data sources used.Land occupation for commercial buildings was estimated based on the building floorspace data provided by the U.S. Energy Information Administration 2012 Commercial Building Energy Consumption Survey (CBECS) (EIA 2015). Total commercial public supply water use is reported by USGS (Maupin et al. 2014). Water use is allocated across commercial sectors based on their use of water, sewage, and other services in USD based on the 2007 Benchmark Use Table before redefinitions (BEA 2015).

## Data collection
2015-2016

## Sampling procedure
US federal government sources, including surveys and US EPA emissions databases are used as the primary sources. From these sources, data for US reporting establishments/facilities are aggregated by the NAICS sector as defined in the BEA detailed 2007 input-output tables. When level of sector aggregation differs, or when direct emissions are not reported but modeled, additional sources are used to make allocations and estimates.

## Review details
In regard to quality assurance and peer-review, each dataset created went through Quality Assurance as defined in a quality assurance project plans at US EPA, CSRA or ERG. The model was assembled with the IO model builder model (USEPA 2016c). Validation functions were used to check that all the model components were properly assembled and harmonized. Bayou Demeke and Santosh Ghimire provided internal peer review of the model methodology and the manuscript underwent standard EPA management review. An editor and two anonymous reviewers at the Journal of Cleaner Production reviewed the model. In regard to data quality evaluation, data quality assessment was performed at the flow and process levels according to the updated US EPA data quality assessment guidelines as defined in US EPA (2016b).

## Intended application
The primary application is for use in the US Environmentally-Extended Input-Ouput model, USEEIO, version 1.1. This model is being used by the US EPA for supporting tools that prioritize goods and services based on potential environmental impacts, resource use or emissions for large regions, including the US and US states, and as a strealined tool for organizations as a starting point to consider sustainable materials management. Model results are designed to provide meso/macro-level decision support.

## Project
USEEIO v1.1 was developed by the US EPA with CSRA and ERG with Wesley W. Ingwersen and David E. Meyer as research leads. Yi Yang was the technical lead on the work for CSRA (contract EP-C-15-012); Troy Hawkins was lead for ERG (contract EP-C-12-021).
