# Greenhouse crops, mushrooms, nurseries, and flowers; at farm

Dataset: openLCA process, unit process
Category: 1114: Greenhouse, Nursery, and Floriculture Production
Geography: United States
Time period: 2017-01-01 to 2017-12-31
Data quality: US EPA - Process Pedigree Matrix (1;1)
Exchange data quality scheme: US EPA - Flow Pedigree Matrix
Generated by: US EPA with CSRA and ERG
Owner: US EPA
Published in: Yang, Ingwersen et al. 2017
restrictionsDescription: This model shold be appropriately cited (see Yang, Ingwersen et al. 2017 source or Publication field) when used. Any changes or derivations of this model by the user should be documented. The model itself and any results from use of this model shall not be construed to consitute US EPA opinion or policy.
copyright: false

## General comment
BEA Code & Name is '111400:Greenhouse, nursery, and floriculture production'. Description of the primary industry producing this good or service, adapted from the Census Bureau NAICS 2007 descriptions: This industry group comprises establishments primarily engaged in growing crops of any kind under cover and/or growing nursery stock and flowers. "Under cover" is generally defined as greenhouses, cold frames, cloth houses, and lath houses. The crops grown are removed at various stages of maturity and have annual and perennial life cycles. The nursery stock includes short rotation woody crops that have growth cycles of 10 years or less.

## Technology
The process describes the average US production of this good or service within this NAICS-based grouping defined in the BEA 2007 detailed input-output tables (BEA 2015). Distribution, wholesale and retailing of this good or service, use, and final disposal are not included. Creation of a product system with this process will enable modeling of all upstream (supply-chain) activities.

## Geography
Data represent the 50 US states

## Time period
2017 was the year in which this version of USEEIO was released and is the target date for the model

## Reference product
- Greenhouse crops, mushrooms, nurseries, and flowers; at farm: 1 USD

## Inputs from technosphere
All rows: data quality (1,3,1,1,1)
- Gasoline, fuels, and by-products of petroleum refining; at manufacturer: 0.0453799 USD
- Rubber and plastic belts and hoses; at manufacturer: 0.000106603 USD
- Rubber tires; at manufacturer: 0.00111937 USD
- Performances: 5.33015e-5 USD
- Vehicle electrical and electronic equipment; at manufacturer: 0.000586316 USD
- Computer systems design: 0.000479912 USD
- Pipeline transport: 0.000426531 USD
- Truck transport: 0.0145627 USD
- Noncomparable imports: 9.56676e-7 USD
- Satellite, telecommunications resellers, and all other telecommunications: 0.000106643 USD
- Motor vehicle steering, suspension components (except spring), and brake systems; at manufacturer: 1.59446e-7 USD
- Waste management and remediation: 2.39169e-7 USD
- Metal hinges, keys, lock, and other hardware; at manufacturer: 3.98615e-8 USD
- Other real estate: 0.000854298 USD
- Cardboard containers; at manufacturer: 3.98615e-8 USD
- Lessors of nonfinancial intangible assets: 0.000639657 USD
- Gaskets, seals, musical instruments, fasteners, brooms, brushes, mop and other misc. goods; at manufacturer: 0.000266507 USD
- Other vehicle parts; at manufacturer: 0.000533134 USD
- Civic, social, professional, and similar organizations: 0.000426412 USD
- Vehicle engines and engine parts; at manufacturer: 0.000106722 USD
- Household goods repair: 1.11612e-6 USD
- Stationery; at manufacturer: 5.33015e-5 USD
- Timber and raw forest products; at forest: 0.000134413 USD
- Wholesale trade: 0.0380412 USD
- Drinking water and wastewater treatment; at consumer: 0.00101281 USD
- Storage batteries; at manufacturer: 0.000692919 USD
- Motors and generators; at manufacturer: 5.33015e-5 USD
- Power tools; at manufacturer: 0.000159904 USD
- Business support: 5.33413e-5 USD
- Colleges, universities, junior colleges, and professional schools: 0.000319809 USD
- Insurance agencies and brokerages: 0.000213365 USD
- Used and secondhand goods: -0.00245187 USD
- Metal pipe fittings, ball and roller bearings, industrial patterns, metal bath fixtures, other misc. fabricated metals; at manufacturer: 0.00037319 USD
- Welding and Soldering Equipment, Scales and Balances, and other general purpose machinery; at manufacturer: 0.000159904 USD
- Commercial machinery repair: 0.000697184 USD
- Other plastic products; at manufacturer: 0.0304884 USD
- Air transport: 0.000906165 USD
- Cattle ranches and feedlots: 0.000533015 USD
- Architectural, engineering, and related services: 4.18546e-6 USD
- Independent artists, writers, and performers: 2.39169e-7 USD
- Marketing research and all other miscellaneous professional, scientific, and technical services: 1.59446e-7 USD
- Natural gas; at consumer: 0.0103405 USD
- Fertilizers; at manufacturer: 0.017323 USD
- Vehicle rental and leasing: 0.00117279 USD
- Lumber and treated lumber; at manufacturer: 1.15997e-5 USD
- Other support services: 7.9723e-8 USD
- Postal service: 0.000106603 USD
- Insurance carriers: 0.00437128 USD
- Other animal food; at manufacturer: 1.19584e-6 USD
- Limited-service restaurants: 0.000533015 USD
- Coal; at mine: 7.9723e-8 USD
- Other textiles; at manufacturer: 5.33015e-5 USD
- Other retail: 0.000639657 USD
- Commercial equipment rental: 0.00266846 USD
- Sanitary paper (tissues, napkins, diapers, etc.); at manufacturer: 5.33015e-5 USD
- Buildings and dwellings services: 0.00202585 USD
- Veneer, plywood, and engineered wood; at manufacturer: 5.33015e-5 USD
- Warehousing: 0.00245187 USD
- Farm machinery and equipment; at manufacturer: 0.00427037 USD
- Water transport (boats, ships, ferries): 0.00186559 USD
- Animal farms and aquaculture ponds (except cattle and poultry): 0.000266946 USD
- Cutlery and handtools; at manufacturer: 0.00170565 USD
- Wireless telecommunications: 0.000586436 USD
- Securities and commodities brokerage and exchanges: 0.000160104 USD
- Plastic bags, films, and sheets; at manufacturer: 0.000906125 USD
- General merchandise stores: 5.33413e-5 USD
- Travel arrangement and reservation: 7.9723e-8 USD
- Advertising and public relations: 1.19584e-7 USD
- Magazines and journals; at publisher: 0.000213206 USD
- All other food and drinking places: 0.000213206 USD
- Sports: 0.000213206 USD
- Material handling equipment; at manufacturer: 0.000106762 USD
- Electricity; at consumer: 0.00186611 USD
- Books, newspapers, magazines, and other print media; at manufacturer: 0.000106643 USD
- Transmission and power train parts; at manufacturer: 7.9723e-8 USD
- Agriculture and forestry support: 0.0360986 USD
- Dimensional stone; at mine: 0.00117263 USD
- Vehicles and parts sales: 7.9723e-8 USD
- Software: 0.000106643 USD
- Rail transport: 0.000746938 USD
- Investment advice, portfolio management, and other financial advising services: 0.00037319 USD
- Chemicals (except basic chemicals, agrichemicals, polymers, paints, pharmaceuticals,soaps, cleaning compounds); at manufacturer: 0.000266507 USD
- Monetary authorities and depository credit intermediation: 0.00469172 USD
- State and local government enterprises: 1.19584e-7 USD
- Full-service restaurants: 5.33015e-5 USD
- Vehicle repair: 1.75391e-6 USD
- Environmental and other technical consulting services: 3.98615e-8 USD
- Other basic inorganic chemicals; at manufacturer: 0.000959426 USD
- Pesticides; at manufacturer: 0.00650298 USD
- Nonresidential building repair and maintanence: 0.0067698 USD
- Metal structural products; at manufacturer: 0.000319809 USD
- Accounting, tax preparation, bookkeeping, and payroll: 0.00250569 USD
- Electronic equipment repair and maintenance: 0.000161658 USD
- Other petroleum and coal products; at manufacturer: 3.98615e-8 USD
- Nondepository credit intermediation and related activities: 0.000640215 USD
- Other computer related services, including facilities management: 0.000853182 USD
- Legal services: 0.000533413 USD
- Telecommunications: 0.000320088 USD
- Golf courses, marinas, ski resorts, fitness and other rec centers and industries: 0.000213206 USD
- Secondary steel products; at manufacturer: 0.000159904 USD
- Greenhouse crops, mushrooms, nurseries, and flowers; at farm: 0.153935 USD
- Machine shops; at manufacturer: 5.33015e-5 USD

## Inputs from nature
- Occupation, agriculture + forest: 0.643862 m2*a; data quality (2,3,1,1,1)
- Occupation, urban, discontinuously built: 0.000609045 m2*a; data quality (4,2,1,1,1)
- Occupation, industrial area: 0.0168083 m2*a; data quality (2,3,1,1,1)
- Water, fresh: 0.0236882, 0.0231126 m3 (2 entries, compartments not in this file); data quality (4,3,1,4,2)
- Occupation, annual crop: 0.117864 m2*a; data quality (2,3,1,1,1)
- Occupation, forest: 0.0817893 m2*a; data quality (2,3,1,1,1)

## Emissions to nature
- CHLORONAPHTHALENE: 2.72606e-14 kg; data quality (1,2,1,1,5)
- hydrogen fluoride: 1.5036e-9 kg; data quality (2,2,1,1,5)
- nitrogen oxides: 0.00133334 kg; data quality (3,2,1,1,1)
- 2-methylnaphthalene: 3.47869e-12 kg; data quality (2,2,1,1,5)
- methanol: 5.30078e-10 kg; data quality (3,2,1,1,5)
- Benzo(a)anthracene: 5.5915e-13 kg; data quality (2,2,1,1,5)
- Quintozene: 2.12029e-10 kg; data quality (3,2,1,1,5)
- methyl isobutyl ketone: 4.66326e-7 kg; data quality (3,2,1,1,5)
- Chromium VI: 1.38585e-10 kg; data quality (3,2,1,2,4)
- Triethyl amine: 3.1805e-10 kg; data quality (3,2,1,1,5)
- manganese: 1.59649e-8 kg; data quality (3,2,1,1,5)
- Indeno(1,2,3-cd)pyrene: 2.79696e-9 kg; data quality (3,2,1,1,5)
- 4-nitrophenol: 2.46872e-12 kg; data quality (2,2,1,1,5)
- nickel: 1.25667e-9 kg; data quality (3,2,1,3,3)
- sulfur dioxide: 2.26468e-5 kg; data quality (3,2,1,1,5)
- phthalate, dioctyl-: 7.21316e-13 kg; data quality (3,2,1,1,5)
- ethene, tetrachloro-: 8.73616e-10 kg; data quality (3,2,1,1,5)
- hydrogen chloride: 3.42962e-7 kg; data quality (2,2,1,1,5)
- VOC, volatile organic compounds: 0.00130542 kg; data quality (3,2,1,1,5)
- antimony: 7.41903e-11 kg; data quality (3,2,1,1,5)
- dibenzofuran: 7.56233e-9 kg; data quality (3,2,1,1,5)
- Hydrocarbons, aromatic: 2.33368e-7 kg; data quality (3,2,1,4,1)
- methane, bromo-, halon 1001: 2.38482e-10 kg; data quality (3,2,1,1,5)
- fluoranthene: 1.31536e-8 kg; data quality (3,2,1,1,4)
- phenol: 1.29505e-7 kg; data quality (3,2,1,1,5)
- chloroform: 4.45108e-10 kg; data quality (4,2,1,1,5)
- cadmium: 1.92524e-10 kg; data quality (3,2,1,1,5)
- 2,2,4-trimethylpentane: 6.32369e-7 kg; data quality (3,2,1,4,1)
- ethane, 1,2-dichloro-: 4.61216e-10 kg; data quality (3,2,1,1,5)
- acetaldehyde: 8.3925e-6 kg; data quality (3,2,1,3,2)
- beryllium: 1.10601e-11 kg; data quality (2,2,1,1,5)
- benzene, chloro-: 1.04685e-7 kg; data quality (3,2,1,1,5)
- styrene: 2.26217e-7 kg; data quality (3,2,1,2,4)
- pentachlorophenol: 7.82905e-13 kg; data quality (3,2,1,1,5)
- mercury: 1.01276e-10 kg; data quality (2,2,1,2,4)
- o-Xylene: 9.15511e-8 kg; data quality (3,2,1,4,1)
- naphthalene: 1.89388e-7 kg; data quality (3,2,1,3,2)
- 2,3,4'-TRICHLOROBIPHENYL: 5.25482e-15 kg; data quality (2,2,1,1,5)
- lead: 2.23162e-9 kg; data quality (3,2,1,1,5)
- benzo(a)pyrene: 4.23908e-9 kg; data quality (3,2,1,1,5)
- Carbon dioxide: 0.525182 kg; data quality (4,2,1,4,1)
- ethane, 1,2-dibromo-: 1.11097e-10 kg; data quality (2,2,1,1,5)
- Water, fresh: 0.00957806 m3; data quality (4,3,1,1,2)
- chlorine: 1.11171e-8 kg; data quality (4,2,1,1,5)
- methane, monochloro-, r-40: 4.38605e-9 kg; data quality (3,2,1,1,5)
- acetophenone: 4.91205e-14 kg; data quality (4,2,1,1,5)
- 2,4,5,2',5'-PENTACHLOROBIPHENYL: 9.26292e-15 kg; data quality (2,2,1,1,5)
- trichloroethylene: 4.76972e-10 kg; data quality (4,2,1,1,5)
- benzene: 4.46779e-6 kg; data quality (3,2,1,3,2)
- 2,4,6-trichlorophenol: 2.00319e-13 kg; data quality (2,2,1,1,5)
- acenaphthene: 1.08892e-8 kg; data quality (3,2,1,4,1)
- acrolein: 8.1773e-7 kg; data quality (3,2,1,2,3)
- m-xylene: 2.04074e-7 kg; data quality (3,2,1,4,1)
- benzene, ethyl-: 7.75772e-7 kg; data quality (3,2,1,4,1)
- 3-methylcholanthrene: 6.29044e-14 kg; data quality (2,2,1,1,5)
- selenium: 2.88367e-11 kg; data quality (2,2,1,1,5)
- fluorene: 1.11785e-8 kg; data quality (3,2,1,4,1)
- Cobalt: 7.69411e-11 kg; data quality (3,2,1,1,5)
- Ethene, chloro-: 2.86186e-10 kg; data quality (3,2,1,1,5)
- carbon tetrachloride: 7.15388e-10 kg; data quality (4,2,1,1,5)
- CARBAZOLE: 1.41238e-12 kg; data quality (2,2,1,1,5)
- Dinitrogen monoxide: 0.000639583 kg; data quality (4,2,1,4,1)
- 2,4-dinitrophenol: 3.7914e-12 kg; data quality (5,2,1,1,5)
- arsenic: 4.79351e-9 kg; data quality (3,2,1,4,2)
- 1,1,1-trichloroethane: 4.75878e-10 kg; data quality (4,2,1,1,5)
- PHOSPHORUS: 2.84289e-10 kg; data quality (2,2,1,1,5)
- benz[a]anthracene: 5.6293e-9 kg; data quality (3,2,1,1,5)
- pyrene: 1.04122e-8 kg; data quality (3,2,1,1,5)
- 1,4-dichlorobenzene: 2.8467e-8 kg; data quality (3,2,1,1,5)
- particulates, < 10 um: 3.56092e-6 kg; data quality (3,2,1,4,1)
- isophorone: 6.51227e-10 kg; data quality (3,2,1,1,5)
- propanal: 1.32723e-6 kg; data quality (3,2,1,4,1)
- butadiene: 8.53016e-7 kg; data quality (3,2,1,2,3)
- Benzo(b)fluoranthene: 9.07732e-11 kg; data quality (3,2,1,4,1)
- Propane, 1,2-dichloro-: 5.24618e-10 kg; data quality (4,2,1,1,5)
- Benzo(k)fluoranthene: 2.83394e-9 kg; data quality (3,2,1,1,5)
- para-xylene: 1.84379e-8 kg; data quality (3,2,1,4,1)
- toluene: 3.78478e-6 kg; data quality (3,2,1,3,2)
- acenaphthylene: 1.02198e-8 kg; data quality (3,2,1,4,1)
- Methane: 2.32949e-5 kg; data quality (4,2,1,4,1)
- Dibenz(a,h)anthracene: 7.57327e-13 kg; data quality (3,2,1,3,3)
- formaldehyde: 1.86674e-5 kg; data quality (3,2,1,3,2)
- hexane: 6.21183e-7 kg; data quality (3,2,1,3,2)
- methane, dichloro-, hcc-30: 4.61056e-9 kg; data quality (4,2,1,1,5)
- particulates, < 2.5 um: 0.000126923 kg; data quality (3,2,1,3,2)
- ammonia: 2.48301e-6 kg; data quality (3,2,1,3,3)
- carbon monoxide: 0.00143014 kg; data quality (3,2,1,1,2)
- Xylene: 2.29319e-6 kg; data quality (3,2,1,4,1)
- Chromium, ion: 3.59426e-10 kg; data quality (2,2,1,2,4)
- phenanthrene: 4.21137e-8 kg; data quality (3,2,1,3,2)
- Chrysene: 5.7546e-9 kg; data quality (3,2,1,1,5)
- anthracene: 5.80644e-9 kg; data quality (3,2,1,1,5)
- PCB-1: 4.44433e-16 kg; data quality (2,2,1,1,5)
- Nitrogen: 2.53675e-7 kg; data quality (2,2,1,1,5)
- Phosphorus: 5.25878e-9 kg; data quality (2,1,1,1,5)
- Benzo(g,h,i)perylene: 5.63114e-9 kg; data quality (3,2,1,1,5)
- cumene: 1.49006e-8 kg; data quality (3,2,1,1,5)

## Inventory method
Input-output

## Modelling constants
The reference unit of all processes is 1 USD2013 of the good or service. The technosphere inputs are based on the US BEA detailed input-output tables for 2007. The IO tables are combined to develop a commodity-by-commodity model based on the the industry-technology assumption (see Suh et al., 2010), which assumes all commodities produced by a given industry have the same input structure, but that multiple industries can produce the same commodity. Thus, model technosphere flows represent commodity outputs (and not industry outputs) from other processes in the model. There are no by-products included in these processes. All commodity production is based on US-conditions, despite in reality that some goods and services are produced overseas, as USEEIO v1.1 is a single-region IO model.

## Completeness
The input-output approach assures that all purchased inputs associated with the sectors making these commodities as reported in the US census for 2007 are included. The direct resources extracted including minerals, energy sources, water and land occupied are included. Emissions to air include all critieria air pollutants, greenhouse gases, and hazardous and toxic air pollutants as defined by US EPA. Releases to water include toxics, total nitrogen and total phosphorus, and water discharges. Releases to soil or groundwater include toxics and agriculutural pesticides. Some metal releases to air, water and soil are not included because they could not be speciated. Solid hazardous and non-hazardous wastes generated are not included as an elementary flows although purchases of waste services are included.

## Data treatment
Greenhouse gases are primarily from the US Greenhouse Gas Emission Inventory (USEPA 2016a). Biogenic C uptake is not included (change from version 1.0), as biogenic C emission are not included. Toxic releases to air, water and soil (except pesticides) are from the 2013 Toxic Release Inventory (USEPA 2015a). Criteria air pollutants and hazardous air pollutants are from the 2011 National Emissions Inventory (USEPA 2015b). All estimates are normalized by industry based on sector output in the data year, then converted to 2013 USD using relative sector-specific CPIs (if data year is not 2013). Energy use represent raw renewables or fossil fuel energies and is based on EIA data for 2014. See Table 1 in Yang, Ingwersen et al. 2017 and Supporting Information 1, and the v1.1 data update notes (Ingwersen et al. 2017) for all details on environmental data sources used.

## Data collection
2015-2016

## Sampling procedure
US federal government sources, including surveys and US EPA emissions databases are used as the primary sources. From these sources, data for US reporting establishments/facilities are aggregated by the NAICS sector as defined in the BEA detailed 2007 input-output tables. When level of sector aggregation differs, or when direct emissions are not reported but modeled, additional sources are used to make allocations and estimates.

## Review details
In regard to quality assurance and peer-review, each dataset created went through Quality Assurance as defined in a quality assurance project plans at US EPA, CSRA or ERG. The model was assembled with the IO model builder model (USEPA 2016c). Validation functions were used to check that all the model components were properly assembled and harmonized. Bayou Demeke and Santosh Ghimire provided internal peer review of the model methodology and the manuscript underwent standard EPA management review. An editor and two anonymous reviewers at the Journal of Cleaner Production reviewed the model. In regard to data quality evaluation, data quality assessment was performed at the flow and process levels according to the updated US EPA data quality assessment guidelines as defined in US EPA (2016b).

## Intended application
The primary application is for use in the US Environmentally-Extended Input-Ouput model, USEEIO, version 1.1. This model is being used by the US EPA for supporting tools that prioritize goods and services based on potential environmental impacts, resource use or emissions for large regions, including the US and US states, and as a strealined tool for organizations as a starting point to consider sustainable materials management. Model results are designed to provide meso/macro-level decision support.

## Project
USEEIO v1.1 was developed by the US EPA with CSRA and ERG with Wesley W. Ingwersen and David E. Meyer as research leads. Yi Yang was the technical lead on the work for CSRA (contract EP-C-15-012); Troy Hawkins was lead for ERG (contract EP-C-12-021).

## Sources
- Goebes et al. 2003
- Edelen and Ingwersen 2017
- EIA 2015
- BLM 2008
- Torcellini et al. 2003
- USEPA 2015a
- USDA 2016
- EIA 2013
- Ingwersen et al. DRAFT
- Nickerson et al. 2011
- EIA 2017
- BEA 2015
- USDA 2006
- Lovelace 2009
- Ingwersen et al. 2017
- Macknick et al. 2011
- USDA 2014
- USDA 2009a
- USEPA 2015b
- USDA 2009b
- Yienger et al. 1995
- Blackhurst et al. 2010
- EIA 2016
- USEPA 2016a
- USEPA 2016b
- Statistics Canada 2010
- USEPA 2016c
- USGS 2016
- USGS 2015
- Maupin et al. 2014
- Kim et el. 2013
