# Household employees

Dataset: openLCA process, unit process
Category: 81: Other Services (except Public Administration)
Geography: United States
Time period: 2017-01-01 to 2017-12-31
Data quality: US EPA - Process Pedigree Matrix (1;2)
Exchange data quality scheme: US EPA - Flow Pedigree Matrix
Generated by: US EPA with CSRA and ERG
Owner: US EPA
Published in: Yang, Ingwersen et al. 2017
restrictionsDescription: This model shold be appropriately cited (see Yang, Ingwersen et al. 2017 source or Publication field) when used. Any changes or derivations of this model by the user should be documented. The model itself and any results from use of this model shall not be construed to consitute US EPA opinion or policy.
copyright: false

## General comment
BEA Code & Name is '814000:Private households'. Description of the primary industry producing this good or service, adapted from the Census Bureau NAICS 2007 descriptions: Industries in the Private Households subsector include private households that engage in employing workers on or about the premises in activities primarily concerned with the operation of the household. These private households may employ individuals, such as cooks, maids, butlers, and outside workers, such as gardeners, caretakers, and other maintenance workers.

## Technology
The process describes the average US production of this good or service within this NAICS-based grouping defined in the BEA 2007 detailed input-output tables (BEA 2015). Distribution, wholesale and retailing of this good or service, use, and final disposal are not included. Creation of a product system with this process will enable modeling of all upstream (supply-chain) activities.

## Geography
Data represent the 50 US states

## Time period
2017 was the year in which this version of USEEIO was released and is the target date for the model

## Reference product
- Household employees: 1 USD

## Inputs from nature
- Occupation, urban, discontinuously built: 0.000649653 m2*a; data quality (4,2,1,1,1)

## Emissions to nature
- styrene: 2.98471e-15 kg; data quality (4,2,1,1,5)
- methanol: 7.67498e-13 kg; data quality (4,2,1,1,5)
- ethane, 1,2-dichloro-: 2.82482e-15 kg; data quality (3,2,1,1,5)
- ethane, 1,2-dibromo-: 5.32984e-15 kg; data quality (2,2,1,1,5)
- benzene, ethyl-: 6.20927e-15 kg; data quality (4,2,1,1,5)
- particulates, < 2.5 um: 1.53846e-10 kg; data quality (3,2,1,1,5)
- Propane, 1,2-dichloro-: 3.25121e-15 kg; data quality (4,2,1,1,5)
- Hydrocarbons, aromatic: 3.54435e-14 kg; data quality (4,2,1,1,5)
- VOC, volatile organic compounds: 2.3776e-10 kg; data quality (3,2,1,1,5)
- acrolein: 6.58236e-13 kg; data quality (2,2,1,1,5)
- acetaldehyde: 6.9821e-13 kg; data quality (3,2,1,1,5)
- Phosphorus: 2.16596e-8 kg; data quality (2,1,1,1,5)
- Ethene, chloro-: 1.79882e-15 kg; data quality (3,2,1,1,5)
- nickel: 7.99477e-14 kg; data quality (3,2,1,1,5)
- benzene, chloro-: 3.22456e-15 kg; data quality (4,2,1,1,5)
- ethane, 1,1,2-trichloro-: 3.83749e-15 kg; data quality (4,2,1,1,5)
- Nitrogen: 7.96604e-8 kg; data quality (3,2,1,1,5)
- formaldehyde: 5.35649e-12 kg; data quality (2,2,1,1,5)
- 1,1,2,2-tetrachloroethane: 6.34251e-15 kg; data quality (3,2,1,1,5)
- benzene: 3.0087e-12 kg; data quality (3,2,1,1,5)
- carbon monoxide: 2.23225e-9 kg; data quality (2,2,1,1,5)
- benzo(a)pyrene: 4.60307e-18 kg; data quality (2,2,1,1,5)
- benz[a]anthracene: 1.20216e-15 kg; data quality (2,2,1,1,5)
- sulfur dioxide: 1.03932e-12 kg; data quality (2,2,1,1,5)
- toluene: 1.39908e-13 kg; data quality (4,2,1,1,5)
- methane, dichloro-, hcc-30: 1.03132e-14 kg; data quality (4,2,1,1,5)
- nitrogen oxides: 3.53155e-9 kg; data quality (2,2,1,1,5)
- Chrysene: 1.9887e-16 kg; data quality (2,2,1,1,5)
- particulates, < 10 um: 1.33475e-12 kg; data quality (3,2,1,1,5)
- chloroform: 3.43775e-15 kg; data quality (4,2,1,1,5)
- carbon tetrachloride: 4.42377e-15 kg; data quality (4,2,1,1,5)
- Xylene: 4.87681e-14 kg; data quality (4,2,1,1,5)
- naphthalene: 2.43307e-14 kg; data quality (3,2,1,1,5)
- fluoranthene: 5.67564e-15 kg; data quality (2,2,1,1,5)
- butadiene: 1.66025e-13 kg; data quality (2,2,1,1,5)

## Inventory method
Input-output

## Modelling constants
The reference unit of all processes is 1 USD2013 of the good or service. The technosphere inputs are based on the US BEA detailed input-output tables for 2007. The IO tables are combined to develop a commodity-by-commodity model based on the the industry-technology assumption (see Suh et al., 2010), which assumes all commodities produced by a given industry have the same input structure, but that multiple industries can produce the same commodity. Thus, model technosphere flows represent commodity outputs (and not industry outputs) from other processes in the model. There are no by-products included in these processes. All commodity production is based on US-conditions, despite in reality that some goods and services are produced overseas, as USEEIO v1.1 is a single-region IO model.

## Completeness
The input-output approach assures that all purchased inputs associated with the sectors making these commodities as reported in the US census for 2007 are included. The direct resources extracted including minerals, energy sources, water and land occupied are included. Emissions to air include all critieria air pollutants, greenhouse gases, and hazardous and toxic air pollutants as defined by US EPA. Releases to water include toxics, total nitrogen and total phosphorus, and water discharges. Releases to soil or groundwater include toxics and agriculutural pesticides. Some metal releases to air, water and soil are not included because they could not be speciated. Solid hazardous and non-hazardous wastes generated are not included as an elementary flows although purchases of waste services are included.

## Data treatment
Greenhouse gases are primarily from the US Greenhouse Gas Emission Inventory (USEPA 2016a). Biogenic C uptake is not included (change from version 1.0), as biogenic C emission are not included. Toxic releases to air, water and soil (except pesticides) are from the 2013 Toxic Release Inventory (USEPA 2015a). Criteria air pollutants and hazardous air pollutants are from the 2011 National Emissions Inventory (USEPA 2015b). All estimates are normalized by industry based on sector output in the data year, then converted to 2013 USD using relative sector-specific CPIs (if data year is not 2013). Energy use represent raw renewables or fossil fuel energies and is based on EIA data for 2014. See Table 1 in Yang, Ingwersen et al. 2017 and Supporting Information 1, and the v1.1 data update notes (Ingwersen et al. 2017) for all details on environmental data sources used.Land occupation for commercial buildings was estimated based on the building floorspace data provided by the U.S. Energy Information Administration 2012 Commercial Building Energy Consumption Survey (CBECS) (EIA 2015). Total commercial public supply water use is reported by USGS (Maupin et al. 2014). Water use is allocated across commercial sectors based on their use of water, sewage, and other services in USD based on the 2007 Benchmark Use Table before redefinitions (BEA 2015).

## Data collection
2015-2016

## Sampling procedure
US federal government sources, including surveys and US EPA emissions databases are used as the primary sources. From these sources, data for US reporting establishments/facilities are aggregated by the NAICS sector as defined in the BEA detailed 2007 input-output tables. When level of sector aggregation differs, or when direct emissions are not reported but modeled, additional sources are used to make allocations and estimates.

## Review details
In regard to quality assurance and peer-review, each dataset created went through Quality Assurance as defined in a quality assurance project plans at US EPA, CSRA or ERG. The model was assembled with the IO model builder model (USEPA 2016c). Validation functions were used to check that all the model components were properly assembled and harmonized. Bayou Demeke and Santosh Ghimire provided internal peer review of the model methodology and the manuscript underwent standard EPA management review. An editor and two anonymous reviewers at the Journal of Cleaner Production reviewed the model. In regard to data quality evaluation, data quality assessment was performed at the flow and process levels according to the updated US EPA data quality assessment guidelines as defined in US EPA (2016b).

## Intended application
The primary application is for use in the US Environmentally-Extended Input-Ouput model, USEEIO, version 1.1. This model is being used by the US EPA for supporting tools that prioritize goods and services based on potential environmental impacts, resource use or emissions for large regions, including the US and US states, and as a strealined tool for organizations as a starting point to consider sustainable materials management. Model results are designed to provide meso/macro-level decision support.

## Project
USEEIO v1.1 was developed by the US EPA with CSRA and ERG with Wesley W. Ingwersen and David E. Meyer as research leads. Yi Yang was the technical lead on the work for CSRA (contract EP-C-15-012); Troy Hawkins was lead for ERG (contract EP-C-12-021).

## Sources
- USDA 2009b
- Kim et el. 2013
- USEPA 2016a
- EIA 2013
- BEA 2015
- Lovelace 2009
- EIA 2015
- Yienger et al. 1995
- Maupin et al. 2014
- Ingwersen et al. 2017
- USDA 2016
- USEPA 2016b
- USDA 2014
- Ingwersen et al. DRAFT
- USGS 2015
- USEPA 2015b
- USDA 2006
- Macknick et al. 2011
- Statistics Canada 2010
- USDA 2009a
- Edelen and Ingwersen 2017
- Blackhurst et al. 2010
- EIA 2017
- USEPA 2016c
- Torcellini et al. 2003
- BLM 2008
- Goebes et al. 2003
- USGS 2016
- USEPA 2015a
- EIA 2016
- Nickerson et al. 2011
