# Sanitary paper (tissues, napkins, diapers, etc.); at manufacturer

Dataset: openLCA process, unit process
Category: 3222: Converted Paper Product Manufacturing
Geography: United States
Time period: 2017-01-01 to 2017-12-31
Data quality: US EPA - Process Pedigree Matrix (1;1)
Exchange data quality scheme: US EPA - Flow Pedigree Matrix
Generated by: US EPA with CSRA and ERG
Owner: US EPA
Published in: Yang, Ingwersen et al. 2017
restrictionsDescription: This model shold be appropriately cited (see Yang, Ingwersen et al. 2017 source or Publication field) when used. Any changes or derivations of this model by the user should be documented. The model itself and any results from use of this model shall not be construed to consitute US EPA opinion or policy.
copyright: false

## General comment
BEA Code & Name is '322291:Sanitary paper product manufacturing'. Description of the primary industry producing this good or service, adapted from the Census Bureau NAICS 2007 descriptions: This U.S. industry comprises establishments primarily engaged in converting purchased sanitary paper stock or wadding into sanitary paper products, such as facial tissues, handkerchiefs, table napkins, toilet paper, towels, disposable diapers, sanitary napkins, and tampons.

## Technology
The process describes the average US production of this good or service within this NAICS-based grouping defined in the BEA 2007 detailed input-output tables (BEA 2015). Distribution, wholesale and retailing of this good or service, use, and final disposal are not included. Creation of a product system with this process will enable modeling of all upstream (supply-chain) activities.

## Geography
Data represent the 50 US states

## Time period
2017 was the year in which this version of USEEIO was released and is the target date for the model

## Reference product
- Sanitary paper (tissues, napkins, diapers, etc.); at manufacturer: 1 USD

## Inputs from technosphere
All rows: data quality (1,3,1,1,1)
- Noncomparable imports: 0.00320479 USD
- Household goods repair: 0.000379037 USD
- All other forging, stamping, and sintering; at manufacturer: 5.97753e-7 USD
- Vehicle engines and engine parts; at manufacturer: 2.57786e-5 USD
- Other computer related services, including facilities management: 0.000313379 USD
- Specialty transformers; at manufacturer: 2.73779e-6 USD
- Other basic organic chemicals; at manufacturer: 0.0106757 USD
- Independent artists, writers, and performers: 0.000230303 USD
- Relay and industrial controls; at manufacturer: 0.00219952 USD
- Other plastic products; at manufacturer: 0.00154193 USD
- Communications equipment; at manufacturer: 1.89175e-8 USD
- Printed circuit and electronic assembly; at manufacturer: 0.00268147 USD
- Custom metal rolls; at manufacturer: 2.03939e-6 USD
- Air and gas compressors; at manufacturer: 8.6467e-6 USD
- Primary iron, steel, and ferroalloy products; at manufacturer: 0.00014352 USD
- Data processing and hosting: 0.0014635 USD
- Wiring devices; at manufacturer: 6.84448e-7 USD
- Drinking water and wastewater treatment; at consumer: 0.000711382 USD
- Hotels and campgrounds: 0.000432039 USD
- Polystyrene foam products; at manufacturer: 1.40648e-7 USD
- Clothing; at manufacturer: 3.5162e-8 USD
- Computer systems design: 0.000643437 USD
- Plastic pipe, fittings, and sausage casings; at manufacturer: 0.000892528 USD
- Golf courses, marinas, ski resorts, fitness and other rec centers and industries: 9.69447e-5 USD
- Paper bags and coated paper; at manufacturer: 0.020804 USD
- Other support services: 0.000516961 USD
- Other retail: 0.000284375 USD
- Synthetic dyes and pigments; at manufacturer: 0.00188835 USD
- Cardboard containers; at manufacturer: 0.0179603 USD
- Other rubber products; at manufacturer: 0.000127673 USD
- Air transport: 0.00122763 USD
- Cardboard; at manufacturer: 0.00162764 USD
- Environmental and other technical consulting services: 0.000168223 USD
- Wood pulp; at manufacturer: 0.0641462 USD
- Telecommunications: 0.000971189 USD
- Compressed Gases; at manufacturer: 0.000276705 USD
- Rail transport: 0.00868203 USD
- Laminated plastic plates and shapes; at manufacturer: 0.000284077 USD
- Consumer goods and general rental centers: 9.81732e-5 USD
- Machine shops; at manufacturer: 0.00718679 USD
- Unrefined oil and gas; at extraction site: 7.79191e-5 USD
- Metal pipe fittings, ball and roller bearings, industrial patterns, metal bath fixtures, other misc. fabricated metals; at manufacturer: 0.0116012 USD
- Packaging machinery; at manufacturer: 7.04982e-5 USD
- Company and enterprise management: 0.0281232 USD
- Office administration: 7.1059e-5 USD
- Gaskets, seals, musical instruments, fasteners, brooms, brushes, mop and other misc. goods; at manufacturer: 2.73779e-6 USD
- Chemicals (except basic chemicals, agrichemicals, polymers, paints, pharmaceuticals,soaps, cleaning compounds); at manufacturer: 0.00236889 USD
- Copper, nickel, lead, and zinc; at mine: 1.87989e-5 USD
- Electronic capacitors, resistors, coils, transformers, connectors and other components (except semiconductors and printed circuit assemblies); at manufacturer: 0.000651056 USD
- Cutlery and handtools; at manufacturer: 0.000417538 USD
- Motor vehicle steering, suspension components (except spring), and brake systems; at manufacturer: 2.64652e-5 USD
- Welding and Soldering Equipment, Scales and Balances, and other general purpose machinery; at manufacturer: 8.57981e-6 USD
- State and local government enterprises: 0.000755108 USD
- Lumber and treated lumber; at manufacturer: 0.0107379 USD
- Light gauge metal cans, boxes, and containers; at manufacturer: 1.54934e-5 USD
- Sanitary paper (tissues, napkins, diapers, etc.); at manufacturer: 0.000216059 USD
- Analytical laboratory instruments; at manufacturer: 6.84448e-6 USD
- Natural gas; at consumer: 0.0238604 USD
- All other food and drinking places: 1.72718e-5 USD
- Investment advice, portfolio management, and other financial advising services: 0.000239712 USD
- Plastics; at manufacturer: 0.0173065 USD
- Accounting, tax preparation, bookkeeping, and payroll: 0.00142064 USD
- Packaged meat (except poultry); at manufacturer: 8.48716e-5 USD
- Promoters and agents: 7.09801e-5 USD
- Ball and roller bearings; at manufacturer: 2.2152e-6 USD
- Wireless telecommunications: 0.000304301 USD
- Advertising and public relations: 0.00288817 USD
- Adhesives; at manufacturer: 0.0120754 USD
- Iron, gold, silver, and other metal ores; at mine: 2.22108e-5 USD
- Pipeline transport: 6.22287e-5 USD
- Legal services: 0.00145177 USD
- Employment services: 0.000729696 USD
- Scientific research and development: 7.0991e-5 USD
- Warehousing: 0.0011689 USD
- Fresh soybeans, canola, flaxseeds, and other oilseeds; at farm: 6.68999e-8 USD
- Coal; at mine: 0.00664651 USD
- Plastic bottles; at manufacturer: 0.000519496 USD
- Nondepository credit intermediation and related activities: 0.0019213 USD
- Commercial machinery repair: 0.00204513 USD
- Vehicle rental and leasing: 0.000890765 USD
- Fiber, yarn, and thread; at manufacturer: 0.00117554 USD
- Truck transport: 0.0130456 USD
- Other real estate: 0.000405911 USD
- Water transport (boats, ships, ferries): 0.00055007 USD
- Wholesale trade: 0.0477357 USD
- Sand, gravel, clay, phosphate, other nonmetallic minerals; at mine: 0.00213223 USD
- Lids, jars, bottle caps, other metal closures and crowns; at manufacturer: 0.00362568 USD
- Satellite, telecommunications resellers, and all other telecommunications: 8.10453e-5 USD
- Asphalt shingles; at manufacturer: 2.23786e-6 USD
- Material handling equipment; at manufacturer: 0.000331926 USD
- Plastic bags, films, and sheets; at manufacturer: 0.0123068 USD
- Performances: 8.59872e-6 USD
- Other basic inorganic chemicals; at manufacturer: 0.0140752 USD
- Vehicle electrical and electronic equipment; at manufacturer: 6.01104e-5 USD
- Petrochemicals; at manufacturer: 0.000466204 USD
- Specialized design: 0.00100184 USD
- Ink and ink cartridges; at manufacturer: 0.000295678 USD
- All other converted paper products; at manufacturer: 0.0136038 USD
- Electronic equipment repair and maintenance: 0.000505203 USD
- Gasoline, fuels, and by-products of petroleum refining; at manufacturer: 0.00887665 USD
- Cutting and machine tool accessory, rolling mill, and other metalworking machines; at manufacturer: 0.000205004 USD
- Machinery for the paper, textile, food or other industries (except semiconductor machinery); at manufacturer: 0.00521277 USD
- Insurance agencies and brokerages: 0.000558296 USD
- Other nonmetallic mineral products; at manufacturer: 4.78137e-6 USD
- Marketing research and all other miscellaneous professional, scientific, and technical services: 0.000526536 USD
- Architectural, engineering, and related services: 0.0046472 USD
- Paints and coatings; at manufacturer: 0.000106276 USD
- Abrasive products; at manufacturer: 6.98351e-5 USD
- General merchandise stores: 4.07875e-5 USD
- Stationery; at manufacturer: 8.57981e-6 USD
- Paper; at manufacturer: 0.046299 USD
- Insurance carriers: 0.00149759 USD
- Limited-service restaurants: 0.00107066 USD
- Corn products; at manufacturer: 0.00320945 USD
- Buildings and dwellings services: 0.00398133 USD
- Heavy gauge metal tanks; at manufacturer: 2.75117e-5 USD
- Software: 1.00028e-5 USD
- Ground or treated minerals and earth; at manufacturer: 1.05889e-6 USD
- Fabric; at manufacturer: 0.043607 USD
- Nonresidential building repair and maintanence: 0.00282186 USD
- Securities and commodities brokerage and exchanges: 0.000151156 USD
- Industrial process variable instruments; at manufacturer: 3.43262e-5 USD
- Wireless communications; at manufacturer: 1.89175e-8 USD
- Computer terminals and other computer peripheral equipment; at manufacturer: 4.67109e-7 USD
- Other textiles; at manufacturer: 9.26425e-6 USD
- Lessors of nonfinancial intangible assets: 0.00504137 USD
- Food and beverage stores: 1.64619e-5 USD
- Commercial equipment rental: 0.000498842 USD
- Secondary steel products; at manufacturer: 5.7314e-6 USD
- Monetary authorities and depository credit intermediation: 0.0014775 USD
- Finished and coated fabric; at manufacturer: 0.00292076 USD
- Light bulbs; at manufacturer: 3.4574e-6 USD
- Vehicle repair: 0.00105839 USD
- Surgical appliance and supplies; at manufacturer: 1.09512e-5 USD
- Other petroleum and coal products; at manufacturer: 1.41886e-5 USD
- Magazines and journals; at publisher: 6.23036e-6 USD
- Civic, social, professional, and similar organizations: 0.000318752 USD
- Valve and fittings (except for plumbing); at manufacturer: 0.00197779 USD
- Full-service restaurants: 0.000682238 USD
- Aluminum products; at manufacturer: 4.85488e-6 USD
- Rubber tires; at manufacturer: 1.72233e-5 USD
- Passenger ground transport: 0.000220352 USD
- Dimensional stone; at mine: 2.83826e-7 USD
- Other vehicle parts; at manufacturer: 0.00089423 USD
- Sports: 1.72529e-5 USD
- Power boilers and heat exchangers; at manufacturer: 0.000311604 USD
- Facilities support: 0.000332797 USD
- Electricity; at consumer: 0.0149205 USD
- Timber and raw forest products; at forest: 0.018004 USD
- Springs and wires; at manufacturer: 0.000181905 USD
- Semiconductors; at manufacturer: 0.00657089 USD
- Screws, nuts, and bolts; at manufacturer: 0.00169997 USD
- Vehicles and parts sales: 0.000192034 USD
- Veneer, plywood, and engineered wood; at manufacturer: 0.00338184 USD
- Urethane and other foam products; at manufacturer: 1.05486e-7 USD
- Transmission and power train parts; at manufacturer: 9.73454e-5 USD
- Rubber and plastic belts and hoses; at manufacturer: 0.000581948 USD
- Refined vegetable, olive, and seed oils; at manufacturer: 6.84448e-7 USD
- Metal hinges, keys, lock, and other hardware; at manufacturer: 6.70759e-5 USD
- Scenic and sightseeing transportation and support activities for transportation: 5.51194e-7 USD
- Synthetic rubber and artificial and synthetic fibers; at manufacturer: 0.000168752 USD
- Soap and cleaning compounds; at manufacturer: 0.000330931 USD
- Fertilizers; at manufacturer: 3.68097e-7 USD
- Management consulting: 0.000681768 USD
- other miscellaneous electrical equipment and components; at manufacturer: 6.84448e-7 USD
- Metal coatings, engravings, and heat treatments; at manufacturer: 0.00753535 USD
- Lime and gypsum products; at manufacturer: 0.000549513 USD
- Metal structural products; at manufacturer: 2.88328e-6 USD
- Glass and glass products; at manufacturer: 0.000207158 USD
- Toiletries; at manufacturer: 0.000931534 USD
- Waste management and remediation: 0.00198849 USD
- Dry-cleaning and laundry: 8.62113e-6 USD
- Investigation and security: 0.000508497 USD
- Vegetable oils and by-products; at manufacturer: 0.000521011 USD
- Air conditioning, refrigeration, and warm air heating equipment; at manufacturer: 3.49777e-5 USD
- Business support: 0.00109669 USD

## Inputs from nature
- Energy, hydraulic potential: 0.0235746 MJ; data quality (3,1,1,1,1)
- Occupation, industrial area, built up: 0.000333374 m2*a; data quality (4,2,1,1,1)
- Occupation, industrial area: 0.00100012 m2*a; data quality (4,2,1,1,1)
- Water, fresh: 0.0075649, 0.0308726 m3 (2 entries, compartments not in this file); data quality (4,2,1,4,2)
- Occupation, urban, discontinuously built: 0.000115906 m2*a; data quality (4,2,1,1,1)
- Energy, biomass: 10.6959 MJ; data quality (3,1,1,1,1)
- Water, saline: 0.00247867 m3; data quality (4,2,1,4,2)

## Emissions to nature
- 1,4-BENZOQUINONE: 1.56345e-16 kg; data quality (3,2,1,1,4)
- barium: 4.55863e-10 kg; data quality (4,1,1,1,2)
- 1,1,1-trichloroethane: 1.34401e-7 kg; data quality (4,2,1,1,2)
- arsenic: 2.41866e-13 kg; data quality (2,1,1,1,5)
- 2-PHENYLPHENOL, SODIUM SALT: 6.7455e-15 kg; data quality (2,1,1,1,3)
- manganese: 2.04718e-9 kg; data quality (4,1,1,1,4)
- 2-(2-ETHOXYETHOXY) ETHYL ACETATE: 6.84468e-15 kg; data quality (5,2,1,1,4)
- CATECHOL: 5.00826e-11, 9.7018e-9 kg (2 entries, compartments not in this file); data quality (2,1,1,1,2)
- Propene, 1,3-dichloro-: 1.31582e-15 kg; data quality (3,2,1,1,1)
- TERT-BUTYL ALCOHOL: 7.70934e-11 kg; data quality (4,1,1,1,5)
- Nitrobenzene: 6.04159e-12 kg; data quality (4,2,1,1,3)
- hydrogen chloride: 3.37628e-5 kg; data quality (2,2,1,1,1)
- Methane, monochloro-, R-40: 3.99907e-12, 1.9994e-11 kg (2 entries, compartments not in this file); data quality (3,1,1,1,2)
- butadiene: 1.99782e-8 kg; data quality (2,2,1,2,1)
- Benzo(g,h,i)perylene: 1.37504e-10, 2.37235e-11 kg (2 entries, compartments not in this file); data quality (2,1,1,1,2)
- fluoranthene: 4.93406e-9 kg; data quality (2,2,1,1,1)
- CHLOROPRENE: 2.91533e-10 kg; data quality (2,2,1,1,1)
- Sulfuric acid: 1.01101e-5 kg; data quality (2,1,1,1,2)
- Ethylene glycol monoethyl ether: 1.80899e-7, 1.38609e-8 kg (2 entries, compartments not in this file); data quality (5,1,1,1,2)
- Propane, 1,1,1,3,3,3-hexafluoro-, HCFC-236fa: 8.6108e-11 kg; data quality (4,2,1,4,1)
- methylene diphenyl diisocyanate: 2.89808e-11 kg; data quality (4,2,1,1,5)
- C.I. DIRECT BLUE 218: 8.68648e-13 kg; data quality (5,1,1,1,4)
- CARBAZOLE: 8.77165e-11 kg; data quality (2,2,1,1,1)
- hydrogen sulfide: 4.10134e-6 kg; data quality (3,2,1,1,1)
- diisocyanates: 8.10221e-12 kg; data quality (4,1,1,1,5)
- Ethane, pentafluoro-, HFC-125: 7.44962e-9 kg; data quality (4,2,1,4,1)
- methane, chlorodifluoro-, hcfc-22: 2.09829e-10 kg; data quality (4,1,1,1,4)
- acetophenone: 3.31664e-7 kg; data quality (4,2,1,1,1)
- carbon disulfide: 3.33975e-7 kg; data quality (4,2,1,1,1)
- Benzoyl chloride: 5.01493e-13 kg; data quality (2,1,1,1,4)
- 4,4'-isopropylidenediphenol: 5.92122e-13 kg; data quality (4,1,1,1,5)
- methane, bromo-, halon 1001: 2.65331e-8 kg; data quality (3,2,1,1,1)
- styrene: 8.43133e-7 kg; data quality (4,2,1,1,1)
- Cresol: 1.88286e-6 kg; data quality (4,2,1,1,1)
- Phenol: 1.06136e-9 kg; data quality (3,1,1,1,2)
- dibenzofuran: 2.38858e-10 kg; data quality (4,2,1,1,1)
- phosgene: 1.25215e-11 kg; data quality (5,2,1,1,3)
- PHOSPHORUS: 1.22763e-7 kg; data quality (2,2,1,1,1)
- Dimethylamine: 6.69014e-12, 1.33803e-11 kg (2 entries, compartments not in this file); data quality (3,1,1,1,4)
- acenaphthene: 4.32276e-9 kg; data quality (3,2,1,1,1)
- chlorine: 1.55233e-8 kg; data quality (2,1,1,1,2)
- Benzo(a)anthracene: 3.34018e-13 kg; data quality (2,2,1,1,1)
- formaldehyde: 3.57258e-6 kg; data quality (2,2,1,1,1)
- 3,3'-DICHLOROBENZIDINE DIHYDROCHLORIDE: 3.74648e-14 kg; data quality (5,1,1,1,4)
- Dimethyl sulfate: 2.29381e-9 kg; data quality (3,2,1,1,1)
- pentachlorophenol: 3.70711e-10 kg; data quality (3,2,1,1,1)
- Cresol, o-: 6.7455e-15 kg; data quality (2,1,1,1,3)
- ethylbenzene: 9.19437e-10 kg; data quality (4,1,1,1,5)
- 1,2-DICHLOROBENZENE: 2.1272e-10 kg; data quality (5,1,1,1,4)
- formaldehyde: 2.76444e-7 kg; data quality (2,1,1,1,2)
- OCTACHLORONAPHTHALENE: 9.41971e-15, 1.47183e-17 kg (2 entries, compartments not in this file); data quality (5,1,1,1,4)
- monochloroethane: 1.10542e-9 kg; data quality (3,2,1,1,1)
- acetonitrile: 7.98147e-14 kg; data quality (3,2,1,1,5)
- phenanthrene: 1.26648e-8 kg; data quality (3,2,1,1,1)
- ethylene oxide: 3.9324e-10 kg; data quality (3,2,1,1,1)
- Phenanthrene: 1.91677e-13 kg; data quality (3,1,1,1,3)
- carbonyl sulfide: 3.9016e-7 kg; data quality (4,2,1,1,2)
- 2,4/2,6-toluenediisocyanate (mixture): 3.92083e-12 kg; data quality (1,1,1,1,5)
- methanol: 1.25823e-7, 5.70844e-6 kg (2 entries, compartments not in this file); data quality (3,1,1,1,2)
- butanol: 1.8049e-7 kg; data quality (5,1,1,1,2)
- DIMETHYLAMINOAZOBENZENE: 1.93225e-15 kg; data quality (5,2,1,1,5)
- 2,4,6-trichlorophenol: 1.62861e-11 kg; data quality (2,2,1,1,1)
- anthracene: 4.96208e-10 kg; data quality (3,2,1,1,1)
- chlorine: 6.17231e-7 kg; data quality (4,2,1,1,1)
- propanal: 8.11926e-7 kg; data quality (3,2,1,1,1)
- 1,2,4-trimethylbenzene: 7.3635e-9 kg; data quality (5,1,1,1,2)
- copper: 2.22613e-13, 6.8778e-15 kg (2 entries, compartments not in this file); data quality (4,1,1,1,3)
- Thiram: 2.15056e-11, 1.34275e-13, 7.18103e-12 kg (3 entries, compartments not in this file); data quality (4,1,1,1,5)
- NITROUS ACID: 9.67265e-11, 1.17827e-10 kg (2 entries, compartments not in this file); data quality (5,1,1,1,4)
- cyclohexane: 7.94192e-10 kg; data quality (4,1,1,1,5)
- Benzo(g,h,i)perylene: 6.28906e-10 kg; data quality (3,2,1,1,1)
- 2,4,5-trichlorophenol: 3.49663e-10 kg; data quality (2,2,1,1,1)
- t-butyl methyl ether: 1.83399e-10 kg; data quality (3,2,1,1,1)
- 1-METHYLNAPTHALENE: 6.17693e-14 kg; data quality (2,2,1,1,3)
- toluene: 5.43794e-6 kg; data quality (3,2,1,1,3)
- catechol: 1.98753e-11 kg; data quality (5,2,1,1,1)
- cadmium: 6.45515e-9 kg; data quality (3,2,1,1,1)
- Triethyl amine: 2.67392e-8 kg; data quality (4,2,1,1,3)
- manganese: 6.01699e-11 kg; data quality (4,1,1,1,3)
- sulfur dioxide: 0.00122957 kg; data quality (2,2,1,1,1)
- 1,4-dioxane: 3.05771e-10 kg; data quality (4,2,1,1,4)
- ozone: 3.56764e-10 kg; data quality (4,1,1,1,5)
- 1-Methyl-2-pyrrolidinone: 3.38254e-10 kg; data quality (5,1,1,1,5)
- Hexachlorocyclopentadiene: 9.39343e-8 kg; data quality (3,2,1,1,1)
- Creosol: 7.76609e-12, 1.9466e-9, 8.79512e-14 kg (3 entries, compartments not in this file); data quality (5,1,1,1,5)
- Dimethoxy methane: 2.80595e-10 kg; data quality (2,2,1,1,1)
- particulates, < 10 um: 4.41493e-5 kg; data quality (3,2,1,1,2)
- Ethane, 1,1,1-trifluoro-, HFC-143a: 3.18738e-9 kg; data quality (4,2,1,4,1)
- Ethene, chloro-: 1.3166e-8 kg; data quality (3,2,1,1,1)
- o-toluidine: 5.38642e-14 kg; data quality (4,2,1,1,5)
- nitrogen oxides: 0.000884733 kg; data quality (2,2,1,1,1)
- Vinyl acetate: 6.71375e-14 kg; data quality (4,1,1,1,5)
- p-Cresidine: 4.01408e-13, 7.57324e-12 kg (2 entries, compartments not in this file); data quality (5,1,1,1,4)
- chromium: 2.63854e-14, 1.76545e-14 kg (2 entries, compartments not in this file); data quality (4,1,1,1,5)
- 2,2,4-trimethylpentane: 1.44869e-8 kg; data quality (3,2,1,4,1)
- cyanide: 2.1375e-8 kg; data quality (3,2,1,1,1)
- m-xylene: 5.19407e-7 kg; data quality (3,2,1,1,3)
- propylene oxide: 1.34927e-9 kg; data quality (3,2,1,1,1)
- benz[a]anthracene: 3.36273e-11 kg; data quality (2,2,1,1,3)
- 2-Mercaptobenzothiazole: 1.03741e-11, 8.05651e-14, 1.34275e-13 kg (3 entries, compartments not in this file); data quality (3,1,1,1,5)
- Benzo(b,j,k)fluoranthene: 2.17963e-19 kg; data quality (5,2,1,1,5)
- beryllium: 3.86264e-9 kg; data quality (2,2,1,1,1)
- Cresol: 3.19936e-11, 1.34865e-10 kg (2 entries, compartments not in this file); data quality (2,1,1,1,2)
- benzene: 1.37837e-6 kg; data quality (3,2,1,1,1)
- Hydrazine, methyl-: 1.60883e-9 kg; data quality (2,2,1,1,1)
- CHLORINE: 2.19934e-11 kg; data quality (2,1,1,1,2)
- dimethyl formamide: 1.40922e-13 kg; data quality (3,2,1,1,5)
- 1,3-PHENYLENEDIAMINE: 4.8169e-13 kg; data quality (4,1,1,1,4)
- trichloroethylene: 1.47713e-7 kg; data quality (4,2,1,1,1)
- acenaphthylene: 5.21684e-8 kg; data quality (3,2,1,1,1)
- Benzo(b)fluoranthene: 1.01277e-11 kg; data quality (2,2,1,1,1)
- mercury: 4.88431e-9 kg; data quality (2,2,1,1,1)
- Propene: 8.22953e-11 kg; data quality (3,1,1,1,2)
- 1,2-BUTYLENE OXIDE: 4.26796e-15 kg; data quality (4,2,1,1,5)
- DNOC: 1.81244e-10 kg; data quality (2,2,1,1,1)
- 2,4-dinitrophenol: 2.44892e-10 kg; data quality (5,2,1,1,1)
- Epichlorohydrin: 1.28451e-12 kg; data quality (2,1,1,1,4)
- Water, fresh: 0.0335778 m3; data quality (4,2,1,4,2)
- aniline: 1.11209e-10 kg; data quality (4,2,1,1,1)
- DMTT (DAZOMET): 1.22763e-9, 2.07937e-10 kg (2 entries, compartments not in this file); data quality (4,1,1,1,2)
- phenol: 1.02248e-8 kg; data quality (3,1,1,1,2)
- cumene: 5.07689e-7 kg; data quality (4,2,1,1,1)
- mercury: 3.88612e-12, 2.00021e-12 kg (2 entries, compartments not in this file); data quality (3,1,1,1,2)
- ethyl acrylate: 6.89158e-9 kg; data quality (4,2,1,1,1)
- BUTYL ISOCYANATE: 6.23573e-13 kg; data quality (4,2,1,1,5)
- hexane: 1.03301e-5 kg; data quality (3,2,1,1,3)
- AMMONIA: 2.46266e-8 kg; data quality (3,1,1,1,2)
- Formaldehyde: 1.79856e-9 kg; data quality (2,1,1,1,2)
- DIETHANOLAMINE: 2.00704e-11 kg; data quality (4,1,1,1,4)
- fluorene: 4.68909e-10 kg; data quality (2,2,1,2,1)
- Aniline: 1.33803e-11 kg; data quality (3,1,1,1,4)
- Polychlorinated biphenyls: 4.43704e-10 kg; data quality (3,1,1,1,4)
- arsenic: 3.20335e-8 kg; data quality (3,2,1,1,1)
- Phthalate, dioctyl-: 2.69128e-10, 2.30953e-13 kg (2 entries, compartments not in this file); data quality (4,1,1,1,5)
- ammonia: 2.71369e-5 kg; data quality (3,2,1,1,1)
- nickel: 6.05444e-8 kg; data quality (3,2,1,1,1)
- Hydrazine: 2.24267e-12 kg; data quality (4,2,1,1,5)
- acetaldehyde: 7.11049e-6 kg; data quality (3,2,1,1,1)
- chloroform: 1.29896e-6 kg; data quality (4,2,1,1,1)
- pyrene: 1.76968e-9 kg; data quality (2,2,1,1,1)
- Benzo(k)fluoranthene: 8.75853e-12 kg; data quality (2,2,1,1,1)
- Carbon dioxide: 0.225469 kg; data quality (4,2,1,4,1)
- Titanium: 2.39463e-10 kg; data quality (5,2,1,1,3)
- Phenol, pentachloro-: 3.30697e-12 kg; data quality (5,1,1,1,5)
- tertiary-Butyl Acetate: 9.72666e-7 kg; data quality (3,2,1,1,3)
- acrylonitrile: 1.9198e-9 kg; data quality (4,2,1,1,1)
- 1,1,2,2-tetrachloroethane: 6.46439e-10 kg; data quality (3,2,1,1,1)
- benzidine: 7.08766e-15 kg; data quality (2,2,1,1,5)
- acetaldehyde: 4.09218e-7 kg; data quality (3,1,1,1,2)
- Dibenzofuran: 3.38253e-14 kg; data quality (3,1,1,1,3)
- Phosphorus: 2.37379e-5 kg; data quality (2,1,1,1,5)
- carbon tetrachloride: 1.30861e-7 kg; data quality (4,2,1,1,1)
- maleic anhydride: 1.72918e-9 kg; data quality (2,2,1,1,3)
- Decabromodiphenyl oxide: 2.46518e-11 kg; data quality (4,1,1,1,5)
- BUTYL ACRYLATE: 4.60149e-12 kg; data quality (4,1,1,1,5)
- n-nitrosodimethylamine: 1.94733e-16 kg; data quality (5,2,1,1,5)
- ethylene glycol: 6.73295e-8 kg; data quality (5,2,1,1,2)
- Benzene, pentachloro-: 2.80747e-13, 1.16676e-14 kg (2 entries, compartments not in this file); data quality (5,1,1,1,4)
- hexachlorobenzene: 5.37636e-11 kg; data quality (3,2,1,1,1)
- selenium: 2.13566e-8 kg; data quality (2,2,1,1,1)
- 2-methylnaphthalene: 8.95419e-9 kg; data quality (2,2,1,1,1)
- vinyl acetate: 3.05854e-7 kg; data quality (4,2,1,1,3)
- lead: 5.81454e-9, 4.47944e-9 kg (2 entries, compartments not in this file); data quality (3,1,1,1,2)
- CARBAMODITHIOIC ACID, DIMETHYL-, POTASSIUM SALT: 3.84629e-12 kg; data quality (2,1,1,1,3)
- [1,1'-BIPHENYL]-4,4'-DIAMINE, 3,3'-DIMETHOXY-, DIHYDROCHLORIDE: 4.52789e-13 kg; data quality (5,1,1,1,4)
- Methyl acrylate: 7.1195e-13 kg; data quality (3,1,1,1,4)
- ACRYLAMIDE: 5.08451e-13 kg; data quality (4,1,1,1,4)
- 2-METHYLANTHRACENE: 3.52387e-14 kg; data quality (2,2,1,1,5)
- Butanol: 2.37129e-9 kg; data quality (5,1,1,1,2)
- 1,1-DICHLOROETHYLENE: 1.01894e-10 kg; data quality (3,2,1,1,1)
- ethane, 1,2-dibromo-: 7.97124e-9 kg; data quality (2,2,1,1,1)
- hydrogen fluoride: 2.06666e-6 kg; data quality (2,2,1,1,1)
- BENZ(A)ACRIDINE: 9.48213e-20 kg; data quality (2,2,1,1,3)
- Chrysene: 2.81966e-10 kg; data quality (2,2,1,1,1)
- Xylene: 9.21444e-7 kg; data quality (4,2,1,1,2)
- toluene-2,4-diisocyante: 4.60172e-13 kg; data quality (3,2,1,1,5)
- bis(2-chloroethyl)ether: 4.99934e-15 kg; data quality (3,2,1,1,3)
- hydroquinone: 3.92463e-12 kg; data quality (3,2,1,1,5)
- formic acid: 2.52103e-9 kg; data quality (3,1,1,1,2)
- p-cresol: 1.84065e-12 kg; data quality (4,2,1,1,3)
- Cobalt: 6.89749e-9 kg; data quality (3,2,1,1,1)
- Hydrocarbons, aromatic: 2.17884e-7 kg; data quality (4,2,1,1,1)
- naphthalene: 1.01327e-9 kg; data quality (4,1,1,1,2)
- isophorone: 3.791e-9 kg; data quality (2,2,1,1,1)
- 2,3,4'-TRICHLOROBIPHENYL: 1.04585e-13 kg; data quality (2,2,1,1,1)
- Chloroacetic acid: 9.99867e-15 kg; data quality (3,2,1,1,3)
- hexachloro-1,3-butadiene: 1.13727e-14 kg; data quality (4,2,1,1,5)
- acrolein: 1.11366e-6 kg; data quality (2,2,1,1,1)
- naphthalene: 3.55979e-7 kg; data quality (3,2,1,1,1)
- 1,4-dichlorobenzene: 2.49683e-11 kg; data quality (2,2,1,1,1)
- Formic acid: 1.08543e-6 kg; data quality (3,1,1,1,2)
- ACRYLAMIDE: 4.50652e-8 kg; data quality (4,2,1,1,3)
- toluene: 2.86606e-10 kg; data quality (5,1,1,1,2)
- benzo(a)pyrene: 5.3604e-10 kg; data quality (2,2,1,1,1)
- Acetaldehyde: 3.61915e-10 kg; data quality (3,1,1,1,2)
- Zinc: 6.71375e-12 kg; data quality (5,1,1,1,5)
- 4,4'-METHYLENEDIANILINE: 2.94366e-14 kg; data quality (3,1,1,1,4)
- ETHYLENETHIOUREA: 8.70757e-13 kg; data quality (5,2,1,1,3)
- Benzene, hexachloro-: 1.59395e-14 kg; data quality (4,1,1,1,4)
- ETHYLENETHIOUREA: 1.34275e-14 kg; data quality (2,1,1,1,5)
- Chrysene, 5-methyl-: 8.57795e-14 kg; data quality (2,2,1,1,1)
- nitric acid: 6.73469e-10 kg; data quality (3,1,1,1,2)
- 4-CHLOROANILINE: 6.69014e-12, 6.95774e-12 kg (2 entries, compartments not in this file); data quality (2,1,1,1,4)
- m-cresol: 4.23542e-9 kg; data quality (4,2,1,1,1)
- 2-nitropropane: 1.30676e-13 kg; data quality (3,2,1,1,5)
- epichlorohydrin: 1.62518e-9 kg; data quality (3,2,1,1,1)
- Dibenz(a,h)anthracene: 9.18078e-13 kg; data quality (2,2,1,1,1)
- Dinitrogen monoxide: 4.70891e-6 kg; data quality (4,2,1,4,1)
- Aluminum: 4.55331e-7 kg; data quality (4,1,1,1,2)
- HYDROGEN SULFIDE: 1.71843e-7, 5.88288e-8 kg (2 entries, compartments not in this file); data quality (3,1,1,1,2)
- Ethylene glycol: 3.9988e-12 kg; data quality (5,1,1,1,2)
- ethylene glycol: 2.82955e-8 kg; data quality (5,1,1,1,2)
- Ethane, 1,1,1,2-tetrafluoro-, HFC-134a: 2.80785e-8 kg; data quality (4,2,1,4,1)
- p-phenylenediamine: 6.06516e-11 kg; data quality (5,2,1,1,5)
- benzyl chloride: 6.08056e-8 kg; data quality (2,2,1,1,1)
- phthalate, dioctyl-: 1.16069e-9 kg; data quality (3,2,1,1,1)
- o-Xylene: 3.04226e-7 kg; data quality (3,2,1,1,3)
- bromoform: 2.11892e-10 kg; data quality (3,2,1,1,1)
- manganese: 2.91482e-7 kg; data quality (3,2,1,1,1)
- antimony: 2.73744e-9 kg; data quality (3,2,1,1,1)
- methanol: 0.000150216 kg; data quality (4,2,1,1,1)
- PHTHALIC ANHYDRIDE: 6.69014e-12 kg; data quality (3,1,1,1,4)
- 2-ethoxyethyl acetate: 1.64598e-13 kg; data quality (5,2,1,1,4)
- Diethylene glycol butyl ether: 2.5947e-11 kg; data quality (4,2,1,1,4)
- 3-methylcholanthrene: 7.78121e-14 kg; data quality (2,2,1,1,1)
- ethane, 1,1,2-trichloro-: 5.61207e-8 kg; data quality (4,2,1,1,1)
- ammonia: 3.53874e-6 kg; data quality (3,1,1,1,2)
- Chromium VI: 9.30672e-9 kg; data quality (3,2,1,1,1)
- 4-aminobiphenyl: 5.32072e-18 kg; data quality (5,2,1,1,5)
- benzene, chloro-: 5.91443e-8 kg; data quality (4,2,1,1,1)
- Polychlorinated biphenyls: 1.24289e-12 kg; data quality (3,1,1,1,2)
- VOC, volatile organic compounds: 0.000333375 kg; data quality (3,2,1,1,2)
- Phthalate, dimethyl-: 8.28403e-11 kg; data quality (4,2,1,1,1)
- PCB-1: 8.85049e-15 kg; data quality (2,2,1,1,1)
- CHLORONAPHTHALENE: 2.52481e-13 kg; data quality (1,2,1,1,1)
- N,N-DIMETHYLANILINE: 5.35824e-11 kg; data quality (5,2,1,1,1)
- particulates, < 2.5 um: 0.000164798 kg; data quality (3,2,1,1,1)
- acrylic acid: 6.27938e-9 kg; data quality (4,2,1,1,1)
- benzene, ethyl-: 3.37776e-7 kg; data quality (3,2,1,1,3)
- Naphthalene: 1.12751e-14 kg; data quality (4,1,1,1,3)
- Propanal: 3.51494e-9 kg; data quality (2,1,1,1,2)
- Methane: 0.00474224 kg; data quality (4,2,1,4,1)
- Anthracene: 2.63085e-14 kg; data quality (4,1,1,1,3)
- methyl isobutyl ketone: 2.09403e-6 kg; data quality (3,2,1,1,3)
- carbon monoxide: 0.000951515 kg; data quality (2,2,1,1,1)
- ethene, tetrachloro-: 2.24082e-7 kg; data quality (3,2,1,1,1)
- Phthalate, dibutyl-: 2.04246e-8 kg; data quality (4,2,1,1,1)
- methyl methacrylate: 2.96251e-9 kg; data quality (4,2,1,1,1)
- phenol: 2.91835e-6 kg; data quality (4,2,1,1,1)
- phthalic anhydride: 1.07956e-9 kg; data quality (2,2,1,1,3)
- copper: 3.35688e-12 kg; data quality (4,1,1,1,5)
- biphenyl: 6.73804e-7 kg; data quality (4,2,1,1,1)
- Aluminum: 4.63859e-10 kg; data quality (4,1,1,1,4)
- lead: 5.34093e-8 kg; data quality (3,2,1,1,1)
- 2-METHOXYETHANOL: 2.85764e-9 kg; data quality (4,2,1,1,1)
- polychlorinated biphenyls: 2.16125e-12 kg; data quality (3,2,1,1,3)
- o-cresol: 6.62581e-8 kg; data quality (4,2,1,1,1)
- 4-nitrophenol: 3.54285e-11 kg; data quality (2,2,1,1,1)
- 3,3'-Dichlorobenzidine: 6.8471e-15 kg; data quality (3,2,1,1,3)
- 2-chloro-1-phenylethanone: 1.13818e-10 kg; data quality (2,2,1,1,1)
- diethanolamine: 2.7752e-8 kg; data quality (3,2,1,1,1)
- 4,4'-METHYLENEBIS(2-CHLOROANALINE): 2.12019e-11 kg; data quality (5,2,1,1,5)
- 1,2,4-trichlorobenzene: 3.78327e-7 kg; data quality (4,2,1,1,1)
- Water, saline: 0.00125593 m3; data quality (4,2,1,4,2)
- Propane, 1,2-dichloro-: 2.11457e-8 kg; data quality (4,2,1,1,1)
- Nitrogen: 0.000116041 kg; data quality (4,2,1,1,2)
- Methane, difluoro-, HFC-32: 4.33831e-9 kg; data quality (4,2,1,4,1)
- Methyl iodide: 1.16099e-8 kg; data quality (4,2,1,1,1)
- Chromium, ion: 2.2195e-8 kg; data quality (2,2,1,1,1)
- 2,4,5,2',5'-PENTACHLOROBIPHENYL: 1.74912e-13 kg; data quality (2,2,1,1,1)
- ethane, 1,2-dichloro-: 3.49042e-8 kg; data quality (3,2,1,1,1)
- PCB-15: 1.06175e-14 kg; data quality (2,2,1,1,1)
- methane, dichloro-, hcc-30: 6.09325e-7 kg; data quality (4,2,1,1,1)
- Indeno(1,2,3-cd)pyrene: 7.40593e-12 kg; data quality (2,2,1,1,1)
- hexachloroethane: 4.84787e-7 kg; data quality (4,2,1,1,1)
- toluene, 2,4-dinitro-: 8.14686e-11 kg; data quality (5,2,1,1,1)
- methane, monochloro-, r-40: 1.21136e-6 kg; data quality (3,2,1,1,1)
- QUINOLINE: 2.47558e-11 kg; data quality (3,2,1,1,5)
- para-xylene: 2.31392e-7 kg; data quality (3,2,1,1,3)

## Inventory method
Input-output

## Modelling constants
The reference unit of all processes is 1 USD2013 of the good or service. The technosphere inputs are based on the US BEA detailed input-output tables for 2007. The IO tables are combined to develop a commodity-by-commodity model based on the the industry-technology assumption (see Suh et al., 2010), which assumes all commodities produced by a given industry have the same input structure, but that multiple industries can produce the same commodity. Thus, model technosphere flows represent commodity outputs (and not industry outputs) from other processes in the model. There are no by-products included in these processes. All commodity production is based on US-conditions, despite in reality that some goods and services are produced overseas, as USEEIO v1.1 is a single-region IO model.

## Completeness
The input-output approach assures that all purchased inputs associated with the sectors making these commodities as reported in the US census for 2007 are included. The direct resources extracted including minerals, energy sources, water and land occupied are included. Emissions to air include all critieria air pollutants, greenhouse gases, and hazardous and toxic air pollutants as defined by US EPA. Releases to water include toxics, total nitrogen and total phosphorus, and water discharges. Releases to soil or groundwater include toxics and agriculutural pesticides. Some metal releases to air, water and soil are not included because they could not be speciated. Solid hazardous and non-hazardous wastes generated are not included as an elementary flows although purchases of waste services are included.

## Data treatment
Greenhouse gases are primarily from the US Greenhouse Gas Emission Inventory (USEPA 2016a). Biogenic C uptake is not included (change from version 1.0), as biogenic C emission are not included. Toxic releases to air, water and soil (except pesticides) are from the 2013 Toxic Release Inventory (USEPA 2015a). Criteria air pollutants and hazardous air pollutants are from the 2011 National Emissions Inventory (USEPA 2015b). All estimates are normalized by industry based on sector output in the data year, then converted to 2013 USD using relative sector-specific CPIs (if data year is not 2013). Energy use represent raw renewables or fossil fuel energies and is based on EIA data for 2014. See Table 1 in Yang, Ingwersen et al. 2017 and Supporting Information 1, and the v1.1 data update notes (Ingwersen et al. 2017) for all details on environmental data sources used.Land occupation associated with manufacturing buildings was estimated based on the building floorspace data provided by the U.S. Energy Information Administration in the 2010 Manufacturing Energy Consumption Survey (EIA 2013). Portions of total renewable energy (EIA 2016) based on EIA-923 reports for 2014 (EIA 2017) are included. Nitrogen and Phosphorus releases are modeled in total N and total P equivalents as estimated by the Discharge Monitoring Report Nutrient Loading tool (USEPA 2016b). Self-supplied withdrawals were assigned to industrial sectors based on water use statistics for Canadian industries by NAICS 3-digit sector scaled to US production levels based on gross domestic product by industry (BEA 2015; Statistics Canada 2010), and further disaggregated to the manufacturing sectors based on compensation of employees as provided by the 2007 IO tables (BEA 2015). Water withdrawals associated with public supply were allocated to sectors based on their use of water, sewage, and other services in USD based on the IO tables (BEA 2015). Portions of total renewable energy (EIA 2016) by type are assigned to sectors (hydro, wind, solar, or) based on EIA-923 reports for 2014 (EIA 2017).

## Data collection
2015-2016

## Sampling procedure
US federal government sources, including surveys and US EPA emissions databases are used as the primary sources. From these sources, data for US reporting establishments/facilities are aggregated by the NAICS sector as defined in the BEA detailed 2007 input-output tables. When level of sector aggregation differs, or when direct emissions are not reported but modeled, additional sources are used to make allocations and estimates.

## Review details
In regard to quality assurance and peer-review, each dataset created went through Quality Assurance as defined in a quality assurance project plans at US EPA, CSRA or ERG. The model was assembled with the IO model builder model (USEPA 2016c). Validation functions were used to check that all the model components were properly assembled and harmonized. Bayou Demeke and Santosh Ghimire provided internal peer review of the model methodology and the manuscript underwent standard EPA management review. An editor and two anonymous reviewers at the Journal of Cleaner Production reviewed the model. In regard to data quality evaluation, data quality assessment was performed at the flow and process levels according to the updated US EPA data quality assessment guidelines as defined in US EPA (2016b).

## Intended application
The primary application is for use in the US Environmentally-Extended Input-Ouput model, USEEIO, version 1.1. This model is being used by the US EPA for supporting tools that prioritize goods and services based on potential environmental impacts, resource use or emissions for large regions, including the US and US states, and as a strealined tool for organizations as a starting point to consider sustainable materials management. Model results are designed to provide meso/macro-level decision support.

## Project
USEEIO v1.1 was developed by the US EPA with CSRA and ERG with Wesley W. Ingwersen and David E. Meyer as research leads. Yi Yang was the technical lead on the work for CSRA (contract EP-C-15-012); Troy Hawkins was lead for ERG (contract EP-C-12-021).

## Sources
- Goebes et al. 2003
- EIA 2013
- Maupin et al. 2014
- USDA 2014
- BEA 2015
- Kim et el. 2013
- EIA 2017
- EIA 2016
- Ingwersen et al. DRAFT
- USDA 2006
- Statistics Canada 2010
- BLM 2008
- USEPA 2015a
- Ingwersen et al. 2017
- Macknick et al. 2011
- USEPA 2016c
- Blackhurst et al. 2010
- USGS 2016
- Nickerson et al. 2011
- USDA 2009a
- Edelen and Ingwersen 2017
- Lovelace 2009
- USGS 2015
- USEPA 2016a
- Yienger et al. 1995
- USDA 2016
- USEPA 2015b
- USDA 2009b
- EIA 2015
- USEPA 2016b
- Torcellini et al. 2003
