# Scenic and sightseeing transportation and support activities for transportation

Dataset: openLCA process, unit process
Category: 48-49: Transportation and Warehousing
Geography: United States
Time period: 2017-01-01 to 2017-12-31
Data quality: US EPA - Process Pedigree Matrix (1;1)
Exchange data quality scheme: US EPA - Flow Pedigree Matrix
Generated by: US EPA with CSRA and ERG
Owner: US EPA
Published in: Yang, Ingwersen et al. 2017
restrictionsDescription: This model shold be appropriately cited (see Yang, Ingwersen et al. 2017 source or Publication field) when used. Any changes or derivations of this model by the user should be documented. The model itself and any results from use of this model shall not be construed to consitute US EPA opinion or policy.
copyright: false

## General comment
BEA Code & Name is '48A000:Scenic and sightseeing transportation and support activities for transportation'. Description of the primary industry producing this good or service, adapted from the Census Bureau NAICS 2007 descriptions: 1) Industries in the Scenic and Sightseeing Transportation subsector utilize transportation equipment to provide recreation and entertainment. These activities have a production process distinct from passenger transportation carried out for the purpose of other types of for-hire transportation. This process does not emphasize efficient transportation; in fact, such activities often use obsolete vehicles, such as steam trains, to provide some extra ambience. The activity is local in nature, usually involving a same-day return to the point of departure. The Scenic and Sightseeing Transportation subsector is separated into three industries based on the mode: land, water, and other. Activities that are recreational in nature and involve participation by the customer, such as white-water rafting, are generally excluded from this subsector, unless they impose an impact on part of the transportation system. Charter boat fishing, for example, is included in the Scenic and Sightseeing Transportation, Water industry. 2) Industries in the Support Activities for Transportation subsector provide services which support transportation. These services may be provided to transportation carrier establishments or to the general public. This subsector includes a wide array of establishments, including air traffic control services, marine cargo handling, and motor vehicle towing. The Support Activities for Transportation subsector includes services to transportation but is separated by type of mode serviced. The Support Activities for Rail Transportation industry includes services to the rail industry (e.g., railroad switching and terminal establishments). Ship repair and maintenance not done in a shipyard are included in Other Support Activities for Water Transportation. An example would be floating drydock services in a harbor. Excluded from this subsector are establishments primarily engaged in providing factory conversion and overhaul of transportation equipment, which are classified in Subsector 336, Transportation Equipment Manufacturing. Also, establishments primarily engaged in providing rental and leasing of transportation equipment without operator are classified in Subsector 532, Rental and Leasing Services. Related NAICS codes are: 487, 488

## Technology
The process describes the average US production of this good or service within this NAICS-based grouping defined in the BEA 2007 detailed input-output tables (BEA 2015). Distribution, wholesale and retailing of this good or service, use, and final disposal are not included. Creation of a product system with this process will enable modeling of all upstream (supply-chain) activities.

## Geography
Data represent the 50 US states

## Time period
2017 was the year in which this version of USEEIO was released and is the target date for the model

## Reference product
- Scenic and sightseeing transportation and support activities for transportation: 1 USD

## Inputs from technosphere
All rows: data quality (1,3,1,1,1)
- Office machinery; at manufacturer: 0.0126176 USD
- Directory, mailing list, and other publishers; at publisher: 6.70128e-5 USD
- Transmission and power train parts; at manufacturer: 0.000169698 USD
- Pipeline transport: 0.000125353 USD
- Software: 2.8835e-5 USD
- Soft drinks, bottled water, and ice; at manufacturer: 3.22489e-9 USD
- Polystyrene foam products; at manufacturer: 0.00102434 USD
- Industrial process variable instruments; at manufacturer: 9.57326e-6 USD
- Computer systems design: 0.000412556 USD
- Natural gas; at consumer: 0.00875643 USD
- All other food and drinking places: 0.000162745 USD
- Material handling equipment; at manufacturer: 0.000363784 USD
- Pumps and pumping equipment; at manufacturer: 0.000181892 USD
- Noncomparable imports: 0.00198899 USD
- Cheese; at manufacturer: 9.58294e-6 USD
- other miscellaneous electrical equipment and components; at manufacturer: 4.78663e-5 USD
- Couriers and messengers: 0.0765108 USD
- Other support activities for mining: 0.00418352 USD
- Management consulting: 0.00307679 USD
- Office administration: 0.00050865 USD
- Compressed Gases; at manufacturer: 0.00181892 USD
- Flavored drink concentrates; at manufacturer: 6.44979e-9 USD
- Golf courses, marinas, ski resorts, fitness and other rec centers and industries: 5.74396e-5 USD
- Securities and commodities brokerage and exchanges: 0.00311074 USD
- Semiconductors; at manufacturer: 9.65008e-6 USD
- Promoters and agents: 0.000698848 USD
- Rail transport: 0.000306742 USD
- Unrefined oil and gas; at extraction site: 5.76135e-7 USD
- Motor vehicle steering, suspension components (except spring), and brake systems; at manufacturer: 0.000261474 USD
- Monetary authorities and depository credit intermediation: 0.00276637 USD
- Soap and cleaning compounds; at manufacturer: 2.87198e-5 USD
- Other textiles; at manufacturer: 0.000153469 USD
- Magazines and journals; at publisher: 0.000536103 USD
- Electronic capacitors, resistors, coils, transformers, connectors and other components (except semiconductors and printed circuit assemblies); at manufacturer: 9.57649e-6 USD
- Glass and glass products; at manufacturer: 6.70897e-5 USD
- Hydraulic pumps, motors, cylinders and actuators; at manufacturer: 9.59261e-6 USD
- Investment advice, portfolio management, and other financial advising services: 9.65776e-5 USD
- Insurance carriers: 0.00820675 USD
- Passenger ground transport: 3.82931e-5 USD
- All other converted paper products; at manufacturer: 9.57326e-5 USD
- Consumer goods and general rental centers: 0.000844406 USD
- Bread and other baked goods; at manufacturer: 2.87359e-5 USD
- Carbon and graphite products; at manufacturer: 6.83956e-5 USD
- Vehicle electrical and electronic equipment; at manufacturer: 0.000728336 USD
- Valve and fittings (except for plumbing); at manufacturer: 6.14544e-7 USD
- Employment services: 0.0045777 USD
- Speed changers, industrial high-speed drives, and gears; at manufacturer: 8.61594e-5 USD
- Other plastic products; at manufacturer: 0.000517497 USD
- Full-service restaurants: 0.000105652 USD
- Performances: 9.57326e-6 USD
- External hard drives, CDs, other storage media; at manufacturer: 9.57326e-6 USD
- Office supplies (not paper); at manufacturer: 0.000162745 USD
- Light gauge metal cans, boxes, and containers; at manufacturer: 2.87198e-5 USD
- Metal hinges, keys, lock, and other hardware; at manufacturer: 9.61167e-6 USD
- Coffee and tea; at manufacturer: 9.59584e-6 USD
- Chemicals (except basic chemicals, agrichemicals, polymers, paints, pharmaceuticals,soaps, cleaning compounds); at manufacturer: 0.00100539 USD
- State and local government enterprises: 9.57326e-6 USD
- Cutlery and handtools; at manufacturer: 0.000277894 USD
- Rubber tires; at manufacturer: 0.000172357 USD
- Specialized design: 0.000641639 USD
- Company and enterprise management: 0.013496 USD
- Ball and roller bearings; at manufacturer: 4.10201e-5 USD
- Electronic equipment repair and maintenance: 0.0023266 USD
- Air transport: 0.00675019 USD
- Urethane and other foam products; at manufacturer: 5.74396e-5 USD
- Primary iron, steel, and ferroalloy products; at manufacturer: 0.000382931 USD
- Warehousing: 0.020557 USD
- Relay and industrial controls; at manufacturer: 2.89502e-5 USD
- Commercial machinery repair: 0.000603116 USD
- Food and beverage stores: 9.61167e-6 USD
- Business support: 0.0033651 USD
- Paper bags and coated paper; at manufacturer: 0.000364014 USD
- Other computer related services, including facilities management: 0.000498562 USD
- Frozen food; at manufacturer: 3.22489e-9 USD
- Wireless telecommunications: 0.000856463 USD
- Snack foods; at manufacturer: 3.22489e-9 USD
- Screws, nuts, and bolts; at manufacturer: 0.00103401 USD
- Used and secondhand goods: 0.00158899 USD
- Cardboard containers; at manufacturer: 0.00163722 USD
- Wireless communications; at manufacturer: 3.8409e-8 USD
- Synthetic dyes and pigments; at manufacturer: 0.000315918 USD
- Electricity; at consumer: 0.00275873 USD
- Petrochemicals; at manufacturer: 9.57326e-6 USD
- Springs and wires; at manufacturer: 7.29771e-7 USD
- Nonresidential building repair and maintanence: 0.013237 USD
- Paper; at manufacturer: 0.00080989 USD
- Motors and generators; at manufacturer: 0.000115532 USD
- Breweries and beer; at manufacturer: 3.82963e-5 USD
- Data processing and hosting: 0.000680777 USD
- Nonferrous metal casts; at manufacturer: 9.57326e-6 USD
- Cutting and machine tool accessory, rolling mill, and other metalworking machines; at manufacturer: 0.000105306 USD
- Other basic inorganic chemicals; at manufacturer: 0.000459517 USD
- Seasonings and dressings; at manufacturer: 1.91498e-5 USD
- Drinking water and wastewater treatment; at consumer: 0.000979114 USD
- Stationery; at manufacturer: 9.57326e-6 USD
- Metal structural products; at manufacturer: 3.77635e-6 USD
- Travel arrangement and reservation: 0.000536101 USD
- Pickup trucks, vans, and SUVs; at manufacturer: 4.78663e-5 USD
- Telecommunications: 0.00259657 USD
- Postal service: 0.0519139 USD
- General merchandise stores: 1.92233e-5 USD
- Other transportation equipment; at manufacturer: 0.000135524 USD
- Veneer, plywood, and engineered wood; at manufacturer: 0.000134026 USD
- Machine shops; at manufacturer: 0.00311525 USD
- Metal coatings, engravings, and heat treatments; at manufacturer: 0.00210774 USD
- Movies and film: 8.61594e-5 USD
- Plastic bags, films, and sheets; at manufacturer: 0.000402077 USD
- Colleges, universities, junior colleges, and professional schools: 7.65861e-5 USD
- Independent artists, writers, and performers: 5.75548e-5 USD
- Other engine equipment; at manufacturer: 4.45544e-6 USD
- Water transport (boats, ships, ferries): 0.000191702 USD
- Civic, social, professional, and similar organizations: 0.000201461 USD
- Gaskets, seals, musical instruments, fasteners, brooms, brushes, mop and other misc. goods; at manufacturer: 0.000191696 USD
- Architectural, engineering, and related services: 0.000785133 USD
- Environmental and other technical consulting services: 0.00071599 USD
- Household goods repair: 0.00195311 USD
- Welding and Soldering Equipment, Scales and Balances, and other general purpose machinery; at manufacturer: 1.91465e-5 USD
- Marketing research and all other miscellaneous professional, scientific, and technical services: 0.000681622 USD
- Cast iron and steel; at manufacturer: 0.00144556 USD
- Fluid meters and counting devices; at manufacturer: 9.57326e-6 USD
- Animal farms and aquaculture ponds (except cattle and poultry): 0.000536103 USD
- Waste management and remediation: 0.00931093 USD
- Satellite, telecommunications resellers, and all other telecommunications: 0.000250154 USD
- Ships and ship repair; at manufacturer: 0.00021354 USD
- Other retail: 0.000309602 USD
- Mattresses, blinds and shades; at manufacturer: 0.000105312 USD
- Watches, clocks, and other measuring and controlling devices; at manufacturer: 2.87198e-5 USD
- Metal pipe fittings, ball and roller bearings, industrial patterns, metal bath fixtures, other misc. fabricated metals; at manufacturer: 0.00124879 USD
- Dry-cleaning and laundry: 0.00382629 USD
- Vehicle rental and leasing: 0.000935358 USD
- Computer storage device readers; at manufacturer: 9.57326e-6 USD
- Rubber and plastic belts and hoses; at manufacturer: 1.07545e-6 USD
- Insurance agencies and brokerages: 0.000665821 USD
- Packaged poultry; at manufacturer: 6.44979e-9 USD
- Vehicle engines and engine parts; at manufacturer: 0.000402538 USD
- Air purification and ventilation equipment; at manufacturer: 0.000114879 USD
- Vending, commercial laundry, and other commercial and service industry machinery; at manufacturer: 9.57971e-6 USD
- Computer terminals and other computer peripheral equipment; at manufacturer: 0.000737257 USD
- Other vehicle parts; at manufacturer: 0.000503609 USD
- Hotels and campgrounds: 0.00100707 USD
- Truck transport: 0.00883987 USD
- Ice cream and frozen desserts; at manufacturer: 9.57649e-6 USD
- Lessors of nonfinancial intangible assets: 0.00109136 USD
- Distilleries and spirits; at manufacturer: 3.22489e-9 USD
- Paints and coatings; at manufacturer: 0.000229758 USD
- Books, newspapers, magazines, and other print media; at manufacturer: 0.000422914 USD
- Legal services: 0.00189013 USD
- Commercial equipment rental: 0.00117796 USD
- Facilities support: 0.000489034 USD
- Advertising and public relations: 0.00218669 USD
- Coal; at mine: 9.57326e-6 USD
- Scientific research and development: 3.82931e-5 USD
- Packaged meat (except poultry); at manufacturer: 1.91594e-5 USD
- Cardboard; at manufacturer: 0.000670532 USD
- Wild-caught fish and game; at place of capture: 9.57326e-6 USD
- Railroad rolling stock; at manufacturer: 0.00158916 USD
- Investigation and security: 0.00138887 USD
- Other support services: 0.000230416 USD
- Internet publishing and broadcasting: 1.91465e-5 USD
- Fruit and vegetable preservation; at manufacturer: 9.57649e-6 USD
- Gasoline, fuels, and by-products of petroleum refining; at manufacturer: 0.0183565 USD
- Air and gas compressors; at manufacturer: 0.000641409 USD
- Seafood; at manufacturer: 9.57971e-6 USD
- Vehicle seating and interior trim (upholstery); at manufacturer: 0.00053641 USD
- Sports: 9.57326e-6 USD
- Wholesale trade: 0.00824725 USD
- Vehicles and parts sales: 0.000210804 USD
- Aircraft; at manufacturer: 9.57326e-6 USD
- Communication and energy wire and cable; at manufacturer: 1.25771e-7 USD
- Fresh vegetables, melons, and potatoes; at farm: 9.57326e-6 USD
- Other petroleum and coal products; at manufacturer: 0.000746715 USD
- Audio and video equipment; at manufacturer: 0.000191465 USD
- Scenic and sightseeing transportation and support activities for transportation: 0.0768412 USD
- Nondepository credit intermediation and related activities: 0.00124739 USD
- Limited-service restaurants: 0.000124952 USD
- Buildings and dwellings services: 0.0123229 USD
- Accounting, tax preparation, bookkeeping, and payroll: 0.00194433 USD
- Other basic organic chemicals; at manufacturer: 0.0016275 USD
- Other aircraft parts; at manufacturer: 0.00200081 USD
- Other real estate: 0.0141756 USD

## Inputs from nature
- Water, fresh: 0.000342135, 0.0005921 m3 (2 entries, compartments not in this file); data quality (1,2,1,4,2)
- Occupation, urban, discontinuously built: 0.000602235 m2*a; data quality (4,2,1,1,1)
- Energy, solar: 3.97775e-6 MJ; data quality (3,1,1,1,1)
- Energy, hydraulic potential: 3.03648e-8 MJ; data quality (3,1,1,1,1)
- Occupation, traffic area, road network: 0.000491329 m2*a; data quality (2,3,1,1,1)

## Emissions to nature
- VOC, volatile organic compounds: 0.000316565 kg; data quality (3,2,1,1,3)
- 2-METHOXYETHANOL: 3.97735e-11 kg; data quality (4,2,1,1,3)
- m-xylene: 8.24121e-7 kg; data quality (3,2,1,1,3)
- benzene: 4.79264e-6 kg; data quality (3,2,1,1,3)
- naphthalene: 1.84179e-12 kg; data quality (4,1,1,1,5)
- fluoranthene: 2.92628e-8 kg; data quality (2,2,1,1,3)
- nitrogen oxides: 0.00154057 kg; data quality (2,2,1,1,3)
- fluorene: 4.85854e-8 kg; data quality (2,2,1,1,3)
- cumene: 1.55116e-8 kg; data quality (4,2,1,1,3)
- Water, fresh: 0.00079103 m3; data quality (1,2,1,4,2)
- 3-methylcholanthrene: 5.93572e-15 kg; data quality (2,2,1,1,3)
- methane, dichloro-, hcc-30: 1.79885e-7 kg; data quality (4,2,1,1,3)
- maleic anhydride: 4.46245e-12 kg; data quality (2,2,1,1,3)
- methyl isobutyl ketone: 1.85719e-7 kg; data quality (4,2,1,1,3)
- 2-methylnaphthalene: 4.02704e-7 kg; data quality (2,2,1,1,3)
- selenium: 1.28364e-11 kg; data quality (2,2,1,1,3)
- toluene: 4.71147e-6 kg; data quality (4,2,1,1,3)
- Ethene, chloro-: 5.99579e-10 kg; data quality (3,2,1,1,3)
- Bis-(chloromethyl)ether: 3.98932e-16 kg; data quality (5,2,1,1,3)
- phenanthrene: 8.69527e-8 kg; data quality (3,2,1,1,3)
- 1,2,4-trimethylbenzene: 4.16244e-10 kg; data quality (5,1,1,1,5)
- Phthalate, dimethyl-: 9.57436e-12 kg; data quality (4,2,1,1,3)
- Dibenz(a,h)anthracene: 6.32412e-12 kg; data quality (2,2,1,1,3)
- benzene, ethyl-: 1.13495e-6 kg; data quality (4,2,1,1,3)
- ethane, 1,2-dichloro-: 8.72439e-12 kg; data quality (3,2,1,1,3)
- phthalate, dioctyl-: 5.30579e-9 kg; data quality (3,2,1,1,3)
- methanol: 3.49524e-6 kg; data quality (4,2,1,1,3)
- Benzo(g,h,i)perylene: 3.68358e-14 kg; data quality (2,1,1,1,5)
- Indeno(1,2,3-cd)pyrene: 2.50016e-9 kg; data quality (2,2,1,1,3)
- lead: 1.97287e-6 kg; data quality (3,2,1,1,3)
- benzo(a)pyrene: 3.13212e-9 kg; data quality (2,2,1,1,3)
- Ethylene glycol monoethyl ether: 1.03227e-9 kg; data quality (3,2,1,1,3)
- trichloroethylene: 4.62162e-8 kg; data quality (3,2,1,1,3)
- Hexane: 1.84179e-15 kg; data quality (4,1,1,1,5)
- hydroquinone: 2.39359e-12 kg; data quality (3,2,1,1,3)
- Ethane, 1,1,1,2-tetrafluoro-, HFC-134a: 1.26374e-7 kg; data quality (4,2,1,4,1)
- propylene oxide: 1.75875e-9 kg; data quality (3,2,1,1,3)
- acrolein: 4.87049e-6 kg; data quality (2,2,1,1,3)
- lead: 3.68358e-12, 3.68358e-12 kg (2 entries, compartments not in this file); data quality (3,1,1,1,5)
- 2,2,4-trimethylpentane: 3.86127e-7 kg; data quality (3,2,1,1,3)
- vinyl acetate: 1.73861e-8 kg; data quality (4,2,1,1,3)
- Chloramben: 2.20609e-13 kg; data quality (2,2,1,1,3)
- aniline: 1.20358e-13 kg; data quality (4,2,1,1,3)
- Phosphorus: 2.04514e-6 kg; data quality (3,1,1,1,5)
- Nickel, ion: 6.49022e-11 kg; data quality (3,2,1,1,3)
- hydrogen fluoride: 9.9334e-10 kg; data quality (2,2,1,1,3)
- 1,1,1-trichloroethane: 4.36841e-8 kg; data quality (3,2,1,1,3)
- Benzo(a)anthracene: 3.21938e-14 kg; data quality (2,2,1,1,3)
- n-nitrosodimethylamine: 7.18077e-14 kg; data quality (5,2,1,1,3)
- Xylene: 1.84179e-11 kg; data quality (4,1,1,1,5)
- anthracene: 2.76827e-8 kg; data quality (3,2,1,1,3)
- Nitrogen: 7.65359e-6 kg; data quality (2,2,1,1,5)
- propanal: 1.74158e-6 kg; data quality (3,2,1,1,3)
- diethanolamine: 3.27523e-12 kg; data quality (3,2,1,1,3)
- chlorine: 2.71603e-11 kg; data quality (4,2,1,1,3)
- ammonia: 2.90632e-7 kg; data quality (3,2,1,1,3)
- nickel: 2.14958e-9 kg; data quality (3,2,1,1,4)
- CHLOROMETHYL METHYL ETHER: 4.50115e-12 kg; data quality (5,2,1,1,3)
- polychlorinated biphenyls: 3.83637e-14 kg; data quality (3,2,1,1,5)
- Cresol: 9.9693e-12 kg; data quality (4,2,1,1,3)
- Cobalt: 4.0981e-11 kg; data quality (3,2,1,1,4)
- mercury: 4.53496e-10 kg; data quality (2,2,1,1,3)
- Chrysene: 3.32602e-9 kg; data quality (2,2,1,1,3)
- methyl methacrylate: 4.68625e-9 kg; data quality (4,2,1,1,3)
- benzene, chloro-: 1.72739e-12 kg; data quality (4,2,1,1,3)
- acrylic acid: 5.59005e-11 kg; data quality (4,2,1,1,3)
- Chromium VI: 9.94585e-11 kg; data quality (3,2,1,1,3)
- benzidine: 4.70739e-11 kg; data quality (2,2,1,1,3)
- Propane, 1,1,1,3,3,3-hexafluoro-, HCFC-236fa: 3.8755e-10 kg; data quality (4,2,1,4,1)
- acetaldehyde: 9.04359e-6 kg; data quality (3,2,1,1,3)
- chromium: 9.99354e-11 kg; data quality (4,1,1,1,5)
- BUTYL ISOCYANATE: 2.40077e-9 kg; data quality (4,2,1,1,3)
- CHLOROPRENE: 3.82974e-13 kg; data quality (2,2,1,1,3)
- epichlorohydrin: 2.68353e-11 kg; data quality (3,2,1,1,3)
- ethyl acrylate: 6.19222e-12 kg; data quality (4,2,1,1,3)
- AZIRIDINE: 1.11461e-12 kg; data quality (5,2,1,1,3)
- 2-nitropropane: 4.8976e-10 kg; data quality (5,2,1,1,3)
- carbon tetrachloride: 4.44471e-10 kg; data quality (4,2,1,1,3)
- Phthalate, dibutyl-: 7.34832e-9 kg; data quality (4,2,1,1,3)
- Chromium, ion: 3.54687e-10 kg; data quality (2,2,1,1,3)
- Hydrazine: 1.59573e-12 kg; data quality (4,2,1,1,3)
- biphenyl: 9.88433e-13 kg; data quality (4,2,1,1,3)
- hexachlorobenzene: 3.0691e-15 kg; data quality (3,2,1,1,5)
- ethylene oxide: 7.85895e-14 kg; data quality (3,2,1,1,3)
- Ethane, 1,1,1-trifluoro-, HFC-143a: 1.43456e-8 kg; data quality (4,2,1,4,1)
- 1,1,2,2-tetrachloroethane: 2.06683e-9 kg; data quality (3,2,1,1,3)
- acrylonitrile: 2.53641e-12 kg; data quality (4,2,1,1,3)
- Propene: 6.88829e-10 kg; data quality (3,1,1,1,5)
- benz[a]anthracene: 3.38573e-9 kg; data quality (2,2,1,1,3)
- ethane, 1,1,2-trichloro-: 6.05578e-14 kg; data quality (4,2,1,1,3)
- t-butyl methyl ether: 9.71783e-9 kg; data quality (3,2,1,1,3)
- Xylene: 2.62422e-6 kg; data quality (4,2,1,1,3)
- Triethyl amine: 7.00843e-9 kg; data quality (4,2,1,1,3)
- sulfur dioxide: 0.000119325 kg; data quality (2,2,1,1,3)
- ethylene glycol: 9.83378e-10 kg; data quality (5,2,1,1,3)
- manganese: 1.16291e-8 kg; data quality (3,2,1,1,3)
- Methyl iodide: 2.84438e-12 kg; data quality (4,2,1,1,3)
- para-xylene: 6.23445e-9 kg; data quality (4,2,1,1,3)
- dimethyl formamide: 4.19676e-10 kg; data quality (4,2,1,1,3)
- monochloroethane: 3.58721e-12 kg; data quality (3,2,1,1,3)
- ethane, 1,2-dibromo-: 9.54671e-13 kg; data quality (2,2,1,1,3)
- acenaphthylene: 1.39785e-7 kg; data quality (3,2,1,1,3)
- Benzo(k)fluoranthene: 3.76145e-9 kg; data quality (2,2,1,1,3)
- Dinitrogen monoxide: 5.9714e-9 kg; data quality (4,2,1,4,1)
- hydrogen sulfide: 7.98561e-10 kg; data quality (3,2,1,1,3)
- 2,4-D: 3.31113e-14 kg; data quality (3,2,1,1,3)
- methane, monochloro-, r-40: 1.66953e-11 kg; data quality (3,2,1,1,3)
- 1,2-BUTYLENE OXIDE: 5.35286e-12 kg; data quality (4,2,1,1,3)
- styrene: 8.04524e-7 kg; data quality (4,2,1,1,3)
- Propene, 1,3-dichloro-: 9.66571e-13 kg; data quality (3,2,1,1,3)
- hexane: 4.45142e-7 kg; data quality (3,2,1,1,3)
- phenol: 1.42401e-6 kg; data quality (4,2,1,1,3)
- formaldehyde: 2.61754e-5 kg; data quality (2,2,1,1,3)
- cadmium: 1.35446e-9 kg; data quality (3,2,1,1,3)
- Propane, 1,2-dichloro-: 2.1421e-10 kg; data quality (4,2,1,1,3)
- cyanide: 5.11031e-13 kg; data quality (3,2,1,1,3)
- acetonitrile: 3.19145e-12 kg; data quality (3,2,1,1,3)
- acenaphthene: 2.31322e-8 kg; data quality (3,2,1,1,3)
- carbon monoxide: 0.00401892 kg; data quality (2,2,1,1,3)
- Hydrocarbons, aromatic: 3.39088e-11 kg; data quality (4,2,1,1,3)
- naphthalene: 3.67671e-6 kg; data quality (3,2,1,1,3)
- Urethane: 2.47338e-14 kg; data quality (5,2,1,1,3)
- hydrogen chloride: 1.4446e-8 kg; data quality (2,2,1,1,3)
- antimony: 9.15781e-12 kg; data quality (3,2,1,1,3)
- ethene, tetrachloro-: 7.12575e-9 kg; data quality (3,2,1,1,3)
- arsenic: 4.94365e-11 kg; data quality (3,2,1,1,4)
- 1,4-dioxane: 3.17909e-12 kg; data quality (4,2,1,1,3)
- particulates, < 10 um: 1.31902e-5 kg; data quality (3,2,1,1,3)
- beryllium: 4.49491e-10 kg; data quality (2,2,1,1,3)
- Benzo(b)fluoranthene: 3.78559e-9 kg; data quality (2,2,1,1,3)
- pyrene: 3.99134e-8 kg; data quality (2,2,1,1,3)
- Carbon dioxide: 0.00204832 kg; data quality (4,2,1,4,1)
- toluene-2,4-diisocyante: 3.6977e-11 kg; data quality (3,2,1,1,3)
- ethylbenzene: 4.64131e-10 kg; data quality (4,1,1,1,5)
- PHOSPHORUS: 8.97671e-10 kg; data quality (3,2,1,1,5)
- 1-METHYLNAPTHALENE: 4.82778e-7 kg; data quality (2,2,1,1,3)
- o-Xylene: 4.5388e-7 kg; data quality (3,2,1,1,3)
- particulates, < 2.5 um: 8.12794e-5 kg; data quality (3,2,1,1,3)
- ALLYL CHLORIDE: 1.5542e-9 kg; data quality (3,2,1,1,3)
- methylene diphenyl diisocyanate: 4.52339e-10 kg; data quality (4,2,1,1,3)
- Ethane, pentafluoro-, HFC-125: 3.35288e-8 kg; data quality (4,2,1,4,1)
- Benzo(g,h,i)perylene: 9.06667e-9 kg; data quality (3,2,1,1,3)
- butadiene: 3.60495e-6 kg; data quality (2,2,1,1,3)
- chloroform: 5.80073e-9 kg; data quality (4,2,1,1,3)
- toluene: 1.84179e-11 kg; data quality (5,1,1,1,5)
- Methane, difluoro-, HFC-32: 1.95256e-8 kg; data quality (4,2,1,4,1)

## Inventory method
Input-output

## Modelling constants
The reference unit of all processes is 1 USD2013 of the good or service. The technosphere inputs are based on the US BEA detailed input-output tables for 2007. The IO tables are combined to develop a commodity-by-commodity model based on the the industry-technology assumption (see Suh et al., 2010), which assumes all commodities produced by a given industry have the same input structure, but that multiple industries can produce the same commodity. Thus, model technosphere flows represent commodity outputs (and not industry outputs) from other processes in the model. There are no by-products included in these processes. All commodity production is based on US-conditions, despite in reality that some goods and services are produced overseas, as USEEIO v1.1 is a single-region IO model.

## Completeness
The input-output approach assures that all purchased inputs associated with the sectors making these commodities as reported in the US census for 2007 are included. The direct resources extracted including minerals, energy sources, water and land occupied are included. Emissions to air include all critieria air pollutants, greenhouse gases, and hazardous and toxic air pollutants as defined by US EPA. Releases to water include toxics, total nitrogen and total phosphorus, and water discharges. Releases to soil or groundwater include toxics and agriculutural pesticides. Some metal releases to air, water and soil are not included because they could not be speciated. Solid hazardous and non-hazardous wastes generated are not included as an elementary flows although purchases of waste services are included.

## Data treatment
Greenhouse gases are primarily from the US Greenhouse Gas Emission Inventory (USEPA 2016a). Biogenic C uptake is not included (change from version 1.0), as biogenic C emission are not included. Toxic releases to air, water and soil (except pesticides) are from the 2013 Toxic Release Inventory (USEPA 2015a). Criteria air pollutants and hazardous air pollutants are from the 2011 National Emissions Inventory (USEPA 2015b). All estimates are normalized by industry based on sector output in the data year, then converted to 2013 USD using relative sector-specific CPIs (if data year is not 2013). Energy use represent raw renewables or fossil fuel energies and is based on EIA data for 2014. See Table 1 in Yang, Ingwersen et al. 2017 and Supporting Information 1, and the v1.1 data update notes (Ingwersen et al. 2017) for all details on environmental data sources used.Total transportation land use is reported in the USGA Major Uses of Land for 2007 (Nickerson et al. 2011). Land use for roads was allocated to relevant transportation sectors based on the shares of Federal Highway Administration fees. Transportation land use for airports and railroads were each assumed 5% of the total use of urban land.

## Data collection
2015-2016

## Sampling procedure
US federal government sources, including surveys and US EPA emissions databases are used as the primary sources. From these sources, data for US reporting establishments/facilities are aggregated by the NAICS sector as defined in the BEA detailed 2007 input-output tables. When level of sector aggregation differs, or when direct emissions are not reported but modeled, additional sources are used to make allocations and estimates.

## Review details
In regard to quality assurance and peer-review, each dataset created went through Quality Assurance as defined in a quality assurance project plans at US EPA, CSRA or ERG. The model was assembled with the IO model builder model (USEPA 2016c). Validation functions were used to check that all the model components were properly assembled and harmonized. Bayou Demeke and Santosh Ghimire provided internal peer review of the model methodology and the manuscript underwent standard EPA management review. An editor and two anonymous reviewers at the Journal of Cleaner Production reviewed the model. In regard to data quality evaluation, data quality assessment was performed at the flow and process levels according to the updated US EPA data quality assessment guidelines as defined in US EPA (2016b).

## Intended application
The primary application is for use in the US Environmentally-Extended Input-Ouput model, USEEIO, version 1.1. This model is being used by the US EPA for supporting tools that prioritize goods and services based on potential environmental impacts, resource use or emissions for large regions, including the US and US states, and as a strealined tool for organizations as a starting point to consider sustainable materials management. Model results are designed to provide meso/macro-level decision support.

## Project
USEEIO v1.1 was developed by the US EPA with CSRA and ERG with Wesley W. Ingwersen and David E. Meyer as research leads. Yi Yang was the technical lead on the work for CSRA (contract EP-C-15-012); Troy Hawkins was lead for ERG (contract EP-C-12-021).

## Sources
- USDA 2014
- USDA 2009a
- USDA 2009b
- Yienger et al. 1995
- USDA 2016
- EIA 2013
- Torcellini et al. 2003
- EIA 2017
- USEPA 2016b
- USEPA 2016a
- Macknick et al. 2011
- Ingwersen et al. DRAFT
- BEA 2015
- Kim et el. 2013
- Lovelace 2009
- Edelen and Ingwersen 2017
- USDA 2006
- EIA 2016
- USEPA 2015b
- USGS 2016
- Goebes et al. 2003
- USEPA 2015a
- EIA 2015
- BLM 2008
- USEPA 2016c
- Ingwersen et al. 2017
- Statistics Canada 2010
- Blackhurst et al. 2010
- Maupin et al. 2014
- Nickerson et al. 2011
- USGS 2015
