# Packaged poultry; at manufacturer

Dataset: openLCA process, unit process
Category: 3116: Animal Slaughtering and Processing
Geography: United States
Time period: 2017-01-01 to 2017-12-31
Data quality: US EPA - Process Pedigree Matrix (1;1)
Exchange data quality scheme: US EPA - Flow Pedigree Matrix
Generated by: US EPA with CSRA and ERG
Owner: US EPA
Published in: Yang, Ingwersen et al. 2017
restrictionsDescription: This model shold be appropriately cited (see Yang, Ingwersen et al. 2017 source or Publication field) when used. Any changes or derivations of this model by the user should be documented. The model itself and any results from use of this model shall not be construed to consitute US EPA opinion or policy.
copyright: false

## General comment
BEA Code & Name is '311615:Poultry processing'. Description of the primary industry producing this good or service, adapted from the Census Bureau NAICS 2007 descriptions: This U.S. industry comprises establishments primarily engaged in (1) slaughtering poultry and small game and/or (2) preparing processed poultry and small game meat and meat byproducts.

## Technology
The process describes the average US production of this good or service within this NAICS-based grouping defined in the BEA 2007 detailed input-output tables (BEA 2015). Distribution, wholesale and retailing of this good or service, use, and final disposal are not included. Creation of a product system with this process will enable modeling of all upstream (supply-chain) activities.

## Geography
Data represent the 50 US states

## Time period
2017 was the year in which this version of USEEIO was released and is the target date for the model

## Reference product
- Packaged poultry; at manufacturer: 1 USD

## Inputs from technosphere
All rows: data quality (1,3,1,1,1)
- Commercial equipment rental: 0.00028331 USD
- Warehousing: 0.000808389 USD
- Books, newspapers, magazines, and other print media; at manufacturer: 5.7567e-7 USD
- Software: 4.01988e-5 USD
- Promoters and agents: 6.0586e-5 USD
- Office administration: 4.07744e-5 USD
- Other support services: 4.09663e-5 USD
- Coal; at mine: 0.00097897 USD
- Insurance carriers: 0.00052316 USD
- Rail transport: 0.000774906 USD
- Gasoline, fuels, and by-products of petroleum refining; at manufacturer: 0.00110091 USD
- Electronic equipment repair and maintenance: 0.000324468 USD
- Computer terminals and other computer peripheral equipment; at manufacturer: 0.000262731 USD
- Abrasive products; at manufacturer: 2.00034e-5 USD
- All other food and drinking places: 8.11651e-5 USD
- Plastic pipe, fittings, and sausage casings; at manufacturer: 0.00122021 USD
- Scenic and sightseeing transportation and support activities for transportation: 1.9189e-7 USD
- Other rubber products; at manufacturer: 6.00103e-5 USD
- Insurance agencies and brokerages: 0.000161946 USD
- Other retail: 0.000400069 USD
- Relay and industrial controls; at manufacturer: 0.00116576 USD
- State and local government enterprises: 0.0014308 USD
- Water transport (boats, ships, ferries): 6.11617e-5 USD
- Cutting and machine tool accessory, rolling mill, and other metalworking machines; at manufacturer: 4.00069e-5 USD
- Packaged meat (except poultry); at manufacturer: 0.021148 USD
- Specialized design: 0.000102896 USD
- Nonresidential building repair and maintanence: 0.00178755 USD
- Satellite, telecommunications resellers, and all other telecommunications: 6.07779e-5 USD
- Primary iron, steel, and ferroalloy products; at manufacturer: 1.9189e-7 USD
- Chemicals (except basic chemicals, agrichemicals, polymers, paints, pharmaceuticals,soaps, cleaning compounds); at manufacturer: 0.0015643 USD
- Lessors of nonfinancial intangible assets: 0.00319451 USD
- Other real estate: 4.19258e-5 USD
- Performances: 2.03872e-5 USD
- Management consulting: 0.000285613 USD
- Buildings and dwellings services: 0.00269903 USD
- Limited-service restaurants: 0.0014804 USD
- Cardboard containers; at manufacturer: 0.0159172 USD
- Material handling equipment; at manufacturer: 0.000121364 USD
- Noncomparable imports: 0.00129341 USD
- Cattle ranches and feedlots: 0.00752267 USD
- Other vehicle parts; at manufacturer: 0.00242329 USD
- Unrefined oil and gas; at extraction site: 2.01953e-5 USD
- Scientific research and development: 6.07779e-5 USD
- Seasonings and dressings; at manufacturer: 0.00133313 USD
- Civic, social, professional, and similar organizations: 0.000464684 USD
- Sports: 6.11617e-5 USD
- Cardboard; at manufacturer: 0.00102651 USD
- Monetary authorities and depository credit intermediation: 0.00559468 USD
- Machine shops; at manufacturer: 0.000180415 USD
- Vehicle rental and leasing: 0.000566812 USD
- Air conditioning, refrigeration, and warm air heating equipment; at manufacturer: 4.03907e-5 USD
- Golf courses, marinas, ski resorts, fitness and other rec centers and industries: 0.000182909 USD
- Other animal food; at manufacturer: 3.76105e-5 USD
- Air transport: 0.00256994 USD
- Packaged poultry; at manufacturer: 0.1276 USD
- Employment services: 0.000181566 USD
- Nondepository credit intermediation and related activities: 0.00131538 USD
- Independent artists, writers, and performers: 0.00022234 USD
- Natural gas; at consumer: 0.00517854 USD
- Drinking water and wastewater treatment; at consumer: 0.00133021 USD
- Data processing and hosting: 0.00234438 USD
- Investment advice, portfolio management, and other financial advising services: 0.000263115 USD
- Electronic capacitors, resistors, coils, transformers, connectors and other components (except semiconductors and printed circuit assemblies); at manufacturer: 0.000301395 USD
- Vegetable oils and by-products; at manufacturer: 0.000101169 USD
- Motor vehicle steering, suspension components (except spring), and brake systems; at manufacturer: 4.01988e-5 USD
- Wild-caught fish and game; at place of capture: 0.00483263 USD
- Electricity; at consumer: 0.00517998 USD
- Food and beverage stores: 2.00034e-5 USD
- Passenger ground transport: 0.000406401 USD
- Legal services: 0.00211399 USD
- Wireless telecommunications: 0.000385822 USD
- Vehicles and parts sales: 0.000500853 USD
- Rubber tires; at manufacturer: 2.00034e-5 USD
- Truck transport: 0.0408029 USD
- Pipeline transport: 1.9189e-7 USD
- Other petroleum and coal products; at manufacturer: 0.000160027 USD
- Other computer related services, including facilities management: 0.000383327 USD
- Other textiles; at manufacturer: 3.8378e-7 USD
- Company and enterprise management: 0.0313581 USD
- General merchandise stores: 6.00103e-5 USD
- Marketing research and all other miscellaneous professional, scientific, and technical services: 0.00113607 USD
- Vehicle engines and engine parts; at manufacturer: 2.01953e-5 USD
- Poultry farms: 0.425653 USD
- Hotels and campgrounds: 0.000792799 USD
- Leather; at manufacturer: 0.000280048 USD
- Communications equipment; at manufacturer: 2.00034e-5 USD
- Household goods repair: 0.000223492 USD
- Business support: 0.000447176 USD
- Telecommunications: 0.00105323 USD
- Animal farms and aquaculture ponds (except cattle and poultry): 0.00542661 USD
- Vehicle repair: 0.000670284 USD
- Paper bags and coated paper; at manufacturer: 0.0146603 USD
- Investigation and security: 0.000182909 USD
- Environmental and other technical consulting services: 6.11617e-5 USD
- Other basic organic chemicals; at manufacturer: 0.000221189 USD
- Advertising and public relations: 0.00250863 USD
- Commercial machinery repair: 0.00129998 USD
- Other plastic products; at manufacturer: 0.0133823 USD
- Securities and commodities brokerage and exchanges: 0.0011271 USD
- Vehicle electrical and electronic equipment; at manufacturer: 6.02022e-5 USD
- Computer systems design: 0.000906871 USD
- Wholesale trade: 0.0236936 USD
- Transmission and power train parts; at manufacturer: 6.00103e-5 USD
- Plastic bags, films, and sheets; at manufacturer: 0.00652242 USD
- Facilities support: 1.9189e-7 USD
- Lids, jars, bottle caps, other metal closures and crowns; at manufacturer: 2.00034e-5 USD
- Accounting, tax preparation, bookkeeping, and payroll: 0.00161639 USD
- Soap and cleaning compounds; at manufacturer: 0.000420072 USD
- All other converted paper products; at manufacturer: 0.00221914 USD
- Cutlery and handtools; at manufacturer: 0.000842831 USD
- Waste management and remediation: 0.00350765 USD
- Architectural, engineering, and related services: 0.000793281 USD
- Metal pipe fittings, ball and roller bearings, industrial patterns, metal bath fixtures, other misc. fabricated metals; at manufacturer: 0.00157312 USD
- Light gauge metal cans, boxes, and containers; at manufacturer: 0.000841679 USD
- Consumer goods and general rental centers: 6.0586e-5 USD
- Full-service restaurants: 0.000871853 USD

## Inputs from nature
- Energy, wind: 0.00324802 MJ; data quality (3,1,1,1,1)
- Water, fresh: 0.00090097, 0.00276344 m3 (2 entries, compartments not in this file); data quality (3,2,1,4,2)
- Occupation, industrial area, built up: 0.000192089 m2*a; data quality (4,2,1,1,1)
- Occupation, urban, discontinuously built: 8.56829e-5 m2*a; data quality (4,2,1,1,1)
- Water, saline: 0.000167871 m3; data quality (4,2,1,4,2)
- Occupation, industrial area: 0.000576268 m2*a; data quality (4,2,1,1,1)

## Emissions to nature
- ethylene glycol: 4.86649e-10 kg; data quality (5,2,1,1,5)
- selenium: 1.39056e-12 kg; data quality (2,2,1,1,5)
- acenaphthylene: 1.9422e-10 kg; data quality (3,2,1,1,5)
- bromoform: 4.88458e-14 kg; data quality (3,2,1,1,5)
- acrylic acid: 6.35087e-21 kg; data quality (4,2,1,1,5)
- ethane, 1,2-dibromo-: 1.5209e-15 kg; data quality (2,2,1,1,5)
- fluorene: 5.75593e-11 kg; data quality (3,2,1,1,4)
- 1,1,1-trichloroethane: 8.31516e-13 kg; data quality (4,2,1,1,5)
- trichloroethylene: 7.47243e-13 kg; data quality (4,2,1,1,5)
- chlorine: 1.64341e-9 kg; data quality (4,2,1,1,5)
- chlorine: 5.42733e-8 kg; data quality (2,1,1,1,4)
- pentachlorophenol: 1.27017e-15 kg; data quality (3,2,1,1,5)
- Methane: 7.10337e-7 kg; data quality (4,2,1,4,1)
- Chromium VI: 5.19594e-12 kg; data quality (3,2,1,1,5)
- sulfur dioxide: 9.21384e-6 kg; data quality (2,2,1,1,5)
- BUTYL ISOCYANATE: 6.35087e-21 kg; data quality (4,2,1,1,5)
- Nitrogen: 3.78969e-5 kg; data quality (2,2,1,1,5)
- Benzo(g,h,i)perylene: 3.6395e-11 kg; data quality (3,2,1,1,5)
- Xylene: 3.121e-9 kg; data quality (3,2,1,4,1)
- antimony: 1.04685e-12 kg; data quality (3,2,1,1,5)
- t-butyl methyl ether: 4.38356e-14 kg; data quality (3,2,1,1,5)
- methane, dichloro-, hcc-30: 7.59021e-12 kg; data quality (4,2,1,1,5)
- PERACETIC ACID: 5.53371e-8, 4.0524e-10, 4.72018e-7 kg (3 entries, compartments not in this file); data quality (4,1,1,1,4)
- Propane, 1,1,1,3,3,3-hexafluoro-, HCFC-236fa: 7.96314e-11 kg; data quality (4,2,1,4,1)
- 4-nitrophenol: 1.13608e-10 kg; data quality (3,2,1,1,5)
- AMMONIA: 1.76586e-6 kg; data quality (3,1,1,1,4)
- o-Xylene: 8.39705e-10 kg; data quality (3,2,1,2,4)
- Indeno(1,2,3-cd)pyrene: 9.59612e-12 kg; data quality (3,2,1,1,5)
- benz[a]anthracene: 1.33639e-11 kg; data quality (3,2,1,1,5)
- para-xylene: 6.6049e-11 kg; data quality (4,2,1,2,3)
- methanol: 8.22319e-9 kg; data quality (4,2,1,1,5)
- Chromium, ion: 9.96465e-11 kg; data quality (2,2,1,1,5)
- particulates, < 2.5 um: 2.26449e-6 kg; data quality (3,2,1,1,5)
- Ethane, 1,1,1-trifluoro-, HFC-143a: 2.94764e-9 kg; data quality (4,2,1,4,1)
- Ethylene glycol monoethyl ether: 1.24755e-10, 1.98024e-12 kg (2 entries, compartments not in this file); data quality (5,1,1,1,5)
- beryllium: 2.3976e-13 kg; data quality (2,2,1,1,5)
- formaldehyde: 2.30779e-8 kg; data quality (3,2,1,3,3)
- methane, bromo-, halon 1001: 5.74077e-13 kg; data quality (3,2,1,1,5)
- 2-chloro-1-phenylethanone: 8.76737e-15 kg; data quality (2,2,1,1,5)
- isophorone: 7.26425e-13 kg; data quality (2,2,1,1,5)
- pyrene: 6.75427e-11 kg; data quality (3,2,1,1,5)
- 1,2,4-trimethylbenzene: 2.63949e-9 kg; data quality (5,1,1,1,4)
- Sulfuric acid: 1.19144e-10 kg; data quality (2,1,1,1,5)
- methyl isobutyl ketone: 1.27017e-20 kg; data quality (4,2,1,1,5)
- carbon tetrachloride: 1.12093e-12 kg; data quality (4,2,1,1,5)
- methylene diphenyl diisocyanate: 6.63031e-13 kg; data quality (4,2,1,1,5)
- o-cresol: 2.98353e-11 kg; data quality (3,2,1,1,5)
- carbonyl sulfide: 9.0115e-11 kg; data quality (4,2,1,1,5)
- methane, chlorodifluoro-, hcfc-22: 2.17093e-9 kg; data quality (4,1,1,1,4)
- benzene, ethyl-: 1.82831e-9 kg; data quality (3,2,1,3,3)
- methane, monochloro-, r-40: 1.23678e-12 kg; data quality (3,2,1,1,5)
- phenanthrene: 2.30317e-10 kg; data quality (3,2,1,1,5)
- Ethene, chloro-: 4.48374e-13 kg; data quality (3,2,1,1,5)
- diethanolamine: 5.71579e-15 kg; data quality (3,2,1,1,5)
- Propane, 1,2-dichloro-: 8.22061e-13 kg; data quality (4,2,1,1,5)
- hydroquinone: 6.35087e-21 kg; data quality (3,2,1,1,5)
- Benzo(b)fluoranthene: 1.60601e-13 kg; data quality (3,2,1,4,1)
- Benzo(a)anthracene: 6.12045e-14 kg; data quality (2,2,1,1,5)
- HYDROGEN SULFIDE: 6.0535e-9 kg; data quality (3,1,1,1,5)
- arsenic: 2.15153e-11 kg; data quality (3,2,1,2,4)
- butadiene: 5.8563e-10 kg; data quality (3,2,1,4,1)
- Chrysene: 6.80334e-13 kg; data quality (2,2,1,2,4)
- hexane: 7.69264e-8 kg; data quality (3,2,1,1,5)
- Carbon dioxide: 0.0385427 kg; data quality (4,2,1,4,1)
- lead: 8.55168e-11 kg; data quality (3,2,1,1,5)
- Water, fresh: 0.00313623 m3; data quality (3,2,1,4,2)
- nitric acid: 1.26726e-7 kg; data quality (3,1,1,1,4)
- Benzo(k)fluoranthene: 1.48714e-13 kg; data quality (3,2,1,4,1)
- hydrogen sulfide: 3.7217e-10 kg; data quality (3,2,1,1,5)
- Ethane, 1,1,1,2-tetrafluoro-, HFC-134a: 2.59666e-8 kg; data quality (4,2,1,4,1)
- ammonia: 8.54044e-8 kg; data quality (3,1,1,1,4)
- acenaphthene: 2.04934e-11 kg; data quality (3,2,1,2,3)
- phthalate, dioctyl-: 1.17111e-15 kg; data quality (3,2,1,1,5)
- p-cresol: 5.99962e-11 kg; data quality (3,2,1,1,5)
- carbon monoxide: 1.39073e-5 kg; data quality (3,2,1,1,2)
- mercury: 1.02923e-11 kg; data quality (2,2,1,1,5)
- cyanide: 3.13113e-12 kg; data quality (3,2,1,1,5)
- 2,2,4-trimethylpentane: 7.47512e-9 kg; data quality (3,2,1,1,4)
- acrolein: 5.13702e-10 kg; data quality (3,2,1,3,2)
- Dinitrogen monoxide: 6.55741e-8 kg; data quality (4,2,1,4,1)
- hydrogen fluoride: 1.87868e-10 kg; data quality (2,2,1,1,5)
- HYDROGEN SULFIDE: 2.63962e-9 kg; data quality (3,1,1,1,4)
- Methane, difluoro-, HFC-32: 4.01201e-9 kg; data quality (4,2,1,4,1)
- Dichlorvos: 6.35087e-21 kg; data quality (3,2,1,1,5)
- 3-methylcholanthrene: 9.04111e-15 kg; data quality (2,2,1,1,5)
- NITRATE: 7.33709e-7 kg; data quality (5,1,1,1,4)
- biphenyl: 1.11215e-10 kg; data quality (3,2,1,1,5)
- ammonia: 6.03856e-6 kg; data quality (3,2,1,1,5)
- nitrogen oxides: 9.13844e-6 kg; data quality (2,2,1,1,4)
- naphthalene: 1.09341e-9 kg; data quality (3,2,1,2,4)
- ethane, 1,2-dichloro-: 2.30564e-10 kg; data quality (3,2,1,1,5)
- 2,4-dinitrophenol: 4.48371e-15 kg; data quality (5,2,1,1,5)
- Dimethyl sulfate: 6.0118e-14 kg; data quality (2,2,1,1,5)
- 2,4-D: 6.35087e-21 kg; data quality (3,2,1,1,5)
- NITROUS ACID: 1.00728e-12 kg; data quality (5,1,1,1,5)
- Phosphine: 7.85158e-12 kg; data quality (4,2,1,1,5)
- cadmium: 8.51219e-11 kg; data quality (3,2,1,1,5)
- Ethane, pentafluoro-, HFC-125: 6.8893e-9 kg; data quality (4,2,1,4,1)
- 2-methylnaphthalene: 1.59462e-12 kg; data quality (2,2,1,1,5)
- m-xylene: 7.83419e-10 kg; data quality (3,2,1,4,2)
- Dibenz(a,h)anthracene: 2.1988e-14 kg; data quality (2,2,1,1,5)
- phenol: 3.80036e-10 kg; data quality (3,2,1,1,5)
- chloroform: 8.24697e-10 kg; data quality (4,2,1,1,5)
- Propene, 1,3-dichloro-: 4.66535e-18 kg; data quality (3,2,1,1,5)
- anthracene: 4.49908e-11 kg; data quality (3,2,1,1,5)
- benzene, chloro-: 8.51676e-13 kg; data quality (4,2,1,1,5)
- monochloroethane: 5.26033e-14 kg; data quality (3,2,1,1,5)
- Hydrazine, methyl-: 2.12917e-13 kg; data quality (2,2,1,1,5)
- hydrogen chloride: 2.10732e-9 kg; data quality (2,2,1,1,5)
- carbon disulfide: 1.62818e-13 kg; data quality (4,2,1,1,5)
- PHOSPHORUS: 1.97033e-12 kg; data quality (2,2,1,1,5)
- Water, saline: 8.50596e-5 m3; data quality (4,2,1,4,2)
- Diethylene glycol butyl ether: 1.90526e-20 kg; data quality (4,2,1,1,5)
- toluene: 1.70178e-8 kg; data quality (3,2,1,2,4)
- acetophenone: 4.27785e-11 kg; data quality (3,2,1,1,5)
- VOC, volatile organic compounds: 2.06877e-6 kg; data quality (3,2,1,1,4)
- 1,4-dichlorobenzene: 3.47607e-12 kg; data quality (2,2,1,1,5)
- manganese: 9.77398e-11 kg; data quality (3,2,1,1,5)
- acetaldehyde: 1.12674e-8 kg; data quality (3,2,1,3,3)
- propanal: 2.39585e-9 kg; data quality (3,2,1,2,3)
- toluene-2,4-diisocyante: 6.35087e-21 kg; data quality (3,2,1,1,5)
- fluoranthene: 5.06864e-11 kg; data quality (3,2,1,1,5)
- methyl methacrylate: 2.50491e-14 kg; data quality (4,2,1,1,5)
- Phthalate, dibutyl-: 3.54678e-11 kg; data quality (3,2,1,1,5)
- 1,1,2,2-tetrachloroethane: 2.01287e-15 kg; data quality (3,2,1,1,5)
- benzyl chloride: 8.76718e-13 kg; data quality (2,2,1,1,5)
- styrene: 3.33706e-9 kg; data quality (3,2,1,1,5)
- benzo(a)pyrene: 1.11035e-11 kg; data quality (3,2,1,1,5)
- ethene, tetrachloro-: 9.46534e-13 kg; data quality (3,2,1,1,5)
- NITROUS ACID: 4.69243e-6 kg; data quality (5,1,1,1,4)
- benzene: 1.36559e-8 kg; data quality (3,2,1,2,4)
- ethane, 1,1,2-trichloro-: 5.61925e-18 kg; data quality (4,2,1,1,5)
- cumene: 3.00897e-13 kg; data quality (4,2,1,1,5)
- ozone: 7.23644e-9 kg; data quality (4,1,1,1,4)
- Cobalt: 7.83542e-12 kg; data quality (3,2,1,1,5)
- Hydrocarbons, aromatic: 6.44079e-10 kg; data quality (3,2,1,3,3)
- Phosphorus: 5.49251e-6 kg; data quality (3,1,1,1,5)
- particulates, < 10 um: 2.20534e-6 kg; data quality (3,2,1,1,5)
- toluene, 2,4-dinitro-: 3.50568e-16 kg; data quality (5,2,1,1,5)
- vinyl acetate: 1.9822e-10 kg; data quality (4,2,1,1,5)
- nickel: 2.39137e-10 kg; data quality (3,2,1,1,5)

## Inventory method
Input-output

## Modelling constants
The reference unit of all processes is 1 USD2013 of the good or service. The technosphere inputs are based on the US BEA detailed input-output tables for 2007. The IO tables are combined to develop a commodity-by-commodity model based on the the industry-technology assumption (see Suh et al., 2010), which assumes all commodities produced by a given industry have the same input structure, but that multiple industries can produce the same commodity. Thus, model technosphere flows represent commodity outputs (and not industry outputs) from other processes in the model. There are no by-products included in these processes. All commodity production is based on US-conditions, despite in reality that some goods and services are produced overseas, as USEEIO v1.1 is a single-region IO model.

## Completeness
The input-output approach assures that all purchased inputs associated with the sectors making these commodities as reported in the US census for 2007 are included. The direct resources extracted including minerals, energy sources, water and land occupied are included. Emissions to air include all critieria air pollutants, greenhouse gases, and hazardous and toxic air pollutants as defined by US EPA. Releases to water include toxics, total nitrogen and total phosphorus, and water discharges. Releases to soil or groundwater include toxics and agriculutural pesticides. Some metal releases to air, water and soil are not included because they could not be speciated. Solid hazardous and non-hazardous wastes generated are not included as an elementary flows although purchases of waste services are included.

## Data treatment
Greenhouse gases are primarily from the US Greenhouse Gas Emission Inventory (USEPA 2016a). Biogenic C uptake is not included (change from version 1.0), as biogenic C emission are not included. Toxic releases to air, water and soil (except pesticides) are from the 2013 Toxic Release Inventory (USEPA 2015a). Criteria air pollutants and hazardous air pollutants are from the 2011 National Emissions Inventory (USEPA 2015b). All estimates are normalized by industry based on sector output in the data year, then converted to 2013 USD using relative sector-specific CPIs (if data year is not 2013). Energy use represent raw renewables or fossil fuel energies and is based on EIA data for 2014. See Table 1 in Yang, Ingwersen et al. 2017 and Supporting Information 1, and the v1.1 data update notes (Ingwersen et al. 2017) for all details on environmental data sources used.Land occupation associated with manufacturing buildings was estimated based on the building floorspace data provided by the U.S. Energy Information Administration in the 2010 Manufacturing Energy Consumption Survey (EIA 2013). Portions of total renewable energy (EIA 2016) based on EIA-923 reports for 2014 (EIA 2017) are included. Nitrogen and Phosphorus releases are modeled in total N and total P equivalents as estimated by the Discharge Monitoring Report Nutrient Loading tool (USEPA 2016b). Self-supplied withdrawals were assigned to industrial sectors based on water use statistics for Canadian industries by NAICS 3-digit sector scaled to US production levels based on gross domestic product by industry (BEA 2015; Statistics Canada 2010), and further disaggregated to the manufacturing sectors based on compensation of employees as provided by the 2007 IO tables (BEA 2015). Water withdrawals associated with public supply were allocated to sectors based on their use of water, sewage, and other services in USD based on the IO tables (BEA 2015). Portions of total renewable energy (EIA 2016) by type are assigned to sectors (hydro, wind, solar, or) based on EIA-923 reports for 2014 (EIA 2017).

## Data collection
2015-2016

## Sampling procedure
US federal government sources, including surveys and US EPA emissions databases are used as the primary sources. From these sources, data for US reporting establishments/facilities are aggregated by the NAICS sector as defined in the BEA detailed 2007 input-output tables. When level of sector aggregation differs, or when direct emissions are not reported but modeled, additional sources are used to make allocations and estimates.

## Review details
In regard to quality assurance and peer-review, each dataset created went through Quality Assurance as defined in a quality assurance project plans at US EPA, CSRA or ERG. The model was assembled with the IO model builder model (USEPA 2016c). Validation functions were used to check that all the model components were properly assembled and harmonized. Bayou Demeke and Santosh Ghimire provided internal peer review of the model methodology and the manuscript underwent standard EPA management review. An editor and two anonymous reviewers at the Journal of Cleaner Production reviewed the model. In regard to data quality evaluation, data quality assessment was performed at the flow and process levels according to the updated US EPA data quality assessment guidelines as defined in US EPA (2016b).

## Intended application
The primary application is for use in the US Environmentally-Extended Input-Ouput model, USEEIO, version 1.1. This model is being used by the US EPA for supporting tools that prioritize goods and services based on potential environmental impacts, resource use or emissions for large regions, including the US and US states, and as a strealined tool for organizations as a starting point to consider sustainable materials management. Model results are designed to provide meso/macro-level decision support.

## Project
USEEIO v1.1 was developed by the US EPA with CSRA and ERG with Wesley W. Ingwersen and David E. Meyer as research leads. Yi Yang was the technical lead on the work for CSRA (contract EP-C-15-012); Troy Hawkins was lead for ERG (contract EP-C-12-021).

## Sources
- USEPA 2016b
- USDA 2016
- Maupin et al. 2014
- USEPA 2015b
- Goebes et al. 2003
- USEPA 2016c
- USGS 2015
- Torcellini et al. 2003
- Blackhurst et al. 2010
- BEA 2015
- Edelen and Ingwersen 2017
- USDA 2009a
- Kim et el. 2013
- EIA 2017
- EIA 2013
- USDA 2006
- Ingwersen et al. 2017
- USGS 2016
- EIA 2015
- Nickerson et al. 2011
- Lovelace 2009
- USEPA 2015a
- USDA 2009b
- Macknick et al. 2011
- Statistics Canada 2010
- EIA 2016
- BLM 2008
- USEPA 2016a
- Yienger et al. 1995
- Ingwersen et al. DRAFT
- USDA 2014
