# Internet publishing and broadcasting

Dataset: openLCA process, unit process
Category: 5191: Other Information Services
Geography: United States
Time period: 2017-01-01 to 2017-12-31
Data quality: US EPA - Process Pedigree Matrix (1;1)
Exchange data quality scheme: US EPA - Flow Pedigree Matrix
Generated by: US EPA with CSRA and ERG
Owner: US EPA
Published in: Yang, Ingwersen et al. 2017
restrictionsDescription: This model shold be appropriately cited (see Yang, Ingwersen et al. 2017 source or Publication field) when used. Any changes or derivations of this model by the user should be documented. The model itself and any results from use of this model shall not be construed to consitute US EPA opinion or policy.
copyright: false

## General comment
BEA Code & Name is '519130:Internet publishing and broadcasting and Web search portals'. Description of the primary industry producing this good or service, adapted from the Census Bureau NAICS 2007 descriptions: This industry comprises establishments primarily engaged in 1) publishing and/or broadcasting content on the Internet exclusively or 2) operating Web sites that use a search engine to generate and maintain extensive databases of Internet addresses and content in an easily searchable format (and known as Web search portals). The publishing and broadcasting establishments in this industry do not provide traditional (non-Internet) versions of the content that they publish or broadcast. They provide textual, audio, and/or video content of general or specific interest on the Internet exclusively. Establishments known as Web search portals often provide additional Internet services, such as e-mail, connections to other web sites, auctions, news, and other limited content, and serve as a home base for Internet users.

## Technology
The process describes the average US production of this good or service within this NAICS-based grouping defined in the BEA 2007 detailed input-output tables (BEA 2015). Distribution, wholesale and retailing of this good or service, use, and final disposal are not included. Creation of a product system with this process will enable modeling of all upstream (supply-chain) activities.

## Geography
Data represent the 50 US states

## Time period
2017 was the year in which this version of USEEIO was released and is the target date for the model

## Reference product
- Internet publishing and broadcasting: 1 USD

## Inputs from technosphere
All rows: data quality (1,3,1,1,1)
- News syndicates, libraries, archives, Internet publishing and all other information services: 0.0013282 USD
- Newspapers; at publisher: 8.56489e-5 USD
- Waste management and remediation: 0.000377351 USD
- Gasoline, fuels, and by-products of petroleum refining; at manufacturer: 0.000657163 USD
- Truck transport: 0.00321278 USD
- Coal; at mine: 5.05173e-7 USD
- Food and beverage stores: 2.04816e-5 USD
- Vehicle engines and engine parts; at manufacturer: 0.000113483 USD
- Cutting and machine tool accessory, rolling mill, and other metalworking machines; at manufacturer: 1.01016e-5 USD
- Other real estate: 0.0216114 USD
- Custom computer programming: 0.00215041 USD
- Natural gas; at consumer: 9.17532e-5 USD
- Paper bags and coated paper; at manufacturer: 0.000112117 USD
- Electronic capacitors, resistors, coils, transformers, connectors and other components (except semiconductors and printed circuit assemblies); at manufacturer: 7.27747e-5 USD
- Semiconductor machinery; at manufacturer: 0.000272634 USD
- Couriers and messengers: 0.00889386 USD
- Movies and film: 7.22314e-6 USD
- Postal service: 0.0062536 USD
- Wooden windows, door, and flooring; at manufacturer: 0.000558932 USD
- Screws, nuts, and bolts; at manufacturer: 0.000280364 USD
- Pet care, photofinishing, parking and other sundry services: 0.000142055 USD
- Metal hinges, keys, lock, and other hardware; at manufacturer: 6.12032e-5 USD
- Other engine equipment; at manufacturer: 1.51552e-6 USD
- Performances: 6.35091e-5 USD
- Corn products; at manufacturer: 0.000103696 USD
- General merchandise stores: 7.15807e-5 USD
- Securities and commodities brokerage and exchanges: 0.00174893 USD
- Telephones; at manufacturer: 2.04816e-5 USD
- State and local government enterprises: 0.000162055 USD
- Independent artists, writers, and performers: 0.00028332 USD
- Other support services: 0.00198517 USD
- Directory, mailing list, and other publishers; at publisher: 0.00312337 USD
- Noncomparable imports: 0.00360564 USD
- Books; at publisher: 0.000974889 USD
- Other rubber products; at manufacturer: 2.31152e-5 USD
- All other food and drinking places: 0.00014801 USD
- Investment advice, portfolio management, and other financial advising services: 0.00016479 USD
- Other concrete products; at manufacturer: 5.79135e-6 USD
- Golf courses, marinas, ski resorts, fitness and other rec centers and industries: 0.000383713 USD
- Employment services: 0.0123254 USD
- Industrial process variable instruments; at manufacturer: 0.000193463 USD
- Other vehicle parts; at manufacturer: 0.000187246 USD
- Gaskets, seals, musical instruments, fasteners, brooms, brushes, mop and other misc. goods; at manufacturer: 1.53604e-5 USD
- Air conditioning, refrigeration, and warm air heating equipment; at manufacturer: 1.15209e-5 USD
- Sports: 0.000166084 USD
- Computer terminals and other computer peripheral equipment; at manufacturer: 0.00134096 USD
- Nondepository credit intermediation and related activities: 0.000555633 USD
- Printing support; at manufacturer: 0.00550023 USD
- Office supplies (not paper); at manufacturer: 2.5706e-5 USD
- Cardboard containers; at manufacturer: 0.000395601 USD
- Promoters and agents: 1.28221e-5 USD
- Motor vehicle steering, suspension components (except spring), and brake systems; at manufacturer: 4.70769e-5 USD
- Wholesale trade: 0.0072073 USD
- Unrefined oil and gas; at extraction site: 7.81204e-6 USD
- Rubber tires; at manufacturer: 0.000163926 USD
- Books, newspapers, magazines, and other print media; at manufacturer: 0.0382279 USD
- Monetary authorities and depository credit intermediation: 0.00538179 USD
- Communications equipment; at manufacturer: 0.000700715 USD
- Environmental and other technical consulting services: 0.00278297 USD
- Other petroleum and coal products; at manufacturer: 5.96871e-5 USD
- Ink and ink cartridges; at manufacturer: 0.000965039 USD
- Fluid meters and counting devices; at manufacturer: 5.05173e-7 USD
- Warehousing: 0.00274671 USD
- Metal pipe fittings, ball and roller bearings, industrial patterns, metal bath fixtures, other misc. fabricated metals; at manufacturer: 0.00023488 USD
- Facilities support: 0.00126038 USD
- Insurance carriers: 0.00414818 USD
- Lessors of nonfinancial intangible assets: 0.00872188 USD
- Rail transport: 9.6053e-5 USD
- Polystyrene foam products; at manufacturer: 5.14417e-5 USD
- Internet publishing and broadcasting: 0.0173787 USD
- Commercial equipment rental: 0.00838711 USD
- Computer storage device readers; at manufacturer: 5.92699e-5 USD
- Office administration: 0.00406762 USD
- Vehicle rental and leasing: 0.00210686 USD
- Copper, nickel, lead, and zinc; at mine: 0.000243483 USD
- Marketing research and all other miscellaneous professional, scientific, and technical services: 0.00800479 USD
- Material handling equipment; at manufacturer: 3.8898e-5 USD
- Buildings and dwellings services: 0.00456849 USD
- Civic, social, professional, and similar organizations: 0.000298285 USD
- Audio and video equipment; at manufacturer: 1.73592e-5 USD
- Business support: 0.00313767 USD
- Plastic bags, films, and sheets; at manufacturer: 0.000133377 USD
- Photographers: 1.6854e-5 USD
- Other basic organic chemicals; at manufacturer: 4.02213e-5 USD
- Metal coatings, engravings, and heat treatments; at manufacturer: 0.000734072 USD
- Paints and coatings; at manufacturer: 3.26781e-5 USD
- Air transport: 0.00376353 USD
- Secondary steel products; at manufacturer: 5.3206e-6 USD
- Vehicle repair: 0.000690152 USD
- Machine shops; at manufacturer: 0.00053452 USD
- Glass and glass products; at manufacturer: 1.96707e-5 USD
- Magazines and journals; at publisher: 0.00139712 USD
- Metal windows, doors, and architectural products; at manufacturer: 0.000179654 USD
- Chemicals (except basic chemicals, agrichemicals, polymers, paints, pharmaceuticals,soaps, cleaning compounds); at manufacturer: 0.000256757 USD
- Transmission and power train parts; at manufacturer: 0.000282695 USD
- Other plastic products; at manufacturer: 0.000924727 USD
- Vehicles and parts sales: 0.000158034 USD
- Other retail: 0.00047012 USD
- Plastic bottles; at manufacturer: 5.46674e-5 USD
- Speed changers, industrial high-speed drives, and gears; at manufacturer: 0.000177987 USD
- Vehicle electrical and electronic equipment; at manufacturer: 0.000463039 USD
- Valve and fittings (except for plumbing); at manufacturer: 0.000128801 USD
- Full-service restaurants: 0.00184356 USD
- Fabric; at manufacturer: 4.76366e-5 USD
- Specialized design: 0.000528513 USD
- Passenger ground transport: 0.000777432 USD
- Cutlery and handtools; at manufacturer: 0.000389736 USD
- Consumer goods and general rental centers: 0.000211658 USD
- Pipeline transport: 5.05173e-7 USD
- Commercial machinery repair: 0.00133174 USD
- Accounting, tax preparation, bookkeeping, and payroll: 0.00584121 USD
- Household goods repair: 0.000365526 USD
- Paper; at manufacturer: 0.00238711 USD
- Telecommunications: 0.00796472 USD
- Computer systems design: 0.00593474 USD
- Electricity; at consumer: 0.000966948 USD
- Satellite, telecommunications resellers, and all other telecommunications: 0.000789028 USD
- Architectural, engineering, and related services: 0.0010228 USD
- Software: 0.00143566 USD
- Advertising and public relations: 0.0772557 USD
- Drinking water and wastewater treatment; at consumer: 0.000175445 USD
- Scenic and sightseeing transportation and support activities for transportation: 0.00640465 USD
- Rubber and plastic belts and hoses; at manufacturer: 1.61806e-5 USD
- Company and enterprise management: 0.0104639 USD
- Wireless telecommunications: 0.00106877 USD
- Wireless communications; at manufacturer: 0.00530805 USD
- Aluminum; at manufacturer: 0.000145119 USD
- Urethane and other foam products; at manufacturer: 1.71323e-5 USD
- Travel arrangement and reservation: 0.000492026 USD
- Data processing and hosting: 0.00523625 USD
- Water transport (boats, ships, ferries): 1.05106e-5 USD
- Veneer, plywood, and engineered wood; at manufacturer: 2.24529e-5 USD
- Electronic equipment repair and maintenance: 0.000409998 USD
- Cardboard; at manufacturer: 0.00121532 USD
- Hotels and campgrounds: 0.00193345 USD
- Management consulting: 0.0119292 USD
- Legal services: 0.00927921 USD
- Plastic pipe, fittings, and sausage casings; at manufacturer: 5.23558e-5 USD
- Insurance agencies and brokerages: 0.000113443 USD
- Other computer related services, including facilities management: 0.00795046 USD
- Investigation and security: 0.00123858 USD
- Limited-service restaurants: 0.00045527 USD
- Primary iron, steel, and ferroalloy products; at manufacturer: 0.000151802 USD
- Nonresidential building repair and maintanence: 0.000798809 USD

## Inputs from nature
- Occupation, urban, discontinuously built: 0.0003548 m2*a; data quality (4,2,1,1,1)
- Water, fresh: 5.24539e-5, 9.07768e-5 m3 (2 entries, compartments not in this file); data quality (1,2,1,4,2)
- Energy, solar: 0.000189549 MJ; data quality (3,1,1,1,1)

## Emissions to nature
- Chromium VI: 6.02699e-13 kg; data quality (3,2,1,3,3)
- sulfur dioxide: 1.15982e-8 kg; data quality (2,2,1,1,5)
- ethane, 1,1,2-trichloro-: 6.11094e-12 kg; data quality (4,2,1,1,5)
- Ethylene glycol monoethyl ether: 6.22553e-11 kg; data quality (4,2,1,1,5)
- Chromium, ion: 1.42939e-12 kg; data quality (3,2,1,3,3)
- methane, dichloro-, hcc-30: 5.11271e-11 kg; data quality (4,2,1,1,5)
- Diethylene glycol butyl ether: 9.95661e-11 kg; data quality (4,2,1,1,5)
- hydrogen chloride: 7.1644e-14 kg; data quality (2,2,1,1,5)
- carbon monoxide: 8.83628e-6 kg; data quality (3,2,1,1,1)
- methyl isobutyl ketone: 1.03886e-12 kg; data quality (4,2,1,1,5)
- benzene, ethyl-: 6.00668e-9 kg; data quality (3,2,1,4,1)
- ethene, tetrachloro-: 1.48251e-10 kg; data quality (3,2,1,1,5)
- Nitrogen: 2.8116e-8 kg; data quality (4,2,1,1,5)
- 3-methylcholanthrene: 3.25215e-16 kg; data quality (2,2,1,1,5)
- Propane, 1,1,1,3,3,3-hexafluoro-, HCFC-236fa: 7.87171e-11 kg; data quality (4,2,1,4,1)
- particulates, < 10 um: 5.27411e-9 kg; data quality (3,2,1,1,4)
- Water, fresh: 0.000121275 m3; data quality (1,2,1,4,2)
- Benzo(a)anthracene: 2.60169e-15 kg; data quality (2,2,1,1,5)
- Phosphorus: 4.1128e-9 kg; data quality (2,1,1,1,5)
- benzene: 1.47312e-8 kg; data quality (3,2,1,4,1)
- beryllium: 1.24054e-13 kg; data quality (2,2,1,1,5)
- nitrogen oxides: 6.22167e-7 kg; data quality (3,2,1,1,2)
- 2-methylnaphthalene: 8.30818e-15 kg; data quality (2,2,1,1,5)
- Cobalt: 3.06896e-14 kg; data quality (3,2,1,1,5)
- vinyl acetate: 3.23688e-10 kg; data quality (4,2,1,1,5)
- Benzo(b)fluoranthene: 7.06305e-13 kg; data quality (3,2,1,4,2)
- Methane, difluoro-, HFC-32: 3.96594e-9 kg; data quality (4,2,1,4,1)
- VOC, volatile organic compounds: 1.56869e-6 kg; data quality (3,2,1,1,4)
- Xylene: 2.11906e-8 kg; data quality (3,2,1,4,1)
- fluoranthene: 6.04691e-12 kg; data quality (3,2,1,4,1)
- acenaphthene: 5.88297e-12 kg; data quality (3,2,1,4,1)
- 2,2,4-trimethylpentane: 8.18538e-9 kg; data quality (3,2,1,4,1)
- BUTYL ISOCYANATE: 1.22219e-13 kg; data quality (4,2,1,1,5)
- benzo(a)pyrene: 6.19726e-13 kg; data quality (3,2,1,4,1)
- Methane: 5.26915e-8 kg; data quality (4,2,1,4,1)
- Carbon dioxide: 0.000566378 kg; data quality (4,2,1,4,1)
- Benzo(k)fluoranthene: 6.53558e-13 kg; data quality (3,2,1,4,1)
- ethylene glycol: 9.80192e-9 kg; data quality (5,2,1,1,5)
- Ethane, pentafluoro-, HFC-125: 6.8102e-9 kg; data quality (4,2,1,4,1)
- m-xylene: 7.71896e-10 kg; data quality (3,2,1,4,1)
- phenol: 8.05995e-13 kg; data quality (4,2,1,1,5)
- Dibenz(a,h)anthracene: 1.6461e-14 kg; data quality (2,2,1,1,4)
- phenanthrene: 2.05098e-11 kg; data quality (3,2,1,4,2)
- ammonia: 3.0221e-9 kg; data quality (3,2,1,2,4)
- naphthalene: 6.06662e-10 kg; data quality (3,2,1,3,2)
- 2-ethoxyethyl acetate: 1.03424e-10 kg; data quality (5,2,1,1,5)
- Dinitrogen monoxide: 2.00674e-9 kg; data quality (4,2,1,4,1)
- hydroquinone: 2.13883e-12 kg; data quality (3,2,1,1,5)
- manganese: 2.84061e-11 kg; data quality (3,2,1,1,5)
- Ethane, 1,1,1,2-tetrafluoro-, HFC-134a: 2.56685e-8 kg; data quality (4,2,1,4,1)
- acrylic acid: 3.11658e-11 kg; data quality (4,2,1,1,5)
- 1,2,4-trichlorobenzene: 1.44701e-10 kg; data quality (4,2,1,1,5)
- acrolein: 3.02892e-10 kg; data quality (3,2,1,4,1)
- butadiene: 2.37669e-9 kg; data quality (3,2,1,4,1)
- cadmium: 6.49932e-13 kg; data quality (3,2,1,1,5)
- Benzo(g,h,i)perylene: 1.2575e-10 kg; data quality (3,2,1,1,5)
- anthracene: 4.45229e-12 kg; data quality (3,2,1,4,1)
- methanol: 2.90429e-10 kg; data quality (4,2,1,1,5)
- nickel: 4.77036e-12 kg; data quality (3,2,1,3,3)
- diethanolamine: 5.28496e-11 kg; data quality (3,2,1,1,5)
- propanal: 8.18139e-10 kg; data quality (3,2,1,4,1)
- styrene: 2.31315e-10 kg; data quality (3,2,1,4,1)
- benz[a]anthracene: 6.6682e-13 kg; data quality (3,2,1,4,1)
- nitric acid: 4.69865e-10 kg; data quality (3,1,1,1,5)
- fluorene: 1.09935e-11 kg; data quality (3,2,1,4,1)
- para-xylene: 1.44465e-11 kg; data quality (3,2,1,4,1)
- lead: 1.9868e-13 kg; data quality (3,2,1,1,5)
- Indeno(1,2,3-cd)pyrene: 5.47427e-13 kg; data quality (3,2,1,4,1)
- acenaphthylene: 2.24451e-11 kg; data quality (3,2,1,4,1)
- Chrysene: 6.791e-13 kg; data quality (3,2,1,4,2)
- cumene: 1.21172e-9 kg; data quality (4,2,1,1,5)
- particulates, < 2.5 um: 1.02441e-7 kg; data quality (3,2,1,1,4)
- arsenic: 1.43988e-12 kg; data quality (3,2,1,4,2)
- hexane: 5.4914e-9 kg; data quality (3,2,1,4,1)
- o-Xylene: 2.77041e-10 kg; data quality (3,2,1,4,1)
- Ethane, 1,1,1-trifluoro-, HFC-143a: 2.9138e-9 kg; data quality (4,2,1,4,1)
- acetaldehyde: 3.87215e-9 kg; data quality (3,2,1,4,1)
- formaldehyde: 8.1205e-9 kg; data quality (3,2,1,4,1)
- toluene: 1.55377e-7 kg; data quality (4,2,1,1,5)
- pyrene: 7.53537e-12 kg; data quality (3,2,1,4,1)
- mercury: 1.07211e-13 kg; data quality (2,2,1,1,5)
- selenium: 5.26959e-13 kg; data quality (2,2,1,1,5)
- Hydrocarbons, aromatic: 1.61452e-10 kg; data quality (3,2,1,4,1)

## Inventory method
Input-output

## Modelling constants
The reference unit of all processes is 1 USD2013 of the good or service. The technosphere inputs are based on the US BEA detailed input-output tables for 2007. The IO tables are combined to develop a commodity-by-commodity model based on the the industry-technology assumption (see Suh et al., 2010), which assumes all commodities produced by a given industry have the same input structure, but that multiple industries can produce the same commodity. Thus, model technosphere flows represent commodity outputs (and not industry outputs) from other processes in the model. There are no by-products included in these processes. All commodity production is based on US-conditions, despite in reality that some goods and services are produced overseas, as USEEIO v1.1 is a single-region IO model.

## Completeness
The input-output approach assures that all purchased inputs associated with the sectors making these commodities as reported in the US census for 2007 are included. The direct resources extracted including minerals, energy sources, water and land occupied are included. Emissions to air include all critieria air pollutants, greenhouse gases, and hazardous and toxic air pollutants as defined by US EPA. Releases to water include toxics, total nitrogen and total phosphorus, and water discharges. Releases to soil or groundwater include toxics and agriculutural pesticides. Some metal releases to air, water and soil are not included because they could not be speciated. Solid hazardous and non-hazardous wastes generated are not included as an elementary flows although purchases of waste services are included.

## Data treatment
Greenhouse gases are primarily from the US Greenhouse Gas Emission Inventory (USEPA 2016a). Biogenic C uptake is not included (change from version 1.0), as biogenic C emission are not included. Toxic releases to air, water and soil (except pesticides) are from the 2013 Toxic Release Inventory (USEPA 2015a). Criteria air pollutants and hazardous air pollutants are from the 2011 National Emissions Inventory (USEPA 2015b). All estimates are normalized by industry based on sector output in the data year, then converted to 2013 USD using relative sector-specific CPIs (if data year is not 2013). Energy use represent raw renewables or fossil fuel energies and is based on EIA data for 2014. See Table 1 in Yang, Ingwersen et al. 2017 and Supporting Information 1, and the v1.1 data update notes (Ingwersen et al. 2017) for all details on environmental data sources used.Land occupation for commercial buildings was estimated based on the building floorspace data provided by the U.S. Energy Information Administration 2012 Commercial Building Energy Consumption Survey (CBECS) (EIA 2015). Total commercial public supply water use is reported by USGS (Maupin et al. 2014). Water use is allocated across commercial sectors based on their use of water, sewage, and other services in USD based on the 2007 Benchmark Use Table before redefinitions (BEA 2015).

## Data collection
2015-2016

## Sampling procedure
US federal government sources, including surveys and US EPA emissions databases are used as the primary sources. From these sources, data for US reporting establishments/facilities are aggregated by the NAICS sector as defined in the BEA detailed 2007 input-output tables. When level of sector aggregation differs, or when direct emissions are not reported but modeled, additional sources are used to make allocations and estimates.

## Review details
In regard to quality assurance and peer-review, each dataset created went through Quality Assurance as defined in a quality assurance project plans at US EPA, CSRA or ERG. The model was assembled with the IO model builder model (USEPA 2016c). Validation functions were used to check that all the model components were properly assembled and harmonized. Bayou Demeke and Santosh Ghimire provided internal peer review of the model methodology and the manuscript underwent standard EPA management review. An editor and two anonymous reviewers at the Journal of Cleaner Production reviewed the model. In regard to data quality evaluation, data quality assessment was performed at the flow and process levels according to the updated US EPA data quality assessment guidelines as defined in US EPA (2016b).

## Intended application
The primary application is for use in the US Environmentally-Extended Input-Ouput model, USEEIO, version 1.1. This model is being used by the US EPA for supporting tools that prioritize goods and services based on potential environmental impacts, resource use or emissions for large regions, including the US and US states, and as a strealined tool for organizations as a starting point to consider sustainable materials management. Model results are designed to provide meso/macro-level decision support.

## Project
USEEIO v1.1 was developed by the US EPA with CSRA and ERG with Wesley W. Ingwersen and David E. Meyer as research leads. Yi Yang was the technical lead on the work for CSRA (contract EP-C-15-012); Troy Hawkins was lead for ERG (contract EP-C-12-021).

## Sources
- USEPA 2016b
- USDA 2014
- USEPA 2015b
- Statistics Canada 2010
- BEA 2015
- Kim et el. 2013
- Nickerson et al. 2011
- EIA 2013
- Goebes et al. 2003
- USGS 2016
- USDA 2009b
- Ingwersen et al. 2017
- Lovelace 2009
- Maupin et al. 2014
- EIA 2016
- USEPA 2016c
- Edelen and Ingwersen 2017
- USGS 2015
- USDA 2006
- USEPA 2015a
- USDA 2016
- Yienger et al. 1995
- Blackhurst et al. 2010
- EIA 2015
- Torcellini et al. 2003
- BLM 2008
- USDA 2009a
- Ingwersen et al. DRAFT
- USEPA 2016a
- Macknick et al. 2011
- EIA 2017
