# Vaccines and other biological medical products; at manufacturer

Dataset: openLCA process, unit process
Category: 3254: Pharmaceutical and Medicine Manufacturing
Geography: United States
Time period: 2017-01-01 to 2017-12-31
Data quality: US EPA - Process Pedigree Matrix (1;1)
Exchange data quality scheme: US EPA - Flow Pedigree Matrix
Generated by: US EPA with CSRA and ERG
Owner: US EPA
Published in: Yang, Ingwersen et al. 2017
restrictionsDescription: This model shold be appropriately cited (see Yang, Ingwersen et al. 2017 source or Publication field) when used. Any changes or derivations of this model by the user should be documented. The model itself and any results from use of this model shall not be construed to consitute US EPA opinion or policy.
copyright: false

## General comment
BEA Code & Name is '325414:Biological product (except diagnostic) manufacturing'. Description of the primary industry producing this good or service, adapted from the Census Bureau NAICS 2007 descriptions: This U.S. industry comprises establishments primarily engaged in manufacturing vaccines, toxoids, blood fractions, and culture media of plant or animal origin (except diagnostic).

## Technology
The process describes the average US production of this good or service within this NAICS-based grouping defined in the BEA 2007 detailed input-output tables (BEA 2015). Distribution, wholesale and retailing of this good or service, use, and final disposal are not included. Creation of a product system with this process will enable modeling of all upstream (supply-chain) activities.

## Geography
Data represent the 50 US states

## Time period
2017 was the year in which this version of USEEIO was released and is the target date for the model

## Reference product
- Vaccines and other biological medical products; at manufacturer: 1 USD

## Inputs from technosphere
All rows: data quality (1,3,1,1,1)
- Other basic organic chemicals; at manufacturer: 0.00694867 USD
- Unrefined oil and gas; at extraction site: 0.000743266 USD
- Plastic bottles; at manufacturer: 0.000383404 USD
- Investigation and security: 9.70971e-5 USD
- Hotels and campgrounds: 5.23599e-5 USD
- Telecommunications: 0.000950193 USD
- Consumer goods and general rental centers: 4.72058e-5 USD
- Passenger ground transport: 4.40361e-6 USD
- State and local government enterprises: 0.00077753 USD
- Heavy gauge metal tanks; at manufacturer: 8.8413e-6 USD
- Commercial equipment rental: 0.000237614 USD
- Other computer related services, including facilities management: 0.00015266 USD
- General merchandise stores: 4.83775e-7 USD
- Advertising and public relations: 0.00322816 USD
- Electronic equipment repair and maintenance: 0.000343719 USD
- Software: 5.34948e-5 USD
- Industrial process variable instruments; at manufacturer: 4.96246e-5 USD
- Vehicle engines and engine parts; at manufacturer: 1.45133e-6 USD
- Wireless telecommunications: 0.000273863 USD
- Medicinal and botanical ingredients; at manufacturer: 0.0205309 USD
- Drinking water and wastewater treatment; at consumer: 0.000729007 USD
- Blood sugar, pregnancy, and other diagnostic test kits; at manufacturer: 0.000494206 USD
- Civic, social, professional, and similar organizations: 3.70277e-6 USD
- Cardboard containers; at manufacturer: 0.00137838 USD
- Investment advice, portfolio management, and other financial advising services: 3.08564e-6 USD
- Chemicals (except basic chemicals, agrichemicals, polymers, paints, pharmaceuticals,soaps, cleaning compounds); at manufacturer: 0.00187413 USD
- Promoters and agents: 6.17128e-7 USD
- Other vehicle parts; at manufacturer: 5.11256e-5 USD
- Company and enterprise management: 0.0523229 USD
- Food and beverage stores: 4.83775e-7 USD
- Water transport (boats, ships, ferries): 0.000142017 USD
- Polystyrene foam products; at manufacturer: 0.00106235 USD
- Other plastic products; at manufacturer: 0.00263537 USD
- Pipeline transport: 4.61049e-5 USD
- Adhesives; at manufacturer: 1.54808e-5 USD
- Management consulting: 0.00285445 USD
- Dry-cleaning and laundry: 6.17128e-7 USD
- Other support services: 9.40611e-5 USD
- Power boilers and heat exchangers; at manufacturer: 0.000142185 USD
- Petrochemicals; at manufacturer: 0.000649043 USD
- Motor vehicle steering, suspension components (except spring), and brake systems; at manufacturer: 4.70724e-5 USD
- Securities and commodities brokerage and exchanges: 3.70277e-6 USD
- Printed circuit and electronic assembly; at manufacturer: 1.45133e-6 USD
- Vehicle repair: 0.000762667 USD
- Specialized design: 0.000236296 USD
- Scientific research and development: 6.17128e-7 USD
- Metal coatings, engravings, and heat treatments; at manufacturer: 5.05922e-5 USD
- Other retail: 3.54489e-5 USD
- Vaccines and other biological medical products; at manufacturer: 0.126417 USD
- Computer systems design: 0.000630728 USD
- Legal services: 0.000624164 USD
- Data processing and hosting: 0.000640335 USD
- Commercial machinery repair: 0.00147826 USD
- Urethane and other foam products; at manufacturer: 5.32778e-5 USD
- Compressed Gases; at manufacturer: 0.000871133 USD
- Paper; at manufacturer: 4.83775e-7 USD
- Nondepository credit intermediation and related activities: 0.00120031 USD
- Air transport: 0.000454461 USD
- Electronic capacitors, resistors, coils, transformers, connectors and other components (except semiconductors and printed circuit assemblies); at manufacturer: 4.86571e-5 USD
- Noncomparable imports: 0.00401441 USD
- Other petroleum and coal products; at manufacturer: 4.83775e-7 USD
- Vehicle rental and leasing: 0.000338581 USD
- Material handling equipment; at manufacturer: 1.9351e-6 USD
- Office administration: 0.000360217 USD
- Limited-service restaurants: 6.05996e-5 USD
- Golf courses, marinas, ski resorts, fitness and other rec centers and industries: 1.1009e-6 USD
- Metal pipe fittings, ball and roller bearings, industrial patterns, metal bath fixtures, other misc. fabricated metals; at manufacturer: 0.000323367 USD
- Accounting, tax preparation, bookkeeping, and payroll: 0.000289359 USD
- Cardboard; at manufacturer: 1.45133e-6 USD
- Screws, nuts, and bolts; at manufacturer: 9.6755e-7 USD
- Transmission and power train parts; at manufacturer: 5.01084e-5 USD
- Computer terminals and other computer peripheral equipment; at manufacturer: 1.85138e-6 USD
- Pharmaceutical products (pills, powders, solutions, etc.); at manufacturer: 0.0142988 USD
- Gasoline, fuels, and by-products of petroleum refining; at manufacturer: 0.00586405 USD
- Lessors of nonfinancial intangible assets: 0.00156413 USD
- Facilities support: 9.29602e-5 USD
- Marketing research and all other miscellaneous professional, scientific, and technical services: 0.000236091 USD
- Architectural, engineering, and related services: 0.000297962 USD
- Soap and cleaning compounds; at manufacturer: 4.83775e-7 USD
- Other real estate: 4.62382e-5 USD
- Glass and glass products; at manufacturer: 0.00229143 USD
- Books, newspapers, magazines, and other print media; at manufacturer: 0.00148853 USD
- Light gauge metal cans, boxes, and containers; at manufacturer: 0.0001194 USD
- Buildings and dwellings services: 0.00238805 USD
- Independent artists, writers, and performers: 2.46851e-6 USD
- Relay and industrial controls; at manufacturer: 9.97331e-5 USD
- Rail transport: 0.000322554 USD
- Coal; at mine: 0.000186004 USD
- Natural gas; at consumer: 0.00344322 USD
- Satellite, telecommunications resellers, and all other telecommunications: 5.47291e-5 USD
- Primary iron, steel, and ferroalloy products; at manufacturer: 4.83775e-7 USD
- Sports: 1.1009e-6 USD
- Truck transport: 0.00374607 USD
- Warehousing: 0.000791612 USD
- Machine shops; at manufacturer: 4.91409e-5 USD
- Employment services: 0.000499416 USD
- Electricity; at consumer: 0.00340254 USD
- Business support: 0.000496563 USD
- Dry, condensed, and evaporated dairy; at manufacturer: 0.000353732 USD
- Monetary authorities and depository credit intermediation: 0.000416758 USD
- Fertilizers; at manufacturer: 1.9351e-6 USD
- All other foods; at manufacturer: 0.000121503 USD
- Waste management and remediation: 0.00174996 USD
- Household goods repair: 0.000239499 USD
- Vehicles and parts sales: 4.76895e-5 USD
- Full-service restaurants: 5.48284e-5 USD
- Plastic bags, films, and sheets; at manufacturer: 0.000170176 USD
- Insurance agencies and brokerages: 0.000507169 USD
- Lids, jars, bottle caps, other metal closures and crowns; at manufacturer: 8.17027e-5 USD
- Environmental and other technical consulting services: 0.00066342 USD
- Wholesale trade: 0.065748 USD
- Fresh soybeans, canola, flaxseeds, and other oilseeds; at farm: 0.000238665 USD
- Nonresidential building repair and maintanence: 0.00204898 USD
- Insurance carriers: 0.00147971 USD
- Packaged meat (except poultry); at manufacturer: 0.00318344 USD
- Paper bags and coated paper; at manufacturer: 0.000196914 USD
- Semiconductors; at manufacturer: 4.91409e-5 USD
- Other basic inorganic chemicals; at manufacturer: 4.9711e-6 USD
- Veneer, plywood, and engineered wood; at manufacturer: 9.58629e-5 USD

## Inputs from nature
- Occupation, industrial area: 0.000212671 m2*a; data quality (4,2,1,1,1)
- Water, fresh: 0.00142024, 0.00543477 m3 (2 entries, compartments not in this file); data quality (4,2,1,4,2)
- Water, saline: 0.000414986 m3; data quality (4,2,1,4,2)
- Occupation, industrial area, built up: 7.08903e-5 m2*a; data quality (4,2,1,1,1)
- Energy, solar: 0.00019036 MJ; data quality (3,1,1,1,1)
- Occupation, urban, discontinuously built: 8.81749e-5 m2*a; data quality (4,2,1,1,1)

## Emissions to nature
- butanol: 6.04161e-12 kg; data quality (5,1,1,1,5)
- ethylbenzene: 2.45156e-11 kg; data quality (4,1,1,1,5)
- Chrysene: 1.55498e-12 kg; data quality (3,2,1,3,2)
- nitrogen oxides: 2.07098e-5 kg; data quality (3,2,1,1,3)
- Propane, 1,2-dichloro-: 3.12932e-14 kg; data quality (4,2,1,1,5)
- 2-chloro-1-phenylethanone: 9.00912e-15 kg; data quality (2,2,1,1,5)
- hydrogen chloride: 1.87287e-7 kg; data quality (2,2,1,1,5)
- phthalate, dioctyl-: 1.72792e-11 kg; data quality (3,2,1,1,5)
- acrolein: 2.72302e-9 kg; data quality (3,2,1,3,2)
- methanol: 2.51726e-7 kg; data quality (4,2,1,1,5)
- Water, saline: 0.000210272 m3; data quality (4,2,1,4,2)
- toluene: 1.56166e-11, 2.96588e-11 kg (2 entries, compartments not in this file); data quality (5,1,1,1,5)
- Indeno(1,2,3-cd)pyrene: 4.12115e-13 kg; data quality (3,2,1,4,1)
- 1,4-dioxane: 1.60121e-11 kg; data quality (4,2,1,1,5)
- nitric acid: 2.00288e-12 kg; data quality (3,1,1,1,5)
- dimethyl formamide: 2.72568e-9 kg; data quality (4,2,1,1,5)
- carbon tetrachloride: 2.19004e-10 kg; data quality (4,2,1,1,5)
- Dibenz(a,h)anthracene: 1.01676e-14 kg; data quality (2,2,1,2,4)
- 1-Methyl-2-pyrrolidinone: 6.51952e-9 kg; data quality (5,1,1,1,5)
- biphenyl: 2.27317e-15 kg; data quality (4,2,1,1,5)
- trichloroethylene: 2.00511e-11 kg; data quality (4,2,1,1,5)
- acetonitrile: 3.0116e-7 kg; data quality (3,2,1,1,5)
- Benzo(a)anthracene: 9.05085e-15 kg; data quality (2,2,1,1,5)
- dibenzofuran: 3.128e-14 kg; data quality (4,2,1,1,5)
- methane, monochloro-, r-40: 3.5885e-10 kg; data quality (3,2,1,1,5)
- carbon disulfide: 1.67312e-13 kg; data quality (4,2,1,1,5)
- phenol: 7.5878e-10 kg; data quality (4,2,1,1,5)
- fluoranthene: 2.74743e-11 kg; data quality (2,2,1,2,3)
- t-butyl methyl ether: 1.57336e-9 kg; data quality (3,2,1,1,5)
- antimony: 4.85162e-12 kg; data quality (3,2,1,1,5)
- mercury: 8.64109e-11 kg; data quality (2,2,1,1,5)
- methanol: 2.07956e-9, 1.17226e-9 kg (2 entries, compartments not in this file); data quality (3,1,1,1,5)
- Dimethyl sulfate: 6.17769e-14 kg; data quality (2,2,1,1,5)
- beryllium: 6.90949e-12 kg; data quality (2,2,1,1,5)
- NICOTINE: 4.57698e-11 kg; data quality (2,1,1,1,5)
- butadiene: 3.15607e-9 kg; data quality (3,2,1,4,1)
- Dimethylamine: 1.14241e-10 kg; data quality (3,1,1,1,5)
- PHOSPHORUS: 1.40975e-11 kg; data quality (2,2,1,1,5)
- acetaldehyde: 1.53045e-7 kg; data quality (3,2,1,2,4)
- Dinitrogen monoxide: 8.9788e-8 kg; data quality (4,2,1,4,1)
- carbon monoxide: 5.24042e-5 kg; data quality (3,2,1,1,1)
- isophorone: 7.4647e-13 kg; data quality (2,2,1,1,5)
- ammonia: 6.40108e-6 kg; data quality (3,2,1,1,5)
- Methane, trichlorofluoro-, CFC-11: 1.97725e-10 kg; data quality (2,1,1,1,5)
- ACRYLAMIDE: 1.49449e-12 kg; data quality (3,2,1,1,5)
- PERACETIC ACID: 6.04978e-12 kg; data quality (4,1,1,1,5)
- cyanide: 5.75716e-11 kg; data quality (3,2,1,1,5)
- methyl isobutyl ketone: 1.10658e-10 kg; data quality (4,2,1,1,5)
- Methane: 7.17739e-7 kg; data quality (4,2,1,4,1)
- hydrogen fluoride: 4.18773e-9 kg; data quality (2,2,1,1,5)
- chlorine: 3.11234e-11 kg; data quality (2,1,1,1,5)
- Propane, 1,1,1,3,3,3-hexafluoro-, HCFC-236fa: 3.34038e-10 kg; data quality (4,2,1,4,1)
- cyclohexane: 4.71828e-10 kg; data quality (4,1,1,1,5)
- Propene, 1,3-dichloro-: 1.06133e-17 kg; data quality (3,2,1,1,5)
- PHENYTOIN: 3.11234e-10 kg; data quality (5,1,1,1,5)
- formaldehyde: 1.51157e-7 kg; data quality (2,2,1,2,3)
- CFC-114: 1.81431e-10 kg; data quality (5,1,1,1,5)
- Cumene: 6.77392e-12 kg; data quality (3,1,1,1,5)
- Ethane, 1,1,1,2-tetrafluoro-, HFC-134a: 1.08925e-7 kg; data quality (4,2,1,4,1)
- CHLOROMETHYL METHYL ETHER: 3.91e-14 kg; data quality (5,2,1,1,5)
- toluene: 1.07514e-7 kg; data quality (4,2,1,2,4)
- epichlorohydrin: 4.8484e-12 kg; data quality (3,2,1,1,5)
- Methane, dichloro-, HCC-30: 2.11237e-11, 1.28155e-12 kg (2 entries, compartments not in this file); data quality (5,1,1,1,5)
- PYRIDINE: 1.40239e-11 kg; data quality (4,1,1,1,5)
- chlorine: 4.6445e-9 kg; data quality (4,2,1,1,5)
- Methane, difluoro-, HFC-32: 1.68296e-8 kg; data quality (4,2,1,4,1)
- ethane, 1,1,2-trichloro-: 1.27841e-17 kg; data quality (4,2,1,1,5)
- Ethylene glycol monoethyl ether: 6.57254e-11 kg; data quality (5,1,1,1,5)
- Benzene, 1,2,4-trimethyl-: 8.18363e-11 kg; data quality (5,1,1,1,5)
- ethylene oxide: 5.59984e-11 kg; data quality (3,2,1,1,5)
- 1,1,2,2-tetrachloroethane: 5.10039e-16 kg; data quality (3,2,1,1,5)
- Benzoyl chloride: 4.96144e-12 kg; data quality (2,1,1,1,5)
- benzene, chloro-: 1.74932e-12 kg; data quality (4,2,1,1,5)
- selenium: 7.95541e-11 kg; data quality (2,2,1,1,5)
- Water, fresh: 0.00596266 m3; data quality (4,2,1,4,2)
- cumene: 1.1329e-12 kg; data quality (4,2,1,1,5)
- arsenic: 6.75243e-11 kg; data quality (3,2,1,2,4)
- vinyl acetate: 8.39676e-10 kg; data quality (3,2,1,1,5)
- Cobalt: 1.02411e-11 kg; data quality (3,2,1,1,5)
- cadmium: 1.62583e-10 kg; data quality (3,2,1,1,5)
- BUTYL ISOCYANATE: 3.128e-14 kg; data quality (4,2,1,1,5)
- m-cresol: 9.93296e-12 kg; data quality (4,2,1,1,5)
- Ethane, 1,1,1-trifluoro-, HFC-143a: 1.23648e-8 kg; data quality (4,2,1,4,1)
- Phosphine: 9.85319e-15 kg; data quality (4,2,1,1,5)
- Triethyl amine: 1.78685e-10 kg; data quality (5,1,1,1,5)
- Benzo(b)fluoranthene: 9.13605e-13 kg; data quality (3,2,1,3,2)
- 1,1,1-trichloroethane: 5.56949e-11 kg; data quality (4,2,1,1,5)
- formaldehyde: 2.92011e-10 kg; data quality (2,1,1,1,5)
- Acetonitrile: 1.27057e-10 kg; data quality (3,1,1,1,5)
- chloroform: 4.4349e-8 kg; data quality (4,2,1,1,5)
- AMMONIA: 5.98668e-11 kg; data quality (3,1,1,1,5)
- lead: 4.52897e-10 kg; data quality (3,2,1,1,5)
- Chromium, ion: 2.57626e-10 kg; data quality (2,2,1,1,5)
- Methane, dichlorodifluoro-, CFC-12: 4.31883e-10 kg; data quality (4,1,1,1,5)
- Methyl iodide: 2.75298e-11 kg; data quality (4,2,1,1,5)
- Benzo(k)fluoranthene: 6.94517e-13 kg; data quality (3,2,1,4,1)
- ethene, tetrachloro-: 2.19521e-11 kg; data quality (3,2,1,1,5)
- anthracene: 4.47911e-12 kg; data quality (3,2,1,4,1)
- manganese: 8.95821e-10 kg; data quality (3,2,1,1,5)
- ethylene glycol: 5.14232e-10 kg; data quality (5,1,1,1,5)
- p-phenylenediamine: 9.52841e-16 kg; data quality (5,2,1,1,5)
- benzene: 2.2982e-8 kg; data quality (3,2,1,4,1)
- Phosphorus: 1.20432e-8 kg; data quality (2,1,1,1,5)
- SEC-BUTYL ALCOHOL: 1.64771e-12 kg; data quality (5,1,1,1,5)
- Xylene: 9.70319e-12 kg; data quality (4,1,1,1,5)
- Nitrobenzene: 9.94269e-17 kg; data quality (4,2,1,1,5)
- acrylonitrile: 3.88699e-10 kg; data quality (3,2,1,1,5)
- Benzo(g,h,i)perylene: 1.29233e-12 kg; data quality (3,2,1,4,1)
- acetophenone: 1.93053e-14 kg; data quality (4,2,1,1,5)
- particulates, < 10 um: 8.79527e-7 kg; data quality (3,2,1,1,5)
- Chromium VI: 2.85672e-11 kg; data quality (3,2,1,1,5)
- fluorene: 5.51958e-11 kg; data quality (3,2,1,4,1)
- m-xylene: 3.5067e-9 kg; data quality (3,2,1,4,1)
- 1,4-dichlorobenzene: 2.04832e-12 kg; data quality (2,2,1,1,5)
- maleic anhydride: 6.29783e-10 kg; data quality (3,2,1,1,5)
- Hydrazine: 8.66678e-11 kg; data quality (4,2,1,1,5)
- methane, bromo-, halon 1001: 2.05923e-13 kg; data quality (3,2,1,1,5)
- bromoform: 5.01936e-14 kg; data quality (3,2,1,1,5)
- nickel: 1.57965e-9 kg; data quality (3,2,1,1,5)
- Triethyl amine: 4.30674e-9 kg; data quality (4,2,1,1,5)
- benzyl chloride: 9.00912e-13 kg; data quality (2,2,1,1,5)
- Ethane, pentafluoro-, HFC-125: 2.88993e-8 kg; data quality (4,2,1,4,1)
- toluene, 2,4-dinitro-: 3.60364e-16 kg; data quality (5,2,1,1,5)
- benzo(a)pyrene: 8.18431e-11 kg; data quality (2,2,1,1,5)
- 3-methylcholanthrene: 1.13507e-15 kg; data quality (2,2,1,1,5)
- acrylic acid: 1.3363e-9 kg; data quality (3,2,1,1,5)
- ethane, 1,2-dichloro-: 2.4413e-12 kg; data quality (3,2,1,1,5)
- Carbon dioxide: 0.033372 kg; data quality (4,2,1,4,1)
- Propene: 3.45543e-9 kg; data quality (3,1,1,1,5)
- phenanthrene: 1.31847e-10 kg; data quality (3,2,1,4,1)
- NITROGLYCERIN: 3.88128e-12 kg; data quality (5,1,1,1,5)
- formic acid: 9.37731e-10 kg; data quality (3,1,1,1,5)
- Tetracycline hydrochloride: 4.4122e-11 kg; data quality (5,1,1,1,5)
- o-Xylene: 1.36852e-9 kg; data quality (3,2,1,4,1)
- methyl methacrylate: 2.35453e-9 kg; data quality (3,2,1,1,5)
- benz[a]anthracene: 3.18921e-11 kg; data quality (2,2,1,1,5)
- Cyanide: 2.01387e-11 kg; data quality (3,1,1,1,5)
- ethyl acrylate: 2.65645e-9 kg; data quality (3,2,1,1,5)
- methane, chlorodifluoro-, hcfc-22: 3.18874e-7 kg; data quality (4,1,1,1,5)
- diethanolamine: 7.81391e-12 kg; data quality (3,2,1,1,5)
- 2,2,4-trimethylpentane: 2.02817e-8 kg; data quality (3,2,1,2,4)
- acenaphthylene: 5.50818e-11 kg; data quality (3,2,1,4,1)
- Hydrazine, methyl-: 2.18793e-13 kg; data quality (2,2,1,1,5)
- propylene oxide: 4.06442e-10 kg; data quality (3,2,1,1,5)
- Chloroacetic acid: 5.7868e-13 kg; data quality (3,2,1,1,5)
- benzene, ethyl-: 1.18017e-8 kg; data quality (3,2,1,3,3)
- Ethene, chloro-: 9.37148e-18 kg; data quality (3,2,1,1,5)
- naphthalene: 1.42202e-9 kg; data quality (3,2,1,3,2)
- 1,2,4-trimethylbenzene: 1.25213e-10 kg; data quality (5,1,1,1,5)
- Hexane: 8.62302e-11 kg; data quality (4,1,1,1,5)
- Phthalate, dioctyl-: 9.15395e-13 kg; data quality (4,1,1,1,5)
- monochloroethane: 5.40555e-14 kg; data quality (3,2,1,1,5)
- Xylene: 3.29861e-8 kg; data quality (3,2,1,3,3)
- para-xylene: 1.40464e-10 kg; data quality (3,2,1,4,1)
- VOC, volatile organic compounds: 1.14293e-5 kg; data quality (3,2,1,1,4)
- Dichlorvos: 1.564e-12 kg; data quality (3,2,1,1,5)
- styrene: 2.21652e-9 kg; data quality (3,2,1,2,4)
- particulates, < 2.5 um: 2.39327e-6 kg; data quality (3,2,1,2,4)
- bromine: 2.63634e-11 kg; data quality (5,1,1,1,5)
- phthalic anhydride: 2.96991e-11 kg; data quality (3,1,1,1,5)
- Nitrogen: 0.000255115 kg; data quality (5,2,1,1,5)
- acenaphthene: 4.58983e-11 kg; data quality (3,2,1,4,1)
- TERT-BUTYL ALCOHOL: 3.0208e-11 kg; data quality (4,1,1,1,5)
- Methyl acrylate: 2.05781e-10, 2.01387e-12 kg (2 entries, compartments not in this file); data quality (3,1,1,1,5)
- hexane: 8.51968e-8 kg; data quality (3,2,1,1,5)
- pyrene: 8.4642e-12 kg; data quality (3,2,1,3,2)
- Aniline: 1.33648e-11 kg; data quality (3,1,1,1,5)
- 2-methylnaphthalene: 1.53185e-12 kg; data quality (2,2,1,1,5)
- Hydrocarbons, aromatic: 1.89594e-9 kg; data quality (3,2,1,4,1)
- propanal: 6.09546e-9 kg; data quality (3,2,1,4,1)
- ozone: 1.83079e-12 kg; data quality (4,1,1,1,5)
- hydroquinone: 1.15077e-12 kg; data quality (3,2,1,1,5)
- methane, dichloro-, hcc-30: 9.31738e-8 kg; data quality (4,2,1,1,5)
- ethane, 1,2-dibromo-: 1.57237e-15 kg; data quality (2,2,1,1,5)
- ethylene glycol: 8.51379e-10 kg; data quality (5,2,1,1,5)
- sulfur dioxide: 2.06288e-6 kg; data quality (2,2,1,1,5)
- ammonia: 1.68158e-9 kg; data quality (3,1,1,1,5)
- aniline: 7.8713e-17 kg; data quality (4,2,1,1,5)

## Inventory method
Input-output

## Modelling constants
The reference unit of all processes is 1 USD2013 of the good or service. The technosphere inputs are based on the US BEA detailed input-output tables for 2007. The IO tables are combined to develop a commodity-by-commodity model based on the the industry-technology assumption (see Suh et al., 2010), which assumes all commodities produced by a given industry have the same input structure, but that multiple industries can produce the same commodity. Thus, model technosphere flows represent commodity outputs (and not industry outputs) from other processes in the model. There are no by-products included in these processes. All commodity production is based on US-conditions, despite in reality that some goods and services are produced overseas, as USEEIO v1.1 is a single-region IO model.

## Completeness
The input-output approach assures that all purchased inputs associated with the sectors making these commodities as reported in the US census for 2007 are included. The direct resources extracted including minerals, energy sources, water and land occupied are included. Emissions to air include all critieria air pollutants, greenhouse gases, and hazardous and toxic air pollutants as defined by US EPA. Releases to water include toxics, total nitrogen and total phosphorus, and water discharges. Releases to soil or groundwater include toxics and agriculutural pesticides. Some metal releases to air, water and soil are not included because they could not be speciated. Solid hazardous and non-hazardous wastes generated are not included as an elementary flows although purchases of waste services are included.

## Data treatment
Greenhouse gases are primarily from the US Greenhouse Gas Emission Inventory (USEPA 2016a). Biogenic C uptake is not included (change from version 1.0), as biogenic C emission are not included. Toxic releases to air, water and soil (except pesticides) are from the 2013 Toxic Release Inventory (USEPA 2015a). Criteria air pollutants and hazardous air pollutants are from the 2011 National Emissions Inventory (USEPA 2015b). All estimates are normalized by industry based on sector output in the data year, then converted to 2013 USD using relative sector-specific CPIs (if data year is not 2013). Energy use represent raw renewables or fossil fuel energies and is based on EIA data for 2014. See Table 1 in Yang, Ingwersen et al. 2017 and Supporting Information 1, and the v1.1 data update notes (Ingwersen et al. 2017) for all details on environmental data sources used.Land occupation associated with manufacturing buildings was estimated based on the building floorspace data provided by the U.S. Energy Information Administration in the 2010 Manufacturing Energy Consumption Survey (EIA 2013). Portions of total renewable energy (EIA 2016) based on EIA-923 reports for 2014 (EIA 2017) are included. Nitrogen and Phosphorus releases are modeled in total N and total P equivalents as estimated by the Discharge Monitoring Report Nutrient Loading tool (USEPA 2016b). Self-supplied withdrawals were assigned to industrial sectors based on water use statistics for Canadian industries by NAICS 3-digit sector scaled to US production levels based on gross domestic product by industry (BEA 2015; Statistics Canada 2010), and further disaggregated to the manufacturing sectors based on compensation of employees as provided by the 2007 IO tables (BEA 2015). Water withdrawals associated with public supply were allocated to sectors based on their use of water, sewage, and other services in USD based on the IO tables (BEA 2015). Portions of total renewable energy (EIA 2016) by type are assigned to sectors (hydro, wind, solar, or) based on EIA-923 reports for 2014 (EIA 2017).

## Data collection
2015-2016

## Sampling procedure
US federal government sources, including surveys and US EPA emissions databases are used as the primary sources. From these sources, data for US reporting establishments/facilities are aggregated by the NAICS sector as defined in the BEA detailed 2007 input-output tables. When level of sector aggregation differs, or when direct emissions are not reported but modeled, additional sources are used to make allocations and estimates.

## Review details
In regard to quality assurance and peer-review, each dataset created went through Quality Assurance as defined in a quality assurance project plans at US EPA, CSRA or ERG. The model was assembled with the IO model builder model (USEPA 2016c). Validation functions were used to check that all the model components were properly assembled and harmonized. Bayou Demeke and Santosh Ghimire provided internal peer review of the model methodology and the manuscript underwent standard EPA management review. An editor and two anonymous reviewers at the Journal of Cleaner Production reviewed the model. In regard to data quality evaluation, data quality assessment was performed at the flow and process levels according to the updated US EPA data quality assessment guidelines as defined in US EPA (2016b).

## Intended application
The primary application is for use in the US Environmentally-Extended Input-Ouput model, USEEIO, version 1.1. This model is being used by the US EPA for supporting tools that prioritize goods and services based on potential environmental impacts, resource use or emissions for large regions, including the US and US states, and as a strealined tool for organizations as a starting point to consider sustainable materials management. Model results are designed to provide meso/macro-level decision support.

## Project
USEEIO v1.1 was developed by the US EPA with CSRA and ERG with Wesley W. Ingwersen and David E. Meyer as research leads. Yi Yang was the technical lead on the work for CSRA (contract EP-C-15-012); Troy Hawkins was lead for ERG (contract EP-C-12-021).

## Sources
- Goebes et al. 2003
- USEPA 2015a
- USGS 2016
- USDA 2006
- USDA 2014
- Torcellini et al. 2003
- USGS 2015
- USEPA 2016a
- USEPA 2016b
- USDA 2016
- EIA 2017
- Maupin et al. 2014
- Lovelace 2009
- USDA 2009a
- Statistics Canada 2010
- EIA 2013
- Ingwersen et al. 2017
- BEA 2015
- EIA 2015
- EIA 2016
- Yienger et al. 1995
- Blackhurst et al. 2010
- Edelen and Ingwersen 2017
- Macknick et al. 2011
- USEPA 2016c
- Kim et el. 2013
- USDA 2009b
- Ingwersen et al. DRAFT
- BLM 2008
- Nickerson et al. 2011
- USEPA 2015b
