# Lids, jars, bottle caps, other metal closures and crowns; at manufacturer

Dataset: openLCA process, unit process
Category: 3321: Forging and Stamping
Geography: United States
Time period: 2017-01-01 to 2017-12-31
Data quality: US EPA - Process Pedigree Matrix (1;1)
Exchange data quality scheme: US EPA - Flow Pedigree Matrix
Generated by: US EPA with CSRA and ERG
Owner: US EPA
Published in: Yang, Ingwersen et al. 2017
restrictionsDescription: This model shold be appropriately cited (see Yang, Ingwersen et al. 2017 source or Publication field) when used. Any changes or derivations of this model by the user should be documented. The model itself and any results from use of this model shall not be construed to consitute US EPA opinion or policy.
copyright: false

## General comment
BEA Code & Name is '33211B:Crown and closure manufacturing and metal stamping'. Description of the primary industry producing this good or service, adapted from the Census Bureau NAICS 2007 descriptions: This industry comprises establishments primarily engaged in one or more of the following: (1) manufacturing forgings from purchased metals; (2) manufacturing metal custom roll forming products; (3) manufacturing metal stamped and spun products (except automotive, cans, coins); and (4) manufacturing powder metallurgy products. Establishments making metal forgings, metal stampings, and metal spun products and further manufacturing (e.g., machining, assembling) a specific manufactured product are classified in the industry of the finished product. Metal forging, metal stamping, and metal spun products establishments may perform surface finishing operations, such as cleaning and deburring, on the products they manufacture. Related NAICS codes are: 332115-6

## Technology
The process describes the average US production of this good or service within this NAICS-based grouping defined in the BEA 2007 detailed input-output tables (BEA 2015). Distribution, wholesale and retailing of this good or service, use, and final disposal are not included. Creation of a product system with this process will enable modeling of all upstream (supply-chain) activities.

## Geography
Data represent the 50 US states

## Time period
2017 was the year in which this version of USEEIO was released and is the target date for the model

## Reference product
- Lids, jars, bottle caps, other metal closures and crowns; at manufacturer: 1 USD

## Inputs from technosphere
All rows: data quality (1,3,1,1,1)
- Specialty transformers; at manufacturer: 3.62774e-6 USD
- Business support: 0.00116312 USD
- Urethane and other foam products; at manufacturer: 4.91813e-6 USD
- Plastic pipe, fittings, and sausage casings; at manufacturer: 0.000456131 USD
- Other computer related services, including facilities management: 0.000174308 USD
- Wood kitchen cabinets and countertops; at manufacturer: 3.95087e-5 USD
- Lessors of nonfinancial intangible assets: 0.00702904 USD
- Machinery for the paper, textile, food or other industries (except semiconductor machinery); at manufacturer: 0.000182276 USD
- Industrial process furnaces and ovens; at manufacturer: 8.28879e-6 USD
- Power boilers and heat exchangers; at manufacturer: 7.80853e-5 USD
- Other petroleum and coal products; at manufacturer: 0.00158861 USD
- Monetary authorities and depository credit intermediation: 0.00372006 USD
- Mechanical power transmission equipment; at manufacturer: 4.45863e-5 USD
- Surgical appliance and supplies; at manufacturer: 3.84801e-6 USD
- Hydraulic pumps, motors, cylinders and actuators; at manufacturer: 0.000303939 USD
- Other concrete products; at manufacturer: 1.44453e-5 USD
- Finished and coated fabric; at manufacturer: 1.70709e-5 USD
- Carpets and rugs; at manufacturer: 3.33153e-7 USD
- Printed circuit and electronic assembly; at manufacturer: 0.00245168 USD
- Electricity; at consumer: 0.00642874 USD
- Satellite, telecommunications resellers, and all other telecommunications: 0.000158432 USD
- Ophthalmic goods; at manufacturer: 3.22684e-7 USD
- Gaskets, seals, musical instruments, fasteners, brooms, brushes, mop and other misc. goods; at manufacturer: 0.000238522 USD
- Laminated plastic plates and shapes; at manufacturer: 0.00021174 USD
- Other textiles; at manufacturer: 8.11456e-7 USD
- Transmission and power train parts; at manufacturer: 5.36574e-5 USD
- Civic, social, professional, and similar organizations: 0.000388385 USD
- Home furniture - upholstered; at manufacturer: 1.98532e-6 USD
- Vaccines and other biological medical products; at manufacturer: 4.55536e-7 USD
- Clothing; at manufacturer: 3.13616e-7 USD
- Other engine equipment; at manufacturer: 0.000304448 USD
- Screws, nuts, and bolts; at manufacturer: 0.0134006 USD
- Accounting, tax preparation, bookkeeping, and payroll: 0.00299234 USD
- Electronic capacitors, resistors, coils, transformers, connectors and other components (except semiconductors and printed circuit assemblies); at manufacturer: 0.0008489 USD
- Carbon and graphite products; at manufacturer: 1.69976e-7 USD
- Computer systems design: 0.000583053 USD
- Air purification and ventilation equipment; at manufacturer: 3.34372e-6 USD
- Storage batteries; at manufacturer: 4.21541e-7 USD
- Commercial equipment rental: 0.000510697 USD
- Commercial machinery repair: 0.00154223 USD
- Wooden windows, door, and flooring; at manufacturer: 3.20363e-5 USD
- Other secondary nonferrous metal products; at manufacturer: 0.010285 USD
- Other plastic products; at manufacturer: 0.00235005 USD
- Polystyrene foam products; at manufacturer: 5.36966e-6 USD
- Vehicle metal stamping; at manufacturer: 0.0304046 USD
- Lumber and treated lumber; at manufacturer: 4.20269e-5 USD
- Industrial molds; at manufacturer: 0.000135908 USD
- Animal farms and aquaculture ponds (except cattle and poultry): 4.70423e-7 USD
- Investigation and security: 0.00047518 USD
- Audio and video equipment; at manufacturer: 1.20084e-6 USD
- Insurance agencies and brokerages: 0.000544596 USD
- Small electrical appliances; at manufacturer: 1.59203e-6 USD
- Secondary copper products; at manufacturer: 0.0179597 USD
- Passenger ground transport: 0.000849545 USD
- Vehicles and parts sales: 0.000479975 USD
- Aluminum; at manufacturer: 0.0054822 USD
- Household goods repair: 0.000246496 USD
- Drinking water and wastewater treatment; at consumer: 0.000476576 USD
- Computer terminals and other computer peripheral equipment; at manufacturer: 8.65584e-5 USD
- Air transport: 0.00312742 USD
- Veneer, plywood, and engineered wood; at manufacturer: 0.000372143 USD
- Scientific research and development: 0.000577041 USD
- Secondary steel products; at manufacturer: 0.0062497 USD
- Custom metal rolls; at manufacturer: 0.00119007 USD
- Plastics; at manufacturer: 0.0120111 USD
- Farm machinery and equipment; at manufacturer: 1.26147e-5 USD
- Vehicle repair: 0.000808033 USD
- Synthetic rubber and artificial and synthetic fibers; at manufacturer: 0.000161854 USD
- Vegetable oils and by-products; at manufacturer: 2.07824e-7 USD
- Wiring devices; at manufacturer: 2.8246e-5 USD
- Fabricated pipe and pipe fittings; at manufacturer: 1.85344e-5 USD
- Other vehicle parts; at manufacturer: 0.00274415 USD
- Watches, clocks, and other measuring and controlling devices; at manufacturer: 4.62765e-7 USD
- Unrefined oil and gas; at extraction site: 2.1827e-6 USD
- Home furniture - wood, nonupholstered; at manufacturer: 3.48111e-6 USD
- Primary copper; at manufacturer: 0.000608423 USD
- Automatic controls for HVAC and refrigeration equipment; at manufacturer: 4.10347e-7 USD
- Office supplies (not paper); at manufacturer: 1.65984e-6 USD
- Lids, jars, bottle caps, other metal closures and crowns; at manufacturer: 0.0133067 USD
- Company and enterprise management: 0.0161468 USD
- Ball and roller bearings; at manufacturer: 0.0013763 USD
- Metal hinges, keys, lock, and other hardware; at manufacturer: 0.00139742 USD
- Golf courses, marinas, ski resorts, fitness and other rec centers and industries: 0.000385743 USD
- Independent artists, writers, and performers: 0.000161124 USD
- Light fixtures; at manufacturer: 6.20432e-6 USD
- Metal windows, doors, and architectural products; at manufacturer: 0.00188539 USD
- Paints and coatings; at manufacturer: 0.00877679 USD
- Greenhouse crops, mushrooms, nurseries, and flowers; at farm: 2.7755e-5 USD
- Heating equipment other than warm air furnaces; at manufacturer: 3.12255e-7 USD
- Material handling equipment; at manufacturer: 0.000168473 USD
- Facilities support: 7.68281e-5 USD
- Air and gas compressors; at manufacturer: 0.000351576 USD
- Vehicle electrical and electronic equipment; at manufacturer: 5.25444e-5 USD
- Light bulbs; at manufacturer: 0.000144698 USD
- Ground or treated minerals and earth; at manufacturer: 9.71556e-6 USD
- Environmental and other technical consulting services: 0.000232673 USD
- other miscellaneous electrical equipment and components; at manufacturer: 2.21646e-6 USD
- Mineral wool; at manufacturer: 2.41892e-5 USD
- Truck transport: 0.0104629 USD
- Warehousing: 0.00439204 USD
- Office administration: 0.000226246 USD
- Other primary nonferrous metals; at manufacturer: 0.000313965 USD
- Special tools, dies, jigs, and fixtures; at manufacturer: 0.00267796 USD
- Buildings and dwellings services: 0.00284597 USD
- Abrasive products; at manufacturer: 0.00222234 USD
- Adhesives; at manufacturer: 2.16777e-5 USD
- Synthetic dyes and pigments; at manufacturer: 2.52396e-5 USD
- Vehicle rental and leasing: 0.00101774 USD
- Soap and cleaning compounds; at manufacturer: 8.03692e-6 USD
- Metal cutting and forming machine tools; at manufacturer: 0.000199441 USD
- Chemicals (except basic chemicals, agrichemicals, polymers, paints, pharmaceuticals,soaps, cleaning compounds); at manufacturer: 0.00134492 USD
- Asphalt pavement; at manufacturer: 2.96161e-6 USD
- Nonresidential building repair and maintanence: 0.00203973 USD
- General merchandise stores: 8.57949e-6 USD
- Signal testing instruments; at manufacturer: 3.80602e-6 USD
- Timber and raw forest products; at forest: 1.29674e-5 USD
- Motors and generators; at manufacturer: 0.000288859 USD
- Pumps and pumping equipment; at manufacturer: 8.4548e-6 USD
- Lawn and garden equipment; at manufacturer: 4.31557e-6 USD
- Investment advice, portfolio management, and other financial advising services: 0.0001645 USD
- Other nonmetallic mineral products; at manufacturer: 1.49973e-5 USD
- Glass and glass products; at manufacturer: 0.00033989 USD
- Vehicle engines and engine parts; at manufacturer: 0.000334996 USD
- Wholesale trade: 0.0420902 USD
- Lime and gypsum products; at manufacturer: 8.19224e-6 USD
- Metal structural products; at manufacturer: 0.0466077 USD
- Legal services: 0.00203237 USD
- Coal; at mine: 1.41293e-5 USD
- Other transportation equipment; at manufacturer: 8.57429e-7 USD
- Sports: 0.000153544 USD
- Motor vehicle steering, suspension components (except spring), and brake systems; at manufacturer: 6.56941e-5 USD
- Wireless telecommunications: 0.000946621 USD
- Limited-service restaurants: 0.00211043 USD
- Specialized design: 0.000545739 USD
- Fertilizers; at manufacturer: 3.10532e-6 USD
- Management consulting: 0.00101063 USD
- Other support services: 0.000270462 USD
- Aluminum products; at manufacturer: 0.0246743 USD
- Clay and ceramic products; at manufacturer: 1.57612e-5 USD
- Springs and wires; at manufacturer: 0.000940053 USD
- Ink and ink cartridges; at manufacturer: 1.15617e-5 USD
- Other retail: 0.000117885 USD
- Architectural, engineering, and related services: 0.00174116 USD
- Rubber and plastic belts and hoses; at manufacturer: 6.70568e-5 USD
- Semiconductor machinery; at manufacturer: 2.72917e-8 USD
- Vending, commercial laundry, and other commercial and service industry machinery; at manufacturer: 3.82467e-5 USD
- Speed changers, industrial high-speed drives, and gears; at manufacturer: 5.44516e-5 USD
- Advertising and public relations: 0.00901889 USD
- Other real estate: 0.00262701 USD
- Cardboard; at manufacturer: 0.00184093 USD
- Heavy gauge metal tanks; at manufacturer: 7.68633e-5 USD
- Cutlery and handtools; at manufacturer: 0.00113871 USD
- Communication and energy wire and cable; at manufacturer: 0.000747702 USD
- Dry-cleaning and laundry: 8.41009e-6 USD
- Home refrigerators and freezers; at manufacturer: 2.58364e-7 USD
- Marketing research and all other miscellaneous professional, scientific, and technical services: 0.00422179 USD
- Pipeline transport: 7.29146e-7 USD
- Used and secondhand goods: 1.56808e-7 USD
- Petrochemicals; at manufacturer: 1.4866e-5 USD
- Plastic bags, films, and sheets; at manufacturer: 0.0042749 USD
- Other rubber products; at manufacturer: 6.39676e-5 USD
- Valve and fittings (except for plumbing); at manufacturer: 0.00192019 USD
- Jewelry and silverware; at manufacturer: 5.9471e-5 USD
- Concrete pipe, bricks, and blocks; at manufacturer: 1.09093e-5 USD
- Scenic and sightseeing transportation and support activities for transportation: 3.62995e-6 USD
- Travel arrangement and reservation: 0.00121306 USD
- All other food and drinking places: 0.000154403 USD
- Plywood and veneer; at manufacturer: 4.70906e-5 USD
- State and local government enterprises: 0.000480172 USD
- Metal plumbing drains, faucets, valves, and other fittings; at manufacturer: 7.78801e-6 USD
- Other basic inorganic chemicals; at manufacturer: 0.000137152 USD
- Welding and Soldering Equipment, Scales and Balances, and other general purpose machinery; at manufacturer: 0.000121939 USD
- Consumer goods and general rental centers: 8.76052e-5 USD
- Rubber tires; at manufacturer: 4.4316e-5 USD
- Switchgear and switchboards; at manufacturer: 7.72704e-6 USD
- Nonferrous metal casts; at manufacturer: 0.00358338 USD
- Nondepository credit intermediation and related activities: 0.002606 USD
- Insurance carriers: 0.00122582 USD
- Cement; at manufacturer: 3.75779e-6 USD
- Magazines and journals; at publisher: 7.90797e-5 USD
- Paper bags and coated paper; at manufacturer: 9.91768e-5 USD
- Promoters and agents: 4.63728e-6 USD
- Full-service restaurants: 0.00124893 USD
- Telecommunications: 0.00223651 USD
- Data processing and hosting: 0.00441499 USD
- Computer storage device readers; at manufacturer: 3.39686e-6 USD
- Noncomparable imports: 0.00247316 USD
- Water transport (boats, ships, ferries): 0.000254785 USD
- Primary iron, steel, and ferroalloy products; at manufacturer: 0.190662 USD
- Software: 6.45994e-6 USD
- Industrial process variable instruments; at manufacturer: 2.86624e-5 USD
- Postal service: 5.37061e-5 USD
- Home furniture - Cabinets and non-wood, nonupholstered; at manufacturer: 3.9676e-6 USD
- Air conditioning, refrigeration, and warm air heating equipment; at manufacturer: 0.000782857 USD
- Iron, gold, silver, and other metal ores; at mine: 0.000358228 USD
- Stationery; at manufacturer: 9.94683e-7 USD
- Fiber, yarn, and thread; at manufacturer: 8.31081e-6 USD
- Optical instruments and lenses; at manufacturer: 2.45626e-7 USD
- Cutting and machine tool accessory, rolling mill, and other metalworking machines; at manufacturer: 0.00127355 USD
- External hard drives, CDs, other storage media; at manufacturer: 2.70781e-6 USD
- Natural gas; at consumer: 0.00510971 USD
- Securities and commodities brokerage and exchanges: 0.00659811 USD
- Hotels and campgrounds: 0.00162725 USD
- Performances: 7.54551e-5 USD
- All other forging, stamping, and sintering; at manufacturer: 0.00332296 USD
- Metal coatings, engravings, and heat treatments; at manufacturer: 0.00478541 USD
- Sanitary paper (tissues, napkins, diapers, etc.); at manufacturer: 1.94151e-8 USD
- Relay and industrial controls; at manufacturer: 0.00137248 USD
- Major home appliances (except ovens, stoves, refrigerators and laundry machines); at manufacturer: 8.15885e-7 USD
- Paper; at manufacturer: 2.08337e-5 USD
- Rail transport: 0.00355716 USD
- Ready-mix concrete; at manufacturer: 1.0775e-6 USD
- Employment services: 0.000584064 USD
- Home cooking appliances; at manufacturer: 1.01986e-7 USD
- Food and beverage stores: 2.47739e-6 USD
- All other converted paper products; at manufacturer: 9.70753e-8 USD
- Light gauge metal cans, boxes, and containers; at manufacturer: 0.00162322 USD
- Packaged meat (except poultry); at manufacturer: 5.48827e-7 USD
- Copper, nickel, lead, and zinc; at mine: 0.000224386 USD
- Custom computer programming: 6.04688e-5 USD
- Metal pipe fittings, ball and roller bearings, industrial patterns, metal bath fixtures, other misc. fabricated metals; at manufacturer: 0.0018024 USD
- Cardboard containers; at manufacturer: 0.00811774 USD
- Communications equipment; at manufacturer: 1.63542e-7 USD
- Cast iron and steel; at manufacturer: 0.00297176 USD
- Books, newspapers, magazines, and other print media; at manufacturer: 2.7085e-6 USD
- Semiconductors; at manufacturer: 0.00557018 USD
- Compressed Gases; at manufacturer: 3.98268e-5 USD
- Wireless communications; at manufacturer: 8.09922e-6 USD
- Plastics and rubber industry machinery; at manufacturer: 4.96653e-6 USD
- Gasoline, fuels, and by-products of petroleum refining; at manufacturer: 0.00120591 USD
- Other basic organic chemicals; at manufacturer: 0.000413367 USD
- Electronic equipment repair and maintenance: 0.000775049 USD
- Machine shops; at manufacturer: 0.00752981 USD
- Sand, gravel, clay, phosphate, other nonmetallic minerals; at mine: 4.36396e-6 USD
- Fabric; at manufacturer: 1.1774e-5 USD
- Waste management and remediation: 0.00178234 USD

## Inputs from nature
- Occupation, urban, discontinuously built: 0.000169238 m2*a; data quality (4,2,1,1,1)
- Occupation, industrial area, built up: 0.000340665 m2*a; data quality (4,2,1,1,1)
- Energy, wind: 6.1661e-6 MJ; data quality (3,1,1,1,1)
- Water, fresh: 0.000238274, 0.000562092 m3 (2 entries, compartments not in this file); data quality (2,2,1,4,2)
- Energy, solar: 3.25745e-6 MJ; data quality (3,1,1,1,1)
- Occupation, industrial area: 0.00102199 m2*a; data quality (4,2,1,1,1)
- Water, saline: 2.08733e-5 m3; data quality (4,2,1,4,2)

## Emissions to nature
- Dimethoxy methane: 3.52111e-11 kg; data quality (2,2,1,1,5)
- dimethyl formamide: 9.07187e-11 kg; data quality (4,2,1,1,5)
- m-cresol: 1.66624e-14 kg; data quality (4,2,1,1,4)
- benzyl chloride: 4.62468e-11 kg; data quality (2,2,1,1,5)
- Chrysene, 5-methyl-: 3.13004e-17 kg; data quality (2,2,1,1,5)
- Zinc: 2.28973e-10 kg; data quality (5,1,1,1,5)
- vinyl acetate: 2.03684e-9 kg; data quality (4,2,1,1,5)
- 2,4,5,2',5'-PENTACHLOROBIPHENYL: 2.89671e-18 kg; data quality (2,2,1,1,5)
- 2,2-BIS(4-HYDROXY-3,5-DIBROMOPHENYL)PROPANE: 3.33961e-13 kg; data quality (5,1,1,1,5)
- carbon monoxide: 1.91644e-5 kg; data quality (3,2,1,1,3)
- Butanol: 4.70772e-12 kg; data quality (5,1,1,1,4)
- SEC-BUTYL ALCOHOL: 1.0889e-6 kg; data quality (5,1,1,1,5)
- Ethene, trichloro-: 3.41251e-11 kg; data quality (5,1,1,1,5)
- hydrogen chloride: 1.08777e-7 kg; data quality (2,2,1,1,5)
- Ethane, 1,1,1-trifluoro-, HFC-143a: 7.48514e-8 kg; data quality (4,2,1,4,1)
- oxadiazon: 8.74107e-12 kg; data quality (3,1,1,1,5)
- 2,4-dinitrophenol: 9.44483e-15 kg; data quality (5,2,1,1,5)
- acrylonitrile: 1.28474e-11 kg; data quality (4,2,1,1,5)
- Asbestos: 1.19692e-14 kg; data quality (5,2,1,1,5)
- 1,1,1-trichloroethane: 6.28609e-8 kg; data quality (3,2,1,1,5)
- methylene diphenyl diisocyanate: 9.099e-10 kg; data quality (4,2,1,1,5)
- methanol: 5.63207e-7 kg; data quality (4,2,1,1,4)
- chromium: 2.58891e-11, 3.58786e-8, 3.4093e-9 kg (3 entries, compartments not in this file); data quality (4,1,1,1,5)
- Xylene: 1.47609e-13 kg; data quality (4,1,1,1,5)
- copper: 6.9545e-10, 1.28655e-9, 1.51789e-8 kg (3 entries, compartments not in this file); data quality (4,1,1,1,5)
- anthracene: 1.05375e-12 kg; data quality (3,2,1,4,1)
- Benzene, ethyl-: 1.44629e-11 kg; data quality (4,1,1,1,5)
- 4,4'-METHYLENEBIS(2-CHLOROANALINE): 8.96951e-13 kg; data quality (5,2,1,1,5)
- aniline: 5.58092e-12 kg; data quality (4,2,1,1,5)
- 1,1,2,2-tetrachloroethane: 4.78509e-14 kg; data quality (3,2,1,1,4)
- Dimethyl sulfate: 6.8357e-14 kg; data quality (2,2,1,1,5)
- toluene, 2,4-dinitro-: 3.99022e-16 kg; data quality (5,2,1,1,5)
- Thiophanat-methyl: 3.70622e-12 kg; data quality (4,1,1,1,5)
- carbon tetrachloride: 3.98265e-12 kg; data quality (4,2,1,1,5)
- phenanthrene: 3.01703e-11 kg; data quality (3,2,1,4,1)
- Phenol, 2,4-dimethyl-: 3.50238e-14 kg; data quality (4,1,1,1,3)
- formic acid: 1.12355e-11 kg; data quality (3,1,1,1,5)
- butanol: 1.10288e-6 kg; data quality (5,1,1,1,5)
- Ethylene glycol monoethyl ether: 4.33455e-13, 3.62772e-6 kg (2 entries, compartments not in this file); data quality (5,1,1,1,5)
- Chrysene: 3.46435e-13 kg; data quality (3,2,1,4,1)
- Propene: 5.05877e-9 kg; data quality (3,1,1,1,5)
- 2-(2-BUTOXYETHOXY) ETHYL ACETATE: 1.55174e-10 kg; data quality (5,2,1,1,3)
- 2-methylnaphthalene: 6.17631e-13 kg; data quality (2,2,1,1,5)
- Chromium VI: 4.93924e-9 kg; data quality (3,2,1,1,5)
- 2,3,4'-TRICHLOROBIPHENYL: 1.73333e-18 kg; data quality (2,2,1,1,5)
- ALUMINUM OXIDE: 3.89949e-12, 1.76437e-12 kg (2 entries, compartments not in this file); data quality (5,1,1,1,5)
- arsenic: 2.47268e-13 kg; data quality (2,1,1,1,3)
- TERT-BUTYL ALCOHOL: 9.04631e-12, 1.7049e-9 kg (2 entries, compartments not in this file); data quality (4,1,1,1,5)
- PHOSPHORUS: 1.03237e-9 kg; data quality (2,2,1,1,5)
- phthalic anhydride: 3.00821e-11 kg; data quality (2,2,1,1,5)
- bromoform: 5.56014e-14 kg; data quality (3,2,1,1,5)
- isophorone: 6.28978e-8 kg; data quality (2,2,1,1,5)
- Benzo(b)fluoranthene: 2.14552e-13 kg; data quality (3,2,1,4,1)
- Phosphine: 5.07949e-17 kg; data quality (4,2,1,1,4)
- benzene, chloro-: 1.67145e-11 kg; data quality (4,2,1,1,5)
- Ethane, pentafluoro-, HFC-125: 1.74944e-7 kg; data quality (4,2,1,4,1)
- Benzo(a)anthracene: 1.19006e-13 kg; data quality (2,2,1,1,4)
- catechol: 3.42044e-13 kg; data quality (5,2,1,1,5)
- styrene: 1.84963e-11 kg; data quality (3,1,1,1,5)
- toluene: 1.40633e-5 kg; data quality (3,2,1,1,5)
- BIS (2-ETHOXY ETHYL) ETHER: 3.64305e-11 kg; data quality (5,2,1,1,5)
- CHLORONAPHTHALENE: 2.18829e-17 kg; data quality (1,2,1,1,5)
- propylene oxide: 1.36834e-11 kg; data quality (3,2,1,1,5)
- 1,2,4-trichlorobenzene: 2.6176e-14 kg; data quality (4,2,1,1,5)
- cyclohexane: 2.92513e-9 kg; data quality (4,1,1,1,4)
- trichloroethylene: 5.39229e-6 kg; data quality (4,2,1,1,5)
- fluorene: 1.21641e-11 kg; data quality (3,2,1,4,1)
- Hydrocarbons, aromatic: 4.70809e-10 kg; data quality (3,2,1,4,1)
- 2-(2-ETHOXYETHOXY) ETHYL ACETATE: 1.75491e-11 kg; data quality (5,2,1,1,5)
- Diethylene glycol butyl ether: 8.36319e-9 kg; data quality (4,2,1,1,5)
- dicyclopentadiene: 4.35886e-11 kg; data quality (4,1,1,1,5)
- beryllium: 3.29346e-12 kg; data quality (2,2,1,1,4)
- formaldehyde: 3.18644e-12 kg; data quality (2,1,1,1,5)
- trifluralin: 3.49643e-12 kg; data quality (4,1,1,1,5)
- ammonia: 1.97936e-7 kg; data quality (3,2,1,1,5)
- Methane: 4.76836e-7 kg; data quality (4,2,1,4,1)
- toluene-2,4-diisocyante: 3.74338e-10 kg; data quality (3,2,1,1,5)
- diethanolamine: 1.24512e-10 kg; data quality (3,2,1,1,5)
- PCB-1: 1.46659e-19 kg; data quality (2,2,1,1,5)
- manganese: 5.05366e-8 kg; data quality (3,2,1,1,5)
- fluoranthene: 2.92718e-12 kg; data quality (3,2,1,4,1)
- NITRATE: 1.71522e-11 kg; data quality (5,1,1,1,5)
- hexane: 2.09264e-5 kg; data quality (3,2,1,1,5)
- m-xylene: 1.07774e-6 kg; data quality (3,2,1,1,5)
- diisocyanates: 1.89514e-10 kg; data quality (4,1,1,1,5)
- NITROUS ACID: 1.72308e-10, 9.40671e-8 kg (2 entries, compartments not in this file); data quality (5,1,1,1,5)
- Hydrazine: 1.79643e-13 kg; data quality (4,2,1,1,4)
- ethylbenzene: 8.40046e-9 kg; data quality (4,1,1,1,5)
- Sulfuric acid: 1.60412e-9 kg; data quality (2,1,1,1,5)
- carbon disulfide: 4.2608e-8 kg; data quality (4,2,1,1,5)
- p-cresol: 1.66624e-14 kg; data quality (4,2,1,1,4)
- methyl isobutyl ketone: 3.7086e-6 kg; data quality (3,2,1,1,5)
- manganese: 8.29977e-10, 5.65698e-11 kg (2 entries, compartments not in this file); data quality (4,1,1,1,5)
- cyanide: 2.48849e-8 kg; data quality (3,2,1,1,5)
- naphthalene: 3.02629e-8 kg; data quality (3,2,1,1,5)
- Phthalate, dibutyl-: 4.69524e-9 kg; data quality (3,2,1,1,5)
- monochloroethane: 6.1959e-14 kg; data quality (3,2,1,1,5)
- 3-methylcholanthrene: 1.38492e-14 kg; data quality (2,2,1,1,4)
- Dinitrogen monoxide: 4.85579e-8 kg; data quality (4,2,1,4,1)
- Pentachloroethane: 1.03025e-12 kg; data quality (2,1,1,1,5)
- 4-nitrophenol: 5.97558e-15 kg; data quality (2,2,1,1,5)
- toluene: 1.69986e-13 kg; data quality (5,1,1,1,5)
- ammonia: 5.38882e-11 kg; data quality (3,1,1,1,4)
- Ethane, 1,1,1,2-tetrafluoro-, HFC-134a: 6.61076e-7 kg; data quality (4,2,1,4,1)
- Phthalate, dimethyl-: 4.40181e-9 kg; data quality (4,2,1,1,5)
- ACRYLAMIDE: 1.47105e-12 kg; data quality (4,2,1,1,5)
- phthalate, dioctyl-: 2.92919e-10 kg; data quality (3,2,1,1,5)
- Triethylene glycol: 3.02833e-11 kg; data quality (5,2,1,1,5)
- Chromium, ion: 1.65523e-8 kg; data quality (2,2,1,1,5)
- N,N-DIMETHYLANILINE: 9.58376e-11 kg; data quality (5,2,1,1,5)
- Ethanol, 2-butoxy-: 2.12263e-9 kg; data quality (5,2,1,1,4)
- Carbon dioxide: 0.025048 kg; data quality (4,2,1,4,1)
- silver: 7.73847e-14 kg; data quality (4,1,1,1,5)
- Dibenz(a,h)anthracene: 2.21748e-14 kg; data quality (2,2,1,1,5)
- 1,4-BENZOQUINONE: 9.22234e-15 kg; data quality (3,2,1,1,5)
- Phenol: 6.5158e-12 kg; data quality (3,1,1,1,5)
- 4,4'-isopropylidenediphenol: 2.23467e-10 kg; data quality (4,1,1,1,5)
- 2-nitropropane: 4.09582e-13 kg; data quality (3,2,1,1,5)
- arsenic: 3.68149e-11 kg; data quality (3,2,1,1,4)
- Ethene, chloro-: 1.37971e-11 kg; data quality (3,2,1,1,5)
- Captan: 2.51489e-15 kg; data quality (5,2,1,1,5)
- methane, tetrachloro-, R-10: 1.21804e-11 kg; data quality (3,1,1,1,5)
- CHLOROPRENE: 2.98199e-15 kg; data quality (2,2,1,1,5)
- 2,4/2,6-toluenediisocyanate (mixture): 3.34644e-12 kg; data quality (3,1,1,1,5)
- methane, monochloro-, r-40: 3.11776e-10 kg; data quality (3,2,1,1,5)
- 2-chloro-1-phenylethanone: 9.94286e-15 kg; data quality (2,2,1,1,5)
- o-Xylene: 5.08674e-7 kg; data quality (3,2,1,1,5)
- nickel: 2.23624e-8 kg; data quality (3,2,1,1,5)
- Methyl iodide: 5.91547e-11 kg; data quality (4,2,1,1,5)
- 2,4-dimethylphenol: 8.43022e-11 kg; data quality (4,1,1,1,3)
- Phosphorus: 3.59007e-8 kg; data quality (2,1,1,1,5)
- 2-METHOXYETHANOL: 2.4665e-11 kg; data quality (4,2,1,1,5)
- chloroform: 3.81498e-12 kg; data quality (4,2,1,1,5)
- para-xylene: 4.50574e-7 kg; data quality (3,2,1,1,5)
- Benzo(k)fluoranthene: 1.99053e-13 kg; data quality (3,2,1,4,1)
- epichlorohydrin: 9.50761e-13 kg; data quality (3,2,1,1,5)
- 2,4,6-trichlorophenol: 1.03976e-16 kg; data quality (2,2,1,1,5)
- Pendimethalin: 1.18529e-11 kg; data quality (5,1,1,1,5)
- t-butyl methyl ether: 1.79798e-11 kg; data quality (3,2,1,1,5)
- Water, saline: 1.05765e-5 m3; data quality (4,2,1,4,2)
- phenol: 1.99986e-12 kg; data quality (3,1,1,1,3)
- BENEFIN: 8.74107e-12 kg; data quality (5,1,1,1,5)
- methane, dichloro-, hcc-30: 1.0285e-6 kg; data quality (4,2,1,1,5)
- acetophenone: 3.15796e-9 kg; data quality (3,2,1,1,5)
- Phenol, pentachloro-: 1.08773e-13 kg; data quality (5,1,1,1,5)
- mercury: 1.31858e-10 kg; data quality (2,2,1,1,4)
- Decabromodiphenyl oxide: 1.17887e-11 kg; data quality (4,1,1,1,3)
- Titanium: 7.11397e-12 kg; data quality (5,2,1,1,4)
- Indeno(1,2,3-cd)pyrene: 1.26449e-13 kg; data quality (3,2,1,4,2)
- nitric acid: 3.27374e-13, 4.24789e-8 kg (2 entries, compartments not in this file); data quality (3,1,1,1,5)
- ethylene glycol: 6.50918e-7 kg; data quality (3,2,1,1,3)
- Styrene: 4.87326e-12 kg; data quality (3,1,1,1,5)
- maleic anhydride: 8.56487e-12 kg; data quality (2,2,1,1,5)
- Sulfur hexafluoride: 1.48302e-9 kg; data quality (4,2,1,4,1)
- benzene: 1.00707e-8 kg; data quality (3,2,1,3,3)
- Methane, difluoro-, HFC-32: 1.01879e-7 kg; data quality (4,2,1,4,1)
- 4,4'-METHYLENEDIANILINE: 1.34701e-12 kg; data quality (4,2,1,1,5)
- Xylene: 1.56958e-6 kg; data quality (4,2,1,1,5)
- acrolein: 1.77829e-9 kg; data quality (2,2,1,2,4)
- Sodium formate: 7.73847e-14, 2.10035e-12 kg (2 entries, compartments not in this file); data quality (3,1,1,1,5)
- ethane, 1,1,2-trichloro-: 3.6614e-14 kg; data quality (4,2,1,1,4)
- ethylene glycol: 5.41818e-14 kg; data quality (5,1,1,1,5)
- styrene: 1.07488e-7 kg; data quality (4,2,1,1,5)
- acetonitrile: 1.13497e-11 kg; data quality (3,2,1,1,5)
- o-cresol: 2.42848e-11 kg; data quality (2,1,1,1,3)
- Benzo(g,h,i)perylene: 6.8133e-10 kg; data quality (3,2,1,1,4)
- Nitrogen: 1.46419e-7 kg; data quality (3,2,1,1,5)
- Propene, 1,3-dichloro-: 2.93862e-14 kg; data quality (3,2,1,1,4)
- chlorine: 3.33315e-10 kg; data quality (4,2,1,1,5)
- benzene, ethyl-: 7.52848e-7 kg; data quality (3,2,1,1,5)
- acetaldehyde: 6.91165e-8 kg; data quality (3,2,1,1,5)
- 1-Methyl-2-pyrrolidinone: 3.37305e-9 kg; data quality (5,1,1,1,4)
- phenol: 5.66368e-9 kg; data quality (4,2,1,1,4)
- methane, bromo-, halon 1001: 8.55682e-12 kg; data quality (3,2,1,1,5)
- ethane, 1,2-dibromo-: 3.35657e-13 kg; data quality (2,2,1,1,5)
- 1,4-dichlorobenzene: 1.56816e-13 kg; data quality (2,2,1,1,5)
- 2-METHOXYETHYL ACETATE: 2.68943e-13 kg; data quality (4,2,1,1,4)
- acrylic acid: 5.79706e-11 kg; data quality (4,2,1,1,5)
- Water, fresh: 0.000670031 m3; data quality (2,2,1,4,2)
- CYANAMIDE: 7.10827e-13 kg; data quality (2,2,1,1,4)
- lead: 3.12163e-11, 1.24071e-11 kg (2 entries, compartments not in this file); data quality (3,1,1,1,5)
- 1,2-BUTYLENE OXIDE: 2.409e-11 kg; data quality (4,2,1,1,5)
- ETHYLENETHIOUREA: 1.68875e-13 kg; data quality (5,2,1,1,5)
- methanol: 1.18005e-10, 1.45332e-10 kg (2 entries, compartments not in this file); data quality (3,1,1,1,5)
- silver: 1.27546e-11 kg; data quality (4,1,1,1,4)
- particulates, < 10 um: 1.78368e-6 kg; data quality (3,2,1,1,5)
- sulfur dioxide: 8.85554e-7 kg; data quality (2,2,1,1,5)
- Xylene: 8.93512e-12 kg; data quality (4,1,1,1,4)
- dibenzofuran: 1.79071e-16 kg; data quality (4,2,1,1,4)
- ethyl acrylate: 1.15037e-11 kg; data quality (4,2,1,1,5)
- 1,4-dioxane: 2.01565e-11 kg; data quality (4,2,1,1,5)
- Chloroform: 1.09125e-13 kg; data quality (3,1,1,1,5)
- mercury: 1.85723e-13 kg; data quality (3,1,1,1,5)
- methyl methacrylate: 5.49901e-9 kg; data quality (4,2,1,1,5)
- carbonyl sulfide: 1.00175e-10 kg; data quality (4,2,1,1,5)
- propanal: 1.9589e-9 kg; data quality (3,2,1,3,2)
- Propane, 1,2-dichloro-: 1.09185e-12 kg; data quality (4,2,1,1,5)
- hydrogen sulfide: 8.71636e-10 kg; data quality (3,2,1,1,5)
- acenaphthene: 1.10638e-11 kg; data quality (3,2,1,4,1)
- 2-ethoxyethyl acetate: 2.47029e-8 kg; data quality (3,2,1,1,5)
- 1,2,4-trimethylbenzene: 7.39718e-8 kg; data quality (5,1,1,1,5)
- Cumene hydroperoxide: 5.37848e-11 kg; data quality (2,1,1,1,5)
- antimony: 1.74824e-13 kg; data quality (2,1,1,1,5)
- cadmium: 5.92304e-11 kg; data quality (3,2,1,1,5)
- benz[a]anthracene: 6.27484e-12 kg; data quality (2,2,1,1,5)
- selenium: 5.10665e-12 kg; data quality (2,2,1,1,5)
- Zinc: 3.44541e-9 kg; data quality (5,1,1,1,3)
- biphenyl: 2.45558e-12 kg; data quality (4,2,1,1,5)
- NITRIC ACID: 7.72685e-11 kg; data quality (3,1,1,1,5)
- Hydrazine, methyl-: 2.41703e-13 kg; data quality (2,2,1,1,5)
- o-toluidine: 8.96031e-16 kg; data quality (4,2,1,1,4)
- acenaphthylene: 1.32208e-11 kg; data quality (3,2,1,4,1)
- Nickel, ion: 9.14793e-13 kg; data quality (3,2,1,1,5)
- hydroquinone: 8.81636e-12 kg; data quality (3,2,1,1,5)
- 2,4/2,6-toluenediisocyanate (mixture): 3.09539e-14 kg; data quality (4,1,1,1,5)
- Cobalt: 6.16604e-10 kg; data quality (3,2,1,1,5)
- particulates, < 2.5 um: 2.9106e-6 kg; data quality (3,2,1,1,5)
- ethene, tetrachloro-: 1.73745e-7 kg; data quality (3,2,1,1,5)
- benzo(a)pyrene: 2.35377e-13 kg; data quality (3,2,1,4,1)
- VOC, volatile organic compounds: 0.000147316 kg; data quality (3,2,1,1,5)
- Cadmium: 2.06652e-13 kg; data quality (3,1,1,1,5)
- ethane, 1,2-dichloro-: 5.9605e-12 kg; data quality (3,2,1,1,5)
- butadiene: 2.69291e-9 kg; data quality (2,2,1,2,4)
- 1-Methyl-2-pyrrolidinone: 3.15214e-13 kg; data quality (5,1,1,1,3)
- cobalt: 3.32124e-13 kg; data quality (4,1,1,1,4)
- Triethyl amine: 5.55982e-8 kg; data quality (3,2,1,1,5)
- Aluminum: 3.77246e-10 kg; data quality (4,1,1,1,5)
- 1,1-DICHLOROETHYLENE: 3.57672e-13 kg; data quality (3,2,1,1,5)
- tertiary-Butyl Acetate: 2.26756e-6 kg; data quality (3,2,1,1,5)
- BUTYL ISOCYANATE: 2.34808e-10 kg; data quality (5,2,1,1,5)
- beryllium: 5.49873e-13 kg; data quality (5,1,1,1,3)
- 2,2,4-trimethylpentane: 2.53032e-9 kg; data quality (3,2,1,3,2)
- 1,2,4-trimethylbenzene: 6.12999e-12 kg; data quality (5,1,1,1,4)
- CARBAZOLE: 2.01545e-16 kg; data quality (2,2,1,1,5)
- nickel: 1.47834e-9, 2.80161e-11 kg (2 entries, compartments not in this file); data quality (4,1,1,1,5)
- ethylene oxide: 4.53313e-11 kg; data quality (3,2,1,1,5)
- lead: 2.75531e-9 kg; data quality (3,2,1,1,5)
- cumene: 6.68382e-9 kg; data quality (3,2,1,1,5)
- polychlorinated biphenyls: 1.72885e-17 kg; data quality (3,2,1,1,4)
- Carbaryl: 8.74107e-12 kg; data quality (5,1,1,1,5)
- nitrogen oxides: 9.41636e-6 kg; data quality (2,2,1,1,4)
- Propane, 1,1,1,3,3,3-hexafluoro-, HCFC-236fa: 2.02213e-9 kg; data quality (4,2,1,4,1)
- pentachlorophenol: 2.12251e-13 kg; data quality (5,1,1,1,5)
- hydrogen fluoride: 1.46574e-9 kg; data quality (2,2,1,1,4)
- Cresol: 5.16163e-10 kg; data quality (4,2,1,1,4)
- BUTYL ACRYLATE: 2.56893e-14 kg; data quality (4,1,1,1,5)
- pyrene: 1.90595e-12 kg; data quality (3,2,1,4,1)
- 4-Methyl-2-pentanone: 4.54934e-12 kg; data quality (4,1,1,1,4)
- antimony: 2.96442e-10 kg; data quality (3,2,1,1,5)
- 2-METHYLANTHRACENE: 5.66637e-16 kg; data quality (2,2,1,1,5)
- formaldehyde: 4.19843e-7 kg; data quality (2,2,1,1,5)

## Inventory method
Input-output

## Modelling constants
The reference unit of all processes is 1 USD2013 of the good or service. The technosphere inputs are based on the US BEA detailed input-output tables for 2007. The IO tables are combined to develop a commodity-by-commodity model based on the the industry-technology assumption (see Suh et al., 2010), which assumes all commodities produced by a given industry have the same input structure, but that multiple industries can produce the same commodity. Thus, model technosphere flows represent commodity outputs (and not industry outputs) from other processes in the model. There are no by-products included in these processes. All commodity production is based on US-conditions, despite in reality that some goods and services are produced overseas, as USEEIO v1.1 is a single-region IO model.

## Completeness
The input-output approach assures that all purchased inputs associated with the sectors making these commodities as reported in the US census for 2007 are included. The direct resources extracted including minerals, energy sources, water and land occupied are included. Emissions to air include all critieria air pollutants, greenhouse gases, and hazardous and toxic air pollutants as defined by US EPA. Releases to water include toxics, total nitrogen and total phosphorus, and water discharges. Releases to soil or groundwater include toxics and agriculutural pesticides. Some metal releases to air, water and soil are not included because they could not be speciated. Solid hazardous and non-hazardous wastes generated are not included as an elementary flows although purchases of waste services are included.

## Data treatment
Greenhouse gases are primarily from the US Greenhouse Gas Emission Inventory (USEPA 2016a). Biogenic C uptake is not included (change from version 1.0), as biogenic C emission are not included. Toxic releases to air, water and soil (except pesticides) are from the 2013 Toxic Release Inventory (USEPA 2015a). Criteria air pollutants and hazardous air pollutants are from the 2011 National Emissions Inventory (USEPA 2015b). All estimates are normalized by industry based on sector output in the data year, then converted to 2013 USD using relative sector-specific CPIs (if data year is not 2013). Energy use represent raw renewables or fossil fuel energies and is based on EIA data for 2014. See Table 1 in Yang, Ingwersen et al. 2017 and Supporting Information 1, and the v1.1 data update notes (Ingwersen et al. 2017) for all details on environmental data sources used.Land occupation associated with manufacturing buildings was estimated based on the building floorspace data provided by the U.S. Energy Information Administration in the 2010 Manufacturing Energy Consumption Survey (EIA 2013). Portions of total renewable energy (EIA 2016) based on EIA-923 reports for 2014 (EIA 2017) are included. Nitrogen and Phosphorus releases are modeled in total N and total P equivalents as estimated by the Discharge Monitoring Report Nutrient Loading tool (USEPA 2016b). Self-supplied withdrawals were assigned to industrial sectors based on water use statistics for Canadian industries by NAICS 3-digit sector scaled to US production levels based on gross domestic product by industry (BEA 2015; Statistics Canada 2010), and further disaggregated to the manufacturing sectors based on compensation of employees as provided by the 2007 IO tables (BEA 2015). Water withdrawals associated with public supply were allocated to sectors based on their use of water, sewage, and other services in USD based on the IO tables (BEA 2015). Portions of total renewable energy (EIA 2016) by type are assigned to sectors (hydro, wind, solar, or) based on EIA-923 reports for 2014 (EIA 2017).

## Data collection
2015-2016

## Sampling procedure
US federal government sources, including surveys and US EPA emissions databases are used as the primary sources. From these sources, data for US reporting establishments/facilities are aggregated by the NAICS sector as defined in the BEA detailed 2007 input-output tables. When level of sector aggregation differs, or when direct emissions are not reported but modeled, additional sources are used to make allocations and estimates.

## Review details
In regard to quality assurance and peer-review, each dataset created went through Quality Assurance as defined in a quality assurance project plans at US EPA, CSRA or ERG. The model was assembled with the IO model builder model (USEPA 2016c). Validation functions were used to check that all the model components were properly assembled and harmonized. Bayou Demeke and Santosh Ghimire provided internal peer review of the model methodology and the manuscript underwent standard EPA management review. An editor and two anonymous reviewers at the Journal of Cleaner Production reviewed the model. In regard to data quality evaluation, data quality assessment was performed at the flow and process levels according to the updated US EPA data quality assessment guidelines as defined in US EPA (2016b).

## Intended application
The primary application is for use in the US Environmentally-Extended Input-Ouput model, USEEIO, version 1.1. This model is being used by the US EPA for supporting tools that prioritize goods and services based on potential environmental impacts, resource use or emissions for large regions, including the US and US states, and as a strealined tool for organizations as a starting point to consider sustainable materials management. Model results are designed to provide meso/macro-level decision support.

## Project
USEEIO v1.1 was developed by the US EPA with CSRA and ERG with Wesley W. Ingwersen and David E. Meyer as research leads. Yi Yang was the technical lead on the work for CSRA (contract EP-C-15-012); Troy Hawkins was lead for ERG (contract EP-C-12-021).

## Sources
- Edelen and Ingwersen 2017
- USEPA 2016a
- USGS 2015
- Goebes et al. 2003
- USEPA 2016c
- BLM 2008
- Torcellini et al. 2003
- EIA 2015
- USDA 2016
- USEPA 2015b
- USDA 2014
- USEPA 2016b
- Ingwersen et al. 2017
- Maupin et al. 2014
- Macknick et al. 2011
- USDA 2009a
- Nickerson et al. 2011
- Ingwersen et al. DRAFT
- USDA 2006
- Kim et el. 2013
- EIA 2017
- Lovelace 2009
- BEA 2015
- USEPA 2015a
- Blackhurst et al. 2010
- Yienger et al. 1995
- EIA 2013
- USDA 2009b
- EIA 2016
- USGS 2016
- Statistics Canada 2010
