# Vehicles and parts sales

Dataset: openLCA process, unit process
Category: 44-45: Retail Trade
Geography: United States
Time period: 2017-01-01 to 2017-12-31
Data quality: US EPA - Process Pedigree Matrix (1;1)
Exchange data quality scheme: US EPA - Flow Pedigree Matrix
Generated by: US EPA with CSRA and ERG
Owner: US EPA
Published in: Yang, Ingwersen et al. 2017
restrictionsDescription: This model shold be appropriately cited (see Yang, Ingwersen et al. 2017 source or Publication field) when used. Any changes or derivations of this model by the user should be documented. The model itself and any results from use of this model shall not be construed to consitute US EPA opinion or policy.
copyright: false

## General comment
BEA Code & Name is '441000:Motor vehicle and parts dealers'. Description of the primary industry producing this good or service, adapted from the Census Bureau NAICS 2007 descriptions: Industries in the Motor Vehicle and Parts Dealers subsector retail motor vehicles and parts from fixed point-of-sale locations. Establishments in this subsector typically operate from a showroom and/or an open lot where the vehicles are on display. The display of vehicles and the related parts require little by way of display equipment. The personnel generally include both the sales and sales support staff familiar with the requirements for registering and financing a vehicle as well as a staff of parts experts and mechanics trained to provide repair and maintenance services for the vehicles. Specific industries have been included in this subsector to identify the type of vehicle being retailed. Sales of capital or durable nonconsumer goods, such as medium and heavy-duty trucks, are always included in wholesale trade. These goods are virtually never sold through retail methods.

## Technology
The process describes the average US production of this good or service within this NAICS-based grouping defined in the BEA 2007 detailed input-output tables (BEA 2015). Distribution, wholesale and retailing of this good or service, use, and final disposal are not included. Creation of a product system with this process will enable modeling of all upstream (supply-chain) activities.

## Geography
Data represent the 50 US states

## Time period
2017 was the year in which this version of USEEIO was released and is the target date for the model

## Reference product
- Vehicles and parts sales: 1 USD

## Inputs from technosphere
All rows: data quality (1,3,1,1,1)
- Drinking water and wastewater treatment; at consumer: 0.000513665 USD
- Curtains and linens; at manufacturer: 1.4073e-5 USD
- Legal services: 0.00220243 USD
- Facilities support: 0.000316643 USD
- Other real estate: 0.0372794 USD
- Sporting and athletic goods; at manufacturer: 3.51825e-5 USD
- General merchandise stores: 0.000112584 USD
- Air transport: 0.000591066 USD
- Light gauge metal cans, boxes, and containers; at manufacturer: 5.6292e-5 USD
- Electronic capacitors, resistors, coils, transformers, connectors and other components (except semiconductors and printed circuit assemblies); at manufacturer: 4.92555e-5 USD
- Glass and glass products; at manufacturer: 1.4073e-5 USD
- All other converted paper products; at manufacturer: 1.4073e-5 USD
- Industrial process variable instruments; at manufacturer: 0.000591066 USD
- Movies and film: 2.8146e-5 USD
- Speed changers, industrial high-speed drives, and gears; at manufacturer: 4.2219e-5 USD
- Paper; at manufacturer: 0.000112584 USD
- Metal coatings, engravings, and heat treatments; at manufacturer: 0.00103437 USD
- Urethane and other foam products; at manufacturer: 0.000119621 USD
- Management consulting: 0.00300459 USD
- Truck transport: 0.0074024 USD
- Ball and roller bearings; at manufacturer: 7.03651e-6 USD
- Cardboard; at manufacturer: 0.000147767 USD
- Jewelry and silverware; at manufacturer: 0.000450336 USD
- Fluid meters and counting devices; at manufacturer: 7.74016e-5 USD
- Lessors of nonfinancial intangible assets: 0.00154803 USD
- Other petroleum and coal products; at manufacturer: 0.000591066 USD
- Travel arrangement and reservation: 0.000569957 USD
- Primary iron, steel, and ferroalloy products; at manufacturer: 2.11095e-5 USD
- Advertising and public relations: 0.0396507 USD
- Other textiles; at manufacturer: 0.000218132 USD
- Lime and gypsum products; at manufacturer: 7.03651e-6 USD
- Vehicle rental and leasing: 0.00155507 USD
- Paints and coatings; at manufacturer: 0.000182949 USD
- Commercial equipment rental: 0.000837344 USD
- Dry-cleaning and laundry: 0.000591066 USD
- Warehousing: 0.0119339 USD
- News syndicates, libraries, archives, Internet publishing and all other information services: 6.33285e-5 USD
- Plastic bags, films, and sheets; at manufacturer: 0.000267387 USD
- Environmental and other technical consulting services: 0.000513665 USD
- Consumer goods and general rental centers: 0.000211095 USD
- Abrasive products; at manufacturer: 2.8146e-5 USD
- Motors and generators; at manufacturer: 9.85111e-5 USD
- Business support: 0.00277238 USD
- Rubber and plastic belts and hoses; at manufacturer: 7.03651e-6 USD
- Sports: 7.03651e-6 USD
- Leather; at manufacturer: 4.92555e-5 USD
- Cardboard containers; at manufacturer: 0.000218132 USD
- Newspapers; at publisher: 7.03651e-6 USD
- Internet publishing and broadcasting: 0.000323679 USD
- Pet care, photofinishing, parking and other sundry services: 0.000394044 USD
- Unrefined oil and gas; at extraction site: 0.00014073 USD
- Office administration: 0.000816235 USD
- Air conditioning, refrigeration, and warm air heating equipment; at manufacturer: 0.000154803 USD
- Passenger ground transport: 7.74016e-5 USD
- All other food and drinking places: 0.000119621 USD
- Machinery for the paper, textile, food or other industries (except semiconductor machinery); at manufacturer: 7.03651e-6 USD
- Water transport (boats, ships, ferries): 5.6292e-5 USD
- Household goods repair: 0.000851417 USD
- Material handling equipment; at manufacturer: 2.11095e-5 USD
- Fabric; at manufacturer: 2.8146e-5 USD
- Valve and fittings (except for plumbing); at manufacturer: 2.8146e-5 USD
- Springs and wires; at manufacturer: 6.33285e-5 USD
- Accounting, tax preparation, bookkeeping, and payroll: 0.00535478 USD
- Air and gas compressors; at manufacturer: 0.000253314 USD
- Metal windows, doors, and architectural products; at manufacturer: 7.03651e-5 USD
- Electricity; at consumer: 0.00653691 USD
- Noncomparable imports: 0.000267387 USD
- Golf courses, marinas, ski resorts, fitness and other rec centers and industries: 2.11095e-5 USD
- Independent artists, writers, and performers: 0.000225168 USD
- Other plastic products; at manufacturer: 0.0027372 USD
- Sound recording: 0.0013299 USD
- Other educational services: 7.74016e-5 USD
- Greenhouse crops, mushrooms, nurseries, and flowers; at farm: 0.00127361 USD
- Stationery; at manufacturer: 2.8146e-5 USD
- Wireless telecommunications: 0.00211799 USD
- Lawn and garden equipment; at manufacturer: 0.000182949 USD
- Metal pipe fittings, ball and roller bearings, industrial patterns, metal bath fixtures, other misc. fabricated metals; at manufacturer: 0.000239241 USD
- Other retail: 0.00474964 USD
- Wireless communications; at manufacturer: 8.44381e-5 USD
- Other engine equipment; at manufacturer: 4.92555e-5 USD
- Watches, clocks, and other measuring and controlling devices; at manufacturer: 2.8146e-5 USD
- Lids, jars, bottle caps, other metal closures and crowns; at manufacturer: 7.03651e-6 USD
- Adhesives; at manufacturer: 7.03651e-6 USD
- Investigation and security: 0.00109769 USD
- Marketing research and all other miscellaneous professional, scientific, and technical services: 0.000752906 USD
- Insurance carriers: 0.0104492 USD
- Plastic pipe, fittings, and sausage casings; at manufacturer: 0.00120324 USD
- Clothing; at manufacturer: 1.4073e-5 USD
- Full-service restaurants: 0.000858454 USD
- Investment advice, portfolio management, and other financial advising services: 0.000154803 USD
- Motor vehicle steering, suspension components (except spring), and brake systems; at manufacturer: 0.00056292 USD
- State and local government enterprises: 0.000626249 USD
- Company and enterprise management: 0.00178024 USD
- Computer systems design: 0.00173098 USD
- Concrete pipe, bricks, and blocks; at manufacturer: 0.000197022 USD
- Food and beverage stores: 3.51825e-5 USD
- Polystyrene foam products; at manufacturer: 0.000126657 USD
- Commercial machinery repair: 0.00272313 USD
- Nondepository credit intermediation and related activities: 0.00926004 USD
- Vehicle seating and interior trim (upholstery); at manufacturer: 2.11095e-5 USD
- Directory, mailing list, and other publishers; at publisher: 1.4073e-5 USD
- Gasoline, fuels, and by-products of petroleum refining; at manufacturer: 0.00338456 USD
- Employment services: 0.00299755 USD
- Hotels and campgrounds: 6.33285e-5 USD
- Used and secondhand goods: 3.51825e-5 USD
- Buildings and dwellings services: 0.00283571 USD
- Specialized design: 0.000598103 USD
- Storage batteries; at manufacturer: 0.000105548 USD
- Navigation instruments; at manufacturer: 0.000154803 USD
- Couriers and messengers: 0.00351122 USD
- Wood kitchen cabinets and countertops; at manufacturer: 0.00042219 USD
- Other basic organic chemicals; at manufacturer: 2.8146e-5 USD
- Wholesale trade: 0.00916153 USD
- Transmission and power train parts; at manufacturer: 0.000844381 USD
- Veneer, plywood, and engineered wood; at manufacturer: 0.000555884 USD
- Nonferrous metal casts; at manufacturer: 7.03651e-6 USD
- Vending, commercial laundry, and other commercial and service industry machinery; at manufacturer: 7.03651e-6 USD
- Architectural, engineering, and related services: 0.00144952 USD
- Home cooking appliances; at manufacturer: 0.00014073 USD
- Rail transport: 5.6292e-5 USD
- Shelving and lockers; at manufacturer: 0.000450336 USD
- Vehicles and parts sales: 0.000788089 USD
- Telecommunications: 0.00526331 USD
- Light fixtures; at manufacturer: 7.03651e-6 USD
- Office supplies (not paper); at manufacturer: 1.4073e-5 USD
- Civic, social, professional, and similar organizations: 0.00028146 USD
- Semiconductors; at manufacturer: 0.000358862 USD
- Electronic equipment repair and maintenance: 0.00140026 USD
- Gaskets, seals, musical instruments, fasteners, brooms, brushes, mop and other misc. goods; at manufacturer: 0.000358862 USD
- Vehicle electrical and electronic equipment; at manufacturer: 0.00107659 USD
- Satellite, telecommunications resellers, and all other telecommunications: 0.000569957 USD
- Cutlery and handtools; at manufacturer: 2.11095e-5 USD
- Secondary steel products; at manufacturer: 7.03651e-6 USD
- Colleges, universities, junior colleges, and professional schools: 4.92555e-5 USD
- Other vehicle parts; at manufacturer: 0.00201948 USD
- Data processing and hosting: 0.00363787 USD
- Light bulbs; at manufacturer: 1.4073e-5 USD
- Wiring devices; at manufacturer: 4.92555e-5 USD
- Cutting and machine tool accessory, rolling mill, and other metalworking machines; at manufacturer: 2.11095e-5 USD
- Soap and cleaning compounds; at manufacturer: 0.000126657 USD
- Vehicle metal stamping; at manufacturer: 2.11095e-5 USD
- Nonresidential building repair and maintanence: 0.00205466 USD
- Other support services: 0.00178727 USD
- Other rubber products; at manufacturer: 2.8146e-5 USD
- Magazines and journals; at publisher: 6.33285e-5 USD
- Waste management and remediation: 0.00242759 USD
- Plastics; at manufacturer: 2.8146e-5 USD
- Secondary copper products; at manufacturer: 7.03651e-6 USD
- Limited-service restaurants: 0.000830308 USD
- Other transportation equipment; at manufacturer: 7.03651e-6 USD
- Scenic and sightseeing transportation and support activities for transportation: 0.00334234 USD
- Books, newspapers, magazines, and other print media; at manufacturer: 0.000759943 USD
- Screws, nuts, and bolts; at manufacturer: 2.11095e-5 USD
- Monetary authorities and depository credit intermediation: 0.00404599 USD
- Machine shops; at manufacturer: 0.000260351 USD
- Federal government enterprises: 1.4073e-5 USD
- External hard drives, CDs, other storage media; at manufacturer: 4.92555e-5 USD
- Software: 0.000218132 USD
- Securities and commodities brokerage and exchanges: 0.00135101 USD
- Computer terminals and other computer peripheral equipment; at manufacturer: 0.000478482 USD
- Finished and coated fabric; at manufacturer: 1.4073e-5 USD
- Insurance agencies and brokerages: 0.000478482 USD
- Chemicals (except basic chemicals, agrichemicals, polymers, paints, pharmaceuticals,soaps, cleaning compounds); at manufacturer: 5.6292e-5 USD
- Vehicle repair: 0.00136508 USD
- Rubber tires; at manufacturer: 0.00030257 USD
- Printed circuit and electronic assembly; at manufacturer: 0.000133694 USD
- Pipeline transport: 2.8146e-5 USD
- Clay and ceramic products; at manufacturer: 0.000640322 USD
- Postal service: 0.00328605 USD
- Vehicle engines and engine parts; at manufacturer: 8.44381e-5 USD
- Paper bags and coated paper; at manufacturer: 0.00030257 USD
- Other computer related services, including facilities management: 0.00168876 USD
- Metal hinges, keys, lock, and other hardware; at manufacturer: 0.000112584 USD
- Photographers: 4.92555e-5 USD
- Natural gas; at consumer: 0.00146359 USD
- Promoters and agents: 0.000774016 USD
- Heavy duty trucks; at manufacturer: 7.03651e-6 USD
- Other concrete products; at manufacturer: 0.00042219 USD
- Audio and video equipment; at manufacturer: 0.000260351 USD
- Laminated plastic plates and shapes; at manufacturer: 2.8146e-5 USD
- Communications equipment; at manufacturer: 1.4073e-5 USD
- Communication and energy wire and cable; at manufacturer: 7.03651e-6 USD

## Inputs from nature
- Occupation, urban, discontinuously built: 0.00181944 m2*a; data quality (4,2,1,1,1)
- Water, fresh: 0.000126252, 0.000218492 m3 (2 entries, compartments not in this file); data quality (1,2,1,4,2)

## Emissions to nature
- Chromium, ion: 3.88125e-12 kg; data quality (3,2,1,5,1)
- cadmium: 2.11976e-13 kg; data quality (3,2,1,1,5)
- particulates, < 2.5 um: 1.74014e-7 kg; data quality (3,2,1,3,2)
- Benzo(b)fluoranthene: 2.68161e-12 kg; data quality (3,2,1,4,1)
- Cobalt: 1.66738e-14 kg; data quality (3,2,1,1,5)
- Phthalate, dibutyl-: 1.13233e-13 kg; data quality (4,2,1,1,5)
- Methane: 4.30849e-7 kg; data quality (4,2,1,4,1)
- lead: 9.62383e-14 kg; data quality (3,2,1,1,5)
- selenium: 2.21511e-15 kg; data quality (2,2,1,1,5)
- nitrogen oxides: 1.76016e-6 kg; data quality (3,2,1,1,1)
- Indeno(1,2,3-cd)pyrene: 2.16793e-12 kg; data quality (3,2,1,4,1)
- Dinitrogen monoxide: 1.22752e-8 kg; data quality (4,2,1,4,1)
- benzo(a)pyrene: 2.48487e-12 kg; data quality (3,2,1,4,1)
- Cresol: 3.22562e-11 kg; data quality (4,2,1,1,5)
- o-Xylene: 1.12738e-9 kg; data quality (3,2,1,4,1)
- sulfur dioxide: 7.83227e-9 kg; data quality (3,2,1,3,3)
- Ethane, 1,1,1,2-tetrafluoro-, HFC-134a: 9.09531e-8 kg; data quality (4,2,1,4,1)
- nickel: 1.05033e-11 kg; data quality (3,2,1,5,1)
- 3-methylcholanthrene: 7.29817e-17 kg; data quality (2,2,1,1,5)
- benzene, chloro-: 8.59701e-16 kg; data quality (4,2,1,1,5)
- phenol: 6.78964e-16 kg; data quality (4,2,1,1,5)
- Water, fresh: 0.000291899 m3; data quality (1,2,1,4,2)
- Ethene, chloro-: 3.60064e-15 kg; data quality (3,2,1,1,5)
- carbon monoxide: 3.56337e-5 kg; data quality (3,2,1,1,1)
- hydrogen chloride: 1.30654e-10 kg; data quality (2,2,1,1,5)
- methyl isobutyl ketone: 3.5764e-9 kg; data quality (4,2,1,1,5)
- acenaphthylene: 8.97403e-11 kg; data quality (3,2,1,4,1)
- acrolein: 1.22411e-9 kg; data quality (3,2,1,4,1)
- cumene: 5.50488e-11 kg; data quality (4,2,1,1,5)
- anthracene: 1.79044e-11 kg; data quality (3,2,1,4,1)
- methane, dichloro-, hcc-30: 6.95017e-9 kg; data quality (3,2,1,1,5)
- mercury: 1.18521e-13 kg; data quality (3,2,1,4,2)
- Propene, 1,3-dichloro-: 7.46468e-16 kg; data quality (3,2,1,1,5)
- biphenyl: 2.32463e-13 kg; data quality (4,2,1,1,5)
- ethene, tetrachloro-: 4.00711e-9 kg; data quality (3,2,1,1,5)
- fluorene: 4.25324e-11 kg; data quality (3,2,1,4,1)
- Benzo(a)anthracene: 6.48707e-16 kg; data quality (2,2,1,1,5)
- polychlorinated biphenyls: 1.12064e-16 kg; data quality (3,2,1,1,5)
- 1,1,2,2-tetrachloroethane: 1.13146e-15 kg; data quality (3,2,1,1,5)
- fluoranthene: 2.38978e-11 kg; data quality (3,2,1,4,1)
- naphthalene: 3.13213e-9 kg; data quality (3,2,1,3,2)
- Chrysene: 2.4971e-12 kg; data quality (3,2,1,4,1)
- 1,1-DICHLOROETHYLENE: 7.60579e-10 kg; data quality (3,2,1,1,5)
- phenanthrene: 7.64007e-11 kg; data quality (3,2,1,4,1)
- toluene: 1.47443e-7 kg; data quality (3,2,1,3,3)
- Hydrocarbons, aromatic: 6.66856e-10 kg; data quality (3,2,1,4,1)
- carbon tetrachloride: 8.92931e-15 kg; data quality (4,2,1,1,5)
- methanol: 2.02373e-8 kg; data quality (4,2,1,1,5)
- Carbon dioxide: 0.00472201 kg; data quality (4,2,1,4,1)
- benzene, ethyl-: 3.19311e-8 kg; data quality (3,2,1,3,2)
- benzene: 6.09728e-8 kg; data quality (3,2,1,4,1)
- arsenic: 4.91732e-12 kg; data quality (3,2,1,5,1)
- VOC, volatile organic compounds: 3.19699e-6 kg; data quality (3,2,1,1,3)
- para-xylene: 5.87876e-11 kg; data quality (3,2,1,4,1)
- Propane, 1,1,1,3,3,3-hexafluoro-, HCFC-236fa: 2.78924e-10 kg; data quality (4,2,1,4,1)
- acetaldehyde: 1.5258e-8 kg; data quality (3,2,1,4,1)
- butadiene: 9.72733e-9 kg; data quality (3,2,1,4,1)
- hexane: 2.84586e-8 kg; data quality (3,2,1,3,2)
- ethane, 1,1,2-trichloro-: 8.99333e-16 kg; data quality (4,2,1,1,5)
- chloroform: 8.06133e-16 kg; data quality (4,2,1,1,5)
- 1,1,1-trichloroethane: 3.63417e-8 kg; data quality (3,2,1,1,5)
- propanal: 3.32929e-9 kg; data quality (3,2,1,4,1)
- styrene: 1.02031e-9 kg; data quality (3,2,1,4,1)
- m-xylene: 3.14111e-9 kg; data quality (3,2,1,4,1)
- manganese: 2.62914e-12 kg; data quality (3,2,1,5,1)
- Dibenz(a,h)anthracene: 1.71262e-14 kg; data quality (3,2,1,4,1)
- Chromium VI: 1.11181e-12 kg; data quality (3,2,1,5,1)
- particulates, < 10 um: 1.30055e-8 kg; data quality (3,2,1,3,3)
- antimony: 5.4439e-10 kg; data quality (3,2,1,1,5)
- Benzo(k)fluoranthene: 2.62772e-12 kg; data quality (3,2,1,4,1)
- Benzo(g,h,i)perylene: 7.07692e-12 kg; data quality (3,2,1,4,1)
- Ethane, pentafluoro-, HFC-125: 2.41311e-8 kg; data quality (4,2,1,4,1)
- 2,2,4-trimethylpentane: 3.33845e-8 kg; data quality (3,2,1,4,1)
- 2-methylnaphthalene: 9.03248e-15 kg; data quality (2,2,1,1,5)
- formaldehyde: 3.2868e-8 kg; data quality (3,2,1,4,1)
- ethane, 1,2-dichloro-: 3.12662e-13 kg; data quality (3,2,1,1,5)
- ethylene glycol: 4.60664e-9 kg; data quality (5,2,1,1,5)
- benz[a]anthracene: 2.6058e-12 kg; data quality (3,2,1,4,1)
- Ethane, 1,1,1-trifluoro-, HFC-143a: 1.03247e-8 kg; data quality (4,2,1,4,1)
- acenaphthene: 2.31297e-11 kg; data quality (3,2,1,4,1)
- trichloroethylene: 6.12452e-9 kg; data quality (3,2,1,1,5)
- BUTYL ISOCYANATE: 1.89448e-10 kg; data quality (4,2,1,1,5)
- ammonia: 5.18645e-8 kg; data quality (3,2,1,1,5)
- ethane, 1,2-dibromo-: 2.07294e-14 kg; data quality (2,2,1,1,5)
- beryllium: 1.04445e-15 kg; data quality (2,2,1,1,5)
- Ethylene glycol monoethyl ether: 6.95518e-10 kg; data quality (3,2,1,1,5)
- monochloroethane: 5.28712e-17 kg; data quality (3,2,1,1,5)
- Nickel, ion: 4.40887e-10 kg; data quality (3,2,1,1,5)
- Propane, 1,2-dichloro-: 7.6084e-16 kg; data quality (4,2,1,1,5)
- Xylene: 1.4741e-7 kg; data quality (3,2,1,3,3)
- pyrene: 3.00183e-11 kg; data quality (3,2,1,4,1)
- Methane, difluoro-, HFC-32: 1.40528e-8 kg; data quality (4,2,1,4,1)

## Inventory method
Input-output

## Modelling constants
The reference unit of all processes is 1 USD2013 of the good or service. The technosphere inputs are based on the US BEA detailed input-output tables for 2007. The IO tables are combined to develop a commodity-by-commodity model based on the the industry-technology assumption (see Suh et al., 2010), which assumes all commodities produced by a given industry have the same input structure, but that multiple industries can produce the same commodity. Thus, model technosphere flows represent commodity outputs (and not industry outputs) from other processes in the model. There are no by-products included in these processes. All commodity production is based on US-conditions, despite in reality that some goods and services are produced overseas, as USEEIO v1.1 is a single-region IO model.

## Completeness
The input-output approach assures that all purchased inputs associated with the sectors making these commodities as reported in the US census for 2007 are included. The direct resources extracted including minerals, energy sources, water and land occupied are included. Emissions to air include all critieria air pollutants, greenhouse gases, and hazardous and toxic air pollutants as defined by US EPA. Releases to water include toxics, total nitrogen and total phosphorus, and water discharges. Releases to soil or groundwater include toxics and agriculutural pesticides. Some metal releases to air, water and soil are not included because they could not be speciated. Solid hazardous and non-hazardous wastes generated are not included as an elementary flows although purchases of waste services are included.

## Data treatment
Greenhouse gases are primarily from the US Greenhouse Gas Emission Inventory (USEPA 2016a). Biogenic C uptake is not included (change from version 1.0), as biogenic C emission are not included. Toxic releases to air, water and soil (except pesticides) are from the 2013 Toxic Release Inventory (USEPA 2015a). Criteria air pollutants and hazardous air pollutants are from the 2011 National Emissions Inventory (USEPA 2015b). All estimates are normalized by industry based on sector output in the data year, then converted to 2013 USD using relative sector-specific CPIs (if data year is not 2013). Energy use represent raw renewables or fossil fuel energies and is based on EIA data for 2014. See Table 1 in Yang, Ingwersen et al. 2017 and Supporting Information 1, and the v1.1 data update notes (Ingwersen et al. 2017) for all details on environmental data sources used.Land occupation associated with manufacturing buildings was estimated based on the building floorspace data provided by the U.S. Energy Information Administration in the 2010 Manufacturing Energy Consumption Survey (EIA 2013). Portions of total renewable energy (EIA 2016) based on EIA-923 reports for 2014 (EIA 2017) are included. Nitrogen and Phosphorus releases are modeled in total N and total P equivalents as estimated by the Discharge Monitoring Report Nutrient Loading tool (USEPA 2016b). Self-supplied withdrawals were assigned to industrial sectors based on water use statistics for Canadian industries by NAICS 3-digit sector scaled to US production levels based on gross domestic product by industry (BEA 2015; Statistics Canada 2010), and further disaggregated to the manufacturing sectors based on compensation of employees as provided by the 2007 IO tables (BEA 2015). Water withdrawals associated with public supply were allocated to sectors based on their use of water, sewage, and other services in USD based on the IO tables (BEA 2015). Portions of total renewable energy (EIA 2016) by type are assigned to sectors (hydro, wind, solar, or) based on EIA-923 reports for 2014 (EIA 2017).

## Data collection
2015-2016

## Sampling procedure
US federal government sources, including surveys and US EPA emissions databases are used as the primary sources. From these sources, data for US reporting establishments/facilities are aggregated by the NAICS sector as defined in the BEA detailed 2007 input-output tables. When level of sector aggregation differs, or when direct emissions are not reported but modeled, additional sources are used to make allocations and estimates.

## Review details
In regard to quality assurance and peer-review, each dataset created went through Quality Assurance as defined in a quality assurance project plans at US EPA, CSRA or ERG. The model was assembled with the IO model builder model (USEPA 2016c). Validation functions were used to check that all the model components were properly assembled and harmonized. Bayou Demeke and Santosh Ghimire provided internal peer review of the model methodology and the manuscript underwent standard EPA management review. An editor and two anonymous reviewers at the Journal of Cleaner Production reviewed the model. In regard to data quality evaluation, data quality assessment was performed at the flow and process levels according to the updated US EPA data quality assessment guidelines as defined in US EPA (2016b).

## Intended application
The primary application is for use in the US Environmentally-Extended Input-Ouput model, USEEIO, version 1.1. This model is being used by the US EPA for supporting tools that prioritize goods and services based on potential environmental impacts, resource use or emissions for large regions, including the US and US states, and as a strealined tool for organizations as a starting point to consider sustainable materials management. Model results are designed to provide meso/macro-level decision support.

## Project
USEEIO v1.1 was developed by the US EPA with CSRA and ERG with Wesley W. Ingwersen and David E. Meyer as research leads. Yi Yang was the technical lead on the work for CSRA (contract EP-C-15-012); Troy Hawkins was lead for ERG (contract EP-C-12-021).

## Sources
- Nickerson et al. 2011
- BLM 2008
- Goebes et al. 2003
- USGS 2016
- EIA 2016
- Blackhurst et al. 2010
- EIA 2017
- USDA 2006
- Macknick et al. 2011
- Ingwersen et al. DRAFT
- Edelen and Ingwersen 2017
- Ingwersen et al. 2017
- Maupin et al. 2014
- USEPA 2015b
- Lovelace 2009
- Torcellini et al. 2003
- USEPA 2015a
- USEPA 2016c
- USDA 2009b
- USDA 2016
- USDA 2009a
- USDA 2014
- USGS 2015
- Statistics Canada 2010
- Yienger et al. 1995
- BEA 2015
- USEPA 2016b
- Kim et el. 2013
- EIA 2015
- EIA 2013
- USEPA 2016a
