# Air transport

Dataset: openLCA process, unit process
Category: 48-49: Transportation and Warehousing
Geography: United States
Time period: 2017-01-01 to 2017-12-31
Data quality: US EPA - Process Pedigree Matrix (1;1)
Exchange data quality scheme: US EPA - Flow Pedigree Matrix
Generated by: US EPA with CSRA and ERG
Owner: US EPA
Published in: Yang, Ingwersen et al. 2017
restrictionsDescription: This model shold be appropriately cited (see Yang, Ingwersen et al. 2017 source or Publication field) when used. Any changes or derivations of this model by the user should be documented. The model itself and any results from use of this model shall not be construed to consitute US EPA opinion or policy.
copyright: false

## General comment
BEA Code & Name is '481000:Air transportation'. Description of the primary industry producing this good or service, adapted from the Census Bureau NAICS 2007 descriptions: Industries in the Air Transportation subsector provide air transportation of passengers and/or cargo using aircraft, such as airplanes and helicopters. The subsector distinguishes scheduled from nonscheduled air transportation. Scheduled air carriers fly regular routes on regular schedules and operate even if flights are only partially loaded. Nonscheduled carriers often operate during nonpeak time slots at busy airports. These establishments have more flexibility with respect to choice of airport, hours of operation, load factors, and similar operational characteristics. Nonscheduled carriers provide chartered air transportation of passengers, cargo, or specialty flying services. Specialty flying services establishments use generalpurpose aircraft to provide a variety of specialized flying services. Scenic and sightseeing air transportation and air courier services are not included in this subsector but are included in Subsector 487, Scenic and Sightseeing Transportation and in Subsector 492, Couriers and Messengers. Although these activities may use aircraft, they are different from the activities included in air transportation. Air sightseeing does not usually involve place-to-place transportation; the passenger's flight (e.g., balloon ride, aerial sightseeing) typically starts and ends at the same location. Courier services (individual package or cargo delivery) include more than air transportation; road transportation is usually required to deliver the cargo to the intended recipient.

## Technology
The process describes the average US production of this good or service within this NAICS-based grouping defined in the BEA 2007 detailed input-output tables (BEA 2015). Distribution, wholesale and retailing of this good or service, use, and final disposal are not included. Creation of a product system with this process will enable modeling of all upstream (supply-chain) activities.

## Geography
Data represent the 50 US states

## Time period
2017 was the year in which this version of USEEIO was released and is the target date for the model

## Reference product
- Air transport: 1 USD

## Inputs from technosphere
All rows: data quality (1,3,1,1,1)
- Wireless telecommunications: 0.000787988 USD
- Soap and cleaning compounds; at manufacturer: 1.38969e-9 USD
- Paints and coatings; at manufacturer: 1.92444e-5 USD
- Data processing and hosting: 0.00311929 USD
- Postal service: 3.02674e-6 USD
- Rubber tires; at manufacturer: 6.00345e-7 USD
- Dry-cleaning and laundry: 5.12643e-5 USD
- Material handling equipment; at manufacturer: 1.28532e-5 USD
- Gaskets, seals, musical instruments, fasteners, brooms, brushes, mop and other misc. goods; at manufacturer: 6.5371e-6 USD
- Water transport (boats, ships, ferries): 0.000345891 USD
- Environmental and other technical consulting services: 7.22638e-8 USD
- Shelving and lockers; at manufacturer: 6.40508e-6 USD
- General merchandise stores: 6.94844e-9 USD
- Other computer related services, including facilities management: 0.00143482 USD
- Carbon and graphite products; at manufacturer: 6.40508e-6 USD
- Management consulting: 3.1268e-7 USD
- Plastic bags, films, and sheets; at manufacturer: 2.76548e-7 USD
- Securities and commodities brokerage and exchanges: 0.00218425 USD
- Books, newspapers, magazines, and other print media; at manufacturer: 1.13954e-7 USD
- Urethane and other foam products; at manufacturer: 2.08453e-8 USD
- Pipeline transport: 0.00135794 USD
- Other transportation equipment; at manufacturer: 2.77938e-9 USD
- Light bulbs; at manufacturer: 1.38969e-9 USD
- Valve and fittings (except for plumbing); at manufacturer: 8.75504e-8 USD
- Buildings and dwellings services: 0.0052331 USD
- Other support services: 0.000595748 USD
- Employment services: 8.25893e-6 USD
- Business support: 0.000871251 USD
- Independent artists, writers, and performers: 0.00014092 USD
- Limited-service restaurants: 0.00048041 USD
- Metal pipe fittings, ball and roller bearings, industrial patterns, metal bath fixtures, other misc. fabricated metals; at manufacturer: 2.50144e-8 USD
- Screws, nuts, and bolts; at manufacturer: 6.68858e-6 USD
- Software: 6.40578e-5 USD
- Commercial equipment rental: 0.0439136 USD
- Cardboard; at manufacturer: 0.000141104 USD
- Paper; at manufacturer: 1.66763e-8 USD
- Cutlery and handtools; at manufacturer: 3.84305e-5 USD
- Computer systems design: 0.00137076 USD
- Vehicle rental and leasing: 0.000115496 USD
- Polystyrene foam products; at manufacturer: 1.52866e-8 USD
- Investigation and security: 0.000442109 USD
- Specialized design: 0.000179367 USD
- Cardboard containers; at manufacturer: 0.000186685 USD
- Motor vehicle steering, suspension components (except spring), and brake systems; at manufacturer: 5.23912e-7 USD
- Other rubber products; at manufacturer: 8.96712e-5 USD
- Vehicle engines and engine parts; at manufacturer: 1.25072e-7 USD
- Legal services: 0.0122853 USD
- Lessors of nonfinancial intangible assets: 0.00235707 USD
- Electricity; at consumer: 0.000909814 USD
- Office administration: 4.16906e-8 USD
- Couriers and messengers: 4.3525e-6 USD
- Advertising and public relations: 0.00336313 USD
- Relay and industrial controls; at manufacturer: 1.66763e-8 USD
- Truck transport: 0.0024475 USD
- Electronic capacitors, resistors, coils, transformers, connectors and other components (except semiconductors and printed circuit assemblies); at manufacturer: 3.20254e-5 USD
- Machine shops; at manufacturer: 0.00187033 USD
- State and local government enterprises: 2.77938e-9 USD
- Nonresidential building repair and maintanence: 3.8518e-5 USD
- Aircraft; at manufacturer: 0.00110825 USD
- Other petroleum and coal products; at manufacturer: 4.48356e-5 USD
- Drinking water and wastewater treatment; at consumer: 9.6079e-5 USD
- Magazines and journals; at publisher: 3.84583e-5 USD
- Metal windows, doors, and architectural products; at manufacturer: 6.40508e-6 USD
- Civic, social, professional, and similar organizations: 0.000550897 USD
- Metal hinges, keys, lock, and other hardware; at manufacturer: 2.64041e-8 USD
- Fluid meters and counting devices; at manufacturer: 6.40647e-6 USD
- Transmission and power train parts; at manufacturer: 1.38969e-7 USD
- Switchgear and switchboards; at manufacturer: 6.40508e-6 USD
- Bread and other baked goods; at manufacturer: 3.20254e-5 USD
- Gasoline, fuels, and by-products of petroleum refining; at manufacturer: 0.221281 USD
- Metal coatings, engravings, and heat treatments; at manufacturer: 0.000269013 USD
- Wholesale trade: 0.0186689 USD
- Vending, commercial laundry, and other commercial and service industry machinery; at manufacturer: 1.38969e-9 USD
- Cutting and machine tool accessory, rolling mill, and other metalworking machines; at manufacturer: 1.92152e-5 USD
- Other real estate: 0.0119732 USD
- Light gauge metal cans, boxes, and containers; at manufacturer: 1.94556e-8 USD
- Consumer goods and general rental centers: 1.22154e-6 USD
- Directory, mailing list, and other publishers; at publisher: 1.38969e-9 USD
- Satellite, telecommunications resellers, and all other telecommunications: 0.000570086 USD
- Primary batteries; at manufacturer: 1.92152e-5 USD
- Telecommunications: 0.0029082 USD
- Warehousing: 9.08844e-5 USD
- Hotels and campgrounds: 1.28769e-5 USD
- Other educational services: 0.000236988 USD
- Storage batteries; at manufacturer: 1.25072e-8 USD
- Rail transport: 0.000409961 USD
- Wineries and wine; at manufacturer: 4.48356e-5 USD
- Communication and energy wire and cable; at manufacturer: 4.16906e-9 USD
- Accounting, tax preparation, bookkeeping, and payroll: 0.00374077 USD
- Springs and wires; at manufacturer: 6.46345e-6 USD
- Investment advice, portfolio management, and other financial advising services: 0.000429166 USD
- Movies and film: 0.000198558 USD
- Electronic equipment repair and maintenance: 0.000192308 USD
- Veneer, plywood, and engineered wood; at manufacturer: 9.44988e-8 USD
- Company and enterprise management: 0.0033957 USD
- Coffee and tea; at manufacturer: 1.28102e-5 USD
- Used and secondhand goods: -0.00131859 USD
- Insurance agencies and brokerages: 0.000140929 USD
- Marketing research and all other miscellaneous professional, scientific, and technical services: 0.00168461 USD
- Commercial machinery repair: 6.45928e-6 USD
- Breweries and beer; at manufacturer: 7.6861e-5 USD
- Air transport: 3.88933e-5 USD
- Waste management and remediation: 0.00110169 USD
- Nondepository credit intermediation and related activities: 0.0010121 USD
- Other vehicle parts; at manufacturer: 4.447e-8 USD
- Noncomparable imports: 0.076906 USD
- Metal structural products; at manufacturer: 6.40508e-6 USD
- All other food and drinking places: 0.0102739 USD
- Other textiles; at manufacturer: 5.00288e-8 USD
- Distilleries and spirits; at manufacturer: 1.28102e-5 USD
- Other basic organic chemicals; at manufacturer: 2.2235e-8 USD
- Natural gas; at consumer: 0.000179342 USD
- Household goods repair: 6.50097e-6 USD
- Vehicles and parts sales: 1.55645e-7 USD
- Monetary authorities and depository credit intermediation: 0.00666837 USD
- Passenger ground transport: 6.40508e-6 USD
- Glass and glass products; at manufacturer: 4.72494e-8 USD
- Other retail: 1.97114e-5 USD
- Vehicle electrical and electronic equipment; at manufacturer: 3.47422e-8 USD
- Aircraft engines and parts; at manufacturer: 0.000102483 USD
- Travel arrangement and reservation: 0.00757081 USD
- Chemicals (except basic chemicals, agrichemicals, polymers, paints, pharmaceuticals,soaps, cleaning compounds); at manufacturer: 4.16906e-9 USD
- Scenic and sightseeing transportation and support activities for transportation: 0.0878407 USD
- Architectural, engineering, and related services: 0.00460527 USD
- Motors and generators; at manufacturer: 5.00288e-8 USD
- Paper bags and coated paper; at manufacturer: 1.84829e-7 USD
- Other plastic products; at manufacturer: 2.32634e-6 USD
- Promoters and agents: 3.84333e-5 USD
- Full-service restaurants: 0.000441979 USD
- Facilities support: 2.16791e-7 USD
- Other aircraft parts; at manufacturer: 0.00622595 USD
- Books; at publisher: 1.38969e-9 USD
- Insurance carriers: 0.00279488 USD

## Inputs from nature
- Energy, solar: 0.000599203 MJ; data quality (3,1,1,1,1)
- Water, fresh: 5.31133e-5, 3.06907e-5 m3 (2 entries, compartments not in this file); data quality (1,2,1,4,2)
- Occupation, traffic area, road network: 0.0144609 m2*a; data quality (2,3,1,1,1)
- Occupation, urban, discontinuously built: 0.000481111 m2*a; data quality (4,2,1,1,1)
- Occupation, industrial area, built up: 0.0498687 m2*a; data quality (2,3,1,1,1)

## Emissions to nature
- 1,2-BUTYLENE OXIDE: 1.01318e-9 kg; data quality (4,2,1,1,5)
- Carbon dioxide: 0.783982 kg; data quality (2,1,1,1,1)
- ethene, tetrachloro-: 5.65433e-9 kg; data quality (3,2,1,1,5)
- 2-METHOXYETHANOL: 2.25076e-13 kg; data quality (4,2,1,1,5)
- Chrysene: 6.21411e-12 kg; data quality (2,2,1,1,5)
- 3-methylcholanthrene: 1.73673e-15 kg; data quality (2,2,1,1,5)
- 2-nitropropane: 2.02681e-12 kg; data quality (5,2,1,1,5)
- PHOSPHORUS: 1.50158e-13 kg; data quality (2,2,1,1,5)
- hydrogen fluoride: 2.23231e-13 kg; data quality (2,2,1,1,5)
- butadiene: 1.73277e-9 kg; data quality (2,2,1,1,5)
- acetaldehyde: 3.54248e-9 kg; data quality (3,2,1,1,5)
- fluorene: 9.63756e-11 kg; data quality (2,2,1,1,5)
- fluoranthene: 5.65463e-11 kg; data quality (2,2,1,1,5)
- Ethane, pentafluoro-, HFC-125: 1.21783e-12 kg; data quality (4,2,1,4,1)
- Nitrogen: 6.90951e-11 kg; data quality (2,2,1,1,5)
- Benzo(g,h,i)perylene: 1.58075e-11 kg; data quality (3,2,1,1,5)
- ammonia: 1.19359e-8 kg; data quality (3,2,1,1,5)
- Xylene: 8.30274e-7 kg; data quality (3,2,1,1,5)
- manganese: 1.53409e-11 kg; data quality (3,2,1,1,5)
- propanal: 5.74471e-10 kg; data quality (3,2,1,1,5)
- nickel: 2.02323e-11 kg; data quality (3,2,1,1,5)
- particulates, < 10 um: 7.64818e-8 kg; data quality (3,2,1,1,5)
- benzene, ethyl-: 1.66136e-7 kg; data quality (3,2,1,1,5)
- Dibenz(a,h)anthracene: 3.29274e-14 kg; data quality (2,2,1,1,5)
- Methane: 1.05895e-7 kg; data quality (4,2,1,4,1)
- ethylene glycol: 9.48371e-9 kg; data quality (5,2,1,1,5)
- Methane, difluoro-, HFC-32: 7.09205e-13 kg; data quality (4,2,1,4,1)
- Ethane, 1,1,1,2-tetrafluoro-, HFC-134a: 4.59014e-12 kg; data quality (4,2,1,4,1)
- Ethene, chloro-: 5.31916e-16 kg; data quality (3,2,1,1,5)
- phenol: 5.53139e-10 kg; data quality (4,2,1,1,5)
- antimony: 1.19336e-11 kg; data quality (3,2,1,1,5)
- trichloroethylene: 3.21346e-8 kg; data quality (3,2,1,1,5)
- Benzo(b)fluoranthene: 7.35833e-12 kg; data quality (2,2,1,1,5)
- hydroquinone: 1.41405e-13 kg; data quality (3,2,1,1,5)
- nitrogen oxides: 1.65751e-6 kg; data quality (2,2,1,1,5)
- isophorone: 3.09018e-12 kg; data quality (2,2,1,1,5)
- Benzo(k)fluoranthene: 7.29439e-12 kg; data quality (2,2,1,1,5)
- Water, fresh: 7.0958e-5 m3; data quality (1,2,1,4,2)
- acetophenone: 7.09221e-15 kg; data quality (4,2,1,1,5)
- BIS (2-ETHOXY ETHYL) ETHER: 1.34606e-14 kg; data quality (5,2,1,1,5)
- Propane, 1,1,1,3,3,3-hexafluoro-, HCFC-236fa: 1.40765e-14 kg; data quality (4,2,1,4,1)
- 1,1,1-trichloroethane: 4.70796e-8 kg; data quality (3,2,1,1,5)
- Diethylene glycol butyl ether: 4.63321e-11 kg; data quality (4,2,1,1,5)
- styrene: 2.10951e-9 kg; data quality (4,2,1,1,5)
- acrylic acid: 5.72739e-13 kg; data quality (4,2,1,1,5)
- methyl isobutyl ketone: 3.47156e-9 kg; data quality (4,2,1,1,5)
- Phthalate, dibutyl-: 6.06997e-11 kg; data quality (4,2,1,1,5)
- 1,4-dichlorobenzene: 3.04594e-17 kg; data quality (2,2,1,1,5)
- 1-METHYLNAPTHALENE: 1.84517e-10 kg; data quality (2,2,1,1,5)
- cumene: 1.66382e-8 kg; data quality (3,2,1,1,5)
- Cresol: 3.85583e-13 kg; data quality (4,2,1,1,5)
- 2-methylnaphthalene: 1.5406e-10 kg; data quality (2,2,1,1,5)
- benzo(a)pyrene: 6.08292e-12 kg; data quality (2,2,1,1,5)
- benz[a]anthracene: 7.52965e-12 kg; data quality (2,2,1,1,5)
- QUINOLINE: 1.67759e-19 kg; data quality (3,2,1,1,5)
- toluene: 2.12578e-6 kg; data quality (3,2,1,1,5)
- Triethyl amine: 3.3818e-16 kg; data quality (4,2,1,1,5)
- BUTYL ISOCYANATE: 4.79349e-12 kg; data quality (4,2,1,1,5)
- Ethylene glycol monoethyl ether: 8.03299e-10 kg; data quality (3,2,1,1,5)
- Chromium, ion: 1.10117e-11 kg; data quality (2,2,1,1,5)
- Chromium VI: 2.13189e-11 kg; data quality (3,2,1,1,5)
- carbon tetrachloride: 5.02494e-14 kg; data quality (4,2,1,1,5)
- m-xylene: 4.27699e-9 kg; data quality (3,2,1,1,5)
- cyanide: 5.57245e-13 kg; data quality (3,2,1,1,5)
- 2-ethoxyethyl acetate: 1.13019e-11 kg; data quality (5,2,1,1,5)
- biphenyl: 1.61396e-14 kg; data quality (4,2,1,1,5)
- VOC, volatile organic compounds: 0.000165738 kg; data quality (3,2,1,1,5)
- naphthalene: 8.69454e-8 kg; data quality (3,2,1,1,5)
- para-xylene: 2.00299e-9 kg; data quality (3,2,1,1,5)
- pyrene: 7.61888e-11 kg; data quality (2,2,1,1,5)
- acrolein: 1.90307e-9 kg; data quality (2,2,1,1,5)
- methylene diphenyl diisocyanate: 4.50437e-11 kg; data quality (4,2,1,1,5)
- selenium: 2.6723e-13 kg; data quality (2,2,1,1,5)
- propylene oxide: 1.16515e-13 kg; data quality (3,2,1,1,5)
- Indeno(1,2,3-cd)pyrene: 4.87839e-12 kg; data quality (2,2,1,1,5)
- N,N-DIMETHYLANILINE: 3.39669e-15 kg; data quality (5,2,1,1,5)
- lead: 1.21104e-6 kg; data quality (3,2,1,1,5)
- methane, dichloro-, hcc-30: 1.70712e-8 kg; data quality (3,2,1,1,5)
- ethane, 1,2-dichloro-: 5.64853e-8 kg; data quality (3,2,1,1,5)
- o-Xylene: 2.46467e-9 kg; data quality (3,2,1,1,5)
- carbon monoxide: 5.82083e-6 kg; data quality (2,2,1,1,5)
- Ethane, 1,1,1-trifluoro-, HFC-143a: 5.21057e-13 kg; data quality (4,2,1,4,1)
- acenaphthene: 4.46624e-11 kg; data quality (3,2,1,1,5)
- arsenic: 3.05856e-12 kg; data quality (3,2,1,1,5)
- cadmium: 9.47757e-12 kg; data quality (3,2,1,1,5)
- Dinitrogen monoxide: 2.59586e-5 kg; data quality (4,2,1,4,1)
- phthalate, dioctyl-: 4.81257e-14 kg; data quality (3,2,1,1,5)
- phenanthrene: 1.60804e-10 kg; data quality (3,2,1,1,5)
- Cobalt: 1.07179e-12 kg; data quality (3,2,1,1,5)
- toluene-2,4-diisocyante: 1.57042e-12 kg; data quality (3,2,1,1,5)
- sulfur dioxide: 1.14837e-7 kg; data quality (2,2,1,1,5)
- ethane, 1,2-dibromo-: 2.65105e-15 kg; data quality (2,2,1,1,5)
- methanol: 1.93009e-8 kg; data quality (4,2,1,1,5)
- acenaphthylene: 2.50863e-10 kg; data quality (3,2,1,1,5)
- maleic anhydride: 6.58563e-14 kg; data quality (2,2,1,1,5)
- mercury: 4.44498e-13 kg; data quality (2,2,1,1,5)
- Benzo(a)anthracene: 9.24433e-15 kg; data quality (2,2,1,1,5)
- ethane, 1,1,2-trichloro-: 2.73447e-14 kg; data quality (4,2,1,1,5)
- Hydrocarbons, aromatic: 2.11284e-12 kg; data quality (4,2,1,1,5)
- Phosphorus: 2.82669e-10 kg; data quality (2,1,1,1,5)
- benzene: 1.45674e-6 kg; data quality (3,2,1,1,5)
- formaldehyde: 1.10943e-8 kg; data quality (2,2,1,1,5)
- methyl methacrylate: 1.58562e-11 kg; data quality (4,2,1,1,5)
- dimethyl formamide: 5.2685e-11 kg; data quality (4,2,1,1,5)
- 2,2,4-trimethylpentane: 1.29093e-6 kg; data quality (3,2,1,1,5)
- particulates, < 2.5 um: 9.66182e-7 kg; data quality (3,2,1,1,5)
- hexane: 2.59215e-6 kg; data quality (3,2,1,1,5)
- beryllium: 6.71578e-14 kg; data quality (2,2,1,1,5)
- anthracene: 5.19268e-11 kg; data quality (3,2,1,1,5)
- hydrogen chloride: 3.72722e-13 kg; data quality (2,2,1,1,5)
- epichlorohydrin: 5.47115e-13 kg; data quality (3,2,1,1,5)

## Inventory method
Input-output

## Modelling constants
The reference unit of all processes is 1 USD2013 of the good or service. The technosphere inputs are based on the US BEA detailed input-output tables for 2007. The IO tables are combined to develop a commodity-by-commodity model based on the the industry-technology assumption (see Suh et al., 2010), which assumes all commodities produced by a given industry have the same input structure, but that multiple industries can produce the same commodity. Thus, model technosphere flows represent commodity outputs (and not industry outputs) from other processes in the model. There are no by-products included in these processes. All commodity production is based on US-conditions, despite in reality that some goods and services are produced overseas, as USEEIO v1.1 is a single-region IO model.

## Completeness
The input-output approach assures that all purchased inputs associated with the sectors making these commodities as reported in the US census for 2007 are included. The direct resources extracted including minerals, energy sources, water and land occupied are included. Emissions to air include all critieria air pollutants, greenhouse gases, and hazardous and toxic air pollutants as defined by US EPA. Releases to water include toxics, total nitrogen and total phosphorus, and water discharges. Releases to soil or groundwater include toxics and agriculutural pesticides. Some metal releases to air, water and soil are not included because they could not be speciated. Solid hazardous and non-hazardous wastes generated are not included as an elementary flows although purchases of waste services are included.

## Data treatment
Greenhouse gases are primarily from the US Greenhouse Gas Emission Inventory (USEPA 2016a). Biogenic C uptake is not included (change from version 1.0), as biogenic C emission are not included. Toxic releases to air, water and soil (except pesticides) are from the 2013 Toxic Release Inventory (USEPA 2015a). Criteria air pollutants and hazardous air pollutants are from the 2011 National Emissions Inventory (USEPA 2015b). All estimates are normalized by industry based on sector output in the data year, then converted to 2013 USD using relative sector-specific CPIs (if data year is not 2013). Energy use represent raw renewables or fossil fuel energies and is based on EIA data for 2014. See Table 1 in Yang, Ingwersen et al. 2017 and Supporting Information 1, and the v1.1 data update notes (Ingwersen et al. 2017) for all details on environmental data sources used.Total transportation land use is reported in the USGA Major Uses of Land for 2007 (Nickerson et al. 2011). Land use for roads was allocated to relevant transportation sectors based on the shares of Federal Highway Administration fees. Transportation land use for airports and railroads were each assumed 5% of the total use of urban land.

## Data collection
2015-2016

## Sampling procedure
US federal government sources, including surveys and US EPA emissions databases are used as the primary sources. From these sources, data for US reporting establishments/facilities are aggregated by the NAICS sector as defined in the BEA detailed 2007 input-output tables. When level of sector aggregation differs, or when direct emissions are not reported but modeled, additional sources are used to make allocations and estimates.

## Review details
In regard to quality assurance and peer-review, each dataset created went through Quality Assurance as defined in a quality assurance project plans at US EPA, CSRA or ERG. The model was assembled with the IO model builder model (USEPA 2016c). Validation functions were used to check that all the model components were properly assembled and harmonized. Bayou Demeke and Santosh Ghimire provided internal peer review of the model methodology and the manuscript underwent standard EPA management review. An editor and two anonymous reviewers at the Journal of Cleaner Production reviewed the model. In regard to data quality evaluation, data quality assessment was performed at the flow and process levels according to the updated US EPA data quality assessment guidelines as defined in US EPA (2016b).

## Intended application
The primary application is for use in the US Environmentally-Extended Input-Ouput model, USEEIO, version 1.1. This model is being used by the US EPA for supporting tools that prioritize goods and services based on potential environmental impacts, resource use or emissions for large regions, including the US and US states, and as a strealined tool for organizations as a starting point to consider sustainable materials management. Model results are designed to provide meso/macro-level decision support.

## Project
USEEIO v1.1 was developed by the US EPA with CSRA and ERG with Wesley W. Ingwersen and David E. Meyer as research leads. Yi Yang was the technical lead on the work for CSRA (contract EP-C-15-012); Troy Hawkins was lead for ERG (contract EP-C-12-021).

## Sources
- USDA 2014
- Blackhurst et al. 2010
- EIA 2013
- USEPA 2015b
- Maupin et al. 2014
- Torcellini et al. 2003
- Kim et el. 2013
- Statistics Canada 2010
- USEPA 2015a
- EIA 2015
- BEA 2015
- Edelen and Ingwersen 2017
- USGS 2016
- Nickerson et al. 2011
- USGS 2015
- BLM 2008
- USEPA 2016a
- USEPA 2016b
- USDA 2016
- EIA 2017
- USDA 2006
- Goebes et al. 2003
- Macknick et al. 2011
- EIA 2016
- USEPA 2016c
- USDA 2009a
- USDA 2009b
- Yienger et al. 1995
- Ingwersen et al. DRAFT
- Ingwersen et al. 2017
- Lovelace 2009
