# Warehousing

Dataset: openLCA process, unit process
Category: 48-49: Transportation and Warehousing
Geography: United States
Time period: 2017-01-01 to 2017-12-31
Data quality: US EPA - Process Pedigree Matrix (1;1)
Exchange data quality scheme: US EPA - Flow Pedigree Matrix
Generated by: US EPA with CSRA and ERG
Owner: US EPA
Published in: Yang, Ingwersen et al. 2017
restrictionsDescription: This model shold be appropriately cited (see Yang, Ingwersen et al. 2017 source or Publication field) when used. Any changes or derivations of this model by the user should be documented. The model itself and any results from use of this model shall not be construed to consitute US EPA opinion or policy.
copyright: false

## General comment
BEA Code & Name is '493000:Warehousing and storage'. Description of the primary industry producing this good or service, adapted from the Census Bureau NAICS 2007 descriptions: Industries in the Warehousing and Storage subsector are primarily engaged in operating warehousing and storage facilities for general merchandise, refrigerated goods, and other warehouse products. These establishments provide facilities to store goods. They do not sell the goods they handle. These establishments take responsibility for storing the goods and keeping them secure. They may also provide a range of services, often referred to as logistics services, related to the distribution of goods. Logistics services can include labeling, breaking bulk, inventory control and management, light assembly, order entry and fulfillment, packaging, pick and pack, price marking and ticketing, and transportation arrangement. However, establishments in this industry group always provide warehousing or storage services in addition to any logistic services. Furthermore, the warehousing or storage of goods must be more than incidental to the performance of services, such as price marking. Bonded warehousing and storage services and warehouses located in free trade zones are included in the industries of this subsector.

## Technology
The process describes the average US production of this good or service within this NAICS-based grouping defined in the BEA 2007 detailed input-output tables (BEA 2015). Distribution, wholesale and retailing of this good or service, use, and final disposal are not included. Creation of a product system with this process will enable modeling of all upstream (supply-chain) activities.

## Geography
Data represent the 50 US states

## Time period
2017 was the year in which this version of USEEIO was released and is the target date for the model

## Reference product
- Warehousing: 1 USD

## Inputs from technosphere
All rows: data quality (1,3,1,1,1)
- Natural gas; at consumer: 0.00167971 USD
- Marketing research and all other miscellaneous professional, scientific, and technical services: 0.000885428 USD
- Passenger ground transport: 1.3021e-5 USD
- Satellite, telecommunications resellers, and all other telecommunications: 0.000625008 USD
- Wooden windows, door, and flooring; at manufacturer: 1.3021e-5 USD
- Architectural, engineering, and related services: 0.00200523 USD
- Other vehicle parts; at manufacturer: 0.0013021 USD
- Chemicals (except basic chemicals, agrichemicals, polymers, paints, pharmaceuticals,soaps, cleaning compounds); at manufacturer: 0.00115887 USD
- Light gauge metal cans, boxes, and containers; at manufacturer: 1.3021e-5 USD
- Cutlery and handtools; at manufacturer: 9.1147e-5 USD
- Machine shops; at manufacturer: 0.000221357 USD
- Vehicle electrical and electronic equipment; at manufacturer: 0.00183596 USD
- Promoters and agents: 0.00052084 USD
- Books, newspapers, magazines, and other print media; at manufacturer: 0.000143231 USD
- External hard drives, CDs, other storage media; at manufacturer: 0.000273441 USD
- Other retail: 5.2084e-5 USD
- Unrefined oil and gas; at extraction site: 0.000195315 USD
- All other forging, stamping, and sintering; at manufacturer: 2.6042e-5 USD
- Other petroleum and coal products; at manufacturer: 5.2084e-5 USD
- Environmental and other technical consulting services: 0.00294275 USD
- Plastics and rubber industry machinery; at manufacturer: 2.6042e-5 USD
- News syndicates, libraries, archives, Internet publishing and all other information services: 1.3021e-5 USD
- Lessors of nonfinancial intangible assets: 0.000859386 USD
- Other computer related services, including facilities management: 0.00148439 USD
- Semiconductor machinery; at manufacturer: 6.5105e-5 USD
- Paper bags and coated paper; at manufacturer: 0.000182294 USD
- Accounting, tax preparation, bookkeeping, and payroll: 0.00537767 USD
- Full-service restaurants: 0.000156252 USD
- Office supplies (not paper); at manufacturer: 0.000455735 USD
- Metal pipe fittings, ball and roller bearings, industrial patterns, metal bath fixtures, other misc. fabricated metals; at manufacturer: 0.000729176 USD
- Computer terminals and other computer peripheral equipment; at manufacturer: 0.000481777 USD
- Legal services: 0.00483079 USD
- Transmission and power train parts; at manufacturer: 0.000416672 USD
- Computer systems design: 0.00104168 USD
- Nondepository credit intermediation and related activities: 0.00100262 USD
- All other food and drinking places: 6.5105e-5 USD
- Hotels and campgrounds: 0.00065105 USD
- Cardboard; at manufacturer: 6.5105e-5 USD
- Insurance carriers: 0.00726572 USD
- Magazines and journals; at publisher: 0.000234378 USD
- Investment advice, portfolio management, and other financial advising services: 7.8126e-5 USD
- Noncomparable imports: 0.000807302 USD
- Nonresidential building repair and maintanence: 0.0028516 USD
- Other real estate: 0.109884 USD
- Insurance agencies and brokerages: 0.000312504 USD
- Springs and wires; at manufacturer: 0.000156252 USD
- Metal hinges, keys, lock, and other hardware; at manufacturer: 7.8126e-5 USD
- Company and enterprise management: 0.00333338 USD
- Other support services: 0.00569018 USD
- Other plastic products; at manufacturer: 0.00131512 USD
- Wireless communications; at manufacturer: 0.000182294 USD
- Communications equipment; at manufacturer: 3.9063e-5 USD
- Vehicle repair: 0.00470058 USD
- Office machinery; at manufacturer: 0.000820323 USD
- Scenic and sightseeing transportation and support activities for transportation: 0.00533861 USD
- Electronic equipment repair and maintenance: 0.0036589 USD
- Pipeline transport: 5.2084e-5 USD
- Buildings and dwellings services: 0.00531257 USD
- Cardboard containers; at manufacturer: 0.00106772 USD
- Screws, nuts, and bolts; at manufacturer: 0.000468756 USD
- Vehicle rental and leasing: 0.00473965 USD
- Vehicles and parts sales: 0.000169273 USD
- Newspapers; at publisher: 2.6042e-5 USD
- Rail transport: 7.8126e-5 USD
- Facilities support: 0.000755218 USD
- Motor vehicle steering, suspension components (except spring), and brake systems; at manufacturer: 0.00109376 USD
- Vehicle seating and interior trim (upholstery); at manufacturer: 0.00013021 USD
- Warehousing: 0.0488288 USD
- Material handling equipment; at manufacturer: 0.00380213 USD
- Independent artists, writers, and performers: 3.9063e-5 USD
- Water transport (boats, ships, ferries): 2.6042e-5 USD
- Other basic organic chemicals; at manufacturer: 1.3021e-5 USD
- Commercial equipment rental: 0.00230472 USD
- Books; at publisher: 1.3021e-5 USD
- Veneer, plywood, and engineered wood; at manufacturer: 0.000572924 USD
- Wholesale trade: 0.00580737 USD
- Valve and fittings (except for plumbing); at manufacturer: 0.000442714 USD
- Limited-service restaurants: 0.00013021 USD
- Management consulting: 0.0127996 USD
- Machinery for the paper, textile, food or other industries (except semiconductor machinery); at manufacturer: 7.8126e-5 USD
- Metal coatings, engravings, and heat treatments; at manufacturer: 0.000221357 USD
- Air transport: 0.000820323 USD
- Business support: 0.00255212 USD
- Wireless telecommunications: 0.00234378 USD
- State and local government enterprises: 0.00171877 USD
- Air purification and ventilation equipment; at manufacturer: 0.000234378 USD
- Plastic bags, films, and sheets; at manufacturer: 0.000247399 USD
- Consumer goods and general rental centers: 0.00110679 USD
- Other textiles; at manufacturer: 2.6042e-5 USD
- Glass and glass products; at manufacturer: 3.9063e-5 USD
- Office administration: 0.00321619 USD
- Vehicle engines and engine parts; at manufacturer: 0.000768239 USD
- Electricity; at consumer: 0.0248311 USD
- Securities and commodities brokerage and exchanges: 0.00078126 USD
- Motors and generators; at manufacturer: 0.000312504 USD
- Rubber tires; at manufacturer: 0.000182294 USD
- Industrial molds; at manufacturer: 0.000299483 USD
- Commercial machinery repair: 0.00925793 USD
- Truck transport: 0.0015495 USD
- Metal cutting and forming machine tools; at manufacturer: 9.1147e-5 USD
- Golf courses, marinas, ski resorts, fitness and other rec centers and industries: 1.3021e-5 USD
- Employment services: 0.0108465 USD
- Polystyrene foam products; at manufacturer: 1.3021e-5 USD
- Fabricated pipe and pipe fittings; at manufacturer: 0.000104168 USD
- Dry-cleaning and laundry: 0.00128908 USD
- Advertising and public relations: 0.00408859 USD
- Drinking water and wastewater treatment; at consumer: 0.000364588 USD
- Paper; at manufacturer: 0.00026042 USD
- Specialized design: 0.000312504 USD
- Software: 0.000182294 USD
- Civic, social, professional, and similar organizations: 0.000247399 USD
- Postal service: 0.00657561 USD
- Gaskets, seals, musical instruments, fasteners, brooms, brushes, mop and other misc. goods; at manufacturer: 0.000572924 USD
- Monetary authorities and depository credit intermediation: 0.0042188 USD
- Paints and coatings; at manufacturer: 0.000377609 USD
- Household goods repair: 0.00252607 USD
- Data processing and hosting: 0.000299483 USD
- Urethane and other foam products; at manufacturer: 2.6042e-5 USD
- Light bulbs; at manufacturer: 0.000156252 USD
- Telecommunications: 0.00558601 USD
- Couriers and messengers: 0.0107163 USD
- Waste management and remediation: 0.00414068 USD
- Travel arrangement and reservation: 0.000325525 USD
- Relay and industrial controls; at manufacturer: 0.00393234 USD
- Abrasive products; at manufacturer: 0.000299483 USD
- Investigation and security: 0.000690113 USD
- Hydraulic pumps, motors, cylinders and actuators; at manufacturer: 3.9063e-5 USD
- Gasoline, fuels, and by-products of petroleum refining; at manufacturer: 0.00734385 USD
- General merchandise stores: 1.3021e-5 USD
- Coal; at mine: 6.5105e-5 USD

## Inputs from nature
- Water, fresh: 0.000241279, 0.000139419 m3 (2 entries, compartments not in this file); data quality (1,2,1,4,2)
- Energy, solar: 0.00530572 MJ; data quality (3,1,1,1,1)
- Occupation, urban, discontinuously built: 0.0557853 m2*a; data quality (4,2,1,1,1)

## Emissions to nature
- acrylic acid: 3.28364e-8 kg; data quality (4,2,1,1,5)
- Phosphorus: 8.83318e-7 kg; data quality (4,1,1,1,5)
- Cyclohexane: 5.1824e-12 kg; data quality (4,1,1,1,5)
- Benzo(b)fluoranthene: 1.26577e-11 kg; data quality (3,2,1,4,1)
- mercury: 3.84354e-12 kg; data quality (2,2,1,1,5)
- hexane: 2.21193e-6 kg; data quality (3,2,1,1,5)
- benzene, ethyl-: 3.5118e-7 kg; data quality (4,2,1,2,4)
- vinyl acetate: 1.39193e-7 kg; data quality (4,2,1,1,5)
- Cobalt: 1.24905e-8 kg; data quality (3,2,1,1,5)
- phenanthrene: 3.67242e-10 kg; data quality (3,2,1,4,1)
- particulates, < 10 um: 1.53259e-6 kg; data quality (3,2,1,1,5)
- Benzo(g,h,i)perylene: 4.12757e-11 kg; data quality (3,2,1,3,2)
- 1,2-BUTYLENE OXIDE: 2.46258e-10 kg; data quality (4,2,1,1,5)
- methanol: 2.5912e-11 kg; data quality (3,1,1,1,5)
- biphenyl: 1.26047e-10 kg; data quality (4,2,1,1,5)
- Nitrogen: 4.01775e-5 kg; data quality (2,2,1,1,5)
- particulates, < 2.5 um: 2.34726e-6 kg; data quality (3,2,1,2,4)
- benzene: 3.10944e-11 kg; data quality (3,1,1,1,5)
- manganese: 3.55103e-10 kg; data quality (3,2,1,1,5)
- chloroform: 3.80475e-11 kg; data quality (4,2,1,1,5)
- o-Xylene: 1.05061e-8 kg; data quality (3,2,1,3,3)
- methyl methacrylate: 2.89033e-8 kg; data quality (4,2,1,1,5)
- benzene, chloro-: 2.70768e-10 kg; data quality (4,2,1,1,5)
- cyclohexane: 5.57429e-9 kg; data quality (4,1,1,1,5)
- 3-methylcholanthrene: 6.84502e-16 kg; data quality (2,2,1,1,5)
- cadmium: 3.47252e-11 kg; data quality (3,2,1,1,5)
- Ethane, 1,1,1-trifluoro-, HFC-143a: 5.43617e-10 kg; data quality (4,2,1,4,1)
- lead: 1.26644e-8 kg; data quality (3,2,1,1,5)
- Captan: 5.83551e-19 kg; data quality (5,2,1,1,5)
- Cresol: 7.43845e-10 kg; data quality (4,2,1,1,5)
- methane, dichloro-, hcc-30: 6.87003e-8 kg; data quality (4,2,1,1,5)
- hydrogen chloride: 4.1463e-10 kg; data quality (2,2,1,1,5)
- selenium: 9.52787e-12 kg; data quality (2,2,1,1,5)
- carbon monoxide: 0.000175926 kg; data quality (3,2,1,1,1)
- sulfur dioxide: 6.88552e-7 kg; data quality (2,2,1,1,5)
- methylene diphenyl diisocyanate: 1.1671e-10 kg; data quality (4,2,1,1,5)
- styrene: 5.31782e-8 kg; data quality (4,2,1,1,5)
- fluoranthene: 1.13498e-10 kg; data quality (3,2,1,4,1)
- SEC-BUTYL ALCOHOL: 2.5912e-11, 2.98506e-9 kg (2 entries, compartments not in this file); data quality (5,1,1,1,5)
- Benzo(g,h,i)perylene: 5.1824e-14 kg; data quality (2,1,1,1,5)
- ethylene glycol: 5.67772e-9 kg; data quality (5,2,1,1,5)
- propanal: 1.57457e-8 kg; data quality (3,2,1,4,1)
- ammonia: 5.59401e-8 kg; data quality (3,2,1,2,3)
- Indeno(1,2,3-cd)pyrene: 1.02587e-11 kg; data quality (3,2,1,4,1)
- 2,4-Diaminotoluene: 8.88981e-9 kg; data quality (2,2,1,1,5)
- methanol: 4.03061e-7 kg; data quality (4,2,1,1,5)
- Benzene, 1,2,4-trimethyl-: 3.10944e-11 kg; data quality (5,1,1,1,5)
- 2-methylnaphthalene: 6.2529e-13 kg; data quality (2,2,1,1,5)
- methane, chlorodifluoro-, hcfc-22: 5.1824e-8 kg; data quality (4,1,1,1,5)
- nickel: 1.19089e-10 kg; data quality (3,2,1,3,3)
- Methane: 9.20322e-7 kg; data quality (4,2,1,4,1)
- Hydrocarbons, aromatic: 3.27167e-9 kg; data quality (3,2,1,4,1)
- tertiary-Butyl Acetate: 9.57023e-9 kg; data quality (4,2,1,1,5)
- Methane, difluoro-, HFC-32: 7.39911e-10 kg; data quality (4,2,1,4,1)
- 2,2,4-trimethylpentane: 3.74324e-7 kg; data quality (3,2,1,2,3)
- naphthalene: 3.10944e-11 kg; data quality (4,1,1,1,5)
- Dibenz(a,h)anthracene: 8.50069e-14 kg; data quality (3,2,1,4,1)
- carbon tetrachloride: 4.66841e-16 kg; data quality (4,2,1,1,5)
- BUTYL ISOCYANATE: 1.1671e-11 kg; data quality (4,2,1,1,5)
- Benzo(k)fluoranthene: 1.24329e-11 kg; data quality (3,2,1,4,1)
- ethylbenzene: 3.85201e-8 kg; data quality (4,1,1,1,5)
- ethyl acrylate: 3.3064e-9 kg; data quality (4,2,1,1,5)
- acetaldehyde: 7.22116e-8 kg; data quality (3,2,1,4,1)
- benzene: 1.38501e-6 kg; data quality (3,2,1,2,4)
- trichloroethylene: 4.3077e-8 kg; data quality (3,2,1,1,5)
- diethanolamine: 3.16285e-9 kg; data quality (3,2,1,1,5)
- acenaphthylene: 4.24181e-10 kg; data quality (3,2,1,4,1)
- benzo(a)pyrene: 1.17555e-11 kg; data quality (3,2,1,4,1)
- cumene: 2.29603e-8 kg; data quality (4,2,1,1,5)
- m-xylene: 1.48557e-8 kg; data quality (3,2,1,4,1)
- 1,1,1-trichloroethane: 4.67095e-8 kg; data quality (3,2,1,1,5)
- ethane, 1,2-dichloro-: 8.94765e-9 kg; data quality (3,2,1,1,5)
- arsenic: 3.29268e-11 kg; data quality (3,2,1,4,2)
- Hexane: 3.10944e-11 kg; data quality (4,1,1,1,5)
- Carbon dioxide: 0.00993142 kg; data quality (4,2,1,4,1)
- mercury: 2.43573e-12 kg; data quality (3,1,1,1,5)
- Ethene, chloro-: 1.80319e-11 kg; data quality (3,2,1,1,5)
- Water, fresh: 0.000322343 m3; data quality (1,2,1,4,2)
- VOC, volatile organic compounds: 0.000109846 kg; data quality (3,2,1,1,5)
- fluorene: 2.01441e-10 kg; data quality (3,2,1,4,1)
- acrolein: 5.85138e-9 kg; data quality (3,2,1,4,1)
- Ethylene glycol monoethyl ether: 8.03299e-10 kg; data quality (3,2,1,1,5)
- acetonitrile: 3.26788e-11 kg; data quality (3,2,1,1,5)
- Chrysene: 1.18133e-11 kg; data quality (3,2,1,4,1)
- Benzene, ethyl-: 3.62768e-11 kg; data quality (4,1,1,1,5)
- Cumene: 2.5912e-11 kg; data quality (3,1,1,1,5)
- propylene oxide: 1.99714e-7 kg; data quality (3,2,1,1,5)
- nitrogen oxides: 1.629e-5 kg; data quality (2,2,1,1,3)
- Xylene: 5.1824e-12, 5.1824e-11 kg (2 entries, compartments not in this file); data quality (4,1,1,1,5)
- aniline: 1.10875e-10 kg; data quality (4,2,1,1,5)
- methyl isobutyl ketone: 2.7602e-8 kg; data quality (4,2,1,1,5)
- acrylonitrile: 1.2055e-8 kg; data quality (4,2,1,1,5)
- Ethane, 1,1,1,2-tetrafluoro-, HFC-134a: 4.78887e-9 kg; data quality (4,2,1,4,1)
- anthracene: 8.46891e-11 kg; data quality (3,2,1,4,1)
- toluene: 1.18897e-6 kg; data quality (4,2,1,2,4)
- 1,2,4-trimethylbenzene: 3.91712e-8 kg; data quality (5,1,1,1,5)
- ethene, tetrachloro-: 2.41392e-8 kg; data quality (3,2,1,1,5)
- Ethane, pentafluoro-, HFC-125: 1.27055e-9 kg; data quality (4,2,1,4,1)
- beryllium: 1.93792e-12 kg; data quality (2,2,1,1,5)
- o-toluidine: 1.48805e-9 kg; data quality (4,2,1,1,5)
- t-butyl methyl ether: 9.32035e-7 kg; data quality (3,2,1,1,5)
- naphthalene: 5.54806e-8 kg; data quality (3,2,1,2,4)
- Chromium, ion: 8.34034e-11 kg; data quality (2,2,1,2,4)
- epichlorohydrin: 6.39572e-10 kg; data quality (3,2,1,1,5)
- pyrene: 1.42106e-10 kg; data quality (3,2,1,4,1)
- toluene: 2.5912e-11 kg; data quality (5,1,1,1,5)
- toluene-2,4-diisocyante: 2.71935e-10 kg; data quality (3,2,1,1,5)
- Benzo(a)anthracene: 5.8974e-15 kg; data quality (2,2,1,1,5)
- phenol: 3.88619e-8 kg; data quality (4,2,1,1,5)
- butadiene: 1.13964e-7 kg; data quality (2,2,1,2,3)
- Dinitrogen monoxide: 3.54884e-8 kg; data quality (4,2,1,4,1)
- Chromium VI: 2.01483e-11 kg; data quality (3,2,1,2,4)
- para-xylene: 7.97045e-8 kg; data quality (4,2,1,1,5)
- formaldehyde: 1.56637e-7 kg; data quality (3,2,1,4,1)
- 1,2,4-trichlorobenzene: 1.75065e-11 kg; data quality (4,2,1,1,5)
- Xylene: 8.13181e-7 kg; data quality (4,2,1,2,3)
- Phosphine: 3.42073e-9 kg; data quality (4,2,1,1,5)
- acenaphthene: 1.09274e-10 kg; data quality (3,2,1,4,1)
- ethane, 1,2-dibromo-: 8.24577e-11 kg; data quality (2,2,1,1,5)
- methane, bromo-, halon 1001: 2.61536e-8 kg; data quality (3,2,1,1,5)
- 1,1,2,2-tetrachloroethane: 5.66044e-12 kg; data quality (3,2,1,1,5)
- benz[a]anthracene: 1.23509e-11 kg; data quality (3,2,1,4,1)
- Propane, 1,1,1,3,3,3-hexafluoro-, HCFC-236fa: 1.4686e-11 kg; data quality (4,2,1,4,1)
- lead: 5.3897e-12 kg; data quality (3,1,1,1,5)
- 1,4-dichlorobenzene: 3.28562e-8 kg; data quality (2,2,1,1,5)
- Phthalate, dibutyl-: 2.3342e-11 kg; data quality (4,2,1,1,5)

## Inventory method
Input-output

## Modelling constants
The reference unit of all processes is 1 USD2013 of the good or service. The technosphere inputs are based on the US BEA detailed input-output tables for 2007. The IO tables are combined to develop a commodity-by-commodity model based on the the industry-technology assumption (see Suh et al., 2010), which assumes all commodities produced by a given industry have the same input structure, but that multiple industries can produce the same commodity. Thus, model technosphere flows represent commodity outputs (and not industry outputs) from other processes in the model. There are no by-products included in these processes. All commodity production is based on US-conditions, despite in reality that some goods and services are produced overseas, as USEEIO v1.1 is a single-region IO model.

## Completeness
The input-output approach assures that all purchased inputs associated with the sectors making these commodities as reported in the US census for 2007 are included. The direct resources extracted including minerals, energy sources, water and land occupied are included. Emissions to air include all critieria air pollutants, greenhouse gases, and hazardous and toxic air pollutants as defined by US EPA. Releases to water include toxics, total nitrogen and total phosphorus, and water discharges. Releases to soil or groundwater include toxics and agriculutural pesticides. Some metal releases to air, water and soil are not included because they could not be speciated. Solid hazardous and non-hazardous wastes generated are not included as an elementary flows although purchases of waste services are included.

## Data treatment
Greenhouse gases are primarily from the US Greenhouse Gas Emission Inventory (USEPA 2016a). Biogenic C uptake is not included (change from version 1.0), as biogenic C emission are not included. Toxic releases to air, water and soil (except pesticides) are from the 2013 Toxic Release Inventory (USEPA 2015a). Criteria air pollutants and hazardous air pollutants are from the 2011 National Emissions Inventory (USEPA 2015b). All estimates are normalized by industry based on sector output in the data year, then converted to 2013 USD using relative sector-specific CPIs (if data year is not 2013). Energy use represent raw renewables or fossil fuel energies and is based on EIA data for 2014. See Table 1 in Yang, Ingwersen et al. 2017 and Supporting Information 1, and the v1.1 data update notes (Ingwersen et al. 2017) for all details on environmental data sources used.Land occupation associated with manufacturing buildings was estimated based on the building floorspace data provided by the U.S. Energy Information Administration in the 2010 Manufacturing Energy Consumption Survey (EIA 2013). Portions of total renewable energy (EIA 2016) based on EIA-923 reports for 2014 (EIA 2017) are included. Nitrogen and Phosphorus releases are modeled in total N and total P equivalents as estimated by the Discharge Monitoring Report Nutrient Loading tool (USEPA 2016b). Self-supplied withdrawals were assigned to industrial sectors based on water use statistics for Canadian industries by NAICS 3-digit sector scaled to US production levels based on gross domestic product by industry (BEA 2015; Statistics Canada 2010), and further disaggregated to the manufacturing sectors based on compensation of employees as provided by the 2007 IO tables (BEA 2015). Water withdrawals associated with public supply were allocated to sectors based on their use of water, sewage, and other services in USD based on the IO tables (BEA 2015). Portions of total renewable energy (EIA 2016) by type are assigned to sectors (hydro, wind, solar, or) based on EIA-923 reports for 2014 (EIA 2017).

## Data collection
2015-2016

## Sampling procedure
US federal government sources, including surveys and US EPA emissions databases are used as the primary sources. From these sources, data for US reporting establishments/facilities are aggregated by the NAICS sector as defined in the BEA detailed 2007 input-output tables. When level of sector aggregation differs, or when direct emissions are not reported but modeled, additional sources are used to make allocations and estimates.

## Review details
In regard to quality assurance and peer-review, each dataset created went through Quality Assurance as defined in a quality assurance project plans at US EPA, CSRA or ERG. The model was assembled with the IO model builder model (USEPA 2016c). Validation functions were used to check that all the model components were properly assembled and harmonized. Bayou Demeke and Santosh Ghimire provided internal peer review of the model methodology and the manuscript underwent standard EPA management review. An editor and two anonymous reviewers at the Journal of Cleaner Production reviewed the model. In regard to data quality evaluation, data quality assessment was performed at the flow and process levels according to the updated US EPA data quality assessment guidelines as defined in US EPA (2016b).

## Intended application
The primary application is for use in the US Environmentally-Extended Input-Ouput model, USEEIO, version 1.1. This model is being used by the US EPA for supporting tools that prioritize goods and services based on potential environmental impacts, resource use or emissions for large regions, including the US and US states, and as a strealined tool for organizations as a starting point to consider sustainable materials management. Model results are designed to provide meso/macro-level decision support.

## Project
USEEIO v1.1 was developed by the US EPA with CSRA and ERG with Wesley W. Ingwersen and David E. Meyer as research leads. Yi Yang was the technical lead on the work for CSRA (contract EP-C-15-012); Troy Hawkins was lead for ERG (contract EP-C-12-021).

## Sources
- EIA 2015
- Ingwersen et al. 2017
- EIA 2017
- USEPA 2016b
- BLM 2008
- USEPA 2015a
- Kim et el. 2013
- Goebes et al. 2003
- Nickerson et al. 2011
- Blackhurst et al. 2010
- Macknick et al. 2011
- Statistics Canada 2010
- Edelen and Ingwersen 2017
- Lovelace 2009
- USEPA 2016c
- USDA 2009a
- EIA 2016
- EIA 2013
- USEPA 2015b
- Ingwersen et al. DRAFT
- USGS 2015
- Torcellini et al. 2003
- USDA 2006
- USGS 2016
- USDA 2009b
- USDA 2016
- Maupin et al. 2014
- USDA 2014
- USEPA 2016a
- BEA 2015
- Yienger et al. 1995
