# Amusement parks and arcades

Dataset: openLCA process, unit process
Category: 7131: Amusement Parks and Arcades
Geography: United States
Time period: 2017-01-01 to 2017-12-31
Data quality: US EPA - Process Pedigree Matrix (1;1)
Exchange data quality scheme: US EPA - Flow Pedigree Matrix
Generated by: US EPA with CSRA and ERG
Owner: US EPA
Published in: Yang, Ingwersen et al. 2017
restrictionsDescription: This model shold be appropriately cited (see Yang, Ingwersen et al. 2017 source or Publication field) when used. Any changes or derivations of this model by the user should be documented. The model itself and any results from use of this model shall not be construed to consitute US EPA opinion or policy.
copyright: false

## General comment
BEA Code & Name is '713100:Amusement parks and arcades'. Description of the primary industry producing this good or service, adapted from the Census Bureau NAICS 2007 descriptions: This industry group comprises establishments primarily engaged in operating amusement parks and amusement arcades and parlors.

## Technology
The process describes the average US production of this good or service within this NAICS-based grouping defined in the BEA 2007 detailed input-output tables (BEA 2015). Distribution, wholesale and retailing of this good or service, use, and final disposal are not included. Creation of a product system with this process will enable modeling of all upstream (supply-chain) activities.

## Geography
Data represent the 50 US states

## Time period
2017 was the year in which this version of USEEIO was released and is the target date for the model

## Reference product
- Amusement parks and arcades: 1 USD

## Inputs from technosphere
All rows: data quality (1,3,1,1,1)
- Natural gas; at consumer: 0.00255262 USD
- Primary iron, steel, and ferroalloy products; at manufacturer: 0.000164799 USD
- Printed circuit and electronic assembly; at manufacturer: 1.32412e-7 USD
- Software: 0.000165108 USD
- Drinking water and wastewater treatment; at consumer: 0.00156458 USD
- Independent artists, writers, and performers: 0.00355855 USD
- Other real estate: 0.0266758 USD
- Rubber tires; at manufacturer: 3.08961e-7 USD
- Other retail: 0.000247728 USD
- Hotels and campgrounds: 0.000995548 USD
- Nondepository credit intermediation and related activities: 0.00454111 USD
- Consumer goods and general rental centers: 0.000511788 USD
- Other computer related services, including facilities management: 0.00124041 USD
- State and local government enterprises: 0.00173013 USD
- External hard drives, CDs, other storage media; at manufacturer: 0.000294073 USD
- Paints and coatings; at manufacturer: 0.000165373 USD
- Fiber, yarn, and thread; at manufacturer: 3.61926e-6 USD
- Copper, nickel, lead, and zinc; at mine: 0.000494133 USD
- Scenic and sightseeing transportation and support activities for transportation: 0.000515848 USD
- Directory, mailing list, and other publishers; at publisher: 6.17922e-7 USD
- Gaskets, seals, musical instruments, fasteners, brooms, brushes, mop and other misc. goods; at manufacturer: 0.000247022 USD
- Other concrete products; at manufacturer: 0.000329289 USD
- Cheese; at manufacturer: 0.00172854 USD
- Lessors of nonfinancial intangible assets: 0.00074142 USD
- Tobacco, cotton, sugarcane, peanuts, sugar beets, herbs and spices, and other crops; at farm: 0.000164623 USD
- Legal services: 0.00554147 USD
- Promoters and agents: 0.000208147 USD
- Ambulances: 8.23113e-5 USD
- Used and secondhand goods: 4.41373e-8 USD
- Wholesale trade: 0.0266754 USD
- Finished and coated fabric; at manufacturer: 0.000331408 USD
- Water transport (boats, ships, ferries): 0.000164667 USD
- Performances: 0.00238844 USD
- Wooden windows, door, and flooring; at manufacturer: 8.49596e-5 USD
- Other secondary nonferrous metal products; at manufacturer: 0.000246934 USD
- Soft drinks, bottled water, and ice; at manufacturer: 0.00839576 USD
- Company and enterprise management: 0.00791495 USD
- Clothing; at manufacturer: 1.50067e-6 USD
- Cardboard; at manufacturer: 0.000166079 USD
- Buildings and dwellings services: 0.00791072 USD
- Specialized design: 0.00016577 USD
- Air transport: 0.00174284 USD
- Fruit and vegetable preservation; at manufacturer: 0.000164623 USD
- General merchandise stores: 8.24437e-5 USD
- Computer terminals and other computer peripheral equipment; at manufacturer: 0.000411557 USD
- All other food and drinking places: 0.00065955 USD
- Chemicals (except basic chemicals, agrichemicals, polymers, paints, pharmaceuticals,soaps, cleaning compounds); at manufacturer: 0.00107587 USD
- Machine shops; at manufacturer: 8.24437e-5 USD
- Rail transport: 0.000329422 USD
- Packaged meat (except poultry); at manufacturer: 0.00979505 USD
- Wineries and wine; at manufacturer: 0.000329245 USD
- Commercial machinery repair: 0.00535311 USD
- Vehicles and parts sales: 8.26203e-5 USD
- Vehicle rental and leasing: 0.00505387 USD
- Business support: 0.00223141 USD
- Investigation and security: 0.00123882 USD
- Insurance carriers: 0.0149699 USD
- Cutlery and handtools; at manufacturer: 0.000164623 USD
- Paper; at manufacturer: 0.000168904 USD
- Semiconductor machinery; at manufacturer: 9.26884e-7 USD
- Computer systems design: 0.00148699 USD
- Other plastic products; at manufacturer: 0.000659947 USD
- Pet care, photofinishing, parking and other sundry services: 0.00156392 USD
- Books, newspapers, magazines, and other print media; at manufacturer: 0.00175851 USD
- Wireless telecommunications: 0.00189802 USD
- Other petroleum and coal products; at manufacturer: 8.24879e-5 USD
- Cardboard containers; at manufacturer: 0.000329819 USD
- Electronic equipment repair and maintenance: 0.00436356 USD
- Pipeline transport: 8.23113e-5 USD
- Passenger ground transport: 0.0013202 USD
- Screws, nuts, and bolts; at manufacturer: 8.24879e-5 USD
- Internet publishing and broadcasting: 0.000330216 USD
- Polystyrene foam products; at manufacturer: 4.41373e-8 USD
- Veneer, plywood, and engineered wood; at manufacturer: 8.2532e-5 USD
- Fabric; at manufacturer: 8.36796e-5 USD
- Plastic bags, films, and sheets; at manufacturer: 0.00016502 USD
- Seasonings and dressings; at manufacturer: 8.23113e-5 USD
- Unrefined oil and gas; at extraction site: 0.000329334 USD
- All other foods; at manufacturer: 0.0195901 USD
- Investment advice, portfolio management, and other financial advising services: 0.000166079 USD
- Travel arrangement and reservation: 0.0018932 USD
- Plastic bottles; at manufacturer: 8.24879e-5 USD
- Gasoline, fuels, and by-products of petroleum refining; at manufacturer: 0.00724565 USD
- Vehicle engines and engine parts; at manufacturer: 2.64824e-7 USD
- Commercial equipment rental: 0.0024234 USD
- Architectural, engineering, and related services: 0.00560896 USD
- Motor vehicle steering, suspension components (except spring), and brake systems; at manufacturer: 8.25762e-5 USD
- Seafood; at manufacturer: 0.00189316 USD
- Packaged poultry; at manufacturer: 0.00205778 USD
- Other basic organic chemicals; at manufacturer: 1.76549e-7 USD
- Air conditioning, refrigeration, and warm air heating equipment; at manufacturer: 0.000329731 USD
- Other support services: 0.00115258 USD
- Transmission and power train parts; at manufacturer: 8.27968e-5 USD
- Marketing research and all other miscellaneous professional, scientific, and technical services: 0.00064009 USD
- Food and beverage stores: 4.41373e-8 USD
- Postal service: 0.00092895 USD
- Nonresidential building repair and maintanence: 0.00337671 USD
- Industrial process variable instruments; at manufacturer: 3.08961e-7 USD
- Sporting and athletic goods; at manufacturer: 0.000329245 USD
- Telecommunications: 0.00321707 USD
- Movies and film: 0.000975249 USD
- Warehousing: 0.000750115 USD
- Magazines and journals; at publisher: 0.000412969 USD
- Light bulbs; at manufacturer: 4.41373e-8 USD
- Lumber and treated lumber; at manufacturer: 8.2841e-5 USD
- Newspapers; at publisher: 8.82746e-8 USD
- Limited-service restaurants: 0.00082841 USD
- News syndicates, libraries, archives, Internet publishing and all other information services: 8.82746e-8 USD
- Coal; at mine: 8.23113e-5 USD
- Ice cream and frozen desserts; at manufacturer: 0.00115236 USD
- Dolls, toys, and games; at manufacturer: 0.000493868 USD
- Aluminum; at manufacturer: 1.32412e-7 USD
- Securities and commodities brokerage and exchanges: 0.00157164 USD
- Sound recording: 5.23027e-5 USD
- Household goods repair: 0.0014824 USD
- Data processing and hosting: 0.00238844 USD
- Vaccines and other biological medical products; at manufacturer: 0.0415672 USD
- Accounting, tax preparation, bookkeeping, and payroll: 0.00380755 USD
- Couriers and messengers: 0.000689166 USD
- Vehicle repair: 0.00271773 USD
- Monetary authorities and depository credit intermediation: 0.00179011 USD
- Frozen food; at manufacturer: 0.000823113 USD
- Breweries and beer; at manufacturer: 0.00757264 USD
- Distilleries and spirits; at manufacturer: 0.000905425 USD
- Flavored drink concentrates; at manufacturer: 1.76549e-7 USD
- Light fixtures; at manufacturer: 0.000905425 USD
- Greenhouse crops, mushrooms, nurseries, and flowers; at farm: 0.000658491 USD
- Electricity; at consumer: 0.0195973 USD
- Plastic pipe, fittings, and sausage casings; at manufacturer: 8.24879e-5 USD
- Golf courses, marinas, ski resorts, fitness and other rec centers and industries: 0.000166167 USD
- Office supplies (not paper); at manufacturer: 8.23555e-5 USD
- Sugar, candy, and chocolate; at manufacturer: 3.97236e-7 USD
- Other vehicle parts; at manufacturer: 8.26644e-5 USD
- Truck transport: 0.00280454 USD
- Office administration: 0.0025607 USD
- Employment services: 0.00801461 USD
- Pesticides; at manufacturer: 0.000493868 USD
- Management consulting: 0.0108948 USD
- Metal coatings, engravings, and heat treatments; at manufacturer: 4.41373e-8 USD
- Environmental and other technical consulting services: 0.00255858 USD
- Satellite, telecommunications resellers, and all other telecommunications: 0.000495192 USD
- Fertilizers; at manufacturer: 0.00156392 USD
- Vehicle electrical and electronic equipment; at manufacturer: 8.27086e-5 USD
- Advertising and public relations: 0.078579 USD
- Glass and glass products; at manufacturer: 4.41373e-8 USD
- Urethane and other foam products; at manufacturer: 8.82746e-8 USD
- Animal farms and aquaculture ponds (except cattle and poultry): 0.00197547 USD
- Facilities support: 0.000743936 USD
- Waste management and remediation: 0.004694 USD
- Wild-caught fish and game; at place of capture: 0.00107005 USD
- Full-service restaurants: 0.00132731 USD
- Insurance agencies and brokerages: 0.000336219 USD
- Noncomparable imports: 0.00149727 USD
- Paper bags and coated paper; at manufacturer: 0.00016502 USD
- Sports: 8.29293e-5 USD
- Civic, social, professional, and similar organizations: 0.000332953 USD
- Dry-cleaning and laundry: 0.000741464 USD
- Plywood and veneer; at manufacturer: 2.64824e-7 USD
- Other textiles; at manufacturer: 0.000658667 USD
- Metal pipe fittings, ball and roller bearings, industrial patterns, metal bath fixtures, other misc. fabricated metals; at manufacturer: 1.32412e-7 USD

## Inputs from nature
- Occupation, urban, discontinuously built: 0.00071632 m2*a; data quality (4,2,1,1,1)
- Water, fresh: 0.000353075, 0.000611032 m3 (2 entries, compartments not in this file); data quality (1,2,1,4,2)

## Emissions to nature
- methyl isobutyl ketone: 9.12532e-9 kg; data quality (4,2,1,1,5)
- Chrysene: 1.44706e-9 kg; data quality (3,2,1,4,1)
- Propene, 1,3-dichloro-: 6.077e-13 kg; data quality (3,2,1,1,5)
- nitrogen oxides: 7.66108e-5 kg; data quality (3,2,1,1,2)
- para-xylene: 5.26367e-14 kg; data quality (3,2,1,4,1)
- Cobalt: 1.93304e-11 kg; data quality (3,2,1,1,5)
- Phthalate, dimethyl-: 3.99098e-12 kg; data quality (4,2,1,1,5)
- chlorine: 2.87476e-10 kg; data quality (4,2,1,1,5)
- ethane, 1,2-dichloro-: 6.70888e-13 kg; data quality (3,2,1,1,5)
- particulates, < 2.5 um: 5.44078e-5 kg; data quality (3,2,1,4,1)
- Benzo(g,h,i)perylene: 6.95291e-9 kg; data quality (3,2,1,4,1)
- benzene, ethyl-: 2.59969e-5 kg; data quality (3,2,1,4,1)
- Chromium, ion: 7.3345e-10 kg; data quality (3,2,1,3,3)
- ethene, tetrachloro-: 2.7436e-10 kg; data quality (3,2,1,1,5)
- hexane: 1.9961e-5 kg; data quality (3,2,1,4,1)
- hydrogen chloride: 7.78994e-10 kg; data quality (2,2,1,1,5)
- Methane: 7.46762e-7 kg; data quality (4,2,1,4,1)
- Dibenz(a,h)anthracene: 5.20188e-11 kg; data quality (3,2,1,4,1)
- Ethane, pentafluoro-, HFC-125: 5.24139e-8 kg; data quality (4,2,1,4,1)
- Asbestos: 4.36066e-13 kg; data quality (5,2,1,1,5)
- Ethene, chloro-: 3.72033e-13 kg; data quality (3,2,1,1,5)
- manganese: 5.40444e-10 kg; data quality (3,2,1,3,3)
- Diethylene glycol butyl ether: 5.34853e-11 kg; data quality (4,2,1,1,5)
- anthracene: 6.48892e-9 kg; data quality (3,2,1,4,1)
- 1,4-dioxane: 3.98191e-14 kg; data quality (4,2,1,1,5)
- Carbon dioxide: 0.00821707 kg; data quality (4,2,1,4,1)
- phthalate, dioctyl-: 3.99588e-11 kg; data quality (3,2,1,1,5)
- styrene: 1.97309e-6 kg; data quality (3,2,1,4,1)
- carbon monoxide: 0.00547336 kg; data quality (3,2,1,1,1)
- m-xylene: 1.03517e-6 kg; data quality (3,2,1,4,1)
- methanol: 3.2148e-10 kg; data quality (4,2,1,1,5)
- ammonia: 6.78369e-7 kg; data quality (3,2,1,3,2)
- selenium: 1.29818e-12 kg; data quality (2,2,1,1,5)
- Ethane, 1,1,1-trifluoro-, HFC-143a: 2.24257e-8 kg; data quality (4,2,1,4,1)
- nickel: 1.26954e-9 kg; data quality (3,2,1,3,3)
- beryllium: 1.04649e-13 kg; data quality (2,2,1,1,5)
- acrolein: 7.51393e-7 kg; data quality (3,2,1,4,1)
- propanal: 9.21587e-7 kg; data quality (3,2,1,4,1)
- BUTYL ISOCYANATE: 1.30361e-8 kg; data quality (4,2,1,1,5)
- lead: 1.15136e-10 kg; data quality (3,2,1,1,5)
- o-Xylene: 3.60977e-7 kg; data quality (3,2,1,4,1)
- mercury: 9.28362e-12 kg; data quality (3,2,1,5,1)
- Benzo(b)fluoranthene: 1.25673e-9 kg; data quality (3,2,1,4,1)
- 2,2,4-trimethylpentane: 8.563e-5 kg; data quality (3,2,1,4,1)
- toluene: 0.000226245 kg; data quality (3,2,1,4,1)
- methylene diphenyl diisocyanate: 1.21708e-14 kg; data quality (4,2,1,1,5)
- Propane, 1,1,1,3,3,3-hexafluoro-, HCFC-236fa: 6.05837e-10 kg; data quality (4,2,1,4,1)
- Water, fresh: 0.000816323 m3; data quality (1,2,1,4,2)
- sulfur dioxide: 7.73202e-7 kg; data quality (3,2,1,3,2)
- butadiene: 2.98374e-6 kg; data quality (3,2,1,4,1)
- 1,1,1-trichloroethane: 7.49646e-17 kg; data quality (4,2,1,1,5)
- trichloroethylene: 1.13519e-12 kg; data quality (4,2,1,1,5)
- Phthalate, dibutyl-: 3.04175e-9 kg; data quality (4,2,1,1,5)
- particulates, < 10 um: 4.86248e-6 kg; data quality (3,2,1,4,1)
- benzo(a)pyrene: 1.86218e-9 kg; data quality (3,2,1,4,1)
- carbon tetrachloride: 2.30075e-12 kg; data quality (4,2,1,1,5)
- Benzo(k)fluoranthene: 1.15252e-9 kg; data quality (3,2,1,4,1)
- acenaphthylene: 1.85098e-8 kg; data quality (3,2,1,4,1)
- chloroform: 6.5746e-13 kg; data quality (4,2,1,1,5)
- benz[a]anthracene: 2.12246e-9 kg; data quality (3,2,1,4,1)
- t-butyl methyl ether: 4.682e-10 kg; data quality (3,2,1,1,5)
- fluoranthene: 1.71154e-8 kg; data quality (3,2,1,4,1)
- fluorene: 1.7829e-8 kg; data quality (3,2,1,4,1)
- 1,1,2,2-tetrachloroethane: 9.22044e-13 kg; data quality (3,2,1,1,5)
- methane, dichloro-, hcc-30: 2.13931e-10 kg; data quality (4,2,1,1,5)
- ethane, 1,2-dibromo-: 1.11073e-12 kg; data quality (2,2,1,1,5)
- Indeno(1,2,3-cd)pyrene: 2.10338e-9 kg; data quality (3,2,1,4,1)
- acetaldehyde: 4.55607e-6 kg; data quality (3,2,1,4,1)
- acenaphthene: 2.7435e-9 kg; data quality (3,2,1,4,1)
- Xylene: 0.000110207 kg; data quality (3,2,1,4,1)
- benzene: 2.79654e-5 kg; data quality (3,2,1,4,1)
- ethane, 1,1,2-trichloro-: 7.31978e-13 kg; data quality (4,2,1,1,5)
- Nitrogen: 4.05323e-8 kg; data quality (2,2,1,1,5)
- Dinitrogen monoxide: 2.19547e-8 kg; data quality (4,2,1,4,1)
- naphthalene: 3.70848e-7 kg; data quality (3,2,1,4,1)
- 2-methylnaphthalene: 6.58484e-12 kg; data quality (2,2,1,1,5)
- pyrene: 2.09261e-8 kg; data quality (3,2,1,4,1)
- Hydrocarbons, aromatic: 1.0734e-7 kg; data quality (3,2,1,4,1)
- Chromium VI: 1.99325e-10 kg; data quality (3,2,1,5,1)
- carbonyl sulfide: 4.54855e-14 kg; data quality (4,2,1,1,5)
- phenanthrene: 1.99568e-8 kg; data quality (3,2,1,4,1)
- arsenic: 2.34497e-9 kg; data quality (3,2,1,5,1)
- cadmium: 2.48384e-10 kg; data quality (3,2,1,1,5)
- Methane, difluoro-, HFC-32: 3.05234e-8 kg; data quality (4,2,1,4,1)
- Ethane, 1,1,1,2-tetrafluoro-, HFC-134a: 1.97555e-7 kg; data quality (4,2,1,4,1)
- VOC, volatile organic compounds: 0.00144395 kg; data quality (3,2,1,1,1)
- acrylonitrile: 1.28698e-11 kg; data quality (4,2,1,1,5)
- Propane, 1,2-dichloro-: 6.19026e-13 kg; data quality (4,2,1,1,5)
- formaldehyde: 9.88661e-6 kg; data quality (3,2,1,4,1)

## Inventory method
Input-output

## Modelling constants
The reference unit of all processes is 1 USD2013 of the good or service. The technosphere inputs are based on the US BEA detailed input-output tables for 2007. The IO tables are combined to develop a commodity-by-commodity model based on the the industry-technology assumption (see Suh et al., 2010), which assumes all commodities produced by a given industry have the same input structure, but that multiple industries can produce the same commodity. Thus, model technosphere flows represent commodity outputs (and not industry outputs) from other processes in the model. There are no by-products included in these processes. All commodity production is based on US-conditions, despite in reality that some goods and services are produced overseas, as USEEIO v1.1 is a single-region IO model.

## Completeness
The input-output approach assures that all purchased inputs associated with the sectors making these commodities as reported in the US census for 2007 are included. The direct resources extracted including minerals, energy sources, water and land occupied are included. Emissions to air include all critieria air pollutants, greenhouse gases, and hazardous and toxic air pollutants as defined by US EPA. Releases to water include toxics, total nitrogen and total phosphorus, and water discharges. Releases to soil or groundwater include toxics and agriculutural pesticides. Some metal releases to air, water and soil are not included because they could not be speciated. Solid hazardous and non-hazardous wastes generated are not included as an elementary flows although purchases of waste services are included.

## Data treatment
Greenhouse gases are primarily from the US Greenhouse Gas Emission Inventory (USEPA 2016a). Biogenic C uptake is not included (change from version 1.0), as biogenic C emission are not included. Toxic releases to air, water and soil (except pesticides) are from the 2013 Toxic Release Inventory (USEPA 2015a). Criteria air pollutants and hazardous air pollutants are from the 2011 National Emissions Inventory (USEPA 2015b). All estimates are normalized by industry based on sector output in the data year, then converted to 2013 USD using relative sector-specific CPIs (if data year is not 2013). Energy use represent raw renewables or fossil fuel energies and is based on EIA data for 2014. See Table 1 in Yang, Ingwersen et al. 2017 and Supporting Information 1, and the v1.1 data update notes (Ingwersen et al. 2017) for all details on environmental data sources used.Land occupation for commercial buildings was estimated based on the building floorspace data provided by the U.S. Energy Information Administration 2012 Commercial Building Energy Consumption Survey (CBECS) (EIA 2015). Total commercial public supply water use is reported by USGS (Maupin et al. 2014). Water use is allocated across commercial sectors based on their use of water, sewage, and other services in USD based on the 2007 Benchmark Use Table before redefinitions (BEA 2015).

## Data collection
2015-2016

## Sampling procedure
US federal government sources, including surveys and US EPA emissions databases are used as the primary sources. From these sources, data for US reporting establishments/facilities are aggregated by the NAICS sector as defined in the BEA detailed 2007 input-output tables. When level of sector aggregation differs, or when direct emissions are not reported but modeled, additional sources are used to make allocations and estimates.

## Review details
In regard to quality assurance and peer-review, each dataset created went through Quality Assurance as defined in a quality assurance project plans at US EPA, CSRA or ERG. The model was assembled with the IO model builder model (USEPA 2016c). Validation functions were used to check that all the model components were properly assembled and harmonized. Bayou Demeke and Santosh Ghimire provided internal peer review of the model methodology and the manuscript underwent standard EPA management review. An editor and two anonymous reviewers at the Journal of Cleaner Production reviewed the model. In regard to data quality evaluation, data quality assessment was performed at the flow and process levels according to the updated US EPA data quality assessment guidelines as defined in US EPA (2016b).

## Intended application
The primary application is for use in the US Environmentally-Extended Input-Ouput model, USEEIO, version 1.1. This model is being used by the US EPA for supporting tools that prioritize goods and services based on potential environmental impacts, resource use or emissions for large regions, including the US and US states, and as a strealined tool for organizations as a starting point to consider sustainable materials management. Model results are designed to provide meso/macro-level decision support.

## Project
USEEIO v1.1 was developed by the US EPA with CSRA and ERG with Wesley W. Ingwersen and David E. Meyer as research leads. Yi Yang was the technical lead on the work for CSRA (contract EP-C-15-012); Troy Hawkins was lead for ERG (contract EP-C-12-021).

## Sources
- Torcellini et al. 2003
- EIA 2013
- Yienger et al. 1995
- Nickerson et al. 2011
- USEPA 2015b
- Lovelace 2009
- Edelen and Ingwersen 2017
- USEPA 2016b
- Macknick et al. 2011
- USDA 2009b
- USGS 2015
- USDA 2009a
- Goebes et al. 2003
- Maupin et al. 2014
- Blackhurst et al. 2010
- Ingwersen et al. 2017
- USEPA 2016a
- USGS 2016
- USDA 2006
- USEPA 2015a
- USDA 2014
- EIA 2016
- EIA 2015
- EIA 2017
- Ingwersen et al. DRAFT
- USEPA 2016c
- BLM 2008
- Statistics Canada 2010
- BEA 2015
- USDA 2016
- Kim et el. 2013
