# Aluminum; at manufacturer

Dataset: openLCA process, unit process
Category: 3313: Alumina and Aluminum Production and Processing
Geography: United States
Time period: 2017-01-01 to 2017-12-31
Data quality: US EPA - Process Pedigree Matrix (1;1)
Exchange data quality scheme: US EPA - Flow Pedigree Matrix
Generated by: US EPA with CSRA and ERG
Owner: US EPA
Published in: Yang, Ingwersen et al. 2017
restrictionsDescription: This model shold be appropriately cited (see Yang, Ingwersen et al. 2017 source or Publication field) when used. Any changes or derivations of this model by the user should be documented. The model itself and any results from use of this model shall not be construed to consitute US EPA opinion or policy.
copyright: false

## General comment
BEA Code & Name is '33131A:Alumina refining and primary aluminum production'. Description of the primary industry producing this good or service, adapted from the Census Bureau NAICS 2007 descriptions: This U.S. industry comprises establishments primarily engaged in (1) refining alumina (i.e., aluminum oxide) generally from bauxite and (2) making aluminum from alumina and/or rolling, drawing, extruding, or casting the aluminum they make into primary forms (e.g., bar, billet, ingot, plate, rod, sheet, strip). Establishments in this industry may make primary aluminum or aluminum-based alloys from alumina. Related NAICS codes are: 331311-2

## Technology
The process describes the average US production of this good or service within this NAICS-based grouping defined in the BEA 2007 detailed input-output tables (BEA 2015). Distribution, wholesale and retailing of this good or service, use, and final disposal are not included. Creation of a product system with this process will enable modeling of all upstream (supply-chain) activities.

## Geography
Data represent the 50 US states

## Time period
2017 was the year in which this version of USEEIO was released and is the target date for the model

## Reference product
- Aluminum; at manufacturer: 1 USD

## Inputs from technosphere
All rows: data quality (1,3,1,1,1)
- Fabric; at manufacturer: 4.977e-6 USD
- Business support: 0.00192517 USD
- Office supplies (not paper); at manufacturer: 3.11063e-8 USD
- Semiconductors; at manufacturer: 0.00593381 USD
- Veneer, plywood, and engineered wood; at manufacturer: 0.000577683 USD
- Electronic capacitors, resistors, coils, transformers, connectors and other components (except semiconductors and printed circuit assemblies); at manufacturer: 0.000642837 USD
- Cutting and machine tool accessory, rolling mill, and other metalworking machines; at manufacturer: 0.000641339 USD
- Heavy gauge metal tanks; at manufacturer: 4.18096e-6 USD
- Power boilers and heat exchangers; at manufacturer: 3.76287e-6 USD
- Other nonmetallic mineral products; at manufacturer: 3.19611e-8 USD
- Employment services: 0.00127318 USD
- Wiring devices; at manufacturer: 1.7553e-6 USD
- Pipeline transport: 7.03604e-5 USD
- Machine shops; at manufacturer: 0.00996822 USD
- Fiber, yarn, and thread; at manufacturer: 1.91767e-7 USD
- Performances: 5.90076e-7 USD
- Welding and Soldering Equipment, Scales and Balances, and other general purpose machinery; at manufacturer: 7.4055e-5 USD
- Communications equipment; at manufacturer: 6.22125e-8 USD
- Natural gas; at consumer: 0.028116 USD
- All other converted paper products; at manufacturer: 1.55531e-7 USD
- Limited-service restaurants: 0.000891421 USD
- Aluminum; at manufacturer: 0.137146 USD
- Small electrical appliances; at manufacturer: 2.55071e-6 USD
- Plastics and rubber industry machinery; at manufacturer: 7.55882e-6 USD
- Cardboard containers; at manufacturer: 0.00748387 USD
- Machinery for the paper, textile, food or other industries (except semiconductor machinery); at manufacturer: 0.000335393 USD
- Promoters and agents: 3.86847e-6 USD
- Management consulting: 0.000721262 USD
- Primary iron, steel, and ferroalloy products; at manufacturer: 0.0106905 USD
- Other textiles; at manufacturer: 1.55531e-7 USD
- Secondary copper products; at manufacturer: 0.00046862 USD
- Electronic equipment repair and maintenance: 0.000637218 USD
- Surgical appliance and supplies; at manufacturer: 3.18507e-6 USD
- Chemicals (except basic chemicals, agrichemicals, polymers, paints, pharmaceuticals,soaps, cleaning compounds); at manufacturer: 0.00418659 USD
- Light fixtures; at manufacturer: 2.9862e-6 USD
- Compressed Gases; at manufacturer: 0.00151036 USD
- Material handling equipment; at manufacturer: 0.000378242 USD
- Golf courses, marinas, ski resorts, fitness and other rec centers and industries: 7.06064e-5 USD
- Communication and energy wire and cable; at manufacturer: 0.00317023 USD
- Computer systems design: 0.000471917 USD
- Glass and glass products; at manufacturer: 4.29176e-5 USD
- Consumer goods and general rental centers: 0.000128724 USD
- Legal services: 0.00143169 USD
- Vehicle repair: 0.00164653 USD
- Metal coatings, engravings, and heat treatments; at manufacturer: 0.00710044 USD
- Investigation and security: 0.000962139 USD
- Magazines and journals; at publisher: 8.94567e-8 USD
- Printed circuit and electronic assembly; at manufacturer: 0.00246162 USD
- Special tools, dies, jigs, and fixtures; at manufacturer: 9.33188e-8 USD
- Metal plumbing drains, faucets, valves, and other fittings; at manufacturer: 5.78577e-6 USD
- Cast iron and steel; at manufacturer: 1.33154e-6 USD
- Iron, gold, silver, and other metal ores; at mine: 0.0251849 USD
- Other support services: 0.00108276 USD
- Other basic inorganic chemicals; at manufacturer: 0.00496347 USD
- Synthetic dyes and pigments; at manufacturer: 2.52051e-5 USD
- Commercial machinery repair: 0.00328885 USD
- Software: 6.49349e-5 USD
- Telecommunications: 0.000988476 USD
- Metal structural products; at manufacturer: 7.66761e-6 USD
- Full-service restaurants: 0.000549851 USD
- Sports: 4.55366e-6 USD
- Other basic organic chemicals; at manufacturer: 0.00156562 USD
- Other plastic products; at manufacturer: 0.000526653 USD
- Abrasive products; at manufacturer: 0.000579001 USD
- Waste management and remediation: 0.001867 USD
- Adhesives; at manufacturer: 0.000516065 USD
- Relay and industrial controls; at manufacturer: 0.000677389 USD
- Other computer related services, including facilities management: 0.000204882 USD
- Marketing research and all other miscellaneous professional, scientific, and technical services: 0.00255271 USD
- Heating equipment other than warm air furnaces; at manufacturer: 3.11063e-8 USD
- Dry-cleaning and laundry: 7.06345e-5 USD
- Secondary steel products; at manufacturer: 3.00178e-6 USD
- Paper; at manufacturer: 9.93661e-6 USD
- Metal windows, doors, and architectural products; at manufacturer: 0.000972659 USD
- Investment advice, portfolio management, and other financial advising services: 0.000201404 USD
- Passenger ground transport: 0.000206731 USD
- Books, newspapers, magazines, and other print media; at manufacturer: 4.50057e-7 USD
- Metal hinges, keys, lock, and other hardware; at manufacturer: 3.04841e-6 USD
- Wooden windows, door, and flooring; at manufacturer: 0.000324275 USD
- Paper bags and coated paper; at manufacturer: 8.68032e-5 USD
- Stationery; at manufacturer: 8.36193e-7 USD
- Hotels and campgrounds: 0.000478563 USD
- Postal service: 7.31047e-5 USD
- Cement; at manufacturer: 2.11523e-6 USD
- Insurance carriers: 0.00366458 USD
- Lessors of nonfinancial intangible assets: 0.00243228 USD
- Rail transport: 0.0112792 USD
- Vegetable oils and by-products; at manufacturer: 9.33188e-8 USD
- Cardboard; at manufacturer: 0.00146135 USD
- Switchgear and switchboards; at manufacturer: 6.59453e-6 USD
- Plastics; at manufacturer: 0.000685143 USD
- Fertilizers; at manufacturer: 0.000132717 USD
- Cutlery and handtools; at manufacturer: 0.000319862 USD
- Plastic bags, films, and sheets; at manufacturer: 0.00142541 USD
- Specialized design: 0.00223407 USD
- Other retail: 6.08169e-6 USD
- Concrete pipe, bricks, and blocks; at manufacturer: 8.27427e-6 USD
- Noncomparable imports: 0.000763894 USD
- Data processing and hosting: 0.00114846 USD
- Office administration: 0.000128728 USD
- Timber and raw forest products; at forest: 2.55689e-7 USD
- Scenic and sightseeing transportation and support activities for transportation: 0.000378814 USD
- Other secondary nonferrous metal products; at manufacturer: 0.000178618 USD
- Drinking water and wastewater treatment; at consumer: 0.000702829 USD
- Vehicles and parts sales: 0.000315681 USD
- Air transport: 0.00140651 USD
- Soap and cleaning compounds; at manufacturer: 6.86129e-7 USD
- Gasoline, fuels, and by-products of petroleum refining; at manufacturer: 0.00702242 USD
- Nonferrous metal casts; at manufacturer: 2.09242e-6 USD
- Commercial equipment rental: 0.000766619 USD
- Independent artists, writers, and performers: 0.000137349 USD
- Light gauge metal cans, boxes, and containers; at manufacturer: 1.36984e-5 USD
- Coal; at mine: 0.0119286 USD
- Other concrete products; at manufacturer: 1.21003e-5 USD
- Wholesale trade: 0.0921885 USD
- Air purification and ventilation equipment; at manufacturer: 2.33297e-6 USD
- Sanitary paper (tissues, napkins, diapers, etc.); at manufacturer: 3.11063e-8 USD
- Laminated plastic plates and shapes; at manufacturer: 1.71102e-5 USD
- Screws, nuts, and bolts; at manufacturer: 0.00159239 USD
- Civic, social, professional, and similar organizations: 0.000269227 USD
- Primary copper; at manufacturer: 0.000222841 USD
- Industrial process variable instruments; at manufacturer: 0.000256188 USD
- Electricity; at consumer: 0.067069 USD
- Copper, nickel, lead, and zinc; at mine: 0.00569225 USD
- Air and gas compressors; at manufacturer: 3.52872e-6 USD
- Other primary nonferrous metals; at manufacturer: 0.0229609 USD
- Other real estate: 0.00118742 USD
- Securities and commodities brokerage and exchanges: 0.00949035 USD
- Other petroleum and coal products; at manufacturer: 0.000151473 USD
- Company and enterprise management: 0.0124195 USD
- Springs and wires; at manufacturer: 3.62416e-5 USD
- Household goods repair: 0.000568612 USD
- General merchandise stores: 5.59913e-7 USD
- Unrefined oil and gas; at extraction site: 0.00251405 USD
- Polystyrene foam products; at manufacturer: 1.24425e-7 USD
- Accounting, tax preparation, bookkeeping, and payroll: 0.00125204 USD
- Ball and roller bearings; at manufacturer: 1.99731e-6 USD
- Other vehicle parts; at manufacturer: 0.0012014 USD
- Valve and fittings (except for plumbing); at manufacturer: 0.000778433 USD
- Water transport (boats, ships, ferries): 0.00170054 USD
- Vehicle engines and engine parts; at manufacturer: 1.6712e-6 USD
- Wood kitchen cabinets and countertops; at manufacturer: 1.16337e-5 USD
- Nonresidential building repair and maintanence: 0.00443166 USD
- Computer terminals and other computer peripheral equipment; at manufacturer: 2.92246e-6 USD
- Food and beverage stores: 1.86638e-7 USD
- All other food and drinking places: 4.66342e-6 USD
- Monetary authorities and depository credit intermediation: 0.00257913 USD
- Clay and ceramic products; at manufacturer: 4.82614e-6 USD
- Satellite, telecommunications resellers, and all other telecommunications: 6.58789e-5 USD
- Industrial process furnaces and ovens; at manufacturer: 4.18484e-6 USD
- Truck transport: 0.0218935 USD
- All other forging, stamping, and sintering; at manufacturer: 2.66308e-6 USD
- Mineral wool; at manufacturer: 5.11378e-7 USD
- Environmental and other technical consulting services: 0.000195593 USD
- Warehousing: 0.000724351 USD
- Lime and gypsum products; at manufacturer: 3.73275e-6 USD
- Aluminum products; at manufacturer: 0.0350296 USD
- Specialty transformers; at manufacturer: 3.11063e-8 USD
- Plastic pipe, fittings, and sausage casings; at manufacturer: 0.000224783 USD
- Facilities support: 0.000695814 USD
- Petrochemicals; at manufacturer: 0.000264298 USD
- Scientific research and development: 6.65575e-5 USD
- Vending, commercial laundry, and other commercial and service industry machinery; at manufacturer: 1.7352e-6 USD
- Lumber and treated lumber; at manufacturer: 5.59913e-6 USD
- Lids, jars, bottle caps, other metal closures and crowns; at manufacturer: 1.93151e-6 USD
- Asphalt pavement; at manufacturer: 2.11523e-6 USD
- Motor vehicle steering, suspension components (except spring), and brake systems; at manufacturer: 6.33568e-5 USD
- Metal pipe fittings, ball and roller bearings, industrial patterns, metal bath fixtures, other misc. fabricated metals; at manufacturer: 0.00234044 USD
- Finished and coated fabric; at manufacturer: 1.05761e-6 USD
- Vehicle electrical and electronic equipment; at manufacturer: 9.33188e-8 USD
- Gaskets, seals, musical instruments, fasteners, brooms, brushes, mop and other misc. goods; at manufacturer: 0.000320467 USD
- Industrial molds; at manufacturer: 8.70976e-7 USD
- Ready-mix concrete; at manufacturer: 2.79956e-7 USD
- Metal cutting and forming machine tools; at manufacturer: 2.79956e-7 USD
- Insurance agencies and brokerages: 0.00124082 USD
- Transmission and power train parts; at manufacturer: 0.000128515 USD
- Architectural, engineering, and related services: 0.00288591 USD
- Nondepository credit intermediation and related activities: 0.00399449 USD
- Paints and coatings; at manufacturer: 0.000145511 USD
- Vehicle rental and leasing: 0.00116058 USD
- Urethane and other foam products; at manufacturer: 1.05761e-6 USD
- State and local government enterprises: 0.000765457 USD
- Sand, gravel, clay, phosphate, other nonmetallic minerals; at mine: 8.65459e-5 USD
- Air conditioning, refrigeration, and warm air heating equipment; at manufacturer: 0.000182148 USD
- Light bulbs; at manufacturer: 6.22125e-8 USD
- Buildings and dwellings services: 0.00541313 USD
- Advertising and public relations: 0.00105723 USD
- Wireless telecommunications: 0.000273774 USD
- Synthetic rubber and artificial and synthetic fibers; at manufacturer: 6.65921e-6 USD
- Carbon and graphite products; at manufacturer: 0.0143817 USD
- Travel arrangement and reservation: 9.27486e-7 USD
- Plywood and veneer; at manufacturer: 1.77617e-5 USD
- Wireless communications; at manufacturer: 3.11063e-8 USD
- Custom metal rolls; at manufacturer: 1.35847e-5 USD

## Inputs from nature
- Water, fresh: 0.0035146, 0.0136484 m3 (2 entries, compartments not in this file); data quality (4,2,1,4,2)
- Energy, wind: 5.81637e-6 MJ; data quality (3,1,1,1,1)
- Occupation, urban, discontinuously built: 9.00396e-5 m2*a; data quality (4,2,1,1,1)
- Occupation, industrial area, built up: 0.000213787 m2*a; data quality (4,2,1,1,1)
- Occupation, industrial area: 0.000641361 m2*a; data quality (4,2,1,1,1)
- Water, saline: 0.00105472 m3; data quality (4,2,1,4,2)

## Emissions to nature
- Indeno(1,2,3-cd)pyrene: 1.84107e-9 kg; data quality (2,2,1,1,2)
- ammonia: 5.30569e-8 kg; data quality (3,1,1,1,3)
- 4-nitrophenol: 3.04113e-19 kg; data quality (2,2,1,1,4)
- Chloroform: 1.02845e-13 kg; data quality (3,1,1,1,5)
- carbonyl sulfide: 0.000170173 kg; data quality (4,2,1,1,2)
- copper: 1.19591e-9 kg; data quality (4,1,1,1,5)
- Chloroform: 7.40682e-12 kg; data quality (3,1,1,1,3)
- Hexachlorocyclopentadiene: 5.06826e-11 kg; data quality (3,2,1,1,4)
- Nitrobenzene: 1.39001e-10 kg; data quality (4,2,1,1,4)
- 1,1,1,2-Tetrachloroethane: 1.43507e-10 kg; data quality (3,1,1,1,3)
- Chloroacetic acid: 3.7488e-11 kg; data quality (3,2,1,1,4)
- antimony: 1.5491e-9 kg; data quality (3,2,1,1,3)
- anthracene: 7.91236e-10 kg; data quality (3,2,1,1,2)
- ethyl acrylate: 1.53036e-10 kg; data quality (4,2,1,1,4)
- Decabromodiphenyl oxide: 1.70336e-15, 3.40672e-14 kg (2 entries, compartments not in this file); data quality (4,1,1,1,5)
- selenium: 6.78377e-9 kg; data quality (2,2,1,1,3)
- Aluminum: 2.43509e-5 kg; data quality (4,1,1,1,2)
- Ethane, 1,2-dichloro-: 4.01372e-11, 1.83627e-12 kg (2 entries, compartments not in this file); data quality (4,1,1,1,3)
- Triethylene glycol: 4.85191e-11 kg; data quality (5,2,1,1,5)
- particulates, < 10 um: 0.000121991 kg; data quality (3,2,1,1,2)
- Acetophenone: 1.70336e-15 kg; data quality (4,1,1,1,5)
- methane, dichloro-, hcc-30: 7.82171e-8 kg; data quality (4,2,1,1,2)
- Carbon disulfide: 1.62024e-12 kg; data quality (4,1,1,1,3)
- 2,4-dimethylphenol: 1.51672e-9 kg; data quality (4,1,1,1,4)
- Benzo(b)fluoranthene: 4.7542e-9 kg; data quality (2,2,1,1,2)
- 2,4/2,6-toluenediisocyanate (mixture): 3.45217e-12 kg; data quality (3,1,1,1,5)
- nitric acid: 4.55776e-12 kg; data quality (3,1,1,1,4)
- 2,2-BIS(4-HYDROXY-3,5-DIBROMOPHENYL)PROPANE: 7.73622e-10 kg; data quality (5,1,1,1,3)
- Methane, dichloro-, HCC-30: 6.78958e-12 kg; data quality (5,1,1,1,3)
- acetophenone: 5.89895e-9 kg; data quality (4,2,1,1,2)
- HCFC-132b: 3.79136e-9, 2.46894e-12 kg (2 entries, compartments not in this file); data quality (2,1,1,1,3)
- benzene: 9.93365e-7 kg; data quality (3,2,1,1,2)
- PHOSPHORUS: 6.69214e-9 kg; data quality (2,2,1,1,2)
- Phthalate, dibutyl-: 3.75606e-10 kg; data quality (4,2,1,1,4)
- nickel: 1.45477e-7 kg; data quality (3,2,1,1,2)
- PERACETIC ACID: 1.43044e-10 kg; data quality (4,1,1,1,3)
- Water, fresh: 0.0149437 m3; data quality (4,2,1,4,2)
- 1-Methyl-2-pyrrolidinone: 1.18936e-8 kg; data quality (5,1,1,1,4)
- hydroquinone: 3.84279e-11 kg; data quality (3,2,1,1,4)
- butadiene: 6.55286e-9 kg; data quality (3,2,1,4,1)
- NITRIC ACID: 1.54309e-12 kg; data quality (3,1,1,1,3)
- nitric acid: 3.77129e-8 kg; data quality (3,1,1,1,3)
- ALLYL ALCOHOL: 3.64631e-10 kg; data quality (4,1,1,1,3)
- o-cresol: 1.06596e-11 kg; data quality (4,2,1,1,5)
- Dinitrogen monoxide: 4.25514e-7 kg; data quality (4,2,1,4,1)
- formic acid: 7.18151e-9 kg; data quality (3,1,1,1,3)
- dimethyl formamide: 7.50566e-11 kg; data quality (4,2,1,1,4)
- manganese: 4.9558e-8 kg; data quality (4,1,1,1,2)
- benzal chloride: 6.17235e-14 kg; data quality (5,1,1,1,3)
- 1,1-DICHLOROETHYLENE: 3.17808e-9 kg; data quality (3,2,1,1,4)
- ALLYL CHLORIDE: 1.5992e-10 kg; data quality (3,2,1,1,4)
- arsenic: 3.60151e-14 kg; data quality (2,1,1,1,3)
- pyrene: 1.73138e-8 kg; data quality (2,2,1,1,2)
- 4,4'-isopropylidenediphenol: 2.38653e-11 kg; data quality (4,1,1,1,3)
- cyclohexane: 2.45756e-10 kg; data quality (4,1,1,1,4)
- 1,1-DICHLOROETHANE: 1.23447e-11 kg; data quality (4,1,1,1,3)
- hexane: 8.62911e-7 kg; data quality (3,2,1,1,2)
- Ethylene glycol monoethyl ether: 1.40958e-8 kg; data quality (5,1,1,1,3)
- manganese: 1.11673e-6 kg; data quality (3,2,1,1,3)
- 1,4-BENZOQUINONE: 9.13135e-16 kg; data quality (3,2,1,1,4)
- Phosphine: 8.37677e-10 kg; data quality (4,2,1,1,4)
- formaldehyde: 3.00308e-12 kg; data quality (2,1,1,1,5)
- benzene: 5.70942e-12 kg; data quality (3,1,1,1,3)
- carbon monoxide: 0.0182616 kg; data quality (2,2,1,1,2)
- Dimethyl sulfate: 1.23646e-11 kg; data quality (2,2,1,1,3)
- Chloropicrin: 1.20978e-10 kg; data quality (3,1,1,1,3)
- DIETHANOLAMINE: 6.34314e-8, 1.07013e-9 kg (2 entries, compartments not in this file); data quality (4,1,1,1,3)
- phthalic anhydride: 6.00404e-10 kg; data quality (2,2,1,1,4)
- Decabromodiphenyl oxide: 5.4908e-12 kg; data quality (4,1,1,1,4)
- Benzene, ethyl-: 1.14364e-11 kg; data quality (4,1,1,1,5)
- Methane: 4.1907e-6 kg; data quality (4,2,1,4,1)
- Cadmium: 1.02845e-13 kg; data quality (3,1,1,1,5)
- ethylbenzene: 1.69393e-7 kg; data quality (4,1,1,1,2)
- tertiary-Butyl Acetate: 3.9428e-9 kg; data quality (3,2,1,1,4)
- Phthalate, dioctyl-: 6.30243e-13 kg; data quality (4,1,1,1,5)
- mercury: 8.26206e-9 kg; data quality (2,2,1,1,3)
- Benzo(k)fluoranthene: 1.12497e-9 kg; data quality (2,2,1,1,2)
- Propene: 1.99252e-10 kg; data quality (3,1,1,1,3)
- p-phenylenediamine: 1.15724e-17 kg; data quality (5,2,1,1,4)
- epichlorohydrin: 4.37512e-10 kg; data quality (3,2,1,1,4)
- Butanol: 2.14908e-8 kg; data quality (5,1,1,1,3)
- Benzene, 1,2,4-trimethyl-: 7.71543e-13 kg; data quality (5,1,1,1,3)
- 2-chloro-1-phenylethanone: 1.55148e-12 kg; data quality (2,2,1,1,3)
- 1,2-dibromo-3-chloropropane: 1.00565e-13 kg; data quality (4,2,1,1,4)
- IRON PENTACARBONYL: 4.35459e-9 kg; data quality (5,1,1,1,3)
- MOLYBDENUM(VI): 1.54309e-12, 1.92685e-10, 3.5799e-9 kg (3 entries, compartments not in this file); data quality (3,1,1,1,3)
- propanal: 1.26888e-8 kg; data quality (3,2,1,4,1)
- lead: 4.79559e-11 kg; data quality (3,1,1,1,3)
- Benzene, chloro-: 7.71543e-13 kg; data quality (3,1,1,1,3)
- ACRYLAMIDE: 7.41615e-11 kg; data quality (4,2,1,1,4)
- acenaphthene: 1.00241e-9 kg; data quality (3,2,1,1,2)
- HCFC-142b: 1.89491e-8, 5.09219e-11 kg (2 entries, compartments not in this file); data quality (2,1,1,1,3)
- Cresol: 9.2382e-11 kg; data quality (4,2,1,1,4)
- benzene, chloro-: 3.32513e-10 kg; data quality (4,2,1,1,4)
- Benzo(g,h,i)perylene: 4.466e-11, 1.36255e-12 kg (2 entries, compartments not in this file); data quality (2,1,1,1,3)
- Creosol: 1.19512e-9, 1.47828e-10 kg (2 entries, compartments not in this file); data quality (5,1,1,1,3)
- ethylene oxide: 2.26484e-12 kg; data quality (3,2,1,1,4)
- methyl isobutyl ketone: 5.89566e-8 kg; data quality (4,2,1,1,2)
- 4,4'-METHYLENEBIS(2-CHLOROANALINE): 7.40592e-14 kg; data quality (5,2,1,1,5)
- Ethene, tetrachloro-: 8.79559e-12 kg; data quality (3,1,1,1,3)
- cobalt: 2.55064e-14 kg; data quality (4,1,1,1,3)
- Hydrazine: 2.27906e-10 kg; data quality (4,2,1,1,4)
- 2-ethoxyethyl acetate: 1.3626e-10 kg; data quality (5,2,1,1,4)
- lead: 2.63319e-7 kg; data quality (3,2,1,1,3)
- fluoranthene: 5.69552e-8 kg; data quality (2,2,1,1,2)
- Dimethylamine: 8.26556e-10 kg; data quality (3,1,1,1,3)
- Methane, tetrafluoro-, R-14: 2.41732e-5 kg; data quality (2,1,1,1,1)
- bromine: 1.09633e-8 kg; data quality (5,1,1,1,3)
- mercury: 3.62625e-11, 9.98555e-10 kg (2 entries, compartments not in this file); data quality (3,1,1,1,3)
- methanol: 1.37792e-10 kg; data quality (3,1,1,1,5)
- Methane, dibromo-: 4.36231e-10 kg; data quality (5,1,1,1,3)
- CYANAMIDE: 1.03533e-13 kg; data quality (2,2,1,1,4)
- methanol: 1.54107e-7 kg; data quality (4,2,1,1,3)
- bromoform: 1.83515e-9 kg; data quality (3,2,1,1,4)
- hydrogen sulfide: 6.47037e-8 kg; data quality (3,2,1,1,4)
- vinyl acetate: 1.96965e-9 kg; data quality (4,2,1,1,4)
- Methane, difluoro-, HFC-32: 2.94212e-8 kg; data quality (4,2,1,4,1)
- NITROUS ACID: 3.01818e-9 kg; data quality (5,1,1,1,3)
- Hydrazine, methyl-: 3.76687e-11 kg; data quality (2,2,1,1,3)
- Carbon dioxide: 0.473743 kg; data quality (4,2,1,4,1)
- Xylene: 3.47768e-12 kg; data quality (4,1,1,1,4)
- styrene: 1.25995e-6 kg; data quality (4,2,1,1,3)
- Propene, 1,3-dichloro-: 8.40167e-11 kg; data quality (3,2,1,1,4)
- Ethane, 1,1,1-trifluoro-, HFC-143a: 2.16159e-8 kg; data quality (4,2,1,4,1)
- Bis(2-chloroethyl)ether: 2.31463e-14 kg; data quality (2,1,1,1,3)
- VOC, volatile organic compounds: 0.000253113 kg; data quality (3,2,1,1,2)
- naphthalene: 1.15751e-6 kg; data quality (3,2,1,1,2)
- Triethyl amine: 3.11404e-8 kg; data quality (4,2,1,1,2)
- Bromine: 3.38969e-12 kg; data quality (5,1,1,1,5)
- phenanthrene: 2.77756e-13 kg; data quality (3,1,1,1,3)
- fluorine: 2.70349e-10 kg; data quality (4,1,1,1,3)
- chromium: 3.43881e-9 kg; data quality (4,1,1,1,2)
- Ethylene glycol: 2.17575e-9 kg; data quality (5,1,1,1,3)
- methane, bromo-, halon 1001: 9.24536e-9 kg; data quality (3,2,1,1,4)
- butanol: 4.67299e-7 kg; data quality (5,1,1,1,2)
- m-cresol: 1.16331e-10 kg; data quality (4,2,1,1,4)
- Dinitrotoluene, technical grade (2,4 (77%)- and 2,6 (19%)-): 1.97011e-7 kg; data quality (5,1,1,1,3)
- chlorine: 1.63779e-6 kg; data quality (4,2,1,1,2)
- toluene-2,4-diisocyante: 3.51243e-12 kg; data quality (3,2,1,1,5)
- ethene, tetrachloro-: 2.7133e-8 kg; data quality (3,2,1,1,3)
- 2,4-dinitrophenol: 4.97638e-19 kg; data quality (5,2,1,1,4)
- Ethane, 1,1-dichloro-1-fluoro-, HCFC-141b: 1.4721e-9, 2.77756e-11 kg (2 entries, compartments not in this file); data quality (2,1,1,1,3)
- Ethane, 1,1,1-trichloro-, HCFC-140: 2.10014e-10 kg; data quality (3,1,1,1,3)
- Hydrocarbons, aromatic: 1.40797e-5 kg; data quality (4,2,1,1,2)
- Chrysene, 5-methyl-: 4.87499e-15 kg; data quality (2,2,1,1,3)
- 2-Chloro-1,1,1-trifluoroethane: 3.39479e-9, 6.78958e-12 kg (2 entries, compartments not in this file); data quality (2,1,1,1,3)
- Dibenz(a,h)anthracene: 9.63721e-10 kg; data quality (2,2,1,1,2)
- t-butyl methyl ether: 3.03716e-9 kg; data quality (3,2,1,1,4)
- 1,2-DICHLOROETHYLENE: 6.21864e-10, 7.71543e-13 kg (2 entries, compartments not in this file); data quality (5,1,1,1,3)
- Benzo(a)anthracene: 1.12869e-12 kg; data quality (2,2,1,1,3)
- HYDROCHLORIC ACID: 4.60148e-11 kg; data quality (2,1,1,1,3)
- toluene, 2,4-dinitro-: 6.20863e-14 kg; data quality (5,2,1,1,3)
- lead: 3.79172e-9 kg; data quality (3,1,1,1,2)
- Phthalate, dimethyl-: 7.72831e-8 kg; data quality (4,1,1,1,2)
- 2-nitropropane: 2.2381e-12 kg; data quality (4,2,1,1,4)
- Ethene, trichloro-: 1.06473e-11 kg; data quality (5,1,1,1,3)
- Cobalt: 1.72359e-9 kg; data quality (3,2,1,1,3)
- carbon tetrachloride: 6.01592e-9 kg; data quality (4,2,1,1,4)
- 4,4'-METHYLENEDIANILINE: 1.91494e-12 kg; data quality (4,2,1,1,5)
- BUTYL ACRYLATE: 4.11587e-14 kg; data quality (4,1,1,1,5)
- dibenzofuran: 7.58976e-12 kg; data quality (4,2,1,1,4)
- methylene diphenyl diisocyanate: 5.60067e-11 kg; data quality (4,2,1,1,5)
- Pentachloroethane: 8.90361e-11 kg; data quality (2,1,1,1,3)
- 2-methylnaphthalene: 1.02569e-11 kg; data quality (2,2,1,1,3)
- Propane, 1,2-dichloro-: 3.33095e-11 kg; data quality (4,2,1,1,4)
- Diethylene glycol butyl ether: 6.45011e-10 kg; data quality (4,2,1,1,4)
- Sodium formate: 6.53189e-10 kg; data quality (3,1,1,1,3)
- Ethene, chloro-: 7.42092e-9 kg; data quality (3,2,1,1,4)
- diisocyanates: 1.47774e-10 kg; data quality (4,1,1,1,5)
- copper: 1.07431e-8, 8.46894e-7 kg (2 entries, compartments not in this file); data quality (4,1,1,1,2)
- 1,4-dinitrobenzene: 1.54309e-13 kg; data quality (5,1,1,1,3)
- nickel: 1.32275e-9 kg; data quality (4,1,1,1,5)
- propylene oxide: 4.074e-10 kg; data quality (3,2,1,1,4)
- 1,1,1-trichloroethane: 1.50222e-8 kg; data quality (4,2,1,1,3)
- acenaphthylene: 7.40335e-10 kg; data quality (3,2,1,1,2)
- Nitrogen: 0.000185699 kg; data quality (5,2,1,1,4)
- 1-Methyl-2-pyrrolidinone: 4.59116e-14 kg; data quality (5,1,1,1,3)
- o-toluidine: 3.17062e-14 kg; data quality (3,1,1,1,3)
- Asbestos: 1.39138e-12 kg; data quality (5,2,1,1,4)
- Ethylene glycol monoethyl ether: 2.42783e-6 kg; data quality (5,1,1,1,2)
- Zinc: 5.88398e-7 kg; data quality (5,1,1,1,4)
- cadmium: 6.71027e-9 kg; data quality (3,2,1,1,3)
- carbon disulfide: 7.74662e-7 kg; data quality (4,2,1,1,2)
- TERT-BUTYL ALCOHOL: 1.58117e-9 kg; data quality (4,1,1,1,3)
- 2-METHOXYETHANOL: 1.37196e-14 kg; data quality (5,1,1,1,5)
- acrolein: 7.51057e-9 kg; data quality (2,2,1,2,2)
- NITROMETHANE: 7.42225e-11 kg; data quality (5,1,1,1,3)
- para-xylene: 1.35982e-9 kg; data quality (3,2,1,2,4)
- monochloroethane: 3.01746e-9 kg; data quality (3,2,1,1,4)
- maleic anhydride: 4.94878e-11 kg; data quality (2,2,1,1,4)
- acetaldehyde: 6.86281e-8 kg; data quality (3,2,1,4,1)
- ethylene glycol: 1.14962e-10 kg; data quality (5,1,1,1,3)
- 2,4-Diaminotoluene: 6.3149e-11 kg; data quality (2,2,1,1,4)
- toluene: 4.24923e-12 kg; data quality (5,1,1,1,4)
- Xylene: 1.16618e-6 kg; data quality (4,2,1,1,2)
- Ethane, 2,2-dichloro-1,1,1-trifluoro-, HCFC-123: 1.38878e-9 kg; data quality (4,1,1,1,3)
- M-DINITROBENZENE: 1.54309e-13 kg; data quality (5,1,1,1,3)
- Propane, 1,1,1,3,3,3-hexafluoro-, HCFC-236fa: 5.83961e-10 kg; data quality (4,2,1,4,1)
- bis(2-chloroethyl)ether: 2.58544e-12 kg; data quality (3,2,1,1,4)
- Anthracene: 2.77756e-13 kg; data quality (4,1,1,1,3)
- pentachlorophenol: 1.40998e-19 kg; data quality (3,2,1,1,4)
- chromium: 3.18223e-9 kg; data quality (4,1,1,1,5)
- benzene, ethyl-: 4.88981e-7 kg; data quality (4,2,1,1,2)
- 1,3-dichlorobenzene: 4.14962e-14 kg; data quality (2,1,1,1,3)
- fluorene: 4.08312e-9 kg; data quality (2,2,1,1,2)
- 2,4,6-trichlorophenol: 4.26256e-15 kg; data quality (2,2,1,1,4)
- sulfur dioxide: 0.00281087 kg; data quality (2,2,1,1,2)
- methane, chlorodifluoro-, hcfc-22: 1.61391e-8 kg; data quality (4,1,1,1,3)
- Diuron: 1.54309e-12 kg; data quality (2,1,1,1,3)
- formaldehyde: 3.47375e-7 kg; data quality (2,2,1,2,2)
- Methane, tetrachloro-, R-10: 3.08617e-13 kg; data quality (3,1,1,1,3)
- Ethane, hexafluoro-, HFC-116: 4.45644e-6 kg; data quality (2,1,1,1,1)
- Chromium, ion: 1.05836e-7 kg; data quality (2,2,1,1,2)
- AMMONIA: 1.10706e-8 kg; data quality (3,1,1,1,3)
- NITROUS ACID: 1.70024e-7 kg; data quality (5,1,1,1,2)
- p-cresol: 6.25453e-11 kg; data quality (4,2,1,1,4)
- Ethane, 2-chloro-1,1,1,2-tetrafluoro-, HCFC-124: 1.74369e-10 kg; data quality (4,1,1,1,3)
- nickel: 5.06465e-10 kg; data quality (4,1,1,1,2)
- hydrogen fluoride: 5.64137e-5 kg; data quality (2,2,1,1,2)
- phthalate, dioctyl-: 2.17281e-10 kg; data quality (3,2,1,1,4)
- Cumene hydroperoxide: 8.61725e-11 kg; data quality (2,1,1,1,5)
- hexachloro-1,3-butadiene: 8.93776e-11 kg; data quality (4,2,1,1,4)
- 1,4-dichlorobenzene: 4.46297e-11 kg; data quality (2,2,1,1,2)
- trichloroethylene: 2.60072e-8 kg; data quality (4,2,1,1,3)
- vanadium: 4.87615e-11 kg; data quality (5,1,1,1,3)
- 1,1-DICHLOROETHYLENE: 1.23447e-12 kg; data quality (4,1,1,1,3)
- aniline: 6.1852e-11 kg; data quality (4,2,1,1,4)
- 1,1,2,2-tetrachloroethane: 4.44268e-10 kg; data quality (3,2,1,1,4)
- SEC-BUTYL ALCOHOL: 4.87615e-12 kg; data quality (5,1,1,1,3)
- methyl methacrylate: 2.96171e-9 kg; data quality (4,2,1,1,5)
- beryllium: 6.51785e-9 kg; data quality (2,2,1,1,2)
- biphenyl: 9.48269e-9 kg; data quality (4,2,1,1,2)
- chromium: 4.3568e-8 kg; data quality (4,1,1,1,3)
- Ethane, pentafluoro-, HFC-125: 5.05213e-8 kg; data quality (4,2,1,4,1)
- NITROGEN TRIFLUORIDE: 9.74938e-10 kg; data quality (3,1,1,1,3)
- Chrysene: 8.8085e-9 kg; data quality (2,2,1,1,2)
- 1,2,4-trichlorobenzene: 1.47655e-10 kg; data quality (4,2,1,1,4)
- chloroform: 1.41938e-8 kg; data quality (4,2,1,1,4)
- Ethane, 1,1,1,2-tetrafluoro-, HFC-134a: 1.90421e-7 kg; data quality (4,2,1,4,1)
- acrylonitrile: 2.48981e-10 kg; data quality (4,2,1,1,4)
- Phosphorus: 9.64663e-5 kg; data quality (2,1,1,1,5)
- Titanium: 4.96341e-9 kg; data quality (5,2,1,1,3)
- DICHLOROBENZENE: 9.10421e-12 kg; data quality (4,1,1,1,3)
- silver: 6.59152e-10 kg; data quality (4,1,1,1,3)
- Methane, monochloro-, R-40: 1.54309e-12 kg; data quality (3,1,1,1,3)
- acetonitrile: 2.64448e-9 kg; data quality (3,2,1,1,4)
- benz[a]anthracene: 1.68138e-9 kg; data quality (2,2,1,1,2)
- phenol: 2.91283e-13 kg; data quality (3,1,1,1,3)
- Styrene: 6.92838e-12 kg; data quality (3,1,1,1,5)
- Sulfuric acid: 4.17601e-5 kg; data quality (2,1,1,1,3)
- diethanolamine: 9.57564e-9 kg; data quality (3,2,1,1,2)
- Methyl iodide: 5.9163e-8 kg; data quality (4,2,1,1,2)
- 2-(2-BUTOXYETHOXY) ETHYL ACETATE: 3.76611e-11 kg; data quality (5,2,1,1,4)
- Water, saline: 0.000534423 m3; data quality (4,2,1,4,2)
- o-Xylene: 3.89645e-9 kg; data quality (3,2,1,3,2)
- 2-Mercaptobenzothiazole: 1.23447e-14 kg; data quality (3,1,1,1,3)
- Hexachlorocyclopentadiene: 7.71543e-14 kg; data quality (5,1,1,1,3)
- 2,4-D, ISOOCTYL ESTER: 1.54309e-12 kg; data quality (5,1,1,1,3)
- benzyl chloride: 1.56133e-10 kg; data quality (2,2,1,1,3)
- naphthalene: 5.10762e-11 kg; data quality (4,1,1,1,3)
- N,N-DIMETHYLANILINE: 2.38529e-11 kg; data quality (5,2,1,1,5)
- phenanthrene: 3.78857e-7 kg; data quality (3,2,1,1,2)
- 1,2-dinitrobenzene: 1.54309e-13 kg; data quality (5,1,1,1,3)
- CFC-114: 8.75007e-9 kg; data quality (5,1,1,1,3)
- 3-methylcholanthrene: 1.37247e-13 kg; data quality (2,2,1,1,3)
- ozone: 5.17791e-10 kg; data quality (4,1,1,1,5)
- ethane, 1,2-dibromo-: 3.24133e-13 kg; data quality (2,2,1,1,3)
- phenol: 4.32444e-8 kg; data quality (4,2,1,1,2)
- MCPA - SODIUM SALT: 7.71543e-13 kg; data quality (5,1,1,1,3)
- m-xylene: 2.88918e-7 kg; data quality (4,1,1,1,2)
- Chromium VI: 1.48958e-8 kg; data quality (3,2,1,1,3)
- HYDROFLUORIC ACID: 3.60305e-9 kg; data quality (3,1,1,1,3)
- cumene: 4.76348e-8 kg; data quality (4,2,1,1,3)
- arsenic: 3.30736e-8 kg; data quality (3,2,1,1,2)
- 2,2,4-trimethylpentane: 4.55144e-8 kg; data quality (3,2,1,2,3)
- hexachlorobenzene: 1.33134e-12 kg; data quality (3,2,1,1,4)
- toluene: 1.12151e-6 kg; data quality (4,2,1,1,2)
- Aluminum: 1.37521e-6 kg; data quality (4,1,1,1,3)
- catechol: 6.54366e-11 kg; data quality (5,2,1,1,4)
- ammonia: 1.02404e-5 kg; data quality (3,2,1,1,3)
- cyanide: 4.37224e-8 kg; data quality (2,2,1,1,4)
- Ethane, 1,1,2-trichloro-: 4.95485e-12 kg; data quality (4,1,1,1,3)
- isophorone: 3.46645e-9 kg; data quality (2,2,1,1,4)
- beryllium: 8.00902e-14 kg; data quality (5,1,1,1,3)
- Benzo(g,h,i)perylene: 1.98716e-7 kg; data quality (3,2,1,1,2)
- styrene: 2.96342e-11 kg; data quality (3,1,1,1,5)
- benzo(a)pyrene: 9.22962e-10 kg; data quality (2,2,1,1,2)
- ethylene glycol: 1.67727e-7 kg; data quality (5,1,1,1,2)
- nitrogen oxides: 0.000254022 kg; data quality (2,2,1,1,3)
- acrylic acid: 1.82575e-10 kg; data quality (4,2,1,1,4)
- particulates, < 2.5 um: 0.000463733 kg; data quality (3,2,1,1,2)
- BENZOIC TRICHLORIDE (BENZOTRICHLORIDE): 9.47235e-13 kg; data quality (3,2,1,1,4)
- ethane, 1,2-dichloro-: 2.12252e-8 kg; data quality (3,2,1,1,4)
- hexachloroethane: 5.65359e-11 kg; data quality (4,2,1,1,4)
- Metaldehyde (tetramer): 1.54309e-14 kg; data quality (3,1,1,1,3)
- Benzene, hexachloro-: 1.54309e-14 kg; data quality (4,1,1,1,3)
- 1,2-BUTYLENE OXIDE: 6.26681e-10 kg; data quality (4,2,1,1,4)
- phosgene: 8.24502e-11 kg; data quality (5,2,1,1,4)
- ETHENE: 1.37952e-8 kg; data quality (3,1,1,1,3)
- chlorine: 1.87671e-8 kg; data quality (4,1,1,1,4)
- 1,2,4-trimethylbenzene: 1.06897e-6 kg; data quality (5,1,1,1,2)
- hydrogen chloride: 4.03634e-5 kg; data quality (2,2,1,1,3)
- 2-METHOXYETHYL ACETATE: 2.53467e-13 kg; data quality (4,2,1,1,4)
- Cyclohexanol: 1.96141e-10 kg; data quality (4,1,1,1,4)
- dicyclopentadiene: 6.96268e-11 kg; data quality (4,1,1,1,5)
- ethane, 1,1,2-trichloro-: 1.65357e-9 kg; data quality (4,2,1,1,4)
- methane, monochloro-, r-40: 1.83749e-9 kg; data quality (3,2,1,1,4)
- BUTYL ISOCYANATE: 2.41027e-10 kg; data quality (5,2,1,1,5)
- 1,4-dioxane: 2.02433e-10 kg; data quality (4,2,1,1,4)
- CHLOROPRENE: 3.31745e-14 kg; data quality (2,2,1,1,4)
- polychlorinated biphenyls: 1.50137e-10 kg; data quality (3,2,1,1,3)
- Phenol, 2,4-dimethyl-: 5.10129e-15 kg; data quality (4,1,1,1,3)
- CHLORONAPHTHALENE: 2.03697e-20 kg; data quality (1,2,1,1,4)

## Inventory method
Input-output

## Modelling constants
The reference unit of all processes is 1 USD2013 of the good or service. The technosphere inputs are based on the US BEA detailed input-output tables for 2007. The IO tables are combined to develop a commodity-by-commodity model based on the the industry-technology assumption (see Suh et al., 2010), which assumes all commodities produced by a given industry have the same input structure, but that multiple industries can produce the same commodity. Thus, model technosphere flows represent commodity outputs (and not industry outputs) from other processes in the model. There are no by-products included in these processes. All commodity production is based on US-conditions, despite in reality that some goods and services are produced overseas, as USEEIO v1.1 is a single-region IO model.

## Completeness
The input-output approach assures that all purchased inputs associated with the sectors making these commodities as reported in the US census for 2007 are included. The direct resources extracted including minerals, energy sources, water and land occupied are included. Emissions to air include all critieria air pollutants, greenhouse gases, and hazardous and toxic air pollutants as defined by US EPA. Releases to water include toxics, total nitrogen and total phosphorus, and water discharges. Releases to soil or groundwater include toxics and agriculutural pesticides. Some metal releases to air, water and soil are not included because they could not be speciated. Solid hazardous and non-hazardous wastes generated are not included as an elementary flows although purchases of waste services are included.

## Data treatment
Greenhouse gases are primarily from the US Greenhouse Gas Emission Inventory (USEPA 2016a). Biogenic C uptake is not included (change from version 1.0), as biogenic C emission are not included. Toxic releases to air, water and soil (except pesticides) are from the 2013 Toxic Release Inventory (USEPA 2015a). Criteria air pollutants and hazardous air pollutants are from the 2011 National Emissions Inventory (USEPA 2015b). All estimates are normalized by industry based on sector output in the data year, then converted to 2013 USD using relative sector-specific CPIs (if data year is not 2013). Energy use represent raw renewables or fossil fuel energies and is based on EIA data for 2014. See Table 1 in Yang, Ingwersen et al. 2017 and Supporting Information 1, and the v1.1 data update notes (Ingwersen et al. 2017) for all details on environmental data sources used.Land occupation associated with manufacturing buildings was estimated based on the building floorspace data provided by the U.S. Energy Information Administration in the 2010 Manufacturing Energy Consumption Survey (EIA 2013). Portions of total renewable energy (EIA 2016) based on EIA-923 reports for 2014 (EIA 2017) are included. Nitrogen and Phosphorus releases are modeled in total N and total P equivalents as estimated by the Discharge Monitoring Report Nutrient Loading tool (USEPA 2016b). Self-supplied withdrawals were assigned to industrial sectors based on water use statistics for Canadian industries by NAICS 3-digit sector scaled to US production levels based on gross domestic product by industry (BEA 2015; Statistics Canada 2010), and further disaggregated to the manufacturing sectors based on compensation of employees as provided by the 2007 IO tables (BEA 2015). Water withdrawals associated with public supply were allocated to sectors based on their use of water, sewage, and other services in USD based on the IO tables (BEA 2015). Portions of total renewable energy (EIA 2016) by type are assigned to sectors (hydro, wind, solar, or) based on EIA-923 reports for 2014 (EIA 2017).

## Data collection
2015-2016

## Sampling procedure
US federal government sources, including surveys and US EPA emissions databases are used as the primary sources. From these sources, data for US reporting establishments/facilities are aggregated by the NAICS sector as defined in the BEA detailed 2007 input-output tables. When level of sector aggregation differs, or when direct emissions are not reported but modeled, additional sources are used to make allocations and estimates.

## Review details
In regard to quality assurance and peer-review, each dataset created went through Quality Assurance as defined in a quality assurance project plans at US EPA, CSRA or ERG. The model was assembled with the IO model builder model (USEPA 2016c). Validation functions were used to check that all the model components were properly assembled and harmonized. Bayou Demeke and Santosh Ghimire provided internal peer review of the model methodology and the manuscript underwent standard EPA management review. An editor and two anonymous reviewers at the Journal of Cleaner Production reviewed the model. In regard to data quality evaluation, data quality assessment was performed at the flow and process levels according to the updated US EPA data quality assessment guidelines as defined in US EPA (2016b).

## Intended application
The primary application is for use in the US Environmentally-Extended Input-Ouput model, USEEIO, version 1.1. This model is being used by the US EPA for supporting tools that prioritize goods and services based on potential environmental impacts, resource use or emissions for large regions, including the US and US states, and as a strealined tool for organizations as a starting point to consider sustainable materials management. Model results are designed to provide meso/macro-level decision support.

## Project
USEEIO v1.1 was developed by the US EPA with CSRA and ERG with Wesley W. Ingwersen and David E. Meyer as research leads. Yi Yang was the technical lead on the work for CSRA (contract EP-C-15-012); Troy Hawkins was lead for ERG (contract EP-C-12-021).

## Sources
- BLM 2008
- USDA 2009b
- EIA 2017
- EIA 2013
- USGS 2015
- Statistics Canada 2010
- Kim et el. 2013
- BEA 2015
- Ingwersen et al. DRAFT
- Macknick et al. 2011
- USDA 2009a
- USEPA 2016c
- USDA 2014
- Yienger et al. 1995
- Torcellini et al. 2003
- EIA 2016
- USEPA 2015b
- USEPA 2016b
- Goebes et al. 2003
- Nickerson et al. 2011
- USDA 2006
- EIA 2015
- USEPA 2016a
- Maupin et al. 2014
- USDA 2016
- USEPA 2015a
- Lovelace 2009
- USGS 2016
- Ingwersen et al. 2017
- Blackhurst et al. 2010
- Edelen and Ingwersen 2017
