# Cut stone and stone products; at manufacturer

Dataset: openLCA process, unit process
Category: 3279: Other Nonmetallic Mineral Product Manufacturing
Geography: United States
Time period: 2017-01-01 to 2017-12-31
Data quality: US EPA - Process Pedigree Matrix (1;1)
Exchange data quality scheme: US EPA - Flow Pedigree Matrix
Generated by: US EPA with CSRA and ERG
Owner: US EPA
Published in: Yang, Ingwersen et al. 2017
restrictionsDescription: This model shold be appropriately cited (see Yang, Ingwersen et al. 2017 source or Publication field) when used. Any changes or derivations of this model by the user should be documented. The model itself and any results from use of this model shall not be construed to consitute US EPA opinion or policy.
copyright: false

## General comment
BEA Code & Name is '327991:Cut stone and stone product manufacturing'. Description of the primary industry producing this good or service, adapted from the Census Bureau NAICS 2007 descriptions: This U.S. industry comprises establishments primarily engaged in cutting, shaping, and finishing granite, marble, limestone, slate, and other stone for building and miscellaneous uses. Stone product manufacturing establishments may mine, quarry, or purchase stone.

## Technology
The process describes the average US production of this good or service within this NAICS-based grouping defined in the BEA 2007 detailed input-output tables (BEA 2015). Distribution, wholesale and retailing of this good or service, use, and final disposal are not included. Creation of a product system with this process will enable modeling of all upstream (supply-chain) activities.

## Geography
Data represent the 50 US states

## Time period
2017 was the year in which this version of USEEIO was released and is the target date for the model

## Reference product
- Cut stone and stone products; at manufacturer: 1 USD

## Inputs from technosphere
All rows: data quality (1,3,1,1,1)
- Other basic inorganic chemicals; at manufacturer: 0.0197361 USD
- Iron, gold, silver, and other metal ores; at mine: 3.51942e-5 USD
- Wireless communications; at manufacturer: 1.67737e-7 USD
- Lime and gypsum products; at manufacturer: 2.01285e-5 USD
- Glass and glass products; at manufacturer: 9.42178e-5 USD
- Air purification and ventilation equipment; at manufacturer: 1.25803e-5 USD
- Synthetic dyes and pigments; at manufacturer: 0.00351113 USD
- Other support services: 0.00259444 USD
- Plastic bags, films, and sheets; at manufacturer: 0.000669261 USD
- State and local government enterprises: 0.00093758 USD
- Computer systems design: 0.00119675 USD
- Laminated plastic plates and shapes; at manufacturer: 0.000545968 USD
- Secondary copper products; at manufacturer: 1.49286e-5 USD
- Metal coatings, engravings, and heat treatments; at manufacturer: 0.00735365 USD
- Special tools, dies, jigs, and fixtures; at manufacturer: 5.03212e-7 USD
- Polystyrene foam products; at manufacturer: 6.70949e-7 USD
- Buildings and dwellings services: 0.00454716 USD
- Transmission and power train parts; at manufacturer: 3.41575e-5 USD
- Switchgear and switchboards; at manufacturer: 3.55603e-5 USD
- Plastic pipe, fittings, and sausage casings; at manufacturer: 0.000149387 USD
- Cutlery and handtools; at manufacturer: 0.02837 USD
- Shelving and lockers; at manufacturer: 0.0005569 USD
- Nonresidential building repair and maintanence: 0.0036635 USD
- Investigation and security: 0.0023036 USD
- Other support activities for mining: 0.000426486 USD
- Civic, social, professional, and similar organizations: 0.000723631 USD
- Hotels and campgrounds: 0.00213684 USD
- Water transport (boats, ships, ferries): 0.0023156 USD
- Other textiles; at manufacturer: 0.0320168 USD
- Full-service restaurants: 0.00143404 USD
- Other computer related services, including facilities management: 0.00047938 USD
- Concrete pipe, bricks, and blocks; at manufacturer: 4.46181e-5 USD
- Facilities support: 0.00136567 USD
- Cardboard; at manufacturer: 0.00325449 USD
- Copper, nickel, lead, and zinc; at mine: 3.46709e-6 USD
- Other nonmetallic mineral products; at manufacturer: 0.00158758 USD
- Primary iron, steel, and ferroalloy products; at manufacturer: 0.000578606 USD
- Abrasive products; at manufacturer: 0.0034392 USD
- Vehicle repair: 0.0011786 USD
- Satellite, telecommunications resellers, and all other telecommunications: 0.000239707 USD
- Screws, nuts, and bolts; at manufacturer: 0.00168202 USD
- Unrefined oil and gas; at extraction site: 5.02283e-5 USD
- Fertilizers; at manufacturer: 1.18857e-5 USD
- Lessors of nonfinancial intangible assets: 0.00411993 USD
- Scientific research and development: 0.000247935 USD
- Soap and cleaning compounds; at manufacturer: 0.00613773 USD
- Other vehicle parts; at manufacturer: 0.000131974 USD
- Compressed Gases; at manufacturer: 2.65325e-5 USD
- Truck transport: 0.0161117 USD
- All other converted paper products; at manufacturer: 8.38687e-7 USD
- Legal services: 0.00320592 USD
- Paper; at manufacturer: 5.34712e-5 USD
- Clothing; at manufacturer: 2.01722e-8 USD
- Independent artists, writers, and performers: 0.000237307 USD
- Metal plumbing drains, faucets, valves, and other fittings; at manufacturer: 3.11991e-5 USD
- Surgical appliance and supplies; at manufacturer: 2.01722e-8 USD
- Tobacco, cotton, sugarcane, peanuts, sugar beets, herbs and spices, and other crops; at farm: 5.1242e-6 USD
- Plastics and rubber industry machinery; at manufacturer: 4.07602e-5 USD
- Semiconductors; at manufacturer: 0.000205568 USD
- Wiring devices; at manufacturer: 5.03212e-7 USD
- Cutting and machine tool accessory, rolling mill, and other metalworking machines; at manufacturer: 0.00320728 USD
- Other real estate: 0.00306647 USD
- Promoters and agents: 2.61901e-6 USD
- Springs and wires; at manufacturer: 6.34474e-6 USD
- Industrial process variable instruments; at manufacturer: 8.07768e-5 USD
- Business support: 0.00485368 USD
- Office supplies (not paper); at manufacturer: 1.67737e-7 USD
- Light gauge metal cans, boxes, and containers; at manufacturer: 1.00573e-5 USD
- Welding and Soldering Equipment, Scales and Balances, and other general purpose machinery; at manufacturer: 5.27188e-7 USD
- Urethane and other foam products; at manufacturer: 3.9132e-5 USD
- Asphalt pavement; at manufacturer: 1.14061e-5 USD
- Performances: 3.11561e-6 USD
- Other concrete products; at manufacturer: 6.82555e-5 USD
- Office furniture and custom architectural woodwork and millwork; at manufacturer: 2.90823e-5 USD
- Rubber and plastic belts and hoses; at manufacturer: 3.09765e-5 USD
- Consumer goods and general rental centers: 0.000234277 USD
- Construction machinery; at manufacturer: 0.000261064 USD
- Heavy gauge metal tanks; at manufacturer: 6.54167e-7 USD
- Warehousing: 0.00233491 USD
- Employment services: 0.00275312 USD
- Light fixtures; at manufacturer: 2.30833e-5 USD
- Limited-service restaurants: 0.00284677 USD
- Other petroleum and coal products; at manufacturer: 0.000106808 USD
- Gasoline, fuels, and by-products of petroleum refining; at manufacturer: 0.00465371 USD
- Software: 4.70803e-6 USD
- Wireless telecommunications: 0.00188106 USD
- Cement; at manufacturer: 2.29648e-5 USD
- Clay and ceramic products; at manufacturer: 0.0102276 USD
- Mineral wool; at manufacturer: 1.59361e-6 USD
- Nonferrous metal casts; at manufacturer: 4.67286e-6 USD
- Communication and energy wire and cable; at manufacturer: 3.13669e-5 USD
- Specialized design: 0.00391772 USD
- Golf courses, marinas, ski resorts, fitness and other rec centers and industries: 0.000476172 USD
- Metal windows, doors, and architectural products; at manufacturer: 0.00021246 USD
- Adhesives; at manufacturer: 0.000113386 USD
- Dry-cleaning and laundry: 7.71811e-7 USD
- Sand, gravel, clay, phosphate, other nonmetallic minerals; at mine: 0.0123157 USD
- Books, newspapers, magazines, and other print media; at manufacturer: 6.54167e-8 USD
- Wood kitchen cabinets and countertops; at manufacturer: 0.000358715 USD
- Other plastic products; at manufacturer: 0.00231658 USD
- All other forging, stamping, and sintering; at manufacturer: 5.75122e-6 USD
- Aluminum; at manufacturer: 3.09128e-5 USD
- Data processing and hosting: 0.00586541 USD
- Metal pipe fittings, ball and roller bearings, industrial patterns, metal bath fixtures, other misc. fabricated metals; at manufacturer: 0.00260686 USD
- Specialty transformers; at manufacturer: 1.67737e-7 USD
- Other rubber products; at manufacturer: 5.62987e-5 USD
- Air and gas compressors; at manufacturer: 1.68392e-5 USD
- Scenic and sightseeing transportation and support activities for transportation: 0.000164177 USD
- General merchandise stores: 2.87667e-5 USD
- Lids, jars, bottle caps, other metal closures and crowns; at manufacturer: 6.79336e-5 USD
- Household goods repair: 0.000470058 USD
- Advertising and public relations: 0.0110096 USD
- Sanitary paper (tissues, napkins, diapers, etc.); at manufacturer: 1.67737e-7 USD
- Metal hinges, keys, lock, and other hardware; at manufacturer: 0.000355976 USD
- Chemicals (except basic chemicals, agrichemicals, polymers, paints, pharmaceuticals,soaps, cleaning compounds); at manufacturer: 0.00406906 USD
- Insurance carriers: 0.00401786 USD
- Valve and fittings (except for plumbing); at manufacturer: 3.34747e-5 USD
- Cardboard containers; at manufacturer: 0.00414127 USD
- Vehicles and parts sales: 2.94748e-5 USD
- Noncomparable imports: 0.00122158 USD
- Accounting, tax preparation, bookkeeping, and payroll: 0.00483722 USD
- Vehicle engines and engine parts; at manufacturer: 1.1314e-5 USD
- Waste management and remediation: 0.00244171 USD
- Commercial equipment rental: 0.00146249 USD
- Securities and commodities brokerage and exchanges: 0.00237133 USD
- Pipeline transport: 1.57273e-5 USD
- Air transport: 0.00452188 USD
- Vehicle electrical and electronic equipment; at manufacturer: 5.3923e-6 USD
- Petrochemicals; at manufacturer: 0.000148947 USD
- Telecommunications: 0.00495153 USD
- Heating equipment other than warm air furnaces; at manufacturer: 1.67737e-7 USD
- Paints and coatings; at manufacturer: 0.000606694 USD
- Architectural, engineering, and related services: 0.0100781 USD
- Lumber and treated lumber; at manufacturer: 0.00131507 USD
- Investment advice, portfolio management, and other financial advising services: 0.00055291 USD
- Aluminum products; at manufacturer: 5.08422e-5 USD
- Ready-mix concrete; at manufacturer: 5.01961e-6 USD
- Magazines and journals; at publisher: 6.05167e-8 USD
- Veneer, plywood, and engineered wood; at manufacturer: 0.000173349 USD
- Coal; at mine: 0.00276348 USD
- Postal service: 1.78103e-6 USD
- Light bulbs; at manufacturer: 1.69474e-6 USD
- Drinking water and wastewater treatment; at consumer: 0.000947129 USD
- Paper bags and coated paper; at manufacturer: 4.75789e-5 USD
- Industrial molds; at manufacturer: 4.69665e-6 USD
- Metal cutting and forming machine tools; at manufacturer: 1.50964e-6 USD
- Stationery; at manufacturer: 1.30833e-7 USD
- Finished and coated fabric; at manufacturer: 7.72943e-5 USD
- Metal structural products; at manufacturer: 3.79427e-5 USD
- Relay and industrial controls; at manufacturer: 4.53531e-5 USD
- Plywood and veneer; at manufacturer: 0.00262984 USD
- Ball and roller bearings; at manufacturer: 4.31341e-6 USD
- Machine shops; at manufacturer: 0.00551393 USD
- Synthetic rubber and artificial and synthetic fibers; at manufacturer: 0.00433018 USD
- Sports: 0.00023452 USD
- Marketing research and all other miscellaneous professional, scientific, and technical services: 0.00652099 USD
- Other secondary nonferrous metal products; at manufacturer: 5.30838e-7 USD
- Secondary steel products; at manufacturer: 2.78371e-5 USD
- Insurance agencies and brokerages: 0.00117473 USD
- Small electrical appliances; at manufacturer: 1.37545e-5 USD
- Fabric; at manufacturer: 7.93178e-5 USD
- Environmental and other technical consulting services: 0.000240756 USD
- Management consulting: 0.00142254 USD
- Vegetable oils and by-products; at manufacturer: 5.03212e-7 USD
- Motor vehicle steering, suspension components (except spring), and brake systems; at manufacturer: 2.19399e-5 USD
- Electronic capacitors, resistors, coils, transformers, connectors and other components (except semiconductors and printed circuit assemblies); at manufacturer: 0.000274076 USD
- Travel arrangement and reservation: 0.000523263 USD
- Other basic organic chemicals; at manufacturer: 0.025515 USD
- Commercial machinery repair: 0.0023431 USD
- Computer terminals and other computer peripheral equipment; at manufacturer: 0.000473543 USD
- Printed circuit and electronic assembly; at manufacturer: 0.000110544 USD
- Natural gas; at consumer: 0.0064897 USD
- Machinery for the paper, textile, food or other industries (except semiconductor machinery); at manufacturer: 2.44659e-5 USD
- All other food and drinking places: 0.000234875 USD
- Wholesale trade: 0.0452977 USD
- Nondepository credit intermediation and related activities: 0.00516215 USD
- Other retail: 0.000230759 USD
- Cut stone and stone products; at manufacturer: 0.0310669 USD
- Electronic equipment repair and maintenance: 0.000716335 USD
- Company and enterprise management: 0.0363997 USD
- Ground or treated minerals and earth; at manufacturer: 0.00884417 USD
- Dimensional stone; at mine: 0.0440887 USD
- Cast iron and steel; at manufacturer: 3.23506e-6 USD
- Rubber tires; at manufacturer: 4.94667e-5 USD
- Food and beverage stores: 1.38801e-5 USD
- Office administration: 0.000470673 USD
- Gaskets, seals, musical instruments, fasteners, brooms, brushes, mop and other misc. goods; at manufacturer: 1.63909e-5 USD
- Passenger ground transport: 0.0009544 USD
- Monetary authorities and depository credit intermediation: 0.00948216 USD
- Vehicle rental and leasing: 0.00168277 USD
- Plastics; at manufacturer: 0.00399677 USD
- Wooden windows, door, and flooring; at manufacturer: 0.00372829 USD
- Material handling equipment; at manufacturer: 0.000873449 USD
- Custom metal rolls; at manufacturer: 5.95101e-6 USD
- Air conditioning, refrigeration, and warm air heating equipment; at manufacturer: 1.57239e-5 USD
- Power boilers and heat exchangers; at manufacturer: 5.88751e-7 USD
- Electricity; at consumer: 0.00584398 USD
- Rail transport: 0.011156 USD
- Mining and oil/gas field machinery; at manufacturer: 0.00015733 USD
- Communications equipment; at manufacturer: 3.35475e-7 USD

## Inputs from nature
- Water, saline: 0.00175597 m3; data quality (4,2,1,4,2)
- Occupation, industrial area: 0.00112179 m2*a; data quality (4,2,1,1,1)
- Sodium carbonate: 0.000927215 kg; data quality (1,1,1,1,1)
- Gypsum: 0.00087174 kg; data quality (1,1,1,1,1)
- Occupation, mineral extraction site: 0.000188447 m2*a; data quality (1,3,1,1,1)
- Garnet: 2.55182e-6 kg; data quality (1,1,1,1,1)
- Barite: 5.25422e-5 kg; data quality (1,1,1,1,1)
- Water, fresh: 0.00318763, 0.00148327 m3 (2 entries, compartments not in this file); data quality (3,2,1,4,2)
- Kaolin: 0.000500062 kg; data quality (1,1,1,1,1)
- Clay, unspecified: 0.00117582 kg; data quality (1,1,1,1,1)
- Sodium chloride: 0.00358999 kg; data quality (1,1,1,1,1)
- Clay, bentonite: 0.000380396 kg; data quality (1,1,1,1,1)
- Kyanite: 8.7174e-6 kg; data quality (1,1,1,1,1)
- Sand and gravel: 1.10332 kg; data quality (1,1,1,1,1)
- Feldspar: 4.2002e-5 kg; data quality (1,1,1,1,1)
- Zeolites: 5.07987e-6 kg; data quality (1,1,1,1,1)
- Vermiculite: 7.92491e-6 kg; data quality (1,1,1,1,1)
- Energy, wind: 3.13642e-5 MJ; data quality (3,1,1,1,1)
- Perlite: 3.57414e-5 kg; data quality (1,1,1,1,1)
- Occupation, industrial area, built up: 0.000373931 m2*a; data quality (4,2,1,1,1)
- Lithium: 6.89467e-8 kg; data quality (1,1,1,1,1)
- Mica: 3.64546e-6 kg; data quality (1,1,1,1,1)
- Phosphate ore: 0.002005 kg; data quality (1,1,1,1,1)
- Fluorspar: 9.0344e-6 kg; data quality (1,1,1,1,1)
- Talc: 4.8342e-5 kg; data quality (1,1,1,1,1)
- Occupation, urban, discontinuously built: 0.000250501 m2*a; data quality (4,2,1,1,1)
- Pumice: 2.20313e-5 kg; data quality (1,1,1,1,1)
- Peat: 3.70886e-5 kg; data quality (1,1,1,1,1)
- Potassium: 5.59202e-5 kg; data quality (1,1,1,1,1)
- Stone: 1.3628 kg; data quality (1,1,1,1,1)
- Diatomite: 7.14035e-5 kg; data quality (1,1,1,1,1)
- Boron: 0.0003096 kg; data quality (1,1,1,1,1)
- Limestone: 0.0212177 kg; data quality (1,1,1,1,1)

## Emissions to nature
- formaldehyde: 2.70569e-7 kg; data quality (2,2,1,2,4)
- methanol: 1.20718e-13 kg; data quality (3,1,1,1,3)
- 1,4-dinitrobenzene: 2.41437e-14 kg; data quality (5,1,1,1,3)
- phthalate, dioctyl-: 3.15777e-8 kg; data quality (3,2,1,1,5)
- catechol: 1.01328e-11 kg; data quality (5,2,1,1,4)
- copper: 7.39813e-13, 7.39813e-14 kg (2 entries, compartments not in this file); data quality (4,1,1,1,5)
- ethane, 1,2-dichloro-: 3.48316e-9 kg; data quality (3,2,1,1,4)
- hydrogen chloride: 4.97389e-7 kg; data quality (2,2,1,1,4)
- tertiary-Butyl Acetate: 1.04308e-8 kg; data quality (4,2,1,1,5)
- ethylene oxide: 3.6714e-12 kg; data quality (3,2,1,1,5)
- ethylene glycol: 9.2045e-8 kg; data quality (5,2,1,1,5)
- phosgene: 1.29004e-11 kg; data quality (5,2,1,1,4)
- 1,2,4-trichlorobenzene: 2.31539e-11 kg; data quality (4,2,1,1,4)
- bromine: 1.71536e-9 kg; data quality (5,1,1,1,3)
- o-toluidine: 8.10988e-12 kg; data quality (4,2,1,1,3)
- Xylene: 5.23947e-6 kg; data quality (4,2,1,1,5)
- 1,1-DICHLOROETHYLENE: 1.93149e-13 kg; data quality (4,1,1,1,3)
- Aluminum: 5.4822e-11 kg; data quality (4,1,1,1,3)
- 4-nitrophenol: 4.80694e-14 kg; data quality (2,2,1,1,5)
- Ethane, 1,1,1-trichloro-, HCFC-140: 3.28595e-11 kg; data quality (3,1,1,1,3)
- HCFC-142b: 7.96741e-12, 2.96484e-9 kg (2 entries, compartments not in this file); data quality (2,1,1,1,3)
- ammonia: 4.66512e-9 kg; data quality (3,1,1,1,3)
- MCPA - SODIUM SALT: 1.20718e-13 kg; data quality (5,1,1,1,3)
- Creosol: 2.31296e-11, 1.86993e-10 kg (2 entries, compartments not in this file); data quality (5,1,1,1,3)
- Ethane, 1,1,1-trifluoro-, HFC-143a: 2.19015e-9 kg; data quality (4,2,1,4,1)
- MOLYBDENUM(VI): 3.01482e-11, 2.41437e-13, 4.79177e-10 kg (3 entries, compartments not in this file); data quality (3,1,1,1,3)
- Cumene hydroperoxide: 4.64677e-10 kg; data quality (2,1,1,1,5)
- copper: 7.6212e-11 kg; data quality (4,1,1,1,4)
- Ethylene glycol: 3.40425e-10 kg; data quality (5,1,1,1,3)
- benzene: 2.28425e-7 kg; data quality (3,2,1,1,5)
- carbon monoxide: 9.10156e-5 kg; data quality (2,2,1,1,3)
- ammonia: 4.89408e-7 kg; data quality (3,2,1,1,3)
- m-xylene: 2.7473e-7 kg; data quality (3,2,1,1,5)
- Sodium formate: 1.022e-10 kg; data quality (3,1,1,1,3)
- butanol: 1.59513e-7 kg; data quality (5,1,1,1,5)
- methylene diphenyl diisocyanate: 5.9681e-7 kg; data quality (4,2,1,1,5)
- chloroform: 2.23653e-9 kg; data quality (4,2,1,1,4)
- Ethene, trichloro-: 1.66591e-12 kg; data quality (5,1,1,1,3)
- Chromium VI: 3.63553e-8 kg; data quality (3,2,1,1,5)
- biphenyl: 1.27869e-10 kg; data quality (4,2,1,1,3)
- CFC-114: 1.36907e-9 kg; data quality (5,1,1,1,3)
- mercury: 2.46776e-9 kg; data quality (2,2,1,1,5)
- NITRIC ACID: 2.41437e-13 kg; data quality (3,1,1,1,3)
- HCFC-132b: 5.9321e-10, 3.86298e-13 kg (2 entries, compartments not in this file); data quality (2,1,1,1,3)
- cyclohexane: 2.511e-8 kg; data quality (4,1,1,1,5)
- p-cresol: 1.41712e-11 kg; data quality (4,2,1,1,3)
- ethene, tetrachloro-: 2.92569e-9 kg; data quality (3,2,1,1,4)
- nitric acid: 1.20718e-13, 3.43198e-9 kg (2 entries, compartments not in this file); data quality (3,1,1,1,3)
- lead: 1.91646e-8 kg; data quality (3,2,1,1,5)
- Cresol: 5.13231e-11 kg; data quality (4,2,1,1,5)
- Dimethyl sulfate: 1.4247e-10 kg; data quality (2,2,1,1,5)
- Methyl iodide: 1.21809e-9 kg; data quality (4,2,1,1,5)
- chromium: 1.88475e-12 kg; data quality (4,1,1,1,3)
- 1,4-dioxane: 4.30082e-8 kg; data quality (3,2,1,1,5)
- naphthalene: 7.99155e-12 kg; data quality (4,1,1,1,3)
- Water, fresh: 0.00367329 m3; data quality (3,2,1,3,2)
- acrylonitrile: 5.29564e-10 kg; data quality (3,2,1,1,4)
- ethylene glycol: 1.04783e-11 kg; data quality (5,1,1,1,3)
- Nitrobenzene: 4.03366e-11 kg; data quality (4,2,1,1,4)
- Chrysene, 5-methyl-: 1.93702e-16 kg; data quality (2,2,1,1,4)
- NITROUS ACID: 2.79891e-10 kg; data quality (5,1,1,1,3)
- BUTYL ACRYLATE: 2.21944e-13 kg; data quality (4,1,1,1,5)
- benzyl chloride: 2.11477e-9 kg; data quality (2,2,1,1,5)
- Chloroform: 1.1589e-12 kg; data quality (3,1,1,1,3)
- IRON PENTACARBONYL: 6.81334e-10 kg; data quality (5,1,1,1,3)
- Ethene, chloro-: 1.11901e-9 kg; data quality (3,2,1,1,4)
- benzene: 8.93315e-13 kg; data quality (3,1,1,1,3)
- trichloroethylene: 1.64938e-7 kg; data quality (4,2,1,1,5)
- Phthalate, dimethyl-: 5.05489e-8 kg; data quality (3,2,1,1,5)
- toluene: 1.20718e-13 kg; data quality (5,1,1,1,3)
- dimethyl formamide: 5.12525e-11 kg; data quality (4,2,1,1,3)
- DICHLOROBENZENE: 1.42448e-12 kg; data quality (4,1,1,1,3)
- BUTYL ISOCYANATE: 1.37311e-9 kg; data quality (5,2,1,1,5)
- Pentachloroethane: 1.39309e-11 kg; data quality (2,1,1,1,3)
- phenanthrene: 1.47558e-10 kg; data quality (3,2,1,3,1)
- Metaldehyde (tetramer): 2.41437e-15 kg; data quality (3,1,1,1,3)
- acetonitrile: 4.55245e-10 kg; data quality (3,2,1,1,4)
- 2-METHOXYETHANOL: 7.39813e-14 kg; data quality (5,1,1,1,5)
- Hydrazine, methyl-: 4.99822e-10 kg; data quality (2,2,1,1,5)
- beryllium: 1.46352e-9 kg; data quality (2,2,1,1,5)
- hydrogen sulfide: 1.59791e-8 kg; data quality (3,2,1,1,4)
- toluene, 2,4-dinitro-: 2.47144e-15 kg; data quality (5,2,1,1,4)
- vinyl acetate: 1.11238e-8 kg; data quality (3,2,1,1,4)
- diisocyanates: 7.55925e-10 kg; data quality (4,1,1,1,5)
- 2,2-BIS(4-HYDROXY-3,5-DIBROMOPHENYL)PROPANE: 1.23845e-10 kg; data quality (5,1,1,1,3)
- Ethane, 2-chloro-1,1,1,2-tetrafluoro-, HCFC-124: 2.72823e-11 kg; data quality (4,1,1,1,3)
- 1,1,1,2-Tetrachloroethane: 2.24536e-11 kg; data quality (3,1,1,1,3)
- mercury: 5.13731e-13 kg; data quality (3,1,1,1,3)
- epichlorohydrin: 6.8532e-11 kg; data quality (3,2,1,1,4)
- methyl isobutyl ketone: 7.29526e-7 kg; data quality (3,2,1,1,5)
- ethane, 1,1,2-trichloro-: 2.59828e-10 kg; data quality (4,2,1,1,4)
- arsenic: 5.88772e-10 kg; data quality (3,2,1,1,5)
- acenaphthene: 5.06125e-11 kg; data quality (3,2,1,3,1)
- 2,4/2,6-toluenediisocyanate (mixture): 1.82115e-11 kg; data quality (3,1,1,1,5)
- Carbon disulfide: 2.53508e-13 kg; data quality (4,1,1,1,3)
- selenium: 3.99053e-9 kg; data quality (2,2,1,1,5)
- toluene: 5.92996e-6 kg; data quality (4,2,1,1,5)
- Methane: 2.55525e-6 kg; data quality (4,2,1,4,1)
- 2-nitropropane: 3.78611e-12 kg; data quality (3,2,1,1,5)
- 1,1-DICHLOROETHANE: 1.93149e-12 kg; data quality (4,1,1,1,3)
- formic acid: 1.13177e-9 kg; data quality (3,1,1,1,3)
- 1,2-dinitrobenzene: 2.41437e-14 kg; data quality (5,1,1,1,3)
- Styrene: 3.73606e-11 kg; data quality (3,1,1,1,5)
- hydrogen fluoride: 1.2341e-7 kg; data quality (2,2,1,1,5)
- 2-chloro-1-phenylethanone: 2.25215e-11 kg; data quality (2,2,1,1,5)
- SEC-BUTYL ALCOHOL: 7.62939e-13 kg; data quality (5,1,1,1,3)
- ethyl acrylate: 1.01859e-8 kg; data quality (3,2,1,1,5)
- ETHENE: 2.72096e-9 kg; data quality (3,1,1,1,3)
- benzo(a)pyrene: 4.69154e-11 kg; data quality (3,2,1,1,5)
- CHLOROPRENE: 3.02061e-14 kg; data quality (2,2,1,1,5)
- Benzo(k)fluoranthene: 7.36894e-13 kg; data quality (3,2,1,3,2)
- antimony: 1.87054e-9 kg; data quality (3,2,1,1,5)
- Anthracene: 4.34586e-14 kg; data quality (4,1,1,1,3)
- Benzene, hexachloro-: 2.41437e-15 kg; data quality (4,1,1,1,3)
- Dimethylamine: 1.29326e-10 kg; data quality (3,1,1,1,3)
- acetophenone: 1.27421e-10 kg; data quality (4,2,1,1,3)
- butadiene: 1.52557e-8 kg; data quality (2,2,1,1,1)
- AMMONIA: 1.39212e-9 kg; data quality (3,1,1,1,3)
- sulfur dioxide: 0.000289144 kg; data quality (2,2,1,1,5)
- Asbestos: 2.58432e-13 kg; data quality (5,2,1,1,4)
- Benzo(g,h,i)perylene: 1.1641e-10 kg; data quality (3,2,1,1,5)
- benzal chloride: 9.65746e-15 kg; data quality (5,1,1,1,3)
- ozone: 5.40818e-12 kg; data quality (4,1,1,1,3)
- 1,4-BENZOQUINONE: 1.57862e-10 kg; data quality (3,2,1,1,3)
- methane, bromo-, halon 1001: 1.91808e-9 kg; data quality (3,2,1,1,4)
- Methane, monochloro-, R-40: 2.41437e-13 kg; data quality (3,1,1,1,3)
- Ethane, 1,2-dichloro-: 2.87309e-13, 6.28001e-12 kg (2 entries, compartments not in this file); data quality (4,1,1,1,3)
- 1,2,4-trimethylbenzene: 5.75054e-8 kg; data quality (5,1,1,1,5)
- m-cresol: 2.69817e-11 kg; data quality (4,2,1,1,3)
- NITROMETHANE: 1.16131e-11 kg; data quality (5,1,1,1,3)
- 2-Mercaptobenzothiazole: 1.93149e-15 kg; data quality (3,1,1,1,3)
- Hexachlorocyclopentadiene: 7.92997e-12 kg; data quality (3,2,1,1,4)
- benzene, ethyl-: 5.54132e-7 kg; data quality (3,2,1,1,5)
- Methane, dibromo-: 6.82541e-11 kg; data quality (5,1,1,1,3)
- vanadium: 7.62939e-12 kg; data quality (5,1,1,1,3)
- TERT-BUTYL ALCOHOL: 2.84318e-10 kg; data quality (4,1,1,1,3)
- carbon disulfide: 3.78546e-7 kg; data quality (4,2,1,1,5)
- carbonyl sulfide: 1.57186e-7 kg; data quality (4,2,1,1,5)
- isophorone: 1.99788e-9 kg; data quality (2,2,1,1,5)
- 2,3,4'-TRICHLOROBIPHENYL: 1.85496e-18 kg; data quality (2,2,1,1,5)
- Chromium, ion: 7.39988e-8 kg; data quality (3,2,1,1,5)
- ethylbenzene: 1.18513e-7 kg; data quality (4,1,1,1,5)
- acenaphthylene: 5.27594e-11 kg; data quality (3,2,1,4,1)
- propylene oxide: 1.63183e-10 kg; data quality (3,2,1,1,5)
- Methane, dichloro-, HCC-30: 1.06232e-12 kg; data quality (5,1,1,1,3)
- naphthalene: 2.25593e-7 kg; data quality (3,2,1,1,5)
- DIETHANOLAMINE: 1.67436e-10, 9.92468e-9 kg (2 entries, compartments not in this file); data quality (4,1,1,1,3)
- lead: 1.05801e-11 kg; data quality (3,1,1,1,3)
- 1,1-DICHLOROETHYLENE: 4.97366e-10 kg; data quality (3,2,1,1,4)
- PERACETIC ACID: 2.23812e-11 kg; data quality (4,1,1,1,3)
- 1,3-dichlorobenzene: 6.49264e-15 kg; data quality (2,1,1,1,3)
- chromium: 2.90521e-12 kg; data quality (4,1,1,1,5)
- Sulfuric acid: 1.39203e-8 kg; data quality (2,1,1,1,3)
- ethane, 1,2-dibromo-: 3.35525e-12 kg; data quality (2,2,1,1,3)
- CHLORONAPHTHALENE: 2.49369e-16 kg; data quality (1,2,1,1,5)
- silver: 1.06527e-10 kg; data quality (4,1,1,1,3)
- bis(2-chloroethyl)ether: 4.04526e-13 kg; data quality (3,2,1,1,4)
- Propane, 1,1,1,3,3,3-hexafluoro-, HCFC-236fa: 5.91674e-11 kg; data quality (4,2,1,4,1)
- acrylic acid: 1.74137e-9 kg; data quality (3,2,1,1,5)
- hydroquinone: 1.41621e-10 kg; data quality (3,2,1,1,5)
- Hydrazine: 3.56324e-11 kg; data quality (4,2,1,1,4)
- Ethylene glycol monoethyl ether: 2.41437e-16 kg; data quality (5,1,1,1,3)
- lead: 2.00026e-8 kg; data quality (3,1,1,1,5)
- 2,4-Diaminotoluene: 9.8805e-12 kg; data quality (2,2,1,1,4)
- pyrene: 1.94223e-11 kg; data quality (2,2,1,2,2)
- fluorine: 4.22997e-11 kg; data quality (4,1,1,1,3)
- 1,2-DICHLOROETHYLENE: 1.20718e-13, 9.72989e-11 kg (2 entries, compartments not in this file); data quality (5,1,1,1,3)
- ALLYL CHLORIDE: 2.50215e-11 kg; data quality (3,2,1,1,4)
- 2,4,6-trichlorophenol: 1.33821e-15 kg; data quality (2,2,1,1,5)
- styrene: 6.0758e-6 kg; data quality (4,2,1,1,5)
- polychlorinated biphenyls: 7.3501e-13 kg; data quality (3,2,1,1,1)
- chlorine: 7.98146e-9 kg; data quality (4,2,1,1,4)
- dibenzofuran: 3.97712e-10 kg; data quality (4,2,1,1,1)
- o-cresol: 2.69559e-14 kg; data quality (4,2,1,1,5)
- Water, saline: 0.00148798 m3; data quality (4,2,1,1,2)
- Hexachlorocyclopentadiene: 1.20718e-14 kg; data quality (5,1,1,1,3)
- BENZOIC TRICHLORIDE (BENZOTRICHLORIDE): 1.48208e-13 kg; data quality (3,2,1,1,4)
- 2,4-dinitrophenol: 7.72157e-14 kg; data quality (5,2,1,1,5)
- anthracene: 5.6337e-12 kg; data quality (3,2,1,3,2)
- Chrysene: 3.98784e-12 kg; data quality (2,2,1,2,2)
- aniline: 3.4286e-11 kg; data quality (4,2,1,1,5)
- acetaldehyde: 4.05959e-8 kg; data quality (3,2,1,3,2)
- Propane, 1,2-dichloro-: 3.85368e-11 kg; data quality (4,2,1,1,4)
- o-Xylene: 3.0034e-9 kg; data quality (3,2,1,2,3)
- manganese: 5.97477e-13 kg; data quality (4,1,1,1,5)
- ACRYLAMIDE: 1.16036e-11 kg; data quality (4,2,1,1,4)
- Ethene, tetrachloro-: 1.37619e-12 kg; data quality (3,1,1,1,3)
- 1,2-dibromo-3-chloropropane: 1.57347e-14 kg; data quality (4,2,1,1,4)
- methane, monochloro-, r-40: 1.81677e-7 kg; data quality (3,2,1,1,5)
- Ethane, 1,1,2-trichloro-: 7.75253e-13 kg; data quality (4,1,1,1,3)
- 2,4,5,2',5'-PENTACHLOROBIPHENYL: 3.27192e-18 kg; data quality (2,2,1,1,5)
- M-DINITROBENZENE: 2.41437e-14 kg; data quality (5,1,1,1,3)
- PHOSPHORUS: 1.63455e-8 kg; data quality (3,2,1,1,5)
- propanal: 7.31049e-9 kg; data quality (3,2,1,3,2)
- p-phenylenediamine: 1.81066e-18 kg; data quality (5,2,1,1,4)
- VOC, volatile organic compounds: 8.68697e-5 kg; data quality (3,2,1,1,5)
- hexachloroethane: 8.8458e-12 kg; data quality (4,2,1,1,4)
- phenol: 1.50575e-7 kg; data quality (4,2,1,1,5)
- Propene: 5.93135e-11 kg; data quality (3,1,1,1,4)
- mercury: 3.95765e-11 kg; data quality (3,1,1,1,5)
- Dibenz(a,h)anthracene: 3.18298e-13 kg; data quality (2,2,1,1,4)
- PCB-1: 1.56953e-19 kg; data quality (2,2,1,1,5)
- Methane, tetrachloro-, R-10: 4.82873e-14 kg; data quality (3,1,1,1,3)
- cadmium: 5.82696e-10 kg; data quality (3,2,1,1,5)
- 2-Chloro-1,1,1-trifluoroethane: 1.06232e-12, 5.3116e-10 kg (2 entries, compartments not in this file); data quality (2,1,1,1,3)
- Dinitrogen monoxide: 5.83149e-7 kg; data quality (4,2,1,4,1)
- dicyclopentadiene: 3.75455e-10 kg; data quality (4,1,1,1,5)
- phenanthrene: 4.34586e-14 kg; data quality (3,1,1,1,3)
- Carbon dioxide: 0.0501427 kg; data quality (4,2,1,4,1)
- Nitrogen: 7.00931e-6 kg; data quality (4,2,1,1,5)
- Cobalt: 1.83988e-9 kg; data quality (3,2,1,1,5)
- Benzene, 1,2,4-trimethyl-: 1.20718e-13 kg; data quality (5,1,1,1,3)
- chlorine: 6.12122e-10 kg; data quality (3,1,1,1,3)
- Bis(2-chloroethyl)ether: 3.62155e-15 kg; data quality (2,1,1,1,3)
- Phthalate, dibutyl-: 7.51504e-9 kg; data quality (4,2,1,1,5)
- 2,2,4-trimethylpentane: 1.49172e-7 kg; data quality (3,2,1,1,5)
- 1-Methyl-2-pyrrolidinone: 2.14636e-9 kg; data quality (5,1,1,1,5)
- particulates, < 10 um: 0.000515836 kg; data quality (3,2,1,1,5)
- ALLYL ALCOHOL: 5.70514e-11 kg; data quality (4,1,1,1,3)
- NITROGEN TRIFLUORIDE: 1.52542e-10 kg; data quality (3,1,1,1,3)
- para-xylene: 6.76062e-9 kg; data quality (3,2,1,1,5)
- Phosphine: 1.31066e-10 kg; data quality (4,2,1,1,4)
- Benzo(g,h,i)perylene: 2.62594e-13, 2.13188e-13 kg (2 entries, compartments not in this file); data quality (2,1,1,1,3)
- Chloropicrin: 1.89286e-11 kg; data quality (3,1,1,1,3)
- Benzo(a)anthracene: 1.84559e-13 kg; data quality (2,2,1,1,5)
- Benzo(b)fluoranthene: 3.51369e-12 kg; data quality (2,2,1,1,3)
- 2,4-D, ISOOCTYL ESTER: 2.41437e-13 kg; data quality (5,1,1,1,3)
- diethanolamine: 1.56057e-10 kg; data quality (3,2,1,1,4)
- Titanium: 4.04424e-10 kg; data quality (5,2,1,1,4)
- Benzene, chloro-: 1.20718e-13 kg; data quality (3,1,1,1,3)
- maleic anhydride: 7.95926e-11 kg; data quality (2,2,1,1,5)
- 4,4'-METHYLENEBIS(2-CHLOROANALINE): 3.99357e-13 kg; data quality (5,2,1,1,5)
- 2-methylnaphthalene: 3.51844e-11 kg; data quality (2,2,1,1,3)
- 3-methylcholanthrene: 1.87323e-14 kg; data quality (2,2,1,1,5)
- Decabromodiphenyl oxide: 1.89392e-11 kg; data quality (4,1,1,1,5)
- cumene: 2.18574e-8 kg; data quality (3,2,1,1,5)
- fluoranthene: 2.04575e-11 kg; data quality (2,2,1,3,2)
- Phosphorus: 2.89002e-7 kg; data quality (2,1,1,1,2)
- fluorene: 6.10379e-11 kg; data quality (3,2,1,3,1)
- Ethane, 1,1-dichloro-1-fluoro-, HCFC-141b: 4.34586e-12, 2.3033e-10 kg (2 entries, compartments not in this file); data quality (2,1,1,1,3)
- 4,4'-isopropylidenediphenol: 3.09039e-12 kg; data quality (4,1,1,1,3)
- acrolein: 4.69393e-9 kg; data quality (3,2,1,2,3)
- particulates, < 2.5 um: 0.000120053 kg; data quality (3,2,1,1,5)
- 1,1,1-trichloroethane: 1.3108e-6 kg; data quality (3,2,1,1,5)
- hexachlorobenzene: 2.08306e-13 kg; data quality (3,2,1,1,4)
- methane, dichloro-, hcc-30: 6.07297e-8 kg; data quality (3,2,1,1,5)
- 1,4-dichlorobenzene: 6.89034e-10 kg; data quality (2,2,1,1,5)
- 1,1,2,2-tetrachloroethane: 7.27552e-11 kg; data quality (3,2,1,1,4)
- Indeno(1,2,3-cd)pyrene: 4.4652e-13 kg; data quality (3,2,1,3,2)
- Ethane, 1,1,1,2-tetrafluoro-, HFC-134a: 1.92936e-8 kg; data quality (4,2,1,4,1)
- HYDROFLUORIC ACID: 5.63745e-10 kg; data quality (3,1,1,1,3)
- phthalic anhydride: 2.78639e-10 kg; data quality (2,2,1,1,5)
- t-butyl methyl ether: 5.03545e-10 kg; data quality (3,2,1,1,4)
- benzene, chloro-: 3.41233e-9 kg; data quality (3,2,1,1,5)
- toluene-2,4-diisocyante: 3.796e-11 kg; data quality (3,2,1,1,5)
- N,N-DIMETHYLANILINE: 1.28624e-10 kg; data quality (5,2,1,1,5)
- nickel: 4.91889e-7 kg; data quality (3,2,1,1,5)
- Propene, 1,3-dichloro-: 1.40636e-11 kg; data quality (3,2,1,1,4)
- pentachlorophenol: 1.91339e-14 kg; data quality (3,2,1,1,5)
- HYDROCHLORIC ACID: 1.4649e-10 kg; data quality (2,1,1,1,5)
- methyl methacrylate: 1.21498e-7 kg; data quality (4,2,1,1,5)
- Triethyl amine: 1.2135e-9 kg; data quality (4,2,1,1,4)
- 2-ethoxyethyl acetate: 2.40575e-8 kg; data quality (3,2,1,1,5)
- methanol: 1.15009e-6 kg; data quality (3,2,1,1,5)
- 2-(2-BUTOXYETHOXY) ETHYL ACETATE: 3.1912e-9 kg; data quality (3,2,1,1,5)
- styrene: 1.598e-10 kg; data quality (3,1,1,1,5)
- 4,4'-METHYLENEDIANILINE: 9.92933e-12 kg; data quality (4,2,1,1,5)
- hexane: 4.60766e-7 kg; data quality (3,2,1,1,5)
- Hydrocarbons, aromatic: 1.65326e-9 kg; data quality (3,2,1,4,1)
- Ethane, pentafluoro-, HFC-125: 5.11885e-9 kg; data quality (4,2,1,4,1)
- Ethylene glycol monoethyl ether: 8.16059e-8 kg; data quality (3,2,1,1,5)
- 2-PHENOXYETHANOL: 6.97962e-9 kg; data quality (3,2,1,1,5)
- hexachloro-1,3-butadiene: 1.40069e-11 kg; data quality (4,2,1,1,4)
- nickel: 3.09241e-11 kg; data quality (4,1,1,1,3)
- cyanide: 1.33257e-8 kg; data quality (3,2,1,1,5)
- monochloroethane: 7.93682e-9 kg; data quality (3,2,1,1,5)
- benz[a]anthracene: 6.88613e-12 kg; data quality (2,2,1,1,4)
- Diethylene glycol butyl ether: 5.08114e-8 kg; data quality (3,2,1,1,5)
- carbon tetrachloride: 9.54598e-10 kg; data quality (4,2,1,1,4)
- manganese: 3.9597e-7 kg; data quality (3,2,1,1,5)
- 1,2-BUTYLENE OXIDE: 8.4072e-10 kg; data quality (3,2,1,1,5)
- Diuron: 2.41437e-13 kg; data quality (2,1,1,1,3)
- Ethane, 2,2-dichloro-1,1,1-trifluoro-, HCFC-123: 2.17293e-10 kg; data quality (4,1,1,1,3)
- Triethylene glycol: 8.74457e-10 kg; data quality (3,2,1,1,5)
- Methane, difluoro-, HFC-32: 2.98098e-9 kg; data quality (4,2,1,4,1)
- methane, chlorodifluoro-, hcfc-22: 2.52518e-9 kg; data quality (4,1,1,1,3)
- Chloroacetic acid: 5.8655e-12 kg; data quality (3,2,1,1,4)
- nitrogen oxides: 0.00020179 kg; data quality (2,2,1,1,5)
- bromoform: 2.86125e-10 kg; data quality (3,2,1,1,4)

## Inventory method
Input-output

## Modelling constants
The reference unit of all processes is 1 USD2013 of the good or service. The technosphere inputs are based on the US BEA detailed input-output tables for 2007. The IO tables are combined to develop a commodity-by-commodity model based on the the industry-technology assumption (see Suh et al., 2010), which assumes all commodities produced by a given industry have the same input structure, but that multiple industries can produce the same commodity. Thus, model technosphere flows represent commodity outputs (and not industry outputs) from other processes in the model. There are no by-products included in these processes. All commodity production is based on US-conditions, despite in reality that some goods and services are produced overseas, as USEEIO v1.1 is a single-region IO model.

## Completeness
The input-output approach assures that all purchased inputs associated with the sectors making these commodities as reported in the US census for 2007 are included. The direct resources extracted including minerals, energy sources, water and land occupied are included. Emissions to air include all critieria air pollutants, greenhouse gases, and hazardous and toxic air pollutants as defined by US EPA. Releases to water include toxics, total nitrogen and total phosphorus, and water discharges. Releases to soil or groundwater include toxics and agriculutural pesticides. Some metal releases to air, water and soil are not included because they could not be speciated. Solid hazardous and non-hazardous wastes generated are not included as an elementary flows although purchases of waste services are included.

## Data treatment
Greenhouse gases are primarily from the US Greenhouse Gas Emission Inventory (USEPA 2016a). Biogenic C uptake is not included (change from version 1.0), as biogenic C emission are not included. Toxic releases to air, water and soil (except pesticides) are from the 2013 Toxic Release Inventory (USEPA 2015a). Criteria air pollutants and hazardous air pollutants are from the 2011 National Emissions Inventory (USEPA 2015b). All estimates are normalized by industry based on sector output in the data year, then converted to 2013 USD using relative sector-specific CPIs (if data year is not 2013). Energy use represent raw renewables or fossil fuel energies and is based on EIA data for 2014. See Table 1 in Yang, Ingwersen et al. 2017 and Supporting Information 1, and the v1.1 data update notes (Ingwersen et al. 2017) for all details on environmental data sources used.Land occupation associated with manufacturing buildings was estimated based on the building floorspace data provided by the U.S. Energy Information Administration in the 2010 Manufacturing Energy Consumption Survey (EIA 2013). Portions of total renewable energy (EIA 2016) based on EIA-923 reports for 2014 (EIA 2017) are included. Nitrogen and Phosphorus releases are modeled in total N and total P equivalents as estimated by the Discharge Monitoring Report Nutrient Loading tool (USEPA 2016b). Self-supplied withdrawals were assigned to industrial sectors based on water use statistics for Canadian industries by NAICS 3-digit sector scaled to US production levels based on gross domestic product by industry (BEA 2015; Statistics Canada 2010), and further disaggregated to the manufacturing sectors based on compensation of employees as provided by the 2007 IO tables (BEA 2015). Water withdrawals associated with public supply were allocated to sectors based on their use of water, sewage, and other services in USD based on the IO tables (BEA 2015). Portions of total renewable energy (EIA 2016) by type are assigned to sectors (hydro, wind, solar, or) based on EIA-923 reports for 2014 (EIA 2017).

## Data collection
2015-2016

## Sampling procedure
US federal government sources, including surveys and US EPA emissions databases are used as the primary sources. From these sources, data for US reporting establishments/facilities are aggregated by the NAICS sector as defined in the BEA detailed 2007 input-output tables. When level of sector aggregation differs, or when direct emissions are not reported but modeled, additional sources are used to make allocations and estimates.

## Review details
In regard to quality assurance and peer-review, each dataset created went through Quality Assurance as defined in a quality assurance project plans at US EPA, CSRA or ERG. The model was assembled with the IO model builder model (USEPA 2016c). Validation functions were used to check that all the model components were properly assembled and harmonized. Bayou Demeke and Santosh Ghimire provided internal peer review of the model methodology and the manuscript underwent standard EPA management review. An editor and two anonymous reviewers at the Journal of Cleaner Production reviewed the model. In regard to data quality evaluation, data quality assessment was performed at the flow and process levels according to the updated US EPA data quality assessment guidelines as defined in US EPA (2016b).

## Intended application
The primary application is for use in the US Environmentally-Extended Input-Ouput model, USEEIO, version 1.1. This model is being used by the US EPA for supporting tools that prioritize goods and services based on potential environmental impacts, resource use or emissions for large regions, including the US and US states, and as a strealined tool for organizations as a starting point to consider sustainable materials management. Model results are designed to provide meso/macro-level decision support.

## Project
USEEIO v1.1 was developed by the US EPA with CSRA and ERG with Wesley W. Ingwersen and David E. Meyer as research leads. Yi Yang was the technical lead on the work for CSRA (contract EP-C-15-012); Troy Hawkins was lead for ERG (contract EP-C-12-021).

## Sources
- USEPA 2015a
- USGS 2016
- EIA 2017
- Statistics Canada 2010
- USDA 2009b
- USEPA 2016c
- Edelen and Ingwersen 2017
- Kim et el. 2013
- USEPA 2016a
- EIA 2013
- USDA 2006
- EIA 2016
- BEA 2015
- EIA 2015
- USEPA 2015b
- Goebes et al. 2003
- BLM 2008
- USGS 2015
- Lovelace 2009
- Nickerson et al. 2011
- Maupin et al. 2014
- USDA 2014
- Ingwersen et al. DRAFT
- Macknick et al. 2011
- USDA 2016
- USEPA 2016b
- Blackhurst et al. 2010
- USDA 2009a
- Ingwersen et al. 2017
- Torcellini et al. 2003
- Yienger et al. 1995
