# Poultry farms

Dataset: openLCA process, unit process
Category: 1123: Poultry and Egg Production
Geography: United States
Time period: 2017-01-01 to 2017-12-31
Data quality: US EPA - Process Pedigree Matrix (1;1)
Exchange data quality scheme: US EPA - Flow Pedigree Matrix
Generated by: US EPA with CSRA and ERG
Owner: US EPA
Published in: Yang, Ingwersen et al. 2017
restrictionsDescription: This model shold be appropriately cited (see Yang, Ingwersen et al. 2017 source or Publication field) when used. Any changes or derivations of this model by the user should be documented. The model itself and any results from use of this model shall not be construed to consitute US EPA opinion or policy.
copyright: false

## General comment
BEA Code & Name is '112300:Poultry and egg production'. Description of the primary industry producing this good or service, adapted from the Census Bureau NAICS 2007 descriptions: This industry group comprises establishments primarily engaged in breeding, hatching, and raising poultry for meat or egg production.

## Technology
The process describes the average US production of this good or service within this NAICS-based grouping defined in the BEA 2007 detailed input-output tables (BEA 2015). Distribution, wholesale and retailing of this good or service, use, and final disposal are not included. Creation of a product system with this process will enable modeling of all upstream (supply-chain) activities.

## Geography
Data represent the 50 US states

## Time period
2017 was the year in which this version of USEEIO was released and is the target date for the model

## Reference product
- Poultry farms: 1 USD

## Inputs from technosphere
All rows: data quality (1,3,1,1,1)
- Legal services: 0.00208253 USD
- Veneer, plywood, and engineered wood; at manufacturer: 0.000208253 USD
- Fresh wheat, corn, rice, and other grains; at farm: 0.0334394 USD
- Veterinarians: 0.0116027 USD
- Securities and commodities brokerage and exchanges: 8.92512e-5 USD
- Wholesale trade: 0.0863654 USD
- Corn products; at manufacturer: 2.97504e-5 USD
- Civic, social, professional, and similar organizations: 0.000446256 USD
- Storage batteries; at manufacturer: 0.000208253 USD
- Commercial machinery repair: 2.97504e-5 USD
- Truck transport: 0.0238896 USD
- Power tools; at manufacturer: 0.000148752 USD
- Colleges, universities, junior colleges, and professional schools: 0.000327254 USD
- Cutlery and handtools; at manufacturer: 0.00139827 USD
- Vehicle electrical and electronic equipment; at manufacturer: 0.000238003 USD
- Light bulbs; at manufacturer: 2.97504e-5 USD
- Rubber tires; at manufacturer: 0.000327254 USD
- Noncomparable imports: 0.00285604 USD
- Books, newspapers, magazines, and other print media; at manufacturer: 8.92512e-5 USD
- Other textiles; at manufacturer: 2.97504e-5 USD
- Gaskets, seals, musical instruments, fasteners, brooms, brushes, mop and other misc. goods; at manufacturer: 0.000208253 USD
- Vegetable oils and by-products; at manufacturer: 0.0189808 USD
- Natural gas; at consumer: 0.00609883 USD
- Vehicle repair: 0.000119002 USD
- Coal; at mine: 0.01669 USD
- Pharmaceutical products (pills, powders, solutions, etc.); at manufacturer: 0.000535507 USD
- Commercial equipment rental: 0.000238003 USD
- Accounting, tax preparation, bookkeeping, and payroll: 0.00205278 USD
- Dimensional stone; at mine: 0.000208253 USD
- Vehicle rental and leasing: 0.000297504 USD
- Electricity; at consumer: 0.00336179 USD
- Packaged meat (except poultry); at manufacturer: 0.00339154 USD
- Watches, clocks, and other measuring and controlling devices; at manufacturer: 2.97504e-5 USD
- Business support: 5.95008e-5 USD
- Postal service: 0.000119002 USD
- Monetary authorities and depository credit intermediation: 0.000922262 USD
- Farm machinery and equipment; at manufacturer: 0.00127927 USD
- Other vehicle parts; at manufacturer: 0.000178502 USD
- Magazines and journals; at publisher: 0.000208253 USD
- Software: 2.97504e-5 USD
- Pipeline transport: 8.92512e-5 USD
- Machine shops; at manufacturer: 2.97504e-5 USD
- Vehicle seating and interior trim (upholstery); at manufacturer: 2.97504e-5 USD
- Metal structural products; at manufacturer: 0.000267754 USD
- Other animal food; at manufacturer: 0.312171 USD
- Vaccines and other biological medical products; at manufacturer: 0.00592033 USD
- Soap and cleaning compounds; at manufacturer: 0.000684259 USD
- Full-service restaurants: 2.97504e-5 USD
- Distilleries and spirits; at manufacturer: 0.00193378 USD
- Dry, condensed, and evaporated dairy; at manufacturer: 0.000684259 USD
- Rubber and plastic belts and hoses; at manufacturer: 2.97504e-5 USD
- Material handling equipment; at manufacturer: 0.000119002 USD
- Insurance carriers: 0.00279654 USD
- Computer systems design: 0.000178502 USD
- Satellite, telecommunications resellers, and all other telecommunications: 2.97504e-5 USD
- Nonresidential building repair and maintanence: 0.0040758 USD
- Welding and Soldering Equipment, Scales and Balances, and other general purpose machinery; at manufacturer: 8.92512e-5 USD
- Other basic inorganic chemicals; at manufacturer: 2.97504e-5 USD
- Investment advice, portfolio management, and other financial advising services: 0.000178502 USD
- All other food and drinking places: 8.92512e-5 USD
- All other converted paper products; at manufacturer: 0.00368905 USD
- Pesticides; at manufacturer: 0.00136852 USD
- Air transport: 0.000327254 USD
- Vehicle engines and engine parts; at manufacturer: 2.97504e-5 USD
- Breweries and beer; at manufacturer: 8.92512e-5 USD
- Secondary steel products; at manufacturer: 0.000119002 USD
- Rail transport: 0.0113647 USD
- Other computer related services, including facilities management: 0.000327254 USD
- Electronic equipment repair and maintenance: 5.95008e-5 USD
- Poultry farms: 0.143932 USD
- Wireless telecommunications: 0.000297504 USD
- Telecommunications: 0.000178502 USD
- Other retail: 0.000238003 USD
- Insurance agencies and brokerages: 0.000178502 USD
- Water transport (boats, ships, ferries): 0.00333204 USD
- Other real estate: 0.000208253 USD
- Nondepository credit intermediation and related activities: 0.000386755 USD
- Golf courses, marinas, ski resorts, fitness and other rec centers and industries: 0.000357005 USD
- Agriculture and forestry support: 0.0100556 USD
- Drinking water and wastewater treatment; at consumer: 0.000922262 USD
- Flours and malts; at manufacturer: 0.00229078 USD
- Metal pipe fittings, ball and roller bearings, industrial patterns, metal bath fixtures, other misc. fabricated metals; at manufacturer: 0.000119002 USD
- Sugar, candy, and chocolate; at manufacturer: 8.92512e-5 USD
- Buildings and dwellings services: 0.000684259 USD
- Gasoline, fuels, and by-products of petroleum refining; at manufacturer: 0.0130307 USD
- Performances: 2.97504e-5 USD
- Warehousing: 0.00124952 USD
- Motors and generators; at manufacturer: 2.97504e-5 USD
- Chemicals (except basic chemicals, agrichemicals, polymers, paints, pharmaceuticals,soaps, cleaning compounds); at manufacturer: 0.000476006 USD
- Limited-service restaurants: 0.000267754 USD
- Sports: 0.000119002 USD

## Inputs from nature
- Water, fresh: 0.00447365, 0.00395275 m3 (2 entries, compartments not in this file); data quality (4,3,1,4,2)
- Occupation, pasture and meadow: 0.458802 m2*a; data quality (2,3,1,1,1)
- Occupation, urban, discontinuously built: 8.27992e-5 m2*a; data quality (4,2,1,1,1)
- Occupation, pasture and meadow, intensive: 0.200418 m2*a; data quality (2,3,1,1,1)

## Emissions to nature
- lead: 1.12047e-11 kg; data quality (3,2,1,1,5)
- sulfur dioxide: 1.41352e-6 kg; data quality (2,2,1,2,3)
- 2-methylnaphthalene: 1.25994e-13 kg; data quality (2,2,1,1,5)
- styrene: 1.78628e-8 kg; data quality (3,2,1,4,1)
- pyrene: 1.54182e-10 kg; data quality (3,2,1,4,1)
- antimony: 1.40572e-11 kg; data quality (3,2,1,1,5)
- Chrysene: 5.48451e-11 kg; data quality (3,2,1,4,1)
- hexane: 1.1726e-7 kg; data quality (3,2,1,4,1)
- manganese: 1.63199e-10 kg; data quality (3,2,1,5,1)
- AMMONIA: 1.71631e-8 kg; data quality (3,1,1,1,5)
- methane, monochloro-, r-40: 2.31572e-14 kg; data quality (3,2,1,1,5)
- chloroform: 3.50575e-15 kg; data quality (4,2,1,1,5)
- 1,1,1-trichloroethane: 6.15212e-13 kg; data quality (4,2,1,1,5)
- Xylene: 4.71074e-7 kg; data quality (3,2,1,4,1)
- phenanthrene: 6.27863e-9 kg; data quality (3,2,1,4,1)
- benz[a]anthracene: 2.62872e-11 kg; data quality (3,2,1,4,1)
- Methane: 0.00285599 kg; data quality (4,2,1,4,1)
- Cobalt: 1.65426e-11 kg; data quality (3,2,1,1,5)
- ethene, tetrachloro-: 2.59232e-15 kg; data quality (3,2,1,1,5)
- Phosphorus: 2.31254e-6 kg; data quality (3,1,1,1,5)
- benzene: 7.10028e-7 kg; data quality (3,2,1,4,1)
- 1,1,2,2-tetrachloroethane: 7.02436e-15 kg; data quality (3,2,1,1,5)
- phenol: 6.79857e-8 kg; data quality (4,2,1,1,5)
- butadiene: 8.22075e-8 kg; data quality (3,2,1,4,1)
- arsenic: 8.7837e-10 kg; data quality (3,2,1,5,1)
- hydrogen chloride: 2.71454e-9 kg; data quality (2,2,1,1,5)
- Dibenz(a,h)anthracene: 9.27516e-14 kg; data quality (3,2,1,4,1)
- ethane, 1,2-dichloro-: 6.98694e-14 kg; data quality (3,2,1,1,5)
- fluoranthene: 4.75845e-10 kg; data quality (3,2,1,4,1)
- benzene, ethyl-: 1.57413e-7 kg; data quality (3,2,1,4,1)
- acenaphthylene: 2.23822e-9 kg; data quality (3,2,1,4,1)
- beryllium: 7.53062e-14 kg; data quality (2,2,1,1,5)
- o-Xylene: 2.00065e-8 kg; data quality (3,2,1,4,1)
- para-xylene: 4.06282e-9 kg; data quality (3,2,1,4,1)
- Hydrocarbons, aromatic: 5.11638e-8 kg; data quality (3,2,1,4,1)
- toluene: 6.89256e-7 kg; data quality (3,2,1,4,1)
- hydrogen fluoride: 1.91691e-11 kg; data quality (2,2,1,1,5)
- Chromium, ion: 3.42004e-11 kg; data quality (3,2,1,4,2)
- acetaldehyde: 1.49772e-6 kg; data quality (3,2,1,4,1)
- benzo(a)pyrene: 1.56722e-11 kg; data quality (3,2,1,4,1)
- 1,1-DICHLOROETHYLENE: 4.55425e-15 kg; data quality (3,2,1,1,5)
- bromoform: 1.87831e-15 kg; data quality (3,2,1,1,5)
- anthracene: 6.56233e-11 kg; data quality (3,2,1,4,1)
- cumene: 6.56121e-14 kg; data quality (4,2,1,1,5)
- nickel: 3.93158e-10 kg; data quality (3,2,1,3,3)
- mercury: 7.90792e-12 kg; data quality (3,2,1,5,1)
- methane, dichloro-, hcc-30: 4.33554e-14 kg; data quality (4,2,1,1,5)
- cadmium: 7.47195e-12 kg; data quality (3,2,1,1,5)
- propanal: 2.91995e-7 kg; data quality (3,2,1,4,1)
- Indeno(1,2,3-cd)pyrene: 7.7325e-12 kg; data quality (3,2,1,4,1)
- nitrogen oxides: 0.000290228 kg; data quality (3,2,1,1,1)
- selenium: 1.81789e-12 kg; data quality (2,2,1,1,5)
- VOC, volatile organic compounds: 2.93831e-5 kg; data quality (3,2,1,1,1)
- Water, fresh: 0.00212483 m3; data quality (3,3,1,2,2)
- carbon tetrachloride: 3.69229e-15 kg; data quality (4,2,1,1,5)
- hydrogen sulfide: 6.30996e-9 kg; data quality (3,1,1,1,5)
- trichloroethylene: 2.09702e-15 kg; data quality (4,2,1,1,5)
- naphthalene: 3.02273e-8 kg; data quality (3,2,1,4,1)
- m-xylene: 4.46674e-8 kg; data quality (3,2,1,4,1)
- formaldehyde: 3.09641e-6 kg; data quality (3,2,1,4,1)
- Chromium VI: 7.86415e-12 kg; data quality (3,2,1,5,1)
- Dinitrogen monoxide: 0.000120434 kg; data quality (4,2,1,4,1)
- Propane, 1,2-dichloro-: 8.49098e-14 kg; data quality (4,2,1,1,5)
- particulates, < 10 um: 2.32581e-6 kg; data quality (3,2,1,2,4)
- ammonia: 4.54317e-9 kg; data quality (3,1,1,1,5)
- acrolein: 9.67651e-8 kg; data quality (3,2,1,4,1)
- PHOSPHORUS: 2.51021e-11 kg; data quality (2,2,1,1,5)
- Cresol: 4.08517e-8 kg; data quality (4,2,1,1,5)
- 2,2,4-trimethylpentane: 1.37361e-7 kg; data quality (3,2,1,4,1)
- Nitrogen: 7.57831e-6 kg; data quality (3,1,1,1,5)
- ammonia: 0.0127123 kg; data quality (3,2,1,1,5)
- methanol: 1.12451e-8 kg; data quality (4,2,1,1,5)
- methanol: 5.04796e-11 kg; data quality (3,1,1,1,5)
- Benzo(g,h,i)perylene: 2.36124e-11 kg; data quality (3,2,1,4,1)
- carbon monoxide: 0.000271019 kg; data quality (3,2,1,1,1)
- Formaldehyde: 5.04796e-11 kg; data quality (2,1,1,1,5)
- Benzo(k)fluoranthene: 1.61707e-11 kg; data quality (3,2,1,4,1)
- Benzo(b)fluoranthene: 1.95073e-11 kg; data quality (3,2,1,4,1)
- Carbon dioxide: 0.20102 kg; data quality (4,2,1,4,1)
- acenaphthene: 2.39737e-9 kg; data quality (3,2,1,4,1)
- particulates, < 2.5 um: 2.45572e-5 kg; data quality (3,2,1,4,1)
- ethane, 1,2-dibromo-: 1.26112e-15 kg; data quality (2,2,1,1,5)
- methane, bromo-, halon 1001: 1.90403e-14 kg; data quality (3,2,1,1,5)
- fluorene: 2.4523e-9 kg; data quality (3,2,1,4,1)

## Inventory method
Input-output

## Modelling constants
The reference unit of all processes is 1 USD2013 of the good or service. The technosphere inputs are based on the US BEA detailed input-output tables for 2007. The IO tables are combined to develop a commodity-by-commodity model based on the the industry-technology assumption (see Suh et al., 2010), which assumes all commodities produced by a given industry have the same input structure, but that multiple industries can produce the same commodity. Thus, model technosphere flows represent commodity outputs (and not industry outputs) from other processes in the model. There are no by-products included in these processes. All commodity production is based on US-conditions, despite in reality that some goods and services are produced overseas, as USEEIO v1.1 is a single-region IO model.

## Completeness
The input-output approach assures that all purchased inputs associated with the sectors making these commodities as reported in the US census for 2007 are included. The direct resources extracted including minerals, energy sources, water and land occupied are included. Emissions to air include all critieria air pollutants, greenhouse gases, and hazardous and toxic air pollutants as defined by US EPA. Releases to water include toxics, total nitrogen and total phosphorus, and water discharges. Releases to soil or groundwater include toxics and agriculutural pesticides. Some metal releases to air, water and soil are not included because they could not be speciated. Solid hazardous and non-hazardous wastes generated are not included as an elementary flows although purchases of waste services are included.

## Data treatment
Greenhouse gases are primarily from the US Greenhouse Gas Emission Inventory (USEPA 2016a). Biogenic C uptake is not included (change from version 1.0), as biogenic C emission are not included. Toxic releases to air, water and soil (except pesticides) are from the 2013 Toxic Release Inventory (USEPA 2015a). Criteria air pollutants and hazardous air pollutants are from the 2011 National Emissions Inventory (USEPA 2015b). All estimates are normalized by industry based on sector output in the data year, then converted to 2013 USD using relative sector-specific CPIs (if data year is not 2013). Energy use represent raw renewables or fossil fuel energies and is based on EIA data for 2014. See Table 1 in Yang, Ingwersen et al. 2017 and Supporting Information 1, and the v1.1 data update notes (Ingwersen et al. 2017) for all details on environmental data sources used.N and P releases to water from manure were updated in v1.1, using common data from the approach in the EPA GHG inventory for estimating manure ammonia emissions (see Ingwersen et al. 2017 for details). Water use is based on USDA's Farm and Ranch Irrigation Survey (USDA 2009b). Livestock water withdrawals by state and source (groundwater, on-farm surface water, and offfarm surface water) based on USGS water accounts were assigned to specific livestock types based on U.S. livestock inventories (USDA 2014) and estimates of water use by livestock type (Lovelace 2009). Land use is based on the Census of Agriculture (USDA, 2009a). Grazing land, including pasture and range and grazed forestland, was allocated to sectors based on shares of farm land as follows: 93% to beef cattle ranching and farming, 5% to dairy cattle and milk production, and 2% to animal production, except cattle and poultry and eggs (USDA 2009a).

## Data collection
2015-2016

## Sampling procedure
US federal government sources, including surveys and US EPA emissions databases are used as the primary sources. From these sources, data for US reporting establishments/facilities are aggregated by the NAICS sector as defined in the BEA detailed 2007 input-output tables. When level of sector aggregation differs, or when direct emissions are not reported but modeled, additional sources are used to make allocations and estimates.

## Review details
In regard to quality assurance and peer-review, each dataset created went through Quality Assurance as defined in a quality assurance project plans at US EPA, CSRA or ERG. The model was assembled with the IO model builder model (USEPA 2016c). Validation functions were used to check that all the model components were properly assembled and harmonized. Bayou Demeke and Santosh Ghimire provided internal peer review of the model methodology and the manuscript underwent standard EPA management review. An editor and two anonymous reviewers at the Journal of Cleaner Production reviewed the model. In regard to data quality evaluation, data quality assessment was performed at the flow and process levels according to the updated US EPA data quality assessment guidelines as defined in US EPA (2016b).

## Intended application
The primary application is for use in the US Environmentally-Extended Input-Ouput model, USEEIO, version 1.1. This model is being used by the US EPA for supporting tools that prioritize goods and services based on potential environmental impacts, resource use or emissions for large regions, including the US and US states, and as a strealined tool for organizations as a starting point to consider sustainable materials management. Model results are designed to provide meso/macro-level decision support.

## Project
USEEIO v1.1 was developed by the US EPA with CSRA and ERG with Wesley W. Ingwersen and David E. Meyer as research leads. Yi Yang was the technical lead on the work for CSRA (contract EP-C-15-012); Troy Hawkins was lead for ERG (contract EP-C-12-021).

## Sources
- Lovelace 2009
- USEPA 2015b
- Kim et el. 2013
- BLM 2008
- USEPA 2015a
- USEPA 2016c
- USEPA 2016b
- Ingwersen et al. DRAFT
- Ingwersen et al. 2017
- EIA 2013
- Goebes et al. 2003
- USDA 2016
- Blackhurst et al. 2010
- EIA 2015
- USDA 2009b
- EIA 2016
- USDA 2009a
- Edelen and Ingwersen 2017
- USDA 2006
- Yienger et al. 1995
- BEA 2015
- USEPA 2016a
- Nickerson et al. 2011
- Maupin et al. 2014
- USGS 2016
- Torcellini et al. 2003
- USDA 2014
- USGS 2015
- EIA 2017
- Macknick et al. 2011
- Statistics Canada 2010
