# Gaskets, seals, musical instruments, fasteners, brooms, brushes, mop and other misc. goods; at manufacturer

Dataset: openLCA process, unit process
Category: 3399: Other Miscellaneous Manufacturing
Geography: United States
Time period: 2017-01-01 to 2017-12-31
Data quality: US EPA - Process Pedigree Matrix (1;1)
Exchange data quality scheme: US EPA - Flow Pedigree Matrix
Generated by: US EPA with CSRA and ERG
Owner: US EPA
Published in: Yang, Ingwersen et al. 2017
restrictionsDescription: This model shold be appropriately cited (see Yang, Ingwersen et al. 2017 source or Publication field) when used. Any changes or derivations of this model by the user should be documented. The model itself and any results from use of this model shall not be construed to consitute US EPA opinion or policy.
copyright: false

## General comment
BEA Code & Name is '339990:All other miscellaneous manufacturing'. Description of the primary industry producing this good or service, adapted from the Census Bureau NAICS 2007 descriptions: This industry comprises establishments primarily engaged in miscellaneous manufacturing (except medical equipment and supplies, jewelry and flatware, sporting and athletic goods, dolls, toys, games, office supplies (except paper), and signs).

## Technology
The process describes the average US production of this good or service within this NAICS-based grouping defined in the BEA 2007 detailed input-output tables (BEA 2015). Distribution, wholesale and retailing of this good or service, use, and final disposal are not included. Creation of a product system with this process will enable modeling of all upstream (supply-chain) activities.

## Geography
Data represent the 50 US states

## Time period
2017 was the year in which this version of USEEIO was released and is the target date for the model

## Reference product
- Gaskets, seals, musical instruments, fasteners, brooms, brushes, mop and other misc. goods; at manufacturer: 1 USD

## Inputs from technosphere
All rows: data quality (1,3,1,1,1)
- Aluminum; at manufacturer: 0.00412894 USD
- Compressed Gases; at manufacturer: 0.000253542 USD
- Scientific research and development: 0.000105362 USD
- Vehicle bodies; at manufacturer: 6.04212e-7 USD
- Refined vegetable, olive, and seed oils; at manufacturer: 1.24048e-7 USD
- Metal plumbing drains, faucets, valves, and other fittings; at manufacturer: 9.00551e-6 USD
- Secondary steel products; at manufacturer: 0.00128544 USD
- Timber and raw forest products; at forest: 0.00473016 USD
- Wireless telecommunications: 0.00129923 USD
- Telecommunications: 0.00459062 USD
- Computer systems design: 0.00250429 USD
- Performances: 3.48381e-5 USD
- Waste management and remediation: 0.00200795 USD
- Other nonmetallic mineral products; at manufacturer: 3.43083e-8 USD
- Signal testing instruments; at manufacturer: 1.57982e-6 USD
- Vehicle repair: 0.000680123 USD
- State and local government enterprises: 0.000704109 USD
- Secondary copper products; at manufacturer: 0.00246328 USD
- Specialized design: 0.00170381 USD
- Ink and ink cartridges; at manufacturer: 4.56456e-5 USD
- Unrefined oil and gas; at extraction site: 3.57607e-5 USD
- Watches, clocks, and other measuring and controlling devices; at manufacturer: 7.14799e-5 USD
- Truck trailers; at manufacturer: 5.77942e-7 USD
- All other forging, stamping, and sintering; at manufacturer: 0.00178517 USD
- Cardboard; at manufacturer: 0.00294253 USD
- Motors and generators; at manufacturer: 0.000200995 USD
- Abrasive products; at manufacturer: 0.00247433 USD
- Analytical laboratory instruments; at manufacturer: 7.7534e-8 USD
- Passenger ground transport: 0.00049634 USD
- Chemicals (except basic chemicals, agrichemicals, polymers, paints, pharmaceuticals,soaps, cleaning compounds); at manufacturer: 0.0013145 USD
- Vehicle rental and leasing: 0.000965189 USD
- Rubber tires; at manufacturer: 2.45361e-5 USD
- Home furniture - Cabinets and non-wood, nonupholstered; at manufacturer: 0.00158402 USD
- Lime and gypsum products; at manufacturer: 8.02294e-6 USD
- Screws, nuts, and bolts; at manufacturer: 0.00371562 USD
- Wooden windows, door, and flooring; at manufacturer: 0.000120232 USD
- Air and gas compressors; at manufacturer: 1.59382e-5 USD
- Railroad rolling stock; at manufacturer: 6.96157e-7 USD
- Golf courses, marinas, ski resorts, fitness and other rec centers and industries: 0.000212801 USD
- Motor vehicle steering, suspension components (except spring), and brake systems; at manufacturer: 3.78961e-5 USD
- Other textiles; at manufacturer: 3.95106e-6 USD
- Clothing; at manufacturer: 0.00013788 USD
- Ophthalmic goods; at manufacturer: 3.43609e-5 USD
- Wholesale trade: 0.0401032 USD
- Marketing research and all other miscellaneous professional, scientific, and technical services: 0.00606473 USD
- Lumber and treated lumber; at manufacturer: 0.00495998 USD
- Civic, social, professional, and similar organizations: 0.000562444 USD
- Metal structural products; at manufacturer: 0.00167808 USD
- other miscellaneous electrical equipment and components; at manufacturer: 9.69334e-6 USD
- Used and secondhand goods: 6.86459e-5 USD
- Polystyrene foam products; at manufacturer: 0.000139445 USD
- Relay and industrial controls; at manufacturer: 0.000899673 USD
- Household goods repair: 0.000249782 USD
- Buildings and dwellings services: 0.00319835 USD
- Lessors of nonfinancial intangible assets: 0.0145692 USD
- Cutting and machine tool accessory, rolling mill, and other metalworking machines; at manufacturer: 0.00185787 USD
- Surgical appliance and supplies; at manufacturer: 9.18042e-7 USD
- Audio and video equipment; at manufacturer: 1.15745e-5 USD
- Optical instruments and lenses; at manufacturer: 8.6391e-9 USD
- Power boilers and heat exchangers; at manufacturer: 2.59383e-5 USD
- Laminated plastic plates and shapes; at manufacturer: 0.00132167 USD
- Nonresidential building repair and maintanence: 0.00182451 USD
- Air transport: 0.00231016 USD
- Computer storage device readers; at manufacturer: 1.18486e-6 USD
- Stationery; at manufacturer: 6.70405e-7 USD
- Software: 0.000242382 USD
- Plastic pipe, fittings, and sausage casings; at manufacturer: 0.00344341 USD
- Newspapers; at publisher: 9.599e-10 USD
- Office furniture and custom architectural woodwork and millwork; at manufacturer: 1.14099e-7 USD
- Postal service: 0.00170781 USD
- Plastic bottles; at manufacturer: 1.32202e-5 USD
- Vehicles and parts sales: 0.000326652 USD
- Electronic equipment repair and maintenance: 0.000911378 USD
- Telephones; at manufacturer: 1.31651e-7 USD
- Fertilizers; at manufacturer: 1.02524e-6 USD
- Veneer, plywood, and engineered wood; at manufacturer: 0.00170121 USD
- Advertising and public relations: 0.0124571 USD
- Vegetable oils and by-products; at manufacturer: 1.28932e-5 USD
- Warehousing: 0.00570545 USD
- Light gauge metal cans, boxes, and containers; at manufacturer: 0.00149978 USD
- Packaging machinery; at manufacturer: 5.619e-6 USD
- Curtains and linens; at manufacturer: 6.61228e-5 USD
- Sports: 0.000105268 USD
- Metal cutting and forming machine tools; at manufacturer: 4.2966e-6 USD
- Construction machinery; at manufacturer: 2.48252e-6 USD
- Light bulbs; at manufacturer: 3.4984e-5 USD
- Paper bags and coated paper; at manufacturer: 0.000145365 USD
- Signs; at manufacturer: 2.19866e-5 USD
- Investigation and security: 0.00089174 USD
- Hydraulic pumps, motors, cylinders and actuators; at manufacturer: 0.00023753 USD
- Springs and wires; at manufacturer: 0.00226424 USD
- Wiring devices; at manufacturer: 0.000564619 USD
- Other secondary nonferrous metal products; at manufacturer: 0.00434454 USD
- Leather; at manufacturer: 8.32585e-5 USD
- Semiconductors; at manufacturer: 0.00543238 USD
- Custom metal rolls; at manufacturer: 0.00189901 USD
- Lids, jars, bottle caps, other metal closures and crowns; at manufacturer: 0.0015257 USD
- Insurance agencies and brokerages: 0.00104879 USD
- Cardboard containers; at manufacturer: 0.0154813 USD
- Sand, gravel, clay, phosphate, other nonmetallic minerals; at mine: 1.80422e-5 USD
- Copper, nickel, lead, and zinc; at mine: 5.8503e-5 USD
- Storage batteries; at manufacturer: 1.55291e-5 USD
- Office supplies (not paper); at manufacturer: 6.73829e-8 USD
- Vehicle metal stamping; at manufacturer: 4.42865e-7 USD
- Packaged meat (except poultry); at manufacturer: 0.000241222 USD
- Drinking water and wastewater treatment; at consumer: 0.000669237 USD
- Synthetic dyes and pigments; at manufacturer: 0.00138455 USD
- Jewelry and silverware; at manufacturer: 1.35411e-5 USD
- Urethane and other foam products; at manufacturer: 0.00020561 USD
- Concrete pipe, bricks, and blocks; at manufacturer: 1.28788e-5 USD
- Gasoline, fuels, and by-products of petroleum refining; at manufacturer: 0.0012552 USD
- Vehicle electrical and electronic equipment; at manufacturer: 4.06613e-6 USD
- Cast iron and steel; at manufacturer: 0.000160016 USD
- Ready-mix concrete; at manufacturer: 1.06841e-6 USD
- Fiber, yarn, and thread; at manufacturer: 0.00374172 USD
- Other basic organic chemicals; at manufacturer: 0.00135463 USD
- Travel arrangement and reservation: 8.00113e-7 USD
- Light fixtures; at manufacturer: 4.648e-6 USD
- Switchgear and switchboards; at manufacturer: 1.02643e-5 USD
- Water transport (boats, ships, ferries): 0.000526017 USD
- Computer terminals and other computer peripheral equipment; at manufacturer: 7.73686e-5 USD
- Communication and energy wire and cable; at manufacturer: 6.26501e-5 USD
- Ground or treated minerals and earth; at manufacturer: 0.00280193 USD
- Printed circuit and electronic assembly; at manufacturer: 0.00234252 USD
- Magazines and journals; at publisher: 0.000585376 USD
- Air conditioning, refrigeration, and warm air heating equipment; at manufacturer: 0.000461673 USD
- Employment services: 0.00114516 USD
- Wireless communications; at manufacturer: 2.13827e-5 USD
- Paper; at manufacturer: 0.000715691 USD
- Other primary nonferrous metals; at manufacturer: 0.00026337 USD
- Mechanical power transmission equipment; at manufacturer: 3.93274e-5 USD
- Nonferrous metal casts; at manufacturer: 0.00215917 USD
- Finished and coated fabric; at manufacturer: 0.00645902 USD
- Metal hinges, keys, lock, and other hardware; at manufacturer: 0.0024384 USD
- Noncomparable imports: 0.0032539 USD
- Dry-cleaning and laundry: 3.49746e-5 USD
- Transmission and power train parts; at manufacturer: 4.20819e-5 USD
- Other transportation equipment; at manufacturer: 1.42394e-7 USD
- Architectural, engineering, and related services: 0.00679859 USD
- Industrial process furnaces and ovens; at manufacturer: 1.12661e-6 USD
- Aluminum products; at manufacturer: 0.00309167 USD
- Plastics; at manufacturer: 0.0335623 USD
- Synthetic rubber and artificial and synthetic fibers; at manufacturer: 0.0322516 USD
- Electronic capacitors, resistors, coils, transformers, connectors and other components (except semiconductors and printed circuit assemblies); at manufacturer: 0.000761843 USD
- Metal coatings, engravings, and heat treatments; at manufacturer: 0.00590967 USD
- Speed changers, industrial high-speed drives, and gears; at manufacturer: 7.40919e-5 USD
- Industrial molds; at manufacturer: 6.89866e-6 USD
- Management consulting: 0.00270005 USD
- Dimensional stone; at mine: 9.50301e-8 USD
- Other vehicle parts; at manufacturer: 0.00154667 USD
- Industrial process variable instruments; at manufacturer: 1.59893e-5 USD
- Fabric; at manufacturer: 0.00411845 USD
- Natural gas; at consumer: 0.00405223 USD
- Sanitary paper (tissues, napkins, diapers, etc.); at manufacturer: 9.21752e-8 USD
- Rail transport: 0.0027942 USD
- Satellite, telecommunications resellers, and all other telecommunications: 0.000280584 USD
- Commercial equipment rental: 0.000604555 USD
- Animal farms and aquaculture ponds (except cattle and poultry): 0.00020951 USD
- Other concrete products; at manufacturer: 2.07596e-5 USD
- Nondepository credit intermediation and related activities: 0.00384859 USD
- Other petroleum and coal products; at manufacturer: 0.00143573 USD
- Paints and coatings; at manufacturer: 0.017818 USD
- Limited-service restaurants: 0.00170276 USD
- Vehicle engines and engine parts; at manufacturer: 7.23583e-5 USD
- Plywood and veneer; at manufacturer: 0.00475325 USD
- Accounting, tax preparation, bookkeeping, and payroll: 0.00444078 USD
- Promoters and agents: 7.05103e-5 USD
- Soap and cleaning compounds; at manufacturer: 0.000870055 USD
- Heavy duty trucks; at manufacturer: 1.60248e-6 USD
- Metal windows, doors, and architectural products; at manufacturer: 0.000195914 USD
- Valve and fittings (except for plumbing); at manufacturer: 0.00126214 USD
- Plastic bags, films, and sheets; at manufacturer: 0.0136944 USD
- Monetary authorities and depository credit intermediation: 0.0076359 USD
- Other support services: 0.00137624 USD
- Carpets and rugs; at manufacturer: 5.0093e-7 USD
- Custom computer programming: 1.61971e-5 USD
- Full-service restaurants: 0.000993529 USD
- Ball and roller bearings; at manufacturer: 0.00129176 USD
- Vending, commercial laundry, and other commercial and service industry machinery; at manufacturer: 0.000227298 USD
- Glass and glass products; at manufacturer: 6.43262e-5 USD
- Data processing and hosting: 0.00458288 USD
- Welding and Soldering Equipment, Scales and Balances, and other general purpose machinery; at manufacturer: 0.000609257 USD
- Office administration: 0.000380697 USD
- Gaskets, seals, musical instruments, fasteners, brooms, brushes, mop and other misc. goods; at manufacturer: 0.0384967 USD
- Machinery for the paper, textile, food or other industries (except semiconductor machinery); at manufacturer: 1.78969e-5 USD
- Other plastic products; at manufacturer: 0.00315209 USD
- Insurance carriers: 0.00328556 USD
- Mineral wool; at manufacturer: 4.08983e-6 USD
- General merchandise stores: 2.81002e-6 USD
- Legal services: 0.00590841 USD
- Securities and commodities brokerage and exchanges: 0.0138667 USD
- Specialty transformers; at manufacturer: 0.000122038 USD
- Other rubber products; at manufacturer: 0.000910622 USD
- Commercial machinery repair: 0.00132361 USD
- Clay and ceramic products; at manufacturer: 1.56187e-5 USD
- Heavy gauge metal tanks; at manufacturer: 2.63106e-5 USD
- Primary copper; at manufacturer: 3.41035e-6 USD
- Cement; at manufacturer: 3.31451e-6 USD
- Independent artists, writers, and performers: 0.000213497 USD
- Rubber and plastic belts and hoses; at manufacturer: 2.66889e-5 USD
- Hotels and campgrounds: 0.000991545 USD
- Asphalt pavement; at manufacturer: 6.26586e-6 USD
- Material handling equipment; at manufacturer: 0.000152275 USD
- Pumps and pumping equipment; at manufacturer: 1.50051e-5 USD
- Special tools, dies, jigs, and fixtures; at manufacturer: 8.35086e-6 USD
- Company and enterprise management: 0.0575759 USD
- Investment advice, portfolio management, and other financial advising services: 0.000284107 USD
- All other food and drinking places: 0.000174207 USD
- Air purification and ventilation equipment; at manufacturer: 6.39709e-6 USD
- Iron, gold, silver, and other metal ores; at mine: 5.23183e-5 USD
- Heating equipment other than warm air furnaces; at manufacturer: 4.84167e-8 USD
- Plastics and rubber industry machinery; at manufacturer: 7.09792e-5 USD
- Small electrical appliances; at manufacturer: 6.01695e-6 USD
- Petrochemicals; at manufacturer: 6.82162e-5 USD
- Environmental and other technical consulting services: 0.000657227 USD
- Machine shops; at manufacturer: 0.0265252 USD
- Electricity; at consumer: 0.00557781 USD
- Adhesives; at manufacturer: 0.000174207 USD
- Books, newspapers, magazines, and other print media; at manufacturer: 1.35548e-6 USD
- Cutlery and handtools; at manufacturer: 0.00116846 USD
- Vehicle seating and interior trim (upholstery); at manufacturer: 0.000163816 USD
- Other engine equipment; at manufacturer: 2.49817e-5 USD
- Automatic controls for HVAC and refrigeration equipment; at manufacturer: 9.1318e-6 USD
- Food and beverage stores: 9.84962e-7 USD
- Greenhouse crops, mushrooms, nurseries, and flowers; at farm: 0.0121503 USD
- Primary iron, steel, and ferroalloy products; at manufacturer: 0.0435463 USD
- Pipeline transport: 3.62436e-5 USD
- Toiletries; at manufacturer: 1.05524e-5 USD
- Consumer goods and general rental centers: 0.000106229 USD
- All other converted paper products; at manufacturer: 1.63888e-6 USD
- Wood kitchen cabinets and countertops; at manufacturer: 1.97528e-5 USD
- Coal; at mine: 2.11331e-5 USD
- Other computer related services, including facilities management: 0.000871652 USD
- Fabricated pipe and pipe fittings; at manufacturer: 4.20841e-6 USD
- Metal pipe fittings, ball and roller bearings, industrial patterns, metal bath fixtures, other misc. fabricated metals; at manufacturer: 0.0129943 USD
- Wood pulp; at manufacturer: 6.42758e-5 USD
- Communications equipment; at manufacturer: 4.9869e-6 USD
- Scenic and sightseeing transportation and support activities for transportation: 0.000381186 USD
- Facilities support: 0.000500894 USD
- Other real estate: 0.00242462 USD
- Tobacco, cotton, sugarcane, peanuts, sugar beets, herbs and spices, and other crops; at farm: 7.41653e-6 USD
- Business support: 0.00192001 USD
- Shelving and lockers; at manufacturer: 7.76968e-6 USD
- Truck transport: 0.0132696 USD
- Other basic inorganic chemicals; at manufacturer: 0.00018409 USD
- Other retail: 8.76992e-5 USD

## Inputs from nature
- Energy, solar: 0.00142602 MJ; data quality (3,1,1,1,1)
- Energy, biomass: 1.18026e-6 MJ; data quality (3,1,1,1,1)
- Occupation, industrial area, built up: 0.000210696 m2*a; data quality (4,2,1,1,1)
- Water, fresh: 0.000305511 m3; data quality (1,2,1,4,2)
- Water, fresh: 0.000703685 m3; data quality (2,2,1,4,2)
- Occupation, urban, discontinuously built: 0.000182984 m2*a; data quality (4,2,1,1,1)
- Water, saline: 2.43909e-5 m3; data quality (4,2,1,4,2)
- Occupation, industrial area: 0.000632087 m2*a; data quality (4,2,1,1,1)
- Energy, wind: 0.00111924 MJ; data quality (3,1,1,1,1)

## Emissions to nature
- Acrylic acid: 5.25588e-13 kg; data quality (4,1,1,1,4)
- toluene: 2.3121e-12 kg; data quality (5,1,1,1,4)
- Diethylene glycol butyl ether: 1.16505e-7 kg; data quality (4,2,1,1,5)
- Phosphorus: 5.32503e-8 kg; data quality (2,1,1,1,5)
- Nitrilotriacetic acid: 7.8261e-15 kg; data quality (5,1,1,1,4)
- dibenzofuran: 3.77286e-12 kg; data quality (4,2,1,1,5)
- methane, chlorodifluoro-, hcfc-22: 7.63522e-14 kg; data quality (4,1,1,1,4)
- benzo(a)pyrene: 9.22787e-12 kg; data quality (2,2,1,1,5)
- Dibenz(a,h)anthracene: 1.04437e-13 kg; data quality (2,2,1,1,5)
- MOLYBDENUM(VI): 1.33451e-13, 7.29655e-13 kg (2 entries, compartments not in this file); data quality (3,1,1,1,5)
- Zinc: 5.79127e-10 kg; data quality (5,1,1,1,4)
- Ethylene glycol monoethyl ether: 2.98792e-12 kg; data quality (5,1,1,1,4)
- methanol: 1.59103e-6 kg; data quality (4,2,1,1,5)
- particulates, < 2.5 um: 1.3097e-5 kg; data quality (3,2,1,1,5)
- HCFC-225ca: 2.09969e-14 kg; data quality (5,1,1,1,4)
- acenaphthene: 1.49546e-11 kg; data quality (3,2,1,3,2)
- antimony: 7.65337e-11 kg; data quality (2,1,1,1,5)
- PHTHALIC ANHYDRIDE: 1.90881e-15, 1.3961e-10 kg (2 entries, compartments not in this file); data quality (3,1,1,1,4)
- QUINOLINE: 7.83972e-14 kg; data quality (2,1,1,1,4)
- pentachlorophenol: 5.7881e-13 kg; data quality (3,2,1,1,5)
- cyclohexane: 7.86225e-9 kg; data quality (4,1,1,1,5)
- TERT-BUTYL ALCOHOL: 1.6034e-14 kg; data quality (4,1,1,1,4)
- Methyl iodide: 1.83783e-12 kg; data quality (4,2,1,1,5)
- HCFC-225cb: 2.99682e-14 kg; data quality (2,1,1,1,4)
- Dimethoxy methane: 2.07899e-10 kg; data quality (2,2,1,1,4)
- Benzo(k)fluoranthene: 3.45683e-13 kg; data quality (2,2,1,2,3)
- 3-Iodo-2-propynyl butylcarbamate: 1.93292e-12 kg; data quality (4,1,1,1,4)
- Xylene: 4.69841e-12, 1.34871e-12 kg (2 entries, compartments not in this file); data quality (4,1,1,1,4)
- Ethane, 1,1,1,2-tetrafluoro-, HFC-134a: 4.12651e-7 kg; data quality (4,2,1,4,1)
- diethanolamine: 4.10192e-10 kg; data quality (3,2,1,1,5)
- chlorine: 3.68705e-12 kg; data quality (2,1,1,1,4)
- Cobalt: 8.53553e-13 kg; data quality (4,1,1,1,5)
- 1,2-DICHLOROETHYLENE: 6.79535e-15 kg; data quality (5,1,1,1,4)
- Thiram: 5.46648e-11, 1.02215e-12, 1.63878e-10 kg (3 entries, compartments not in this file); data quality (4,1,1,1,5)
- Phenol, 2,4-dimethyl-: 7.48466e-14 kg; data quality (4,1,1,1,4)
- 1,2-BUTYLENE OXIDE: 1.03521e-11 kg; data quality (4,2,1,1,4)
- acetaldehyde: 1.71614e-7 kg; data quality (3,2,1,1,5)
- Triethyl amine: 1.53812e-6 kg; data quality (4,2,1,1,5)
- CHLORONAPHTHALENE: 7.7345e-15 kg; data quality (1,2,1,1,5)
- methyl isobutyl ketone: 6.4504e-6 kg; data quality (3,2,1,1,5)
- t-butyl methyl ether: 6.45181e-10 kg; data quality (3,2,1,1,5)
- ammonia: 3.22383e-6 kg; data quality (3,2,1,1,5)
- phthalate, dioctyl-: 1.00029e-7 kg; data quality (3,2,1,1,5)
- Phthalate, dioctyl-: 2.02168e-12, 2.0487e-9 kg (2 entries, compartments not in this file); data quality (4,1,1,1,5)
- ETHYLENETHIOUREA: 6.58591e-11 kg; data quality (5,2,1,1,5)
- Methane, dibromo-: 3.89175e-13 kg; data quality (5,1,1,1,4)
- Aluminum: 1.28671e-10 kg; data quality (4,1,1,1,4)
- Benzene, ethyl-: 7.05943e-13, 1.23e-13 kg (2 entries, compartments not in this file); data quality (4,1,1,1,4)
- Hexachlorocyclopentadiene: 1.94936e-13 kg; data quality (3,2,1,1,5)
- 2-chloro-1-phenylethanone: 4.55741e-12 kg; data quality (2,2,1,1,5)
- benzene, chloro-: 2.89545e-10 kg; data quality (4,2,1,1,5)
- Propene, 1,3-dichloro-: 9.71982e-12 kg; data quality (3,2,1,1,5)
- Chromium VI: 1.31387e-9 kg; data quality (3,2,1,1,5)
- cobalt: 2.14348e-14 kg; data quality (4,1,1,1,5)
- PHOSPHORUS: 2.01706e-10 kg; data quality (2,2,1,1,5)
- Hydrocarbons, aromatic: 1.07282e-9 kg; data quality (4,2,1,2,3)
- lead: 4.70004e-12, 3.25726e-11 kg (2 entries, compartments not in this file); data quality (3,1,1,1,5)
- DIETHANOLAMINE: 1.2008e-13, 1.17468e-12 kg (2 entries, compartments not in this file); data quality (4,1,1,1,4)
- 2,4/2,6-toluenediisocyanate (mixture): 4.30403e-11 kg; data quality (2,1,1,1,5)
- Styrene: 1.07844e-11 kg; data quality (3,1,1,1,5)
- butadiene: 4.34831e-9 kg; data quality (2,2,1,1,4)
- Cumene hydroperoxide: 1.34127e-10 kg; data quality (2,1,1,1,5)
- PYRIDINE: 8.43692e-14, 7.36799e-14 kg (2 entries, compartments not in this file); data quality (4,1,1,1,4)
- hydrogen sulfide: 8.25318e-8 kg; data quality (3,2,1,1,5)
- Benzo(b)fluoranthene: 5.83624e-13 kg; data quality (2,2,1,2,4)
- benz[a]anthracene: 4.22571e-11 kg; data quality (2,2,1,1,4)
- nitric acid: 7.04202e-9, 1.70711e-14 kg (2 entries, compartments not in this file); data quality (3,1,1,1,5)
- methane, bromo-, halon 1001: 5.61335e-10 kg; data quality (3,2,1,1,5)
- BUTYL ACRYLATE: 2.05774e-12, 2.46575e-10 kg (2 entries, compartments not in this file); data quality (4,1,1,1,4)
- N-(3-CHLORALLYL) HEXAMINIUM CHLORIDE: 3.36265e-11, 6.21001e-12 kg (2 entries, compartments not in this file); data quality (3,1,1,1,4)
- carbonyl sulfide: 2.43018e-9 kg; data quality (4,2,1,1,5)
- PCB-1: 6.45846e-21 kg; data quality (2,2,1,1,5)
- Naphthalene: 2.6059e-12 kg; data quality (4,1,1,1,4)
- toluene: 1.29722e-5 kg; data quality (3,2,1,1,5)
- CHLOROPRENE: 2.63379e-11 kg; data quality (2,2,1,1,4)
- ammonia: 1.25042e-8 kg; data quality (3,1,1,1,5)
- 2-(2-BUTOXYETHOXY) ETHYL ACETATE: 1.74941e-10 kg; data quality (5,2,1,1,4)
- Polychlorinated biphenyls: 3.43929e-14 kg; data quality (3,1,1,1,5)
- nickel: 4.51626e-11, 4.34069e-11 kg (2 entries, compartments not in this file); data quality (4,1,1,1,5)
- 2-PHENYLPHENOL: 5.61189e-14, 4.96289e-14 kg (2 entries, compartments not in this file); data quality (3,1,1,1,4)
- acetonitrile: 1.67162e-10 kg; data quality (3,2,1,1,4)
- fluorine: 1.38491e-11 kg; data quality (4,1,1,1,5)
- ethylene oxide: 1.97678e-8 kg; data quality (3,2,1,1,5)
- Vinyl acetate: 6.71736e-13 kg; data quality (4,1,1,1,4)
- Methane, tetrachloro-, R-10: 9.54403e-16, 1.31326e-13 kg (2 entries, compartments not in this file); data quality (3,1,1,1,4)
- 4-aminobiphenyl: 4.05034e-17 kg; data quality (5,2,1,1,5)
- Benzene, 1,2,4-trimethyl-: 2.43826e-13 kg; data quality (5,1,1,1,4)
- toluene, 2,4-dinitro-: 1.83766e-12 kg; data quality (5,2,1,1,4)
- ethene, tetrachloro-: 2.86993e-7 kg; data quality (3,2,1,1,5)
- 1-Methyl-2-pyrrolidinone: 1.79001e-8 kg; data quality (5,1,1,1,5)
- ACRYLAMIDE: 6.8717e-15 kg; data quality (4,1,1,1,4)
- barium: 1.37998e-12 kg; data quality (4,1,1,1,5)
- Propane, 1,1,1,3,3,3-hexafluoro-, HCFC-236fa: 1.26547e-9 kg; data quality (4,2,1,4,1)
- styrene: 3.48531e-6 kg; data quality (4,2,1,1,5)
- Formaldehyde: 2.09325e-13 kg; data quality (2,1,1,1,4)
- chromium: 4.0882e-11, 1.14968e-8, 2.13135e-8 kg (3 entries, compartments not in this file); data quality (4,1,1,1,5)
- 2-Mercaptobenzothiazole: 7.94129e-11, 1.02215e-12, 6.13292e-13 kg (3 entries, compartments not in this file); data quality (3,1,1,1,5)
- 1,4-dichlorobenzene: 4.50974e-12 kg; data quality (2,2,1,1,5)
- Indeno(1,2,3-cd)pyrene: 4.97685e-13 kg; data quality (2,2,1,2,4)
- Ethane, 1,1,1-trifluoro-, HFC-143a: 4.68427e-8 kg; data quality (4,2,1,4,1)
- Triethyl amine: 2.35928e-13 kg; data quality (5,1,1,1,4)
- formaldehyde: 3.0312e-6 kg; data quality (2,2,1,1,5)
- Phenol: 3.83312e-12 kg; data quality (3,1,1,1,5)
- ozone: 3.56452e-9 kg; data quality (4,1,1,1,5)
- particulates, < 10 um: 9.05518e-6 kg; data quality (3,2,1,1,5)
- bromine: 1.14528e-15 kg; data quality (5,1,1,1,4)
- chlorine: 4.80321e-8 kg; data quality (4,2,1,1,5)
- manganese: 3.28917e-8 kg; data quality (3,2,1,1,5)
- Benzyl chloride: 3.60509e-12 kg; data quality (3,1,1,1,4)
- phenol: 4.42118e-13 kg; data quality (3,1,1,1,4)
- selenium: 1.70711e-14 kg; data quality (4,1,1,1,5)
- Nitrogen: 6.4025e-7 kg; data quality (3,2,1,1,5)
- Ethylene glycol monoethyl ether: 3.53562e-11 kg; data quality (5,1,1,1,5)
- ETHYLENETHIOUREA: 1.02215e-13 kg; data quality (2,1,1,1,5)
- TERT-BUTYL ALCOHOL: 3.96021e-9, 6.52496e-7 kg (2 entries, compartments not in this file); data quality (4,1,1,1,5)
- 2-ethoxyethyl acetate: 8.49027e-9 kg; data quality (5,2,1,1,5)
- trichloroethylene: 1.43359e-6 kg; data quality (4,2,1,1,5)
- antimony: 2.23806e-10 kg; data quality (3,2,1,1,5)
- Water, fresh: 0.000843026 m3; data quality (2,2,1,4,2)
- oxadiazon: 3.82659e-9 kg; data quality (3,1,1,1,5)
- copper: 5.14887e-10, 3.04644e-10, 4.99688e-8 kg (3 entries, compartments not in this file); data quality (4,1,1,1,5)
- bromoform: 2.49625e-11 kg; data quality (3,2,1,1,5)
- silver: 2.98183e-14, 1.15047e-12 kg (2 entries, compartments not in this file); data quality (4,1,1,1,5)
- sulfur dioxide: 3.49748e-5 kg; data quality (2,2,1,1,5)
- QUINOLINE: 1.40309e-11 kg; data quality (3,2,1,1,5)
- Dinitrogen monoxide: 3.14187e-8 kg; data quality (4,2,1,4,1)
- M-CRESOL: 1.57286e-14 kg; data quality (3,1,1,1,4)
- Cobalt: 4.06962e-10 kg; data quality (3,2,1,1,5)
- phthalic anhydride: 1.62284e-10 kg; data quality (2,2,1,1,4)
- isophorone: 7.95475e-9 kg; data quality (3,2,1,1,5)
- Cyclohexanol: 4.59642e-13 kg; data quality (4,1,1,1,4)
- methane, monochloro-, r-40: 1.91318e-9 kg; data quality (3,2,1,1,5)
- propanal: 4.91435e-9 kg; data quality (3,2,1,2,4)
- ethyl acrylate: 2.19405e-10 kg; data quality (3,2,1,1,5)
- benzyl chloride: 4.53828e-10 kg; data quality (2,2,1,1,5)
- ethane, 1,2-dichloro-: 3.80994e-10 kg; data quality (3,2,1,1,5)
- Urethane: 3.76192e-14 kg; data quality (5,2,1,1,4)
- nitrogen oxides: 3.29879e-5 kg; data quality (2,2,1,1,5)
- Aniline: 1.33235e-14 kg; data quality (3,1,1,1,4)
- lead: 2.04955e-8 kg; data quality (3,2,1,1,5)
- 4-Methyl-2-pentanone: 9.54403e-14, 1.20959e-13 kg (2 entries, compartments not in this file); data quality (4,1,1,1,4)
- cyanide: 1.60382e-8 kg; data quality (2,2,1,1,5)
- MALEIC ANHYDRIDE: 5.91233e-13 kg; data quality (4,1,1,1,4)
- 1,3-PHENYLENEDIAMINE: 1.30914e-14 kg; data quality (4,1,1,1,5)
- Propene: 2.63109e-9 kg; data quality (3,1,1,1,5)
- hydrogen chloride: 4.61998e-6 kg; data quality (2,2,1,1,5)
- 1,1-DICHLOROETHYLENE: 1.0239e-12 kg; data quality (3,2,1,1,5)
- Chlorothalonil: 7.25751e-14 kg; data quality (5,1,1,1,4)
- 4-nitroaniline: 1.58431e-14 kg; data quality (5,1,1,1,4)
- hexane: 2.06952e-5 kg; data quality (3,2,1,1,5)
- acetamide: 3.81761e-16 kg; data quality (4,1,1,1,4)
- pyrene: 1.69252e-11 kg; data quality (2,2,1,1,5)
- NITROGLYCERIN: 8.39378e-12 kg; data quality (5,1,1,1,4)
- o-toluidine: 1.39274e-12 kg; data quality (4,2,1,1,5)
- arsenic: 4.72552e-10 kg; data quality (3,2,1,1,5)
- carbon tetrachloride: 1.4724e-9 kg; data quality (4,2,1,1,5)
- Hydrazine: 1.9037e-13 kg; data quality (4,2,1,1,4)
- catechol: 5.04688e-13 kg; data quality (2,1,1,1,4)
- hydroquinone: 5.65342e-11 kg; data quality (3,2,1,1,5)
- DMTT (DAZOMET): 2.13786e-14 kg; data quality (4,1,1,1,4)
- 2,2-BIS(4-HYDROXY-3,5-DIBROMOPHENYL)PROPANE: 8.37586e-13 kg; data quality (5,1,1,1,5)
- tertiary-Butyl Acetate: 2.13005e-6 kg; data quality (3,2,1,1,5)
- NITROUS ACID: 1.48198e-10 kg; data quality (5,1,1,1,5)
- Carbon dioxide: 0.0131171 kg; data quality (4,2,1,4,1)
- antimony: 3.11288e-12 kg; data quality (2,1,1,1,4)
- Phthalate, dimethyl-: 3.31385e-9 kg; data quality (4,2,1,1,5)
- 1,4-dioxane: 5.13889e-10 kg; data quality (3,2,1,1,5)
- Ethene, chloro-: 5.366e-9 kg; data quality (3,2,1,1,5)
- epichlorohydrin: 3.46463e-11 kg; data quality (3,2,1,1,5)
- Dimethyl sulfate: 3.22394e-11 kg; data quality (2,2,1,1,5)
- Chrysene: 7.52765e-12 kg; data quality (2,2,1,1,4)
- fluorene: 3.34895e-11 kg; data quality (2,2,1,2,3)
- Pentachloroethane: 3.70859e-13 kg; data quality (2,1,1,1,5)
- 4,4'-isopropylidenediphenol: 3.94419e-11 kg; data quality (4,1,1,1,4)
- biphenyl: 4.81015e-10 kg; data quality (4,2,1,1,4)
- fluoranthene: 6.40764e-12 kg; data quality (2,2,1,2,3)
- hexachlorobenzene: 8.68824e-15 kg; data quality (3,2,1,1,5)
- Benzo(a)anthracene: 2.47605e-14 kg; data quality (2,2,1,1,5)
- p-phenylenediamine: 6.8706e-13 kg; data quality (5,2,1,1,5)
- Nickel, ion: 7.72518e-13 kg; data quality (3,2,1,1,5)
- N,N-DIMETHYLANILINE: 3.5475e-8 kg; data quality (5,2,1,1,5)
- naphthalene: 4.05999e-8 kg; data quality (3,2,1,1,5)
- manganese: 7.8386e-11, 1.37922e-10 kg (2 entries, compartments not in this file); data quality (4,1,1,1,5)
- Decabromodiphenyl oxide: 1.93245e-10 kg; data quality (4,1,1,1,5)
- Dimethylamine: 3.11065e-12 kg; data quality (3,1,1,1,4)
- styrene: 4.61255e-11 kg; data quality (3,1,1,1,5)
- 2-(2-ETHOXYETHOXY) ETHYL ACETATE: 7.81842e-14 kg; data quality (5,2,1,1,4)
- monochloroethane: 7.22389e-10 kg; data quality (3,2,1,1,4)
- PERACETIC ACID: 3.81761e-15 kg; data quality (4,1,1,1,4)
- Butanol: 3.8361e-13, 1.07299e-14 kg (2 entries, compartments not in this file); data quality (5,1,1,1,4)
- METHACRYLONITRILE: 3.81761e-16 kg; data quality (5,1,1,1,4)
- mercury: 1.62172e-12, 7.1958e-14 kg (2 entries, compartments not in this file); data quality (3,1,1,1,5)
- Ethylene glycol monoethyl ether: 5.3229e-8 kg; data quality (4,2,1,1,5)
- carbon monoxide: 7.79559e-5 kg; data quality (2,2,1,1,4)
- methane, tetrachloro-, R-10: 4.6934e-12 kg; data quality (3,1,1,1,5)
- SEC-BUTYL ALCOHOL: 4.41436e-9 kg; data quality (5,1,1,1,5)
- butanol: 5.96863e-7 kg; data quality (5,1,1,1,5)
- para-xylene: 5.01185e-7 kg; data quality (3,2,1,1,5)
- Decabromodiphenyl oxide: 4.27572e-15 kg; data quality (4,1,1,1,4)
- Chromium, ion: 5.99383e-9 kg; data quality (2,2,1,1,5)
- Propane, 1,2-dichloro-: 1.3667e-15 kg; data quality (5,1,1,1,4)
- BENEFIN: 3.82659e-9 kg; data quality (5,1,1,1,5)
- Epichlorohydrin: 7.90139e-13 kg; data quality (2,1,1,1,4)
- ethane, 1,2-dibromo-: 4.82093e-11 kg; data quality (2,2,1,1,5)
- Chloroacetic acid: 1.43995e-12 kg; data quality (3,2,1,1,4)
- propargyl alcohol: 1.18616e-13, 2.1954e-11 kg (2 entries, compartments not in this file); data quality (4,1,1,1,4)
- trifluralin: 1.53093e-9 kg; data quality (4,1,1,1,5)
- Chloroform: 1.23668e-13, 9.97809e-14 kg (2 entries, compartments not in this file); data quality (3,1,1,1,4)
- VOC, volatile organic compounds: 0.000191129 kg; data quality (3,2,1,1,5)
- anthracene: 1.14539e-11 kg; data quality (3,2,1,1,5)
- 1,4-BENZOQUINONE: 5.38515e-12 kg; data quality (3,2,1,1,4)
- toluene: 1.60932e-11 kg; data quality (5,1,1,1,5)
- maleic anhydride: 7.98709e-11 kg; data quality (2,2,1,1,4)
- 2,4-Diaminotoluene: 7.48317e-14 kg; data quality (2,2,1,1,4)
- AMMONIA: 2.02868e-12 kg; data quality (3,1,1,1,4)
- hexachloro-1,3-butadiene: 8.65733e-14 kg; data quality (4,2,1,1,5)
- ethylene glycol: 1.61063e-12 kg; data quality (5,1,1,1,5)
- Sodium formate: 1.94679e-13 kg; data quality (3,1,1,1,4)
- 4,4'-METHYLENEDIANILINE: 3.02405e-12 kg; data quality (4,2,1,1,5)
- Methane, dichloro-, HCC-30: 5.15378e-14 kg; data quality (5,1,1,1,4)
- n-nitrosodimethylamine: 1.48238e-15 kg; data quality (5,2,1,1,5)
- benzene, ethyl-: 2.08473e-6 kg; data quality (3,2,1,1,5)
- 2,4-dimethylphenol: 1.01799e-11 kg; data quality (4,1,1,1,4)
- Nitrobenzene: 1.62569e-13 kg; data quality (4,2,1,1,4)
- HYDROQUINONE: 9.51004e-14 kg; data quality (2,1,1,1,4)
- 1,2,4-trimethylbenzene: 1.70524e-12 kg; data quality (5,1,1,1,4)
- Ethane, pentafluoro-, HFC-125: 1.09482e-7 kg; data quality (4,2,1,4,1)
- Vinyl acetate: 5.11077e-13 kg; data quality (4,1,1,1,5)
- o-Xylene: 4.88557e-7 kg; data quality (3,2,1,1,5)
- ethane, 1,1,2-trichloro-: 1.12853e-13 kg; data quality (4,2,1,1,4)
- 2,4-dinitrophenol: 2.97346e-12 kg; data quality (5,2,1,1,5)
- Folpet: 1.93534e-13 kg; data quality (4,1,1,1,4)
- ACETONE CYANOHYDRIN: 2.18367e-12 kg; data quality (3,1,1,1,4)
- propylene oxide: 4.64786e-9 kg; data quality (3,2,1,1,5)
- Phthalate, dimethyl-: 2.04094e-13 kg; data quality (4,1,1,1,4)
- Phosphine: 3.17468e-15 kg; data quality (4,2,1,1,4)
- Ethene, trichloro-: 2.98183e-14 kg; data quality (5,1,1,1,5)
- vinyl acetate: 1.71832e-8 kg; data quality (4,2,1,1,4)
- ALLYL ALCOHOL: 2.04555e-12 kg; data quality (4,1,1,1,4)
- Benzo(g,h,i)perylene: 4.88478e-10 kg; data quality (3,2,1,1,5)
- methanol: 5.16878e-8 kg; data quality (3,1,1,1,5)
- Hydrazine, methyl-: 1.05864e-10 kg; data quality (2,2,1,1,5)
- nickel: 3.03326e-9 kg; data quality (3,2,1,1,5)
- o-cresol: 1.63319e-13 kg; data quality (4,2,1,1,5)
- phenol: 3.72582e-8 kg; data quality (4,2,1,1,5)
- 2,4,6-trichlorophenol: 1.24454e-14 kg; data quality (2,2,1,1,5)
- ethylbenzene: 2.81139e-7 kg; data quality (4,1,1,1,5)
- ETHENE: 7.11829e-12 kg; data quality (3,1,1,1,4)
- acenaphthylene: 3.45166e-11 kg; data quality (3,2,1,2,4)
- formic acid: 3.69748e-9 kg; data quality (3,1,1,1,5)
- chloroform: 6.67661e-10 kg; data quality (4,2,1,1,5)
- p-cresol: 7.16771e-13 kg; data quality (4,2,1,1,4)
- ALUMINUM OXIDE: 6.79857e-13, 3.0711e-11 kg (2 entries, compartments not in this file); data quality (5,1,1,1,5)
- Bis(2-chloroethyl)ether: 3.81761e-16 kg; data quality (2,1,1,1,4)
- Pendimethalin: 5.18885e-9 kg; data quality (5,1,1,1,5)
- dimethyl formamide: 2.34988e-9 kg; data quality (4,2,1,1,5)
- 1-Methyl-2-pyrrolidinone: 6.58644e-13 kg; data quality (5,1,1,1,4)
- CATECHOL: 4.58113e-15 kg; data quality (2,1,1,1,4)
- 4,4'-METHYLENEBIS(2-CHLOROANALINE): 1.81448e-10 kg; data quality (5,2,1,1,5)
- 2-METHYLPYRIDINE: 6.22271e-17 kg; data quality (3,1,1,1,4)
- m-cresol: 3.09986e-13 kg; data quality (4,2,1,1,4)
- Carbaryl: 3.82659e-9 kg; data quality (5,1,1,1,5)
- Water, saline: 1.23588e-5 m3; data quality (4,2,1,4,2)
- acrylic acid: 3.61578e-9 kg; data quality (4,2,1,1,4)
- 1,2,4-trichlorobenzene: 3.0092e-14 kg; data quality (3,2,1,1,5)
- Formic acid: 3.12699e-13 kg; data quality (3,1,1,1,4)
- Bisphenol A: 3.81761e-16 kg; data quality (4,1,1,1,4)
- Sodium formate: 1.34126e-12 kg; data quality (3,1,1,1,5)
- ethylene glycol: 1.21785e-6 kg; data quality (3,2,1,1,5)
- aniline: 2.04332e-10 kg; data quality (4,2,1,1,5)
- 4-nitrophenol: 1.27815e-12 kg; data quality (2,2,1,1,5)
- Methyl acrylate: 1.14528e-15, 1.02919e-11 kg (2 entries, compartments not in this file); data quality (3,1,1,1,4)
- 3-methylcholanthrene: 7.94985e-15 kg; data quality (2,2,1,1,5)
- methane, dichloro-, hcc-30: 5.27641e-7 kg; data quality (3,2,1,1,5)
- Xylene: 4.5658e-6 kg; data quality (4,2,1,1,5)
- Sulfuric acid: 2.34405e-9 kg; data quality (2,1,1,1,5)
- dimethyl formamide: 8.05516e-14, 3.49884e-14 kg (2 entries, compartments not in this file); data quality (4,1,1,1,4)
- phosgene: 1.13381e-15 kg; data quality (5,2,1,1,4)
- acrolein: 2.56189e-8 kg; data quality (2,2,1,1,5)
- NITRIC ACID: 2.84825e-11 kg; data quality (3,1,1,1,5)
- SULFURYL FLUORIDE: 1.48887e-11 kg; data quality (4,1,1,1,4)
- 2,4/2,6-toluenediisocyanate (mixture): 1.38354e-13 kg; data quality (3,1,1,1,5)
- Cresol: 3.72181e-13 kg; data quality (4,2,1,1,5)
- acetophenone: 9.75853e-10 kg; data quality (3,2,1,1,5)
- methyl methacrylate: 5.52343e-8 kg; data quality (4,2,1,1,5)
- 1,1,2,2-tetrachloroethane: 1.287e-13 kg; data quality (3,2,1,1,4)
- Propane, 1,2-dichloro-: 2.79122e-10 kg; data quality (4,2,1,1,5)
- DIPHENYLAMINE: 1.59194e-14 kg; data quality (1,1,1,1,4)
- Methane, difluoro-, HFC-32: 6.37571e-8 kg; data quality (4,2,1,4,1)
- mercury: 1.53972e-10 kg; data quality (2,2,1,1,5)
- 2-nitropropane: 2.01994e-12 kg; data quality (3,2,1,1,5)
- Acetonitrile: 3.92832e-13 kg; data quality (3,1,1,1,4)
- Asbestos: 4.60989e-15 kg; data quality (5,2,1,1,5)
- BUTYL ISOCYANATE: 5.61964e-10 kg; data quality (5,2,1,1,5)
- 2,3,4'-TRICHLOROBIPHENYL: 7.63168e-20 kg; data quality (2,2,1,1,5)
- t-Butyl methyl ether: 5.10415e-13 kg; data quality (4,1,1,1,4)
- methylene diphenyl diisocyanate: 2.51986e-9 kg; data quality (4,2,1,1,5)
- Chrysene, 5-methyl-: 1.37024e-14 kg; data quality (2,2,1,1,5)
- 1,2,4-trimethylbenzene: 9.07758e-7 kg; data quality (5,1,1,1,5)
- 2-METHOXYETHANOL: 1.54405e-10 kg; data quality (4,2,1,1,5)
- 1,1,1-trichloroethane: 3.63559e-7 kg; data quality (3,2,1,1,5)
- carbon disulfide: 1.08946e-7 kg; data quality (4,2,1,1,5)
- bis(2-chloroethyl)ether: 6.46458e-14 kg; data quality (2,1,1,1,4)
- Permethrin: 6.29906e-14 kg; data quality (2,1,1,1,4)
- cadmium: 4.69566e-10 kg; data quality (3,2,1,1,5)
- Triethylene glycol: 8.92982e-11 kg; data quality (5,2,1,1,5)
- THIOUREA: 9.57839e-17 kg; data quality (3,1,1,1,4)
- DIMETHYLAMINOAZOBENZENE: 1.54517e-14 kg; data quality (5,2,1,1,5)
- CHLORINE: 3.81761e-16 kg; data quality (2,1,1,1,4)
- Ethylene glycol: 3.14159e-12 kg; data quality (5,1,1,1,4)
- cumene: 2.21097e-8 kg; data quality (4,2,1,1,5)
- 2-PHENOXYETHANOL: 4.05295e-11 kg; data quality (3,2,1,1,5)
- phenanthrene: 6.55542e-11 kg; data quality (3,2,1,2,3)
- ACRYLAMIDE: 6.93611e-11 kg; data quality (4,2,1,1,4)
- dicyclopentadiene: 1.15156e-10 kg; data quality (4,1,1,1,5)
- NITROUS ACID: 1.28091e-10 kg; data quality (5,1,1,1,4)
- Methane, monochloro-, R-40: 1.90881e-15 kg; data quality (3,1,1,1,4)
- O-ANISIDINE: 3.77938e-16 kg; data quality (5,2,1,1,4)
- Thiophanat-methyl: 1.62247e-9 kg; data quality (4,1,1,1,5)
- 2,6-Dinitrotoluene: 6.10818e-13 kg; data quality (5,1,1,1,4)
- Phthalate, dibutyl-: 2.50582e-8 kg; data quality (3,2,1,1,5)
- beryllium: 2.08623e-11 kg; data quality (2,2,1,1,5)
- ALLYL CHLORIDE: 1.75175e-12 kg; data quality (3,2,1,1,4)
- benzene: 2.69786e-8 kg; data quality (3,2,1,2,4)
- Ethene, tetrachloro-: 9.54403e-14 kg; data quality (3,1,1,1,4)
- hexachloroethane: 1.55357e-12 kg; data quality (4,2,1,1,5)
- 2-Propanol: 1.52408e-11 kg; data quality (2,1,1,1,4)
- BENZOIC TRICHLORIDE (BENZOTRICHLORIDE): 9.82638e-15 kg; data quality (3,2,1,1,4)
- 2,2,4-trimethylpentane: 5.06447e-9 kg; data quality (3,2,1,2,4)
- m-xylene: 1.15005e-6 kg; data quality (3,2,1,1,5)
- methanol: 2.02741e-12 kg; data quality (3,1,1,1,4)
- acrylonitrile: 4.4774e-9 kg; data quality (4,2,1,1,5)
- 2,4,5,2',5'-PENTACHLOROBIPHENYL: 1.34615e-19 kg; data quality (2,2,1,1,5)
- formaldehyde: 1.33514e-12 kg; data quality (2,1,1,1,5)
- diisocyanates: 2.99394e-9 kg; data quality (4,1,1,1,5)
- hydrogen fluoride: 2.00621e-7 kg; data quality (2,2,1,1,5)
- 2-methylnaphthalene: 1.08599e-10 kg; data quality (3,2,1,1,4)
- toluene-2,4-diisocyante: 1.5822e-10 kg; data quality (3,2,1,1,5)
- selenium: 1.13266e-9 kg; data quality (2,2,1,1,5)
- benzidine: 1.00951e-12 kg; data quality (2,2,1,1,5)
- AZIRIDINE: 3.32672e-14 kg; data quality (4,2,1,1,4)
- HYDROCHLORIC ACID: 2.07067e-12 kg; data quality (2,1,1,1,4)
- Methane: 2.69997e-7 kg; data quality (4,2,1,4,1)
- polychlorinated biphenyls: 1.45426e-15 kg; data quality (3,2,1,1,4)

## Inventory method
Input-output

## Modelling constants
The reference unit of all processes is 1 USD2013 of the good or service. The technosphere inputs are based on the US BEA detailed input-output tables for 2007. The IO tables are combined to develop a commodity-by-commodity model based on the the industry-technology assumption (see Suh et al., 2010), which assumes all commodities produced by a given industry have the same input structure, but that multiple industries can produce the same commodity. Thus, model technosphere flows represent commodity outputs (and not industry outputs) from other processes in the model. There are no by-products included in these processes. All commodity production is based on US-conditions, despite in reality that some goods and services are produced overseas, as USEEIO v1.1 is a single-region IO model.

## Completeness
The input-output approach assures that all purchased inputs associated with the sectors making these commodities as reported in the US census for 2007 are included. The direct resources extracted including minerals, energy sources, water and land occupied are included. Emissions to air include all critieria air pollutants, greenhouse gases, and hazardous and toxic air pollutants as defined by US EPA. Releases to water include toxics, total nitrogen and total phosphorus, and water discharges. Releases to soil or groundwater include toxics and agriculutural pesticides. Some metal releases to air, water and soil are not included because they could not be speciated. Solid hazardous and non-hazardous wastes generated are not included as an elementary flows although purchases of waste services are included.

## Data treatment
Greenhouse gases are primarily from the US Greenhouse Gas Emission Inventory (USEPA 2016a). Biogenic C uptake is not included (change from version 1.0), as biogenic C emission are not included. Toxic releases to air, water and soil (except pesticides) are from the 2013 Toxic Release Inventory (USEPA 2015a). Criteria air pollutants and hazardous air pollutants are from the 2011 National Emissions Inventory (USEPA 2015b). All estimates are normalized by industry based on sector output in the data year, then converted to 2013 USD using relative sector-specific CPIs (if data year is not 2013). Energy use represent raw renewables or fossil fuel energies and is based on EIA data for 2014. See Table 1 in Yang, Ingwersen et al. 2017 and Supporting Information 1, and the v1.1 data update notes (Ingwersen et al. 2017) for all details on environmental data sources used.Land occupation associated with manufacturing buildings was estimated based on the building floorspace data provided by the U.S. Energy Information Administration in the 2010 Manufacturing Energy Consumption Survey (EIA 2013). Portions of total renewable energy (EIA 2016) based on EIA-923 reports for 2014 (EIA 2017) are included. Nitrogen and Phosphorus releases are modeled in total N and total P equivalents as estimated by the Discharge Monitoring Report Nutrient Loading tool (USEPA 2016b). Self-supplied withdrawals were assigned to industrial sectors based on water use statistics for Canadian industries by NAICS 3-digit sector scaled to US production levels based on gross domestic product by industry (BEA 2015; Statistics Canada 2010), and further disaggregated to the manufacturing sectors based on compensation of employees as provided by the 2007 IO tables (BEA 2015). Water withdrawals associated with public supply were allocated to sectors based on their use of water, sewage, and other services in USD based on the IO tables (BEA 2015). Portions of total renewable energy (EIA 2016) by type are assigned to sectors (hydro, wind, solar, or) based on EIA-923 reports for 2014 (EIA 2017).

## Data collection
2015-2016

## Sampling procedure
US federal government sources, including surveys and US EPA emissions databases are used as the primary sources. From these sources, data for US reporting establishments/facilities are aggregated by the NAICS sector as defined in the BEA detailed 2007 input-output tables. When level of sector aggregation differs, or when direct emissions are not reported but modeled, additional sources are used to make allocations and estimates.

## Review details
In regard to quality assurance and peer-review, each dataset created went through Quality Assurance as defined in a quality assurance project plans at US EPA, CSRA or ERG. The model was assembled with the IO model builder model (USEPA 2016c). Validation functions were used to check that all the model components were properly assembled and harmonized. Bayou Demeke and Santosh Ghimire provided internal peer review of the model methodology and the manuscript underwent standard EPA management review. An editor and two anonymous reviewers at the Journal of Cleaner Production reviewed the model. In regard to data quality evaluation, data quality assessment was performed at the flow and process levels according to the updated US EPA data quality assessment guidelines as defined in US EPA (2016b).

## Intended application
The primary application is for use in the US Environmentally-Extended Input-Ouput model, USEEIO, version 1.1. This model is being used by the US EPA for supporting tools that prioritize goods and services based on potential environmental impacts, resource use or emissions for large regions, including the US and US states, and as a strealined tool for organizations as a starting point to consider sustainable materials management. Model results are designed to provide meso/macro-level decision support.

## Project
USEEIO v1.1 was developed by the US EPA with CSRA and ERG with Wesley W. Ingwersen and David E. Meyer as research leads. Yi Yang was the technical lead on the work for CSRA (contract EP-C-15-012); Troy Hawkins was lead for ERG (contract EP-C-12-021).

## Sources
- BEA 2015
- Maupin et al. 2014
- Yienger et al. 1995
- Ingwersen et al. 2017
- USGS 2015
- Statistics Canada 2010
- USDA 2014
- EIA 2013
- USEPA 2015b
- BLM 2008
- USEPA 2016b
- USDA 2009a
- USDA 2006
- EIA 2016
- USEPA 2015a
- Ingwersen et al. DRAFT
- USEPA 2016c
- EIA 2017
- USDA 2009b
- USGS 2016
- Macknick et al. 2011
- Edelen and Ingwersen 2017
- EIA 2015
- Blackhurst et al. 2010
- Nickerson et al. 2011
- Lovelace 2009
- USEPA 2016a
- USDA 2016
- Kim et el. 2013
- Torcellini et al. 2003
- Goebes et al. 2003
