# Mineral wool; at manufacturer

Dataset: openLCA process, unit process
Category: 3279: Other Nonmetallic Mineral Product Manufacturing
Geography: United States
Time period: 2017-01-01 to 2017-12-31
Data quality: US EPA - Process Pedigree Matrix (1;1)
Exchange data quality scheme: US EPA - Flow Pedigree Matrix
Generated by: US EPA with CSRA and ERG
Owner: US EPA
Published in: Yang, Ingwersen et al. 2017
restrictionsDescription: This model shold be appropriately cited (see Yang, Ingwersen et al. 2017 source or Publication field) when used. Any changes or derivations of this model by the user should be documented. The model itself and any results from use of this model shall not be construed to consitute US EPA opinion or policy.
copyright: false

## General comment
BEA Code & Name is '327993:Mineral wool manufacturing'. Description of the primary industry producing this good or service, adapted from the Census Bureau NAICS 2007 descriptions: This U.S. industry comprises establishments primarily engaged in manufacturing mineral wool and mineral wool (i.e., fiberglass) insulation products made of such siliceous materials as rock, slag, and glass or combinations thereof.

## Technology
The process describes the average US production of this good or service within this NAICS-based grouping defined in the BEA 2007 detailed input-output tables (BEA 2015). Distribution, wholesale and retailing of this good or service, use, and final disposal are not included. Creation of a product system with this process will enable modeling of all upstream (supply-chain) activities.

## Geography
Data represent the 50 US states

## Time period
2017 was the year in which this version of USEEIO was released and is the target date for the model

## Reference product
- Mineral wool; at manufacturer: 1 USD

## Inputs from technosphere
All rows: data quality (1,3,1,1,1)
- Chemicals (except basic chemicals, agrichemicals, polymers, paints, pharmaceuticals,soaps, cleaning compounds); at manufacturer: 0.00222755 USD
- Nondepository credit intermediation and related activities: 0.0023989 USD
- Independent artists, writers, and performers: 0.00017135 USD
- Cutting and machine tool accessory, rolling mill, and other metalworking machines; at manufacturer: 0.000856751 USD
- Other computer related services, including facilities management: 0.0003427 USD
- Other petroleum and coal products; at manufacturer: 0.0020562 USD
- Compressed Gases; at manufacturer: 0.00222755 USD
- Sports: 0.00017135 USD
- Warehousing: 0.0020562 USD
- Water transport (boats, ships, ferries): 0.0013708 USD
- Primary iron, steel, and ferroalloy products; at manufacturer: 0.00462646 USD
- Advertising and public relations: 0.00257025 USD
- State and local government enterprises: 0.00325565 USD
- Commercial equipment rental: 0.000685401 USD
- Paper; at manufacturer: 0.00017135 USD
- Other retail: 0.00017135 USD
- Other plastic products; at manufacturer: 0.00257025 USD
- Printed circuit and electronic assembly; at manufacturer: 0.00291295 USD
- Cardboard; at manufacturer: 0.0104524 USD
- Paints and coatings; at manufacturer: 0.000685401 USD
- Vehicle rental and leasing: 0.00119945 USD
- Hotels and campgrounds: 0.0010281 USD
- Gasoline, fuels, and by-products of petroleum refining; at manufacturer: 0.0142221 USD
- Plastic pipe, fittings, and sausage casings; at manufacturer: 0.0020562 USD
- Abrasive products; at manufacturer: 0.0145648 USD
- Nonresidential building repair and maintanence: 0.0023989 USD
- Wireless telecommunications: 0.000514051 USD
- Laminated plastic plates and shapes; at manufacturer: 0.0010281 USD
- Coal; at mine: 0.0178204 USD
- Insurance carriers: 0.00257025 USD
- Computer terminals and other computer peripheral equipment; at manufacturer: 0.0003427 USD
- Electricity; at consumer: 0.026902 USD
- Wholesale trade: 0.0265593 USD
- Electronic equipment repair and maintenance: 0.000514051 USD
- Petrochemicals; at manufacturer: 0.000514051 USD
- Passenger ground transport: 0.000514051 USD
- Wooden windows, door, and flooring; at manufacturer: 0.00017135 USD
- Synthetic rubber and artificial and synthetic fibers; at manufacturer: 0.00394106 USD
- Household goods repair: 0.0003427 USD
- Adhesives; at manufacturer: 0.00908156 USD
- Scenic and sightseeing transportation and support activities for transportation: 0.0017135 USD
- Machine shops; at manufacturer: 0.00599726 USD
- Telecommunications: 0.0013708 USD
- Securities and commodities brokerage and exchanges: 0.0010281 USD
- Fabric; at manufacturer: 0.00582591 USD
- Other rubber products; at manufacturer: 0.00753941 USD
- Consumer goods and general rental centers: 0.00017135 USD
- Golf courses, marinas, ski resorts, fitness and other rec centers and industries: 0.0003427 USD
- Business support: 0.00119945 USD
- Motor vehicle steering, suspension components (except spring), and brake systems; at manufacturer: 0.00017135 USD
- Rail transport: 0.0113091 USD
- Other vehicle parts; at manufacturer: 0.00257025 USD
- Noncomparable imports: 0.0023989 USD
- Vehicles and parts sales: 0.000514051 USD
- Facilities support: 0.00017135 USD
- Cement; at manufacturer: 0.00119945 USD
- Relay and industrial controls; at manufacturer: 0.00119945 USD
- Insurance agencies and brokerages: 0.000856751 USD
- Screws, nuts, and bolts; at manufacturer: 0.00188485 USD
- All other converted paper products; at manufacturer: 0.00496916 USD
- Limited-service restaurants: 0.0017135 USD
- Sand, gravel, clay, phosphate, other nonmetallic minerals; at mine: 0.0215901 USD
- Other real estate: 0.000514051 USD
- Cardboard containers; at manufacturer: 0.003427 USD
- Plastics; at manufacturer: 0.00993831 USD
- Specialized design: 0.000685401 USD
- Company and enterprise management: 0.0335846 USD
- Paper bags and coated paper; at manufacturer: 0.00685401 USD
- Satellite, telecommunications resellers, and all other telecommunications: 0.00017135 USD
- Lessors of nonfinancial intangible assets: 0.0027416 USD
- Veneer, plywood, and engineered wood; at manufacturer: 0.00942426 USD
- Civic, social, professional, and similar organizations: 0.0003427 USD
- Commercial machinery repair: 0.0017135 USD
- Surgical appliance and supplies; at manufacturer: 0.0013708 USD
- Air transport: 0.00257025 USD
- Full-service restaurants: 0.0010281 USD
- Marketing research and all other miscellaneous professional, scientific, and technical services: 0.00428376 USD
- Employment services: 0.000514051 USD
- Glass and glass products; at manufacturer: 0.037183 USD
- Mineral wool; at manufacturer: 0.000514051 USD
- Truck transport: 0.013194 USD
- Drinking water and wastewater treatment; at consumer: 0.0030843 USD
- Natural gas; at consumer: 0.0414668 USD
- Architectural, engineering, and related services: 0.003427 USD
- Data processing and hosting: 0.00376971 USD
- Transmission and power train parts; at manufacturer: 0.00017135 USD
- Other basic organic chemicals; at manufacturer: 0.013194 USD
- Computer systems design: 0.0010281 USD
- Other support services: 0.000514051 USD
- Synthetic dyes and pigments; at manufacturer: 0.00154215 USD
- Pipeline transport: 0.00017135 USD
- Other primary nonferrous metals; at manufacturer: 0.0017135 USD
- Waste management and remediation: 0.00771076 USD
- Metal coatings, engravings, and heat treatments; at manufacturer: 0.00805346 USD
- Buildings and dwellings services: 0.00359836 USD
- Material handling equipment; at manufacturer: 0.0003427 USD
- Cutlery and handtools; at manufacturer: 0.0003427 USD
- Monetary authorities and depository credit intermediation: 0.00548321 USD
- Fertilizers; at manufacturer: 0.000856751 USD
- Investigation and security: 0.000514051 USD
- Accounting, tax preparation, bookkeeping, and payroll: 0.0017135 USD
- Other basic inorganic chemicals; at manufacturer: 0.00479781 USD
- Legal services: 0.0013708 USD
- All other forging, stamping, and sintering; at manufacturer: 0.0010281 USD
- Semiconductors; at manufacturer: 0.00685401 USD
- Lumber and treated lumber; at manufacturer: 0.000514051 USD
- Vehicle repair: 0.000856751 USD
- Metal pipe fittings, ball and roller bearings, industrial patterns, metal bath fixtures, other misc. fabricated metals; at manufacturer: 0.00788211 USD
- Investment advice, portfolio management, and other financial advising services: 0.0003427 USD
- Plastic bags, films, and sheets; at manufacturer: 0.0197053 USD
- Electronic capacitors, resistors, coils, transformers, connectors and other components (except semiconductors and printed circuit assemblies); at manufacturer: 0.000856751 USD
- Management consulting: 0.00017135 USD
- Aluminum products; at manufacturer: 0.00325565 USD

## Inputs from nature
- Occupation, industrial area, built up: 0.000731608 m2*a; data quality (4,2,1,1,1)
- Occupation, urban, discontinuously built: 0.00018124 m2*a; data quality (4,2,1,1,1)
- Water, fresh: 0.00129283, 0.0027667 m3 (2 entries, compartments not in this file); data quality (2,2,1,4,2)
- Occupation, industrial area: 0.00219482 m2*a; data quality (4,2,1,1,1)
- Water, saline: 7.37904e-5 m3; data quality (4,2,1,4,2)

## Emissions to nature
- acetaldehyde: 9.31504e-8 kg; data quality (3,2,1,4,1)
- Formaldehyde: 9.50994e-9 kg; data quality (2,1,1,1,5)
- Hydrocarbons, aromatic: 1.97525e-8 kg; data quality (4,2,1,2,4)
- Dibenz(a,h)anthracene: 2.77086e-12 kg; data quality (2,2,1,1,5)
- methanol: 2.03291e-5 kg; data quality (4,2,1,1,5)
- methane, dichloro-, hcc-30: 2.18701e-13 kg; data quality (4,2,1,1,5)
- 1,1,2,2-tetrachloroethane: 4.37402e-13 kg; data quality (3,2,1,1,5)
- Propene, 1,3-dichloro-: 2.88611e-13 kg; data quality (3,2,1,1,5)
- PHOSPHORUS: 1.74034e-8 kg; data quality (3,2,1,1,5)
- manganese: 8.28573e-7 kg; data quality (3,2,1,1,5)
- naphthalene: 1.59649e-7 kg; data quality (3,2,1,1,5)
- Benzo(g,h,i)perylene: 3.97512e-12 kg; data quality (3,2,1,4,1)
- nickel: 4.73911e-8 kg; data quality (3,2,1,1,5)
- 1,4-dichlorobenzene: 6.59197e-12 kg; data quality (2,2,1,1,5)
- mercury: 5.8326e-10 kg; data quality (2,2,1,1,5)
- hydrogen sulfide: 6.10967e-7 kg; data quality (3,1,1,1,5)
- Chrysene: 4.18221e-12 kg; data quality (3,2,1,4,1)
- phenol: 2.57186e-5 kg; data quality (4,2,1,1,5)
- fluorene: 1.59108e-10 kg; data quality (3,2,1,4,1)
- Benzo(a)anthracene: 1.77833e-12 kg; data quality (2,2,1,1,5)
- Ethylene glycol monoethyl ether: 1.60082e-7 kg; data quality (3,2,1,1,5)
- benz[a]anthracene: 5.87505e-12 kg; data quality (2,2,1,2,3)
- propanal: 1.80789e-8 kg; data quality (3,2,1,4,1)
- acenaphthylene: 1.60434e-10 kg; data quality (3,2,1,4,1)
- phenol: 5.91374e-10 kg; data quality (3,1,1,1,5)
- 2,2,4-trimethylpentane: 1.61725e-7 kg; data quality (3,2,1,1,5)
- chlorine: 2.35173e-11 kg; data quality (4,2,1,1,5)
- para-xylene: 4.16645e-10 kg; data quality (3,2,1,4,1)
- ethane, 1,2-dichloro-: 5.16283e-13 kg; data quality (3,2,1,1,5)
- anthracene: 1.31602e-11 kg; data quality (3,2,1,4,1)
- Xylene: 5.6828e-8 kg; data quality (3,2,1,4,2)
- ethylene glycol: 1.02004e-10 kg; data quality (5,2,1,1,5)
- benzene: 2.44752e-7 kg; data quality (3,2,1,2,4)
- benzene, ethyl-: 2.27542e-8 kg; data quality (3,2,1,3,2)
- o-Xylene: 4.05902e-9 kg; data quality (3,2,1,4,1)
- hexane: 5.41928e-7 kg; data quality (3,2,1,1,5)
- formaldehyde: 3.5608e-5 kg; data quality (2,2,1,1,5)
- m-xylene: 1.04013e-8 kg; data quality (3,2,1,4,1)
- lead: 7.67694e-8 kg; data quality (3,2,1,1,5)
- Carbon dioxide: 0.274475 kg; data quality (4,2,1,4,1)
- biphenyl: 2.31848e-12 kg; data quality (4,2,1,1,5)
- pyrene: 2.36777e-11 kg; data quality (3,2,1,4,2)
- hydrogen chloride: 3.08445e-7 kg; data quality (2,2,1,1,5)
- ammonia: 0.000182219 kg; data quality (3,2,1,1,5)
- sulfur dioxide: 0.000374144 kg; data quality (2,2,1,1,5)
- antimony: 4.07466e-9 kg; data quality (3,2,1,1,5)
- 1,4-dioxane: 2.81496e-11 kg; data quality (4,2,1,1,5)
- selenium: 4.83239e-9 kg; data quality (2,2,1,1,5)
- methyl isobutyl ketone: 4.0911e-10 kg; data quality (4,2,1,1,5)
- fluoranthene: 3.78944e-11 kg; data quality (3,2,1,4,1)
- carbon tetrachloride: 4.04613e-13 kg; data quality (4,2,1,1,5)
- lead: 6.02083e-9 kg; data quality (3,1,1,1,5)
- arsenic: 7.56389e-9 kg; data quality (3,2,1,1,5)
- carbonyl sulfide: 2.14688e-5 kg; data quality (4,2,1,1,5)
- carbon monoxide: 0.00248045 kg; data quality (2,2,1,1,5)
- phenanthrene: 3.75876e-10 kg; data quality (3,2,1,4,1)
- Chromium, ion: 1.00605e-7 kg; data quality (3,2,1,1,5)
- ethene, tetrachloro-: 2.71134e-14 kg; data quality (3,2,1,1,5)
- acrolein: 6.7928e-9 kg; data quality (3,2,1,4,2)
- Propane, 1,2-dichloro-: 2.94179e-13 kg; data quality (4,2,1,1,5)
- Ethene, chloro-: 1.62866e-13 kg; data quality (3,2,1,1,5)
- Water, fresh: 0.00336804 m3; data quality (2,2,1,4,2)
- acrylic acid: 6.77448e-9 kg; data quality (4,2,1,1,5)
- 3-methylcholanthrene: 2.00055e-13 kg; data quality (2,2,1,1,5)
- ammonia: 1.53438e-8 kg; data quality (3,1,1,1,5)
- ethane, 1,2-dibromo-: 4.84421e-13 kg; data quality (2,2,1,1,5)
- styrene: 1.18861e-6 kg; data quality (4,2,1,1,5)
- Benzo(b)fluoranthene: 5.09332e-12 kg; data quality (2,2,1,2,3)
- Nitrogen: 2.66474e-7 kg; data quality (2,2,1,1,5)
- butadiene: 9.27922e-9 kg; data quality (3,2,1,4,1)
- toluene: 4.42566e-7 kg; data quality (3,2,1,2,4)
- monochloroethane: 2.04472e-14 kg; data quality (3,2,1,1,5)
- AMMONIA: 2.16731e-7 kg; data quality (3,1,1,1,5)
- 2-methylnaphthalene: 4.38276e-12 kg; data quality (2,2,1,1,5)
- particulates, < 2.5 um: 0.00058128 kg; data quality (3,2,1,1,5)
- Benzo(k)fluoranthene: 4.85517e-12 kg; data quality (2,2,1,2,3)
- Water, saline: 3.73894e-5 m3; data quality (4,2,1,4,2)
- nitrogen oxides: 0.000322931 kg; data quality (2,2,1,1,5)
- VOC, volatile organic compounds: 0.000238895 kg; data quality (3,2,1,1,5)
- benzo(a)pyrene: 4.54245e-12 kg; data quality (2,2,1,2,3)
- acenaphthene: 1.34623e-10 kg; data quality (3,2,1,4,1)
- Dinitrogen monoxide: 5.43023e-7 kg; data quality (4,2,1,4,1)
- beryllium: 7.38119e-10 kg; data quality (2,2,1,1,5)
- chloroform: 3.11657e-13 kg; data quality (4,2,1,1,5)
- 1,2-BUTYLENE OXIDE: 4.94939e-14 kg; data quality (4,2,1,1,5)
- vinyl acetate: 2.52109e-7 kg; data quality (4,2,1,1,5)
- cadmium: 9.0183e-10 kg; data quality (3,2,1,1,5)
- particulates, < 10 um: 0.000123227 kg; data quality (3,2,1,1,5)
- chromium: 1.30102e-10 kg; data quality (4,1,1,1,5)
- ethylene oxide: 1.40748e-11 kg; data quality (3,2,1,1,5)
- Chromium VI: 9.91312e-8 kg; data quality (3,2,1,1,5)
- hydrogen fluoride: 4.74116e-7 kg; data quality (2,2,1,1,5)
- Methane: 5.28415e-6 kg; data quality (4,2,1,4,1)
- benzene, chloro-: 3.32382e-13 kg; data quality (4,2,1,1,5)
- ethane, 1,1,2-trichloro-: 3.47695e-13 kg; data quality (4,2,1,1,5)
- Cobalt: 2.01249e-10 kg; data quality (3,2,1,1,5)
- Indeno(1,2,3-cd)pyrene: 1.4203e-12 kg; data quality (3,2,1,4,2)

## Inventory method
Input-output

## Modelling constants
The reference unit of all processes is 1 USD2013 of the good or service. The technosphere inputs are based on the US BEA detailed input-output tables for 2007. The IO tables are combined to develop a commodity-by-commodity model based on the the industry-technology assumption (see Suh et al., 2010), which assumes all commodities produced by a given industry have the same input structure, but that multiple industries can produce the same commodity. Thus, model technosphere flows represent commodity outputs (and not industry outputs) from other processes in the model. There are no by-products included in these processes. All commodity production is based on US-conditions, despite in reality that some goods and services are produced overseas, as USEEIO v1.1 is a single-region IO model.

## Completeness
The input-output approach assures that all purchased inputs associated with the sectors making these commodities as reported in the US census for 2007 are included. The direct resources extracted including minerals, energy sources, water and land occupied are included. Emissions to air include all critieria air pollutants, greenhouse gases, and hazardous and toxic air pollutants as defined by US EPA. Releases to water include toxics, total nitrogen and total phosphorus, and water discharges. Releases to soil or groundwater include toxics and agriculutural pesticides. Some metal releases to air, water and soil are not included because they could not be speciated. Solid hazardous and non-hazardous wastes generated are not included as an elementary flows although purchases of waste services are included.

## Data treatment
Greenhouse gases are primarily from the US Greenhouse Gas Emission Inventory (USEPA 2016a). Biogenic C uptake is not included (change from version 1.0), as biogenic C emission are not included. Toxic releases to air, water and soil (except pesticides) are from the 2013 Toxic Release Inventory (USEPA 2015a). Criteria air pollutants and hazardous air pollutants are from the 2011 National Emissions Inventory (USEPA 2015b). All estimates are normalized by industry based on sector output in the data year, then converted to 2013 USD using relative sector-specific CPIs (if data year is not 2013). Energy use represent raw renewables or fossil fuel energies and is based on EIA data for 2014. See Table 1 in Yang, Ingwersen et al. 2017 and Supporting Information 1, and the v1.1 data update notes (Ingwersen et al. 2017) for all details on environmental data sources used.Land occupation associated with manufacturing buildings was estimated based on the building floorspace data provided by the U.S. Energy Information Administration in the 2010 Manufacturing Energy Consumption Survey (EIA 2013). Portions of total renewable energy (EIA 2016) based on EIA-923 reports for 2014 (EIA 2017) are included. Nitrogen and Phosphorus releases are modeled in total N and total P equivalents as estimated by the Discharge Monitoring Report Nutrient Loading tool (USEPA 2016b). Self-supplied withdrawals were assigned to industrial sectors based on water use statistics for Canadian industries by NAICS 3-digit sector scaled to US production levels based on gross domestic product by industry (BEA 2015; Statistics Canada 2010), and further disaggregated to the manufacturing sectors based on compensation of employees as provided by the 2007 IO tables (BEA 2015). Water withdrawals associated with public supply were allocated to sectors based on their use of water, sewage, and other services in USD based on the IO tables (BEA 2015). Portions of total renewable energy (EIA 2016) by type are assigned to sectors (hydro, wind, solar, or) based on EIA-923 reports for 2014 (EIA 2017).

## Data collection
2015-2016

## Sampling procedure
US federal government sources, including surveys and US EPA emissions databases are used as the primary sources. From these sources, data for US reporting establishments/facilities are aggregated by the NAICS sector as defined in the BEA detailed 2007 input-output tables. When level of sector aggregation differs, or when direct emissions are not reported but modeled, additional sources are used to make allocations and estimates.

## Review details
In regard to quality assurance and peer-review, each dataset created went through Quality Assurance as defined in a quality assurance project plans at US EPA, CSRA or ERG. The model was assembled with the IO model builder model (USEPA 2016c). Validation functions were used to check that all the model components were properly assembled and harmonized. Bayou Demeke and Santosh Ghimire provided internal peer review of the model methodology and the manuscript underwent standard EPA management review. An editor and two anonymous reviewers at the Journal of Cleaner Production reviewed the model. In regard to data quality evaluation, data quality assessment was performed at the flow and process levels according to the updated US EPA data quality assessment guidelines as defined in US EPA (2016b).

## Intended application
The primary application is for use in the US Environmentally-Extended Input-Ouput model, USEEIO, version 1.1. This model is being used by the US EPA for supporting tools that prioritize goods and services based on potential environmental impacts, resource use or emissions for large regions, including the US and US states, and as a strealined tool for organizations as a starting point to consider sustainable materials management. Model results are designed to provide meso/macro-level decision support.

## Project
USEEIO v1.1 was developed by the US EPA with CSRA and ERG with Wesley W. Ingwersen and David E. Meyer as research leads. Yi Yang was the technical lead on the work for CSRA (contract EP-C-15-012); Troy Hawkins was lead for ERG (contract EP-C-12-021).

## Sources
- Nickerson et al. 2011
- Edelen and Ingwersen 2017
- USEPA 2016a
- USEPA 2016c
- USDA 2006
- Ingwersen et al. DRAFT
- USEPA 2015a
- Goebes et al. 2003
- USGS 2015
- BLM 2008
- EIA 2013
- Macknick et al. 2011
- BEA 2015
- Yienger et al. 1995
- USEPA 2015b
- USDA 2009a
- Lovelace 2009
- USDA 2016
- Kim et el. 2013
- Statistics Canada 2010
- USDA 2009b
- USGS 2016
- EIA 2016
- Blackhurst et al. 2010
- EIA 2017
- Ingwersen et al. 2017
- Maupin et al. 2014
- Torcellini et al. 2003
- EIA 2015
- USDA 2014
- USEPA 2016b
