# Ready-mix concrete; at manufacturer

Dataset: openLCA process, unit process
Category: 3273: Cement and Concrete Product Manufacturing
Geography: United States
Time period: 2017-01-01 to 2017-12-31
Data quality: US EPA - Process Pedigree Matrix (1;1)
Exchange data quality scheme: US EPA - Flow Pedigree Matrix
Generated by: US EPA with CSRA and ERG
Owner: US EPA
Published in: Yang, Ingwersen et al. 2017
restrictionsDescription: This model shold be appropriately cited (see Yang, Ingwersen et al. 2017 source or Publication field) when used. Any changes or derivations of this model by the user should be documented. The model itself and any results from use of this model shall not be construed to consitute US EPA opinion or policy.
copyright: false

## General comment
BEA Code & Name is '327320:Ready-mix concrete manufacturing'. Description of the primary industry producing this good or service, adapted from the Census Bureau NAICS 2007 descriptions: This industry comprises establishments, such as batch plants or mix plants, primarily engaged in manufacturing concrete delivered to a purchaser in a plastic and unhardened state. Ready-mix concrete manufacturing establishments may mine, quarry, or purchase sand and gravel.

## Technology
The process describes the average US production of this good or service within this NAICS-based grouping defined in the BEA 2007 detailed input-output tables (BEA 2015). Distribution, wholesale and retailing of this good or service, use, and final disposal are not included. Creation of a product system with this process will enable modeling of all upstream (supply-chain) activities.

## Geography
Data represent the 50 US states

## Time period
2017 was the year in which this version of USEEIO was released and is the target date for the model

## Reference product
- Ready-mix concrete; at manufacturer: 1 USD

## Inputs from technosphere
All rows: data quality (1,3,1,1,1)
- Other basic inorganic chemicals; at manufacturer: 0.0220454 USD
- Shelving and lockers; at manufacturer: 3.60981e-7 USD
- Plastics; at manufacturer: 8.41098e-7 USD
- Lessors of nonfinancial intangible assets: 0.00481659 USD
- Other textiles; at manufacturer: 1.05552e-5 USD
- Drinking water and wastewater treatment; at consumer: 0.000585294 USD
- Valve and fittings (except for plumbing); at manufacturer: 1.73665e-5 USD
- Telecommunications: 0.00352621 USD
- Coal; at mine: 0.00441933 USD
- Fabric; at manufacturer: 7.03678e-6 USD
- Water transport (boats, ships, ferries): 0.00313816 USD
- Synthetic dyes and pigments; at manufacturer: 0.00196039 USD
- Other rubber products; at manufacturer: 1.4559e-5 USD
- Air transport: 0.00525253 USD
- Books, newspapers, magazines, and other print media; at manufacturer: 3.51839e-6 USD
- Hotels and campgrounds: 0.00217966 USD
- Cardboard; at manufacturer: 0.00169458 USD
- Clay and ceramic products; at manufacturer: 0.00200999 USD
- Other basic organic chemicals; at manufacturer: 0.0517103 USD
- Glass and glass products; at manufacturer: 0.00427599 USD
- Ground or treated minerals and earth; at manufacturer: 0.00103068 USD
- Aluminum products; at manufacturer: 3.7903e-6 USD
- Other real estate: 0.00070699 USD
- Air conditioning, refrigeration, and warm air heating equipment; at manufacturer: 8.94109e-5 USD
- Aluminum; at manufacturer: 2.05239e-6 USD
- Computer systems design: 0.00113433 USD
- Noncomparable imports: 2.88322e-5 USD
- Machine shops; at manufacturer: 0.00456902 USD
- Rail transport: 0.0153359 USD
- Mining and oil/gas field machinery; at manufacturer: 2.58994e-5 USD
- Other vehicle parts; at manufacturer: 0.00414015 USD
- Synthetic rubber and artificial and synthetic fibers; at manufacturer: 1.466e-6 USD
- Asphalt pavement; at manufacturer: 2.22831e-5 USD
- Transmission and power train parts; at manufacturer: 0.000646206 USD
- Primary copper; at manufacturer: 9.38237e-6 USD
- Vegetable oils and by-products; at manufacturer: 3.51839e-6 USD
- Gasoline, fuels, and by-products of petroleum refining; at manufacturer: 0.00492774 USD
- Satellite, telecommunications resellers, and all other telecommunications: 0.000233098 USD
- Other petroleum and coal products; at manufacturer: 0.000412886 USD
- Warehousing: 0.00166666 USD
- External hard drives, CDs, other storage media; at manufacturer: 1.75919e-6 USD
- Metal pipe fittings, ball and roller bearings, industrial patterns, metal bath fixtures, other misc. fabricated metals; at manufacturer: 0.00207848 USD
- Software: 2.90068e-5 USD
- Travel arrangement and reservation: 3.86609e-6 USD
- Civic, social, professional, and similar organizations: 0.000698901 USD
- Watches, clocks, and other measuring and controlling devices; at manufacturer: 5.57078e-6 USD
- Other nonmetallic mineral products; at manufacturer: 0.00184617 USD
- Soap and cleaning compounds; at manufacturer: 9.91093e-6 USD
- Limited-service restaurants: 0.00316637 USD
- Wholesale trade: 0.0445935 USD
- Screws, nuts, and bolts; at manufacturer: 0.00137232 USD
- Commercial equipment rental: 0.0014387 USD
- Architectural, engineering, and related services: 0.00391233 USD
- Dimensional stone; at mine: 0.0284812 USD
- Golf courses, marinas, ski resorts, fitness and other rec centers and industries: 0.000493786 USD
- Paper bags and coated paper; at manufacturer: 0.000119703 USD
- Investment advice, portfolio management, and other financial advising services: 0.000485467 USD
- Cutlery and handtools; at manufacturer: 0.000232467 USD
- Light gauge metal cans, boxes, and containers; at manufacturer: 5.86398e-7 USD
- Management consulting: 0.000678368 USD
- Mechanical power transmission equipment; at manufacturer: 1.52464e-5 USD
- Secondary steel products; at manufacturer: 0.000187 USD
- Lumber and treated lumber; at manufacturer: 1.10224e-5 USD
- Facilities support: 3.41797e-5 USD
- Heating equipment other than warm air furnaces; at manufacturer: 3.81159e-6 USD
- Construction machinery; at manufacturer: 5.9193e-5 USD
- Veneer, plywood, and engineered wood; at manufacturer: 1.18284e-5 USD
- Passenger ground transport: 0.00110376 USD
- Business support: 0.00114922 USD
- Environmental and other technical consulting services: 0.000147532 USD
- Other secondary nonferrous metal products; at manufacturer: 6.41618e-6 USD
- Other retail: 0.000116257 USD
- Custom metal rolls; at manufacturer: 3.37053e-5 USD
- Other computer related services, including facilities management: 0.000523529 USD
- Dry-cleaning and laundry: 0.000145486 USD
- Other engine equipment; at manufacturer: 1.1728e-6 USD
- Industrial process variable instruments; at manufacturer: 1.48429e-7 USD
- Cement; at manufacturer: 0.205633 USD
- Speed changers, industrial high-speed drives, and gears; at manufacturer: 7.03678e-6 USD
- Plastic bags, films, and sheets; at manufacturer: 1.1728e-6 USD
- Storage batteries; at manufacturer: 1.6126e-5 USD
- Other support services: 0.00035943 USD
- Sand, gravel, clay, phosphate, other nonmetallic minerals; at mine: 0.0966669 USD
- Accounting, tax preparation, bookkeeping, and payroll: 0.00345472 USD
- Tobacco, cotton, sugarcane, peanuts, sugar beets, herbs and spices, and other crops; at farm: 2.04429e-6 USD
- Vehicle electrical and electronic equipment; at manufacturer: 0.000811734 USD
- Metal structural products; at manufacturer: 4.83025e-5 USD
- Securities and commodities brokerage and exchanges: 0.00168984 USD
- Monetary authorities and depository credit intermediation: 0.00891068 USD
- Concrete pipe, bricks, and blocks; at manufacturer: 2.71487e-6 USD
- Metal hinges, keys, lock, and other hardware; at manufacturer: 0.000173864 USD
- Ready-mix concrete; at manufacturer: 0.00594681 USD
- Other concrete products; at manufacturer: 0.000760468 USD
- Wireless telecommunications: 0.00133883 USD
- Plastic pipe, fittings, and sausage casings; at manufacturer: 9.08917e-6 USD
- Legal services: 0.00242354 USD
- Lime and gypsum products; at manufacturer: 2.17696e-6 USD
- Scenic and sightseeing transportation and support activities for transportation: 0.00107204 USD
- Insurance agencies and brokerages: 0.000217444 USD
- Company and enterprise management: 0.0283774 USD
- Independent artists, writers, and performers: 0.000319402 USD
- Office administration: 8.87468e-5 USD
- Rubber tires; at manufacturer: 0.000267148 USD
- Postal service: 2.69163e-7 USD
- Scientific research and development: 0.000116461 USD
- Paints and coatings; at manufacturer: 0.000104981 USD
- Metal windows, doors, and architectural products; at manufacturer: 1.87021e-5 USD
- Light fixtures; at manufacturer: 6.90373e-6 USD
- Cutting and machine tool accessory, rolling mill, and other metalworking machines; at manufacturer: 0.000121707 USD
- Natural gas; at consumer: 0.0102221 USD
- All other food and drinking places: 0.000203252 USD
- Truck transport: 0.0413178 USD
- Consumer goods and general rental centers: 0.000261749 USD
- Unrefined oil and gas; at extraction site: 1.24421e-5 USD
- Iron, gold, silver, and other metal ores; at mine: 4.45287e-7 USD
- Nondepository credit intermediation and related activities: 0.0022368 USD
- Computer terminals and other computer peripheral equipment; at manufacturer: 0.000377609 USD
- Material handling equipment; at manufacturer: 0.000204258 USD
- Marketing research and all other miscellaneous professional, scientific, and technical services: 0.0068548 USD
- Electronic capacitors, resistors, coils, transformers, connectors and other components (except semiconductors and printed circuit assemblies); at manufacturer: 0.000755025 USD
- Other support activities for mining: 7.77671e-5 USD
- Promoters and agents: 8.69526e-5 USD
- Commercial machinery repair: 0.00308805 USD
- Data processing and hosting: 0.00499617 USD
- Advertising and public relations: 0.00318158 USD
- Compressed Gases; at manufacturer: 2.93531e-5 USD
- General merchandise stores: 5.76526e-5 USD
- Vehicle repair: 0.00157431 USD
- Performances: 5.78331e-5 USD
- Printed circuit and electronic assembly; at manufacturer: 0.00198009 USD
- Primary iron, steel, and ferroalloy products; at manufacturer: 0.000304849 USD
- Sports: 0.000174454 USD
- Waste management and remediation: 0.00196141 USD
- Rubber and plastic belts and hoses; at manufacturer: 2.78944e-6 USD
- Vehicle rental and leasing: 0.00268378 USD
- Other plastic products; at manufacturer: 0.00134786 USD
- Communications equipment; at manufacturer: 2.88263e-5 USD
- Vehicles and parts sales: 0.00116117 USD
- Pipeline transport: 6.4778e-5 USD
- Nonresidential building repair and maintanence: 0.00432769 USD
- Wooden windows, door, and flooring; at manufacturer: 4.60877e-6 USD
- Cardboard containers; at manufacturer: 0.00583297 USD
- Carbon and graphite products; at manufacturer: 3.51839e-6 USD
- Surgical appliance and supplies; at manufacturer: 5.26825e-7 USD
- Mineral wool; at manufacturer: 0.00493997 USD
- Magazines and journals; at publisher: 0.000116299 USD
- Insurance carriers: 0.000615947 USD
- Chemicals (except basic chemicals, agrichemicals, polymers, paints, pharmaceuticals,soaps, cleaning compounds); at manufacturer: 0.000768994 USD
- Electricity; at consumer: 0.00379388 USD
- Clothing; at manufacturer: 1.8049e-7 USD
- Buildings and dwellings services: 0.00612899 USD
- Full-service restaurants: 0.00185937 USD
- Motor vehicle steering, suspension components (except spring), and brake systems; at manufacturer: 0.000441149 USD
- Specialized design: 0.000392245 USD
- Metal coatings, engravings, and heat treatments; at manufacturer: 0.0062329 USD
- Employment services: 0.000217618 USD
- Relay and industrial controls; at manufacturer: 0.0013914 USD
- Investigation and security: 0.000502096 USD
- Abrasive products; at manufacturer: 0.00165483 USD
- Semiconductors; at manufacturer: 0.00488286 USD
- Gaskets, seals, musical instruments, fasteners, brooms, brushes, mop and other misc. goods; at manufacturer: 3.8756e-6 USD
- State and local government enterprises: 0.000612788 USD
- Finished and coated fabric; at manufacturer: 2.12093e-6 USD
- Electronic equipment repair and maintenance: 0.000874166 USD
- Vehicle engines and engine parts; at manufacturer: 0.000611102 USD
- Household goods repair: 0.000554213 USD

## Inputs from nature
- Talc: 8.93612e-5 kg; data quality (1,1,1,1,1)
- Clay, bentonite: 0.00070317 kg; data quality (1,1,1,1,1)
- Clay, unspecified: 0.00217353 kg; data quality (1,1,1,1,1)
- Zeolites: 9.39025e-6 kg; data quality (1,1,1,1,1)
- Occupation, urban, discontinuously built: 0.000212981 m2*a; data quality (4,2,1,1,1)
- Sand and gravel: 0.0430462 kg; data quality (1,1,1,1,1)
- Pumice: 4.07253e-5 kg; data quality (1,1,1,1,1)
- Sodium carbonate: 0.00171398 kg; data quality (1,1,1,1,1)
- Kyanite: 1.61143e-5 kg; data quality (1,1,1,1,1)
- Feldspar: 7.76417e-5 kg; data quality (1,1,1,1,1)
- Water, saline: 0.000387559 m3; data quality (4,2,1,4,2)
- Boron: 0.000572302 kg; data quality (1,1,1,1,1)
- Occupation, mineral extraction site: 0.000260384 m2*a; data quality (1,3,1,1,1)
- Sodium chloride: 0.00663617 kg; data quality (1,1,1,1,1)
- Kaolin: 0.000924375 kg; data quality (1,1,1,1,1)
- Vermiculite: 1.46494e-5 kg; data quality (1,1,1,1,1)
- Occupation, industrial area: 0.000747369 m2*a; data quality (4,2,1,1,1)
- Perlite: 6.60687e-5 kg; data quality (1,1,1,1,1)
- Gypsum: 0.00161143 kg; data quality (1,1,1,1,1)
- Barite: 9.71253e-5 kg; data quality (1,1,1,1,1)
- Water, fresh: 0.00203875 m3; data quality (3,2,1,4,2)
- Phosphate ore: 0.00370629 kg; data quality (1,1,1,1,1)
- Limestone: 0.000827811 kg; data quality (1,1,1,1,1)
- Lithium: 1.2745e-7 kg; data quality (1,1,1,1,1)
- Stone: 0.0531697 kg; data quality (1,1,1,1,1)
- Water, fresh: 0.000762958 m3; data quality (2,2,1,4,2)
- Occupation, industrial area, built up: 0.000249123 m2*a; data quality (4,2,1,1,1)
- Diatomite: 0.000131991 kg; data quality (1,1,1,1,1)
- Mica: 6.73871e-6 kg; data quality (1,1,1,1,1)
- Potassium: 0.00010337 kg; data quality (1,1,1,1,1)
- Fluorspar: 1.67003e-5 kg; data quality (1,1,1,1,1)
- Garnet: 4.7171e-6 kg; data quality (1,1,1,1,1)
- Peat: 6.85591e-5 kg; data quality (1,1,1,1,1)

## Emissions to nature
- N-Nitrosodipropylamine: 3.37599e-14 kg; data quality (5,1,1,1,3)
- acenaphthene: 1.65082e-10 kg; data quality (3,2,1,2,2)
- Asbestos: 1.09313e-11 kg; data quality (5,2,1,1,2)
- o-toluidine: 3.16219e-13 kg; data quality (4,2,1,1,3)
- 2,6-Dinitrotoluene: 3.37599e-14 kg; data quality (5,1,1,1,3)
- mercury: 1.75214e-15 kg; data quality (3,1,1,1,3)
- Xylene: 6.23076e-8 kg; data quality (4,2,1,2,1)
- lead: 3.9362e-11, 6.75022e-9 kg (2 entries, compartments not in this file); data quality (3,1,1,1,5)
- Propene, 1,3-dichloro-: 5.53238e-12 kg; data quality (3,2,1,1,3)
- PYRIDINE: 2.04585e-11 kg; data quality (4,1,1,1,3)
- mercury: 4.83235e-10 kg; data quality (2,2,1,1,3)
- chlorine: 3.44154e-9 kg; data quality (4,2,1,1,3)
- fluorene: 3.67209e-10 kg; data quality (2,2,1,2,2)
- benzo(a)pyrene: 3.05818e-12 kg; data quality (3,2,1,2,1)
- methylene diphenyl diisocyanate: 1.11878e-11 kg; data quality (4,2,1,1,1)
- hexachloroethane: 3.23919e-13 kg; data quality (4,2,1,1,3)
- polychlorinated biphenyls: 1.93416e-11 kg; data quality (3,2,1,1,1)
- 2-methylnaphthalene: 7.23653e-10 kg; data quality (2,2,1,1,1)
- particulates, < 2.5 um: 0.000116332 kg; data quality (3,2,1,1,4)
- Ethane, pentafluoro-, HFC-125: 2.94745e-8 kg; data quality (4,2,1,4,1)
- propanal: 9.30855e-9 kg; data quality (3,2,1,4,1)
- selenium: 1.68355e-8 kg; data quality (3,2,1,1,4)
- toluene, 2,4-dinitro-: 1.6189e-15 kg; data quality (5,2,1,1,3)
- o-Xylene: 3.69545e-9 kg; data quality (3,2,1,3,3)
- ethylene glycol: 2.07406e-9 kg; data quality (5,2,1,1,3)
- Methane, dibromo-: 3.03839e-13 kg; data quality (5,1,1,1,3)
- Benzo(g,h,i)perylene: 9.44883e-16 kg; data quality (2,1,1,1,5)
- 2-Propanol: 1.75551e-12 kg; data quality (2,1,1,1,3)
- phthalate, dioctyl-: 7.27839e-10 kg; data quality (3,2,1,1,3)
- beryllium: 3.46629e-10 kg; data quality (2,2,1,1,4)
- Chromium, ion: 8.95957e-8 kg; data quality (3,2,1,1,4)
- phenol: 1.62321e-8 kg; data quality (4,2,1,1,1)
- nickel: 7.78134e-8 kg; data quality (3,2,1,1,4)
- cadmium: 1.36197e-8 kg; data quality (3,2,1,1,4)
- 2-nitropropane: 1.03249e-11 kg; data quality (5,2,1,1,3)
- ethene, tetrachloro-: 8.10087e-11 kg; data quality (3,2,1,1,2)
- Nitrogen: 8.40864e-7 kg; data quality (5,2,1,1,5)
- bis(2-chloroethyl)ether: 4.04899e-12 kg; data quality (3,2,1,1,3)
- Carbon dioxide: 0.105362 kg; data quality (4,2,1,4,1)
- 1,1,2,2-tetrachloroethane: 2.97051e-12 kg; data quality (3,2,1,1,3)
- 2,4-dimethylphenol: 7.08957e-15 kg; data quality (4,1,1,1,3)
- methane, dichloro-, hcc-30: 7.90701e-9 kg; data quality (4,2,1,1,1)
- 1,4-dioxane: 6.47838e-13 kg; data quality (4,2,1,1,3)
- phthalic anhydride: 8.09797e-13 kg; data quality (2,2,1,1,3)
- methane, bromo-, halon 1001: 2.01316e-10 kg; data quality (3,2,1,1,3)
- chromium: 1.00618e-11 kg; data quality (4,1,1,1,4)
- Hydrazine, methyl-: 9.82851e-13 kg; data quality (2,2,1,1,3)
- Dinitrogen monoxide: 7.27507e-7 kg; data quality (4,2,1,4,1)
- methyl isobutyl ketone: 3.33874e-9 kg; data quality (4,2,1,1,1)
- 2-chloro-1-phenylethanone: 4.04805e-14 kg; data quality (2,2,1,1,3)
- Methyl iodide: 2.815e-11 kg; data quality (4,2,1,1,4)
- styrene: 1.02933e-8 kg; data quality (4,2,1,1,3)
- vanadium: 3.21394e-10 kg; data quality (5,1,1,1,3)
- ALPHA-NAPHTHYLAMINE: 1.35039e-13 kg; data quality (3,1,1,1,3)
- DNOC: 4.04899e-14 kg; data quality (2,2,1,1,3)
- cumene: 1.24251e-9 kg; data quality (4,2,1,1,1)
- chloroform: 2.98015e-11 kg; data quality (4,2,1,1,2)
- naphthalene: 2.55805e-7 kg; data quality (3,2,1,1,4)
- Chromium VI: 4.31441e-8 kg; data quality (3,2,1,1,4)
- Propene: 5.80417e-9 kg; data quality (3,1,1,1,5)
- lead: 2.05166e-8 kg; data quality (3,2,1,1,4)
- pyrene: 9.64553e-11 kg; data quality (2,2,1,1,3)
- ETHENE: 1.03982e-9 kg; data quality (3,1,1,1,5)
- hexane: 2.03849e-7 kg; data quality (3,2,1,1,4)
- Phosphorus: 1.2095e-7 kg; data quality (2,1,1,1,5)
- dimethyl formamide: 1.30026e-11 kg; data quality (4,2,1,1,3)
- ethyl acrylate: 7.28067e-12 kg; data quality (4,2,1,1,3)
- propylene oxide: 1.57514e-12 kg; data quality (3,2,1,1,1)
- cyclohexane: 8.03485e-12 kg; data quality (4,1,1,1,3)
- monochloroethane: 2.21839e-10 kg; data quality (3,2,1,1,4)
- PHOSPHORUS: 5.69307e-8 kg; data quality (2,2,1,1,4)
- Nitrobenzene: 9.27663e-13 kg; data quality (4,2,1,1,3)
- hexachlorobenzene: 4.04899e-20 kg; data quality (3,2,1,1,3)
- Titanium: 1.77911e-11 kg; data quality (5,2,1,1,1)
- 1,2,4-trichlorobenzene: 1.41848e-13 kg; data quality (4,2,1,1,3)
- 1-Methyl-2-pyrrolidinone: 1.02875e-11 kg; data quality (5,1,1,1,3)
- Propane, 1,2-dichloro-: 2.98323e-12 kg; data quality (4,2,1,1,3)
- trichloroethylene: 8.40998e-11 kg; data quality (4,2,1,1,2)
- Chrysene, 5-methyl-: 2.24768e-17 kg; data quality (2,2,1,1,3)
- ethane, 1,1,2-trichloro-: 2.33792e-11 kg; data quality (4,2,1,1,3)
- hydroquinone: 1.4957e-12 kg; data quality (3,2,1,1,3)
- DIPHENYLAMINE: 1.68799e-13 kg; data quality (1,1,1,1,3)
- Water, fresh: 0.0023361 m3; data quality (3,2,1,4,2)
- isophorone: 3.37007e-12 kg; data quality (2,2,1,1,3)
- diethanolamine: 1.04143e-10 kg; data quality (3,2,1,1,3)
- methane, monochloro-, r-40: 4.60755e-10 kg; data quality (3,2,1,1,3)
- Benzo(b)fluoranthene: 1.45004e-11 kg; data quality (2,2,1,1,4)
- 2,4-dinitrophenol: 4.04899e-14 kg; data quality (5,2,1,1,3)
- QUINOLINE: 5.79207e-12 kg; data quality (3,2,1,1,1)
- butanol: 9.41119e-11 kg; data quality (5,1,1,1,3)
- carbon monoxide: 0.000121343 kg; data quality (3,2,1,1,2)
- HYDROCHLORIC ACID: 1.24629e-9 kg; data quality (2,1,1,1,5)
- Hydrocarbons, aromatic: 4.7491e-9 kg; data quality (3,2,1,3,2)
- 1,2-DICHLOROBENZENE: 8.548e-11 kg; data quality (5,1,1,1,3)
- Dimethyl sulfate: 2.77531e-13 kg; data quality (2,2,1,1,3)
- carbon disulfide: 7.388e-10 kg; data quality (4,2,1,1,1)
- Dibenz(a,h)anthracene: 5.50557e-13 kg; data quality (2,2,1,1,3)
- AMMONIA: 6.19913e-10 kg; data quality (3,1,1,1,5)
- m-cresol: 5.32259e-13 kg; data quality (4,2,1,1,3)
- manganese: 5.52555e-12 kg; data quality (4,1,1,1,5)
- acrolein: 4.28985e-9 kg; data quality (3,2,1,3,1)
- ammonia: 4.14909e-12 kg; data quality (3,1,1,1,3)
- mercury: 1.95597e-11 kg; data quality (3,1,1,1,5)
- aniline: 3.16219e-13 kg; data quality (4,2,1,1,3)
- Water, saline: 0.000299369 m3; data quality (4,2,1,2,2)
- acetonitrile: 4.31766e-11 kg; data quality (3,2,1,1,3)
- benzyl chloride: 1.0164e-11 kg; data quality (2,2,1,1,3)
- chromium: 6.4801e-13 kg; data quality (4,1,1,1,5)
- NITROUS ACID: 6.75197e-14 kg; data quality (5,1,1,1,3)
- benzene, ethyl-: 3.41897e-8 kg; data quality (4,2,1,2,2)
- Creosol: 1.0128e-13 kg; data quality (5,1,1,1,3)
- pentachlorophenol: 6.75197e-14 kg; data quality (5,1,1,1,3)
- 3-methylcholanthrene: 4.66586e-15 kg; data quality (2,2,1,1,4)
- Methyl acrylate: 6.44813e-12 kg; data quality (3,1,1,1,3)
- ethane, 1,2-dibromo-: 1.24326e-11 kg; data quality (2,2,1,1,3)
- p-cresol: 5.67677e-13 kg; data quality (4,2,1,1,3)
- 1,4-BENZOQUINONE: 5.24358e-9 kg; data quality (3,2,1,1,4)
- benz[a]anthracene: 1.73565e-11 kg; data quality (2,2,1,1,3)
- Benzo(g,h,i)perylene: 1.37389e-11 kg; data quality (3,2,1,1,1)
- Styrene: 6.08817e-13 kg; data quality (3,1,1,1,5)
- Phthalate, dibutyl-: 3.48531e-11 kg; data quality (4,2,1,1,4)
- maleic anhydride: 1.86942e-12 kg; data quality (2,2,1,1,3)
- anthracene: 3.61031e-11 kg; data quality (3,2,1,2,2)
- Ethane, 1,1,1-trifluoro-, HFC-143a: 1.26109e-8 kg; data quality (4,2,1,4,1)
- Triethyl amine: 1.02949e-12 kg; data quality (4,2,1,1,3)
- ALUMINUM OXIDE: 7.98357e-11 kg; data quality (5,1,1,1,5)
- Chrysene: 4.11592e-11 kg; data quality (2,2,1,1,2)
- 2,6-XYLIDINE: 3.17343e-12 kg; data quality (5,1,1,1,3)
- hexachloro-1,3-butadiene: 1.02504e-11 kg; data quality (4,2,1,1,3)
- hydrogen fluoride: 3.80233e-8 kg; data quality (2,2,1,1,5)
- Cresol: 1.75726e-11 kg; data quality (4,2,1,1,3)
- Zinc: 6.00622e-11 kg; data quality (5,1,1,1,3)
- BUTYL ACRYLATE: 6.58317e-12 kg; data quality (4,1,1,1,3)
- Ethane, 1,1,1,2-tetrafluoro-, HFC-134a: 1.11093e-7 kg; data quality (4,2,1,4,1)
- hydrogen sulfide: 5.50565e-10 kg; data quality (3,2,1,1,1)
- acetaldehyde: 1.19167e-7 kg; data quality (3,2,1,2,3)
- vinyl acetate: 1.6441e-10 kg; data quality (4,2,1,1,3)
- dibenzofuran: 7.39544e-10 kg; data quality (4,2,1,1,1)
- arsenic: 4.76073e-9 kg; data quality (3,2,1,1,4)
- ethane, 1,2-dichloro-: 2.76644e-11 kg; data quality (3,2,1,1,4)
- t-butyl methyl ether: 4.94866e-11 kg; data quality (3,2,1,1,3)
- para-xylene: 2.05213e-10 kg; data quality (3,2,1,4,1)
- acrylonitrile: 9.02483e-11 kg; data quality (4,2,1,1,1)
- 1,2,4-trimethylbenzene: 4.15021e-11 kg; data quality (5,1,1,1,3)
- Cobalt: 4.03085e-10 kg; data quality (3,2,1,1,4)
- nickel: 5.30097e-13 kg; data quality (4,1,1,1,5)
- Ethene, chloro-: 3.67913e-11 kg; data quality (3,2,1,1,3)
- diisocyanates: 1.16888e-15 kg; data quality (4,1,1,1,5)
- NITROGEN TRIFLUORIDE: 8.20365e-12 kg; data quality (3,1,1,1,3)
- methanol: 1.56201e-9 kg; data quality (4,2,1,1,4)
- 1,1,1-trichloroethane: 2.49494e-10 kg; data quality (4,2,1,1,1)
- TERT-BUTYL ALCOHOL: 1.29638e-11 kg; data quality (4,1,1,1,3)
- hydrogen chloride: 1.79819e-7 kg; data quality (2,2,1,1,3)
- epichlorohydrin: 4.04899e-20 kg; data quality (3,2,1,1,3)
- Methane, difluoro-, HFC-32: 1.71645e-8 kg; data quality (4,2,1,4,1)
- carbon tetrachloride: 4.36603e-11 kg; data quality (4,2,1,1,3)
- STYRENE OXIDE: 1.1985e-11 kg; data quality (5,2,1,1,3)
- 2-METHOXYETHANOL: 1.38415e-12 kg; data quality (5,1,1,1,3)
- acetophenone: 4.89536e-11 kg; data quality (4,2,1,1,1)
- acenaphthylene: 2.56808e-10 kg; data quality (3,2,1,2,3)
- antimony: 1.54214e-9 kg; data quality (3,2,1,1,4)
- copper: 1.6955e-10 kg; data quality (4,1,1,1,3)
- Aluminum: 1.19475e-9 kg; data quality (4,1,1,1,3)
- 4-nitroaniline: 3.37599e-14 kg; data quality (5,1,1,1,3)
- ammonia: 2.50129e-7 kg; data quality (3,2,1,2,2)
- sulfur dioxide: 2.20594e-5 kg; data quality (3,2,1,1,3)
- m-xylene: 5.11796e-9 kg; data quality (3,2,1,4,1)
- nitric acid: 4.7939e-12 kg; data quality (3,1,1,1,3)
- 1,4-dichlorobenzene: 4.7516e-11 kg; data quality (2,2,1,1,3)
- methyl methacrylate: 2.51591e-9 kg; data quality (4,2,1,1,5)
- Benzo(k)fluoranthene: 1.41099e-12 kg; data quality (3,2,1,3,1)
- N,N-DIMETHYLANILINE: 2.02449e-13 kg; data quality (5,2,1,1,3)
- barium: 1.66706e-11 kg; data quality (4,1,1,1,3)
- VOC, volatile organic compounds: 1.76222e-5 kg; data quality (3,2,1,1,3)
- Propane, 1,1,1,3,3,3-hexafluoro-, HCFC-236fa: 3.40687e-10 kg; data quality (4,2,1,4,1)
- ethylbenzene: 2.8002e-10 kg; data quality (4,1,1,1,4)
- Indeno(1,2,3-cd)pyrene: 9.10386e-13 kg; data quality (3,2,1,3,1)
- butadiene: 2.79463e-8 kg; data quality (2,2,1,1,1)
- 1,1-DICHLOROETHYLENE: 1.82119e-12 kg; data quality (3,2,1,1,3)
- nitrogen oxides: 8.90738e-5 kg; data quality (3,2,1,1,3)
- DICHLOROBENZENE: 3.37599e-14 kg; data quality (4,1,1,1,3)
- manganese: 1.30441e-7 kg; data quality (3,2,1,1,4)
- fluoranthene: 9.86949e-11 kg; data quality (2,2,1,2,2)
- acrylic acid: 1.56866e-11 kg; data quality (4,2,1,1,3)
- SEC-BUTYL ALCOHOL: 4.52889e-12 kg; data quality (5,1,1,1,3)
- benzene: 1.12539e-7 kg; data quality (3,2,1,2,2)
- Cyclohexanol: 3.17343e-12 kg; data quality (4,1,1,1,3)
- Benzo(a)anthracene: 7.6074e-14 kg; data quality (2,2,1,1,3)
- 2,2,4-trimethylpentane: 1.61299e-7 kg; data quality (3,2,1,1,4)
- Methane: 4.61667e-6 kg; data quality (4,2,1,4,1)
- cyanide: 2.9862e-10 kg; data quality (2,2,1,1,3)
- benzene, chloro-: 1.05649e-10 kg; data quality (4,2,1,1,3)
- phenanthrene: 9.76051e-10 kg; data quality (3,2,1,2,3)
- bromoform: 2.27199e-13 kg; data quality (3,2,1,1,3)
- Ethylene glycol monoethyl ether: 3.89086e-10 kg; data quality (4,2,1,1,5)
- formaldehyde: 2.75205e-7 kg; data quality (2,2,1,2,3)
- Sulfuric acid: 1.56278e-8 kg; data quality (2,1,1,1,3)
- particulates, < 10 um: 0.00025619 kg; data quality (3,2,1,1,4)
- Phthalate, dimethyl-: 4.06469e-13 kg; data quality (4,1,1,1,3)
- biphenyl: 4.70014e-11 kg; data quality (4,2,1,1,1)
- ALUMINUM PHOSPHIDE: 2.02559e-12 kg; data quality (5,1,1,1,3)
- toluene: 4.27974e-7 kg; data quality (3,2,1,1,4)

## Inventory method
Input-output

## Modelling constants
The reference unit of all processes is 1 USD2013 of the good or service. The technosphere inputs are based on the US BEA detailed input-output tables for 2007. The IO tables are combined to develop a commodity-by-commodity model based on the the industry-technology assumption (see Suh et al., 2010), which assumes all commodities produced by a given industry have the same input structure, but that multiple industries can produce the same commodity. Thus, model technosphere flows represent commodity outputs (and not industry outputs) from other processes in the model. There are no by-products included in these processes. All commodity production is based on US-conditions, despite in reality that some goods and services are produced overseas, as USEEIO v1.1 is a single-region IO model.

## Completeness
The input-output approach assures that all purchased inputs associated with the sectors making these commodities as reported in the US census for 2007 are included. The direct resources extracted including minerals, energy sources, water and land occupied are included. Emissions to air include all critieria air pollutants, greenhouse gases, and hazardous and toxic air pollutants as defined by US EPA. Releases to water include toxics, total nitrogen and total phosphorus, and water discharges. Releases to soil or groundwater include toxics and agriculutural pesticides. Some metal releases to air, water and soil are not included because they could not be speciated. Solid hazardous and non-hazardous wastes generated are not included as an elementary flows although purchases of waste services are included.

## Data treatment
Greenhouse gases are primarily from the US Greenhouse Gas Emission Inventory (USEPA 2016a). Biogenic C uptake is not included (change from version 1.0), as biogenic C emission are not included. Toxic releases to air, water and soil (except pesticides) are from the 2013 Toxic Release Inventory (USEPA 2015a). Criteria air pollutants and hazardous air pollutants are from the 2011 National Emissions Inventory (USEPA 2015b). All estimates are normalized by industry based on sector output in the data year, then converted to 2013 USD using relative sector-specific CPIs (if data year is not 2013). Energy use represent raw renewables or fossil fuel energies and is based on EIA data for 2014. See Table 1 in Yang, Ingwersen et al. 2017 and Supporting Information 1, and the v1.1 data update notes (Ingwersen et al. 2017) for all details on environmental data sources used.Land occupation associated with manufacturing buildings was estimated based on the building floorspace data provided by the U.S. Energy Information Administration in the 2010 Manufacturing Energy Consumption Survey (EIA 2013). Portions of total renewable energy (EIA 2016) based on EIA-923 reports for 2014 (EIA 2017) are included. Nitrogen and Phosphorus releases are modeled in total N and total P equivalents as estimated by the Discharge Monitoring Report Nutrient Loading tool (USEPA 2016b). Self-supplied withdrawals were assigned to industrial sectors based on water use statistics for Canadian industries by NAICS 3-digit sector scaled to US production levels based on gross domestic product by industry (BEA 2015; Statistics Canada 2010), and further disaggregated to the manufacturing sectors based on compensation of employees as provided by the 2007 IO tables (BEA 2015). Water withdrawals associated with public supply were allocated to sectors based on their use of water, sewage, and other services in USD based on the IO tables (BEA 2015). Portions of total renewable energy (EIA 2016) by type are assigned to sectors (hydro, wind, solar, or) based on EIA-923 reports for 2014 (EIA 2017).

## Data collection
2015-2016

## Sampling procedure
US federal government sources, including surveys and US EPA emissions databases are used as the primary sources. From these sources, data for US reporting establishments/facilities are aggregated by the NAICS sector as defined in the BEA detailed 2007 input-output tables. When level of sector aggregation differs, or when direct emissions are not reported but modeled, additional sources are used to make allocations and estimates.

## Review details
In regard to quality assurance and peer-review, each dataset created went through Quality Assurance as defined in a quality assurance project plans at US EPA, CSRA or ERG. The model was assembled with the IO model builder model (USEPA 2016c). Validation functions were used to check that all the model components were properly assembled and harmonized. Bayou Demeke and Santosh Ghimire provided internal peer review of the model methodology and the manuscript underwent standard EPA management review. An editor and two anonymous reviewers at the Journal of Cleaner Production reviewed the model. In regard to data quality evaluation, data quality assessment was performed at the flow and process levels according to the updated US EPA data quality assessment guidelines as defined in US EPA (2016b).

## Intended application
The primary application is for use in the US Environmentally-Extended Input-Ouput model, USEEIO, version 1.1. This model is being used by the US EPA for supporting tools that prioritize goods and services based on potential environmental impacts, resource use or emissions for large regions, including the US and US states, and as a strealined tool for organizations as a starting point to consider sustainable materials management. Model results are designed to provide meso/macro-level decision support.

## Project
USEEIO v1.1 was developed by the US EPA with CSRA and ERG with Wesley W. Ingwersen and David E. Meyer as research leads. Yi Yang was the technical lead on the work for CSRA (contract EP-C-15-012); Troy Hawkins was lead for ERG (contract EP-C-12-021).

## Sources
- Edelen and Ingwersen 2017
- USEPA 2015a
- Maupin et al. 2014
- Kim et el. 2013
- Yienger et al. 1995
- USEPA 2015b
- USDA 2009b
- Blackhurst et al. 2010
- EIA 2016
- BLM 2008
- Lovelace 2009
- USDA 2009a
- USEPA 2016c
- EIA 2015
- Torcellini et al. 2003
- USDA 2016
- Nickerson et al. 2011
- USDA 2014
- Ingwersen et al. DRAFT
- Statistics Canada 2010
- BEA 2015
- USEPA 2016b
- USEPA 2016a
- EIA 2017
- USGS 2016
- Ingwersen et al. 2017
- Macknick et al. 2011
- USGS 2015
- EIA 2013
- Goebes et al. 2003
- USDA 2006
