# Funds, trusts, and financial vehicles

Dataset: openLCA process, unit process
Category: 52: Finance and Insurance
Geography: United States
Time period: 2017-01-01 to 2017-12-31
Data quality: US EPA - Process Pedigree Matrix (1;1)
Exchange data quality scheme: US EPA - Flow Pedigree Matrix
Generated by: US EPA with CSRA and ERG
Owner: US EPA
Published in: Yang, Ingwersen et al. 2017
restrictionsDescription: This model shold be appropriately cited (see Yang, Ingwersen et al. 2017 source or Publication field) when used. Any changes or derivations of this model by the user should be documented. The model itself and any results from use of this model shall not be construed to consitute US EPA opinion or policy.
copyright: false

## General comment
BEA Code & Name is '525000:Funds, trusts, and other financial vehicles'. Description of the primary industry producing this good or service, adapted from the Census Bureau NAICS 2007 descriptions: Industries in the Funds, Trusts, and Other Financial Vehicles subsector are comprised of legal entities (i.e., funds, plans, and/or programs) organized to pool securities or other assets on behalf of shareholders or beneficiaries of employee benefit or other trust funds. The portfolios are customized to achieve specific investment characteristics, such as diversification, risk, rate of return, and price volatility. These entities earn interest, dividends, and other investment income, but have little or no employment and no revenue from the sale of services. Establishments with employees devoted to the management of funds are classified in Industry Group 5239, Other Financial Investment Activities. Establishments primarily engaged in holding the securities of (or other equity interests in) other firms are classified in Sector 55, Management of Companies and Enterprises. Equity Real Estate Investment Trusts (REITs) that are primarily engaged in leasing buildings, dwellings, or other real estate property to others are classified in Subsector 531, Real Estate.

## Technology
The process describes the average US production of this good or service within this NAICS-based grouping defined in the BEA 2007 detailed input-output tables (BEA 2015). Distribution, wholesale and retailing of this good or service, use, and final disposal are not included. Creation of a product system with this process will enable modeling of all upstream (supply-chain) activities.

## Geography
Data represent the 50 US states

## Time period
2017 was the year in which this version of USEEIO was released and is the target date for the model

## Reference product
- Funds, trusts, and financial vehicles: 1 USD

## Inputs from technosphere
All rows: data quality (1,3,1,1,1)
- Accounting, tax preparation, bookkeeping, and payroll: 0.00331366 USD
- Advertising and public relations: 0.000161284 USD
- Wireless telecommunications: 0.000183278 USD
- Gasoline, fuels, and by-products of petroleum refining; at manufacturer: 8.06422e-5 USD
- Management consulting: 0.00861405 USD
- Vehicle repair: 5.13178e-5 USD
- Promoters and agents: 8.06422e-5 USD
- Insurance agencies and brokerages: 0.00906858 USD
- Limited-service restaurants: 0.00106301 USD
- Buildings and dwellings services: 0.000894395 USD
- Independent artists, writers, and performers: 0.000271251 USD
- Insurance carriers: 0.0003299 USD
- Hotels and campgrounds: 0.000608482 USD
- Air transport: 0.000865071 USD
- Funds, trusts, and financial vehicles: 0.0127855 USD
- Other computer related services, including facilities management: 0.000535171 USD
- All other food and drinking places: 4.39867e-5 USD
- Architectural, engineering, and related services: 0.00151754 USD
- Truck transport: 2.93244e-5 USD
- Other plastic products; at manufacturer: 7.33111e-6 USD
- Communications equipment; at manufacturer: 0.000102636 USD
- Company and enterprise management: 0.00205271 USD
- Passenger ground transport: 0.000249258 USD
- Telecommunications: 0.00118764 USD
- Nonresidential building repair and maintanence: 0.000153953 USD
- Household goods repair: 1.46622e-5 USD
- Golf courses, marinas, ski resorts, fitness and other rec centers and industries: 0.000117298 USD
- Satellite, telecommunications resellers, and all other telecommunications: 5.86489e-5 USD
- Electricity; at consumer: 3.66555e-5 USD
- Nondepository credit intermediation and related activities: 0.00101902 USD
- Computer terminals and other computer peripheral equipment; at manufacturer: 0.000520509 USD
- Investment advice, portfolio management, and other financial advising services: 0.568711 USD
- Civic, social, professional, and similar organizations: 0.000351893 USD
- Commercial equipment rental: 5.13178e-5 USD
- Vehicle rental and leasing: 6.598e-5 USD
- Securities and commodities brokerage and exchanges: 0.0944247 USD
- Monetary authorities and depository credit intermediation: 0.0101682 USD
- Wholesale trade: 0.000278582 USD
- Noncomparable imports: 0.00140757 USD
- Full-service restaurants: 0.00138558 USD
- Software: 3.66555e-5 USD
- Computer systems design: 0.000483853 USD
- Magazines and journals; at publisher: 7.33111e-5 USD
- Cardboard; at manufacturer: 2.93244e-5 USD
- Data processing and hosting: 0.00117298 USD
- Metal pipe fittings, ball and roller bearings, industrial patterns, metal bath fixtures, other misc. fabricated metals; at manufacturer: 5.86489e-5 USD
- Legal services: 0.00620212 USD
- Other real estate: 0.00464059 USD
- Performances: 2.19933e-5 USD
- Wireless communications; at manufacturer: 0.000447198 USD
- Electronic equipment repair and maintenance: 2.93244e-5 USD
- Travel arrangement and reservation: 7.33111e-6 USD
- Sports: 5.13178e-5 USD
- Employment services: 7.33111e-6 USD
- Specialized design: 0.000139291 USD
- Internet publishing and broadcasting: 0.000359224 USD
- Commercial machinery repair: 9.53044e-5 USD

## Inputs from nature
- Occupation, urban, discontinuously built: 3.40097e-6 m2*a; data quality (4,2,1,1,1)

## Emissions to nature
- ammonia: 5.76344e-9 kg; data quality (3,2,1,1,5)
- nitrogen oxides: 3.30917e-7 kg; data quality (2,2,1,1,4)
- particulates, < 10 um: 2.53505e-10 kg; data quality (3,2,1,4,1)
- anthracene: 6.73898e-13 kg; data quality (3,2,1,4,1)
- o-Xylene: 4.21768e-11 kg; data quality (3,2,1,4,1)
- butadiene: 3.61658e-10 kg; data quality (3,2,1,4,1)
- Chromium, ion: 2.49571e-12 kg; data quality (2,2,1,1,5)
- hexane: 3.85402e-9 kg; data quality (3,2,1,2,4)
- beryllium: 2.08898e-14 kg; data quality (2,2,1,1,5)
- acrolein: 4.57483e-11 kg; data quality (3,2,1,4,1)
- 2,2,4-trimethylpentane: 1.24614e-9 kg; data quality (3,2,1,4,1)
- pyrene: 1.13136e-12 kg; data quality (3,2,1,4,1)
- fluorene: 1.59617e-12 kg; data quality (3,2,1,4,1)
- particulates, < 2.5 um: 1.82196e-8 kg; data quality (3,2,1,2,4)
- para-xylene: 2.19933e-12 kg; data quality (3,2,1,4,1)
- Dibenz(a,h)anthracene: 2.72444e-15 kg; data quality (2,2,1,2,4)
- acenaphthylene: 3.3579e-12 kg; data quality (3,2,1,4,1)
- benzo(a)pyrene: 9.50408e-14 kg; data quality (3,2,1,4,1)
- acetaldehyde: 5.70757e-10 kg; data quality (3,2,1,4,1)
- lead: 8.76409e-13 kg; data quality (3,2,1,1,5)
- Dinitrogen monoxide: 1.77514e-10 kg; data quality (4,2,1,4,1)
- Indeno(1,2,3-cd)pyrene: 8.42287e-14 kg; data quality (3,2,1,4,1)
- Chromium VI: 1.39243e-13 kg; data quality (3,2,1,2,4)
- acenaphthene: 8.6717e-13 kg; data quality (3,2,1,4,1)
- benzene: 2.23346e-9 kg; data quality (3,2,1,4,1)
- arsenic: 5.33591e-13 kg; data quality (3,2,1,2,4)
- propanal: 1.24554e-10 kg; data quality (3,2,1,4,1)
- m-xylene: 1.17514e-10 kg; data quality (3,2,1,4,1)
- Xylene: 2.85929e-9 kg; data quality (3,2,1,4,1)
- selenium: 4.17801e-14 kg; data quality (2,2,1,1,5)
- VOC, volatile organic compounds: 6.84645e-8 kg; data quality (3,2,1,1,2)
- cadmium: 1.93083e-12 kg; data quality (3,2,1,1,5)
- formaldehyde: 1.3509e-9 kg; data quality (3,2,1,4,1)
- toluene: 3.395e-9 kg; data quality (3,2,1,4,1)
- 2-methylnaphthalene: 4.21278e-14 kg; data quality (2,2,1,1,5)
- Cobalt: 1.47462e-13 kg; data quality (3,2,1,1,5)
- carbon monoxide: 1.47314e-6 kg; data quality (3,2,1,1,1)
- mercury: 4.55468e-13 kg; data quality (2,2,1,1,5)
- Benzo(k)fluoranthene: 1.01427e-13 kg; data quality (3,2,1,4,1)
- Methane: 2.11597e-9 kg; data quality (4,2,1,4,1)
- benzene, ethyl-: 8.75943e-10 kg; data quality (3,2,1,4,1)
- sulfur dioxide: 1.21365e-9 kg; data quality (2,2,1,1,4)
- phenanthrene: 2.88053e-12 kg; data quality (3,2,1,4,1)
- Benzo(b)fluoranthene: 1.03134e-13 kg; data quality (3,2,1,4,1)
- nickel: 4.07296e-12 kg; data quality (3,2,1,1,5)
- naphthalene: 7.69707e-11 kg; data quality (3,2,1,4,1)
- Chrysene: 9.61863e-14 kg; data quality (3,2,1,4,1)
- styrene: 3.41978e-11 kg; data quality (3,2,1,4,1)
- Benzo(g,h,i)perylene: 2.6684e-13 kg; data quality (3,2,1,4,1)
- Hydrocarbons, aromatic: 2.4567e-11 kg; data quality (3,2,1,4,1)
- fluoranthene: 8.99305e-13 kg; data quality (3,2,1,4,1)
- 3-methylcholanthrene: 3.13343e-15 kg; data quality (2,2,1,1,5)
- manganese: 7.62687e-13 kg; data quality (3,2,1,2,4)
- benz[a]anthracene: 1.00636e-13 kg; data quality (3,2,1,4,1)
- Carbon dioxide: 2.04191e-5 kg; data quality (4,2,1,4,1)

## Inventory method
Input-output

## Modelling constants
The reference unit of all processes is 1 USD2013 of the good or service. The technosphere inputs are based on the US BEA detailed input-output tables for 2007. The IO tables are combined to develop a commodity-by-commodity model based on the the industry-technology assumption (see Suh et al., 2010), which assumes all commodities produced by a given industry have the same input structure, but that multiple industries can produce the same commodity. Thus, model technosphere flows represent commodity outputs (and not industry outputs) from other processes in the model. There are no by-products included in these processes. All commodity production is based on US-conditions, despite in reality that some goods and services are produced overseas, as USEEIO v1.1 is a single-region IO model.

## Completeness
The input-output approach assures that all purchased inputs associated with the sectors making these commodities as reported in the US census for 2007 are included. The direct resources extracted including minerals, energy sources, water and land occupied are included. Emissions to air include all critieria air pollutants, greenhouse gases, and hazardous and toxic air pollutants as defined by US EPA. Releases to water include toxics, total nitrogen and total phosphorus, and water discharges. Releases to soil or groundwater include toxics and agriculutural pesticides. Some metal releases to air, water and soil are not included because they could not be speciated. Solid hazardous and non-hazardous wastes generated are not included as an elementary flows although purchases of waste services are included.

## Data treatment
Greenhouse gases are primarily from the US Greenhouse Gas Emission Inventory (USEPA 2016a). Biogenic C uptake is not included (change from version 1.0), as biogenic C emission are not included. Toxic releases to air, water and soil (except pesticides) are from the 2013 Toxic Release Inventory (USEPA 2015a). Criteria air pollutants and hazardous air pollutants are from the 2011 National Emissions Inventory (USEPA 2015b). All estimates are normalized by industry based on sector output in the data year, then converted to 2013 USD using relative sector-specific CPIs (if data year is not 2013). Energy use represent raw renewables or fossil fuel energies and is based on EIA data for 2014. See Table 1 in Yang, Ingwersen et al. 2017 and Supporting Information 1, and the v1.1 data update notes (Ingwersen et al. 2017) for all details on environmental data sources used.Land occupation for commercial buildings was estimated based on the building floorspace data provided by the U.S. Energy Information Administration 2012 Commercial Building Energy Consumption Survey (CBECS) (EIA 2015). Total commercial public supply water use is reported by USGS (Maupin et al. 2014). Water use is allocated across commercial sectors based on their use of water, sewage, and other services in USD based on the 2007 Benchmark Use Table before redefinitions (BEA 2015).

## Data collection
2015-2016

## Sampling procedure
US federal government sources, including surveys and US EPA emissions databases are used as the primary sources. From these sources, data for US reporting establishments/facilities are aggregated by the NAICS sector as defined in the BEA detailed 2007 input-output tables. When level of sector aggregation differs, or when direct emissions are not reported but modeled, additional sources are used to make allocations and estimates.

## Review details
In regard to quality assurance and peer-review, each dataset created went through Quality Assurance as defined in a quality assurance project plans at US EPA, CSRA or ERG. The model was assembled with the IO model builder model (USEPA 2016c). Validation functions were used to check that all the model components were properly assembled and harmonized. Bayou Demeke and Santosh Ghimire provided internal peer review of the model methodology and the manuscript underwent standard EPA management review. An editor and two anonymous reviewers at the Journal of Cleaner Production reviewed the model. In regard to data quality evaluation, data quality assessment was performed at the flow and process levels according to the updated US EPA data quality assessment guidelines as defined in US EPA (2016b).

## Intended application
The primary application is for use in the US Environmentally-Extended Input-Ouput model, USEEIO, version 1.1. This model is being used by the US EPA for supporting tools that prioritize goods and services based on potential environmental impacts, resource use or emissions for large regions, including the US and US states, and as a strealined tool for organizations as a starting point to consider sustainable materials management. Model results are designed to provide meso/macro-level decision support.

## Project
USEEIO v1.1 was developed by the US EPA with CSRA and ERG with Wesley W. Ingwersen and David E. Meyer as research leads. Yi Yang was the technical lead on the work for CSRA (contract EP-C-15-012); Troy Hawkins was lead for ERG (contract EP-C-12-021).

## Sources
- USEPA 2016a
- Statistics Canada 2010
- USDA 2009b
- Macknick et al. 2011
- USDA 2014
- BEA 2015
- USDA 2006
- Ingwersen et al. 2017
- Edelen and Ingwersen 2017
- Ingwersen et al. DRAFT
- EIA 2013
- USEPA 2016b
- BLM 2008
- Yienger et al. 1995
- Torcellini et al. 2003
- USDA 2016
- EIA 2017
- USDA 2009a
- Maupin et al. 2014
- USEPA 2015a
- USGS 2016
- Blackhurst et al. 2010
- Lovelace 2009
- Goebes et al. 2003
- USEPA 2016c
- USGS 2015
- EIA 2016
- Nickerson et al. 2011
- USEPA 2015b
- Kim et el. 2013
- EIA 2015
