# Other educational services

Dataset: openLCA process, unit process
Category: 61: Educational Services
Geography: United States
Time period: 2017-01-01 to 2017-12-31
Data quality: US EPA - Process Pedigree Matrix (1;1)
Exchange data quality scheme: US EPA - Flow Pedigree Matrix
Generated by: US EPA with CSRA and ERG
Owner: US EPA
Published in: Yang, Ingwersen et al. 2017
restrictionsDescription: This model shold be appropriately cited (see Yang, Ingwersen et al. 2017 source or Publication field) when used. Any changes or derivations of this model by the user should be documented. The model itself and any results from use of this model shall not be construed to consitute US EPA opinion or policy.
copyright: false

## General comment
BEA Code & Name is '611B00:Other educational services'. Description of the primary industry producing this good or service, adapted from the Census Bureau NAICS 2007 descriptions: The Educational Services sector comprises establishments that provide instruction and training in a wide variety of subjects. This instruction and training is provided by specialized establishments, such as schools, colleges, universities, and training centers. These establishments may be privately owned and operated for profit or not for profit, or they may be publicly owned and operated. They may also offer food and/or accommodation services to their students. Educational services are usually delivered by teachers or instructors that explain, tell, demonstrate, supervise, and direct learning. Instruction is imparted in diverse settings, such as educational institutions, the workplace, or the home, and through diverse means, such as correspondence, television, the Internet, or other electronic and distance-learning methods. The training provided by these establishments may include the use of simulators and simulation methods. It can be adapted to the particular needs of the students, for example sign language can replace verbal language for teaching students with hearing impairments. All industries in the sector share this commonality of process, namely, labor inputs of instructors with the requisite subject matter expertise and teaching ability. Related NAICS codes are: 6114-7

## Technology
The process describes the average US production of this good or service within this NAICS-based grouping defined in the BEA 2007 detailed input-output tables (BEA 2015). Distribution, wholesale and retailing of this good or service, use, and final disposal are not included. Creation of a product system with this process will enable modeling of all upstream (supply-chain) activities.

## Geography
Data represent the 50 US states

## Time period
2017 was the year in which this version of USEEIO was released and is the target date for the model

## Reference product
- Other educational services: 1 USD

## Inputs from technosphere
All rows: data quality (1,3,1,1,1)
- Cutting and machine tool accessory, rolling mill, and other metalworking machines; at manufacturer: 0.00171619 USD
- Child day care: 1.08578e-5 USD
- Soft drinks, bottled water, and ice; at manufacturer: 2.08298e-5 USD
- Wood kitchen cabinets and countertops; at manufacturer: 1.0919e-5 USD
- Photographers: 3.92987e-8 USD
- Refined vegetable, olive, and seed oils; at manufacturer: 1.09337e-6 USD
- Corn products; at manufacturer: 3.03715e-8 USD
- Clay and ceramic products; at manufacturer: 2.64519e-6 USD
- Other primary nonferrous metals; at manufacturer: 3.02298e-9 USD
- Motorcycle, bicycle, and parts; at manufacturer: 3.02298e-9 USD
- Stationery; at manufacturer: 9.65983e-5 USD
- Paper bags and coated paper; at manufacturer: 0.000171747 USD
- Telecommunications: 0.00996416 USD
- Sound recording: 0.00265381 USD
- Railroad rolling stock; at manufacturer: 2.27786e-7 USD
- Audio and video equipment; at manufacturer: 0.00462682 USD
- Lumber and treated lumber; at manufacturer: 4.85422e-6 USD
- Computer storage device readers; at manufacturer: 0.000162628 USD
- Packaged meat (except poultry); at manufacturer: 0.000104372 USD
- Industrial process variable instruments; at manufacturer: 2.02328e-5 USD
- Food and beverage stores: 3.40505e-5 USD
- Light gauge metal cans, boxes, and containers; at manufacturer: 1.41805e-7 USD
- Cement; at manufacturer: 1.24788e-6 USD
- Motors and generators; at manufacturer: 1.88606e-6 USD
- Other real estate: 0.0711787 USD
- Management consulting: 0.00926528 USD
- News syndicates, libraries, archives, Internet publishing and all other information services: 1.96072e-5 USD
- Other basic organic chemicals; at manufacturer: 0.000526551 USD
- Residential mental retardation, mental health, substance abuse and other facilities: 1.73118e-6 USD
- Architectural, engineering, and related services: 0.00183744 USD
- Vending, commercial laundry, and other commercial and service industry machinery; at manufacturer: 0.000178215 USD
- Semiconductors; at manufacturer: 0.00222983 USD
- Investment advice, portfolio management, and other financial advising services: 0.000516812 USD
- Consumer goods and general rental centers: 0.000415251 USD
- Pipeline transport: 5.84981e-5 USD
- Poultry farms: 2.18675e-6 USD
- Satellite, telecommunications resellers, and all other telecommunications: 0.000840874 USD
- Vehicle engines and engine parts; at manufacturer: 2.24061e-5 USD
- Vehicles and parts sales: 4.79165e-7 USD
- Curtains and linens; at manufacturer: 7.39546e-6 USD
- Surgical appliance and supplies; at manufacturer: 0.000140903 USD
- Printing support; at manufacturer: 0.00015589 USD
- Air purification and ventilation equipment; at manufacturer: 1.0438e-6 USD
- Dry-cleaning and laundry: 0.000115152 USD
- Other petroleum and coal products; at manufacturer: 0.000709997 USD
- Office supplies (not paper); at manufacturer: 0.000184964 USD
- Outpatient healthcare: 8.2155e-6 USD
- Community food, housing, and other relief services, including rehabilitation services: 8.80774e-7 USD
- Aluminum; at manufacturer: 9.75214e-7 USD
- Seasonings and dressings; at manufacturer: 1.29383e-5 USD
- Other engine equipment; at manufacturer: 2.46276e-6 USD
- Colleges, universities, junior colleges, and professional schools: 8.06564e-5 USD
- Nursing and community care facilities: 3.2042e-6 USD
- Abrasive products; at manufacturer: 4.3644e-6 USD
- Paper; at manufacturer: 0.000226571 USD
- Specialty transformers; at manufacturer: 0.00169886 USD
- Special tools, dies, jigs, and fixtures; at manufacturer: 1.21486e-7 USD
- Passenger ground transport: 0.000769163 USD
- Healthcare practitioners (except physicians and dentists): 8.3218e-6 USD
- Transmission and power train parts; at manufacturer: 0.000288637 USD
- Springs and wires; at manufacturer: 1.11814e-6 USD
- Copper, nickel, lead, and zinc; at mine: 0.00299186 USD
- Ophthalmic goods; at manufacturer: 3.03715e-8 USD
- Lime and gypsum products; at manufacturer: 2.38951e-7 USD
- Storage batteries; at manufacturer: 1.15591e-6 USD
- Ink and ink cartridges; at manufacturer: 4.10015e-7 USD
- Dolls, toys, and games; at manufacturer: 1.35761e-5 USD
- Small electrical appliances; at manufacturer: 0.00190289 USD
- Rubber and plastic belts and hoses; at manufacturer: 3.28315e-6 USD
- Toiletries; at manufacturer: 0.00025881 USD
- Magazines and journals; at publisher: 0.00237162 USD
- Internet publishing and broadcasting: 0.0161447 USD
- Securities and commodities brokerage and exchanges: 0.0054332 USD
- Switchgear and switchboards; at manufacturer: 2.84358e-6 USD
- Software: 0.00260466 USD
- Asphalt pavement; at manufacturer: 5.06143e-5 USD
- Sports: 9.1034e-5 USD
- Other educational services: 0.0190108 USD
- Nonresidential building repair and maintanence: 0.00212888 USD
- Shelving and lockers; at manufacturer: 1.21153e-7 USD
- Wireless telecommunications: 0.00349842 USD
- Pharmaceutical products (pills, powders, solutions, etc.); at manufacturer: 6.96419e-5 USD
- Cheese; at manufacturer: 4.28238e-6 USD
- Environmental and other technical consulting services: 0.00203915 USD
- Salons and barber shops: 2.42972e-7 USD
- Packaged poultry; at manufacturer: 6.65136e-6 USD
- Lessors of nonfinancial intangible assets: 0.00252636 USD
- All other foods; at manufacturer: 1.4882e-6 USD
- Plastic bottles; at manufacturer: 7.36306e-7 USD
- Computer terminals and other computer peripheral equipment; at manufacturer: 0.00185702 USD
- Communication and energy wire and cable; at manufacturer: 2.8361e-7 USD
- Business support: 0.00160246 USD
- Used and secondhand goods: 0.000373731 USD
- Truck transport: 0.00221564 USD
- Movies and film: 0.00179515 USD
- Warehousing: 0.000883212 USD
- Legal services: 0.00553506 USD
- Electricity; at consumer: 0.000619777 USD
- Timber and raw forest products; at forest: 1.51858e-8 USD
- Commercial equipment rental: 0.00251302 USD
- Metal hinges, keys, lock, and other hardware; at manufacturer: 3.48869e-7 USD
- Facilities support: 0.000809757 USD
- Noncomparable imports: 0.000849477 USD
- Carpets and rugs; at manufacturer: 2.8361e-8 USD
- Finished and coated fabric; at manufacturer: 0.000357442 USD
- Sand, gravel, clay, phosphate, other nonmetallic minerals; at mine: 1.12982e-5 USD
- Printed circuit and electronic assembly; at manufacturer: 6.81433e-5 USD
- Drinking water and wastewater treatment; at consumer: 0.000180174 USD
- Metal structural products; at manufacturer: 5.22386e-6 USD
- Dental equipment and supplies; at manufacturer: 6.83359e-7 USD
- Scientific research and development: 1.53545e-6 USD
- Directory, mailing list, and other publishers; at publisher: 0.000537137 USD
- Sporting and athletic goods; at manufacturer: 0.00025732 USD
- Wooden windows, door, and flooring; at manufacturer: 1.82657e-5 USD
- Other retail: 0.00212867 USD
- Animal farms and aquaculture ponds (except cattle and poultry): 8.74657e-7 USD
- Bread and other baked goods; at manufacturer: 3.6294e-5 USD
- Soap and cleaning compounds; at manufacturer: 0.000232291 USD
- Nonferrous metal casts; at manufacturer: 6.10453e-7 USD
- Independent artists, writers, and performers: 0.000303566 USD
- Natural gas; at consumer: 0.00243131 USD
- Other support services: 0.00166746 USD
- Other rubber products; at manufacturer: 4.31932e-5 USD
- Ice cream and frozen desserts; at manufacturer: 1.91644e-5 USD
- Primary batteries; at manufacturer: 3.9483e-7 USD
- State and local government enterprises: 0.00102138 USD
- Air transport: 0.00207801 USD
- Performances: 5.47177e-5 USD
- Fruit and vegetable preservation; at manufacturer: 5.64303e-5 USD
- Computers; at manufacturer: 0.0113648 USD
- Metal pipe fittings, ball and roller bearings, industrial patterns, metal bath fixtures, other misc. fabricated metals; at manufacturer: 0.00207638 USD
- Cut stone and stone products; at manufacturer: 1.65525e-6 USD
- Tobacco, cotton, sugarcane, peanuts, sugar beets, herbs and spices, and other crops; at farm: 1.41228e-6 USD
- Pesticides; at manufacturer: 2.62055e-5 USD
- Flours and malts; at manufacturer: 8.35217e-7 USD
- Custom computer programming: 1.59496e-5 USD
- Fresh vegetables, melons, and potatoes; at farm: 4.29757e-6 USD
- Specialized design: 0.000164175 USD
- Data processing and hosting: 0.00154993 USD
- Lids, jars, bottle caps, other metal closures and crowns; at manufacturer: 6.56631e-6 USD
- Photography and photocopying equipment; at manufacturer: 1.70333e-5 USD
- Sanitary paper (tissues, napkins, diapers, etc.); at manufacturer: 1.00833e-5 USD
- Other textiles; at manufacturer: 5.55307e-6 USD
- Dog and cat food; at manufacturer: 2.76367e-7 USD
- Polystyrene foam products; at manufacturer: 3.35997e-6 USD
- Wiring devices; at manufacturer: 4.36759e-6 USD
- Flavored drink concentrates; at manufacturer: 1.23005e-6 USD
- Greenhouse crops, mushrooms, nurseries, and flowers; at farm: 1.87561e-5 USD
- Monetary authorities and depository credit intermediation: 0.028111 USD
- Pet care, photofinishing, parking and other sundry services: 0.000183492 USD
- Cookies, crackers, pastas, and tortillas; at manufacturer: 3.97867e-6 USD
- Petrochemicals; at manufacturer: 1.50825e-5 USD
- General merchandise stores: 0.00142749 USD
- Other secondary nonferrous metal products; at manufacturer: 3.04771e-7 USD
- Employment services: 0.00784318 USD
- Unrefined oil and gas; at extraction site: 0.00025503 USD
- Mechanical power transmission equipment; at manufacturer: 0.000271804 USD
- Office administration: 0.00249106 USD
- Secondary steel products; at manufacturer: 4.65129e-6 USD
- Relay and industrial controls; at manufacturer: 3.5058e-5 USD
- Air conditioning, refrigeration, and warm air heating equipment; at manufacturer: 8.91487e-5 USD
- Cardboard; at manufacturer: 0.000727896 USD
- Water transport (boats, ships, ferries): 0.000124759 USD
- Light fixtures; at manufacturer: 1.59262e-5 USD
- Wineries and wine; at manufacturer: 7.59288e-8 USD
- Vaccines and other biological medical products; at manufacturer: 2.05008e-6 USD
- Breakfast cereals; at manufacturer: 2.67269e-6 USD
- Clothing; at manufacturer: 0.000541775 USD
- Vehicle bodies; at manufacturer: 4.55573e-8 USD
- Communications equipment; at manufacturer: 2.31985e-5 USD
- Primary copper; at manufacturer: 6.04596e-9 USD
- Ammunition, arms, ordnance, and related accessories; at manufacturer: 9.07749e-6 USD
- All other food and drinking places: 0.000183058 USD
- Waste management and remediation: 0.00559086 USD
- Valve and fittings (except for plumbing); at manufacturer: 1.57986e-6 USD
- Other concrete products; at manufacturer: 5.56467e-5 USD
- Light bulbs; at manufacturer: 1.37279e-5 USD
- Farm machinery and equipment; at manufacturer: 4.51319e-6 USD
- Commercial machinery repair: 0.00123224 USD
- Plywood and veneer; at manufacturer: 3.3258e-5 USD
- Other animal food; at manufacturer: 5.77059e-7 USD
- Metal cutting and forming machine tools; at manufacturer: 0.00276933 USD
- Vehicle seating and interior trim (upholstery); at manufacturer: 2.73344e-7 USD
- Fabric; at manufacturer: 2.12111e-6 USD
- Metal plumbing drains, faucets, valves, and other fittings; at manufacturer: 3.54512e-6 USD
- Lawn and garden equipment; at manufacturer: 4.52408e-7 USD
- Plastic pipe, fittings, and sausage casings; at manufacturer: 2.54374e-6 USD
- Distilleries and spirits; at manufacturer: 1.36672e-7 USD
- Electronic capacitors, resistors, coils, transformers, connectors and other components (except semiconductors and printed circuit assemblies); at manufacturer: 0.000649747 USD
- Investigation and security: 0.00319424 USD
- Custom metal rolls; at manufacturer: 3.37496e-6 USD
- Paints and coatings; at manufacturer: 0.000847951 USD
- Wireless communications; at manufacturer: 0.00018309 USD
- Wild-caught fish and game; at place of capture: 2.82455e-6 USD
- Buildings and dwellings services: 0.00593739 USD
- Golf courses, marinas, ski resorts, fitness and other rec centers and industries: 0.000692439 USD
- Jewelry and silverware; at manufacturer: 4.4341e-7 USD
- Individual and family services: 9.12664e-6 USD
- Fluid milk and butter; at manufacturer: 6.0743e-5 USD
- Heavy duty trucks; at manufacturer: 9.11146e-8 USD
- Heating equipment other than warm air furnaces; at manufacturer: 1.44085e-6 USD
- All other forging, stamping, and sintering; at manufacturer: 3.02298e-9 USD
- other miscellaneous electrical equipment and components; at manufacturer: 1.51858e-8 USD
- Civic, social, professional, and similar organizations: 0.00247544 USD
- Promoters and agents: 5.33236e-5 USD
- Travel arrangement and reservation: 0.000421823 USD
- Coal; at mine: 2.11639e-5 USD
- Household goods repair: 0.000230896 USD
- Machinery for the paper, textile, food or other industries (except semiconductor machinery); at manufacturer: 2.14254e-6 USD
- Cardboard containers; at manufacturer: 0.000602236 USD
- Vehicle electrical and electronic equipment; at manufacturer: 0.000165333 USD
- Insurance carriers: 0.0118681 USD
- Synthetic dyes and pigments; at manufacturer: 6.23253e-5 USD
- Marketing research and all other miscellaneous professional, scientific, and technical services: 0.00173616 USD
- External hard drives, CDs, other storage media; at manufacturer: 0.000428448 USD
- Adhesives; at manufacturer: 3.97306e-6 USD
- Coffee and tea; at manufacturer: 1.19512e-5 USD
- Plastic bags, films, and sheets; at manufacturer: 0.000131676 USD
- Telephones; at manufacturer: 4.35468e-8 USD
- Other vehicle parts; at manufacturer: 0.000392164 USD
- All other converted paper products; at manufacturer: 1.11747e-5 USD
- Screws, nuts, and bolts; at manufacturer: 6.22724e-6 USD
- Dry, condensed, and evaporated dairy; at manufacturer: 2.085e-5 USD
- Fertilizers; at manufacturer: 8.80874e-5 USD
- Seafood; at manufacturer: 2.01971e-5 USD
- Material handling equipment; at manufacturer: 8.6214e-8 USD
- Ready-mix concrete; at manufacturer: 1.57687e-5 USD
- Laminated plastic plates and shapes; at manufacturer: 2.72068e-8 USD
- Computer systems design: 0.00145304 USD
- Snack foods; at manufacturer: 2.05008e-6 USD
- Medical laboratories: 1.23005e-6 USD
- Insurance agencies and brokerages: 0.00392503 USD
- Newspapers; at publisher: 0.000527488 USD
- Gasoline, fuels, and by-products of petroleum refining; at manufacturer: 0.00627649 USD
- Watches, clocks, and other measuring and controlling devices; at manufacturer: 1.82028e-6 USD
- Aluminum products; at manufacturer: 1.41805e-7 USD
- Secondary copper products; at manufacturer: 1.44641e-6 USD
- Scenic and sightseeing transportation and support activities for transportation: 0.00218586 USD
- Surgical and medical instruments; at manufacturer: 1.89063e-5 USD
- Travel trailer and campers; at manufacturer: 8.59514e-6 USD
- Primary iron, steel, and ferroalloy products; at manufacturer: 0.0020401 USD
- Frozen food; at manufacturer: 6.13505e-6 USD
- Breweries and beer; at manufacturer: 3.56004e-5 USD
- Urethane and other foam products; at manufacturer: 5.44576e-7 USD
- Couriers and messengers: 0.00314355 USD
- Leather; at manufacturer: 5.0113e-7 USD
- Physicians: 4.6924e-6 USD
- Metal windows, doors, and architectural products; at manufacturer: 2.0188e-5 USD
- Pumps and pumping equipment; at manufacturer: 3.26494e-6 USD
- Veterinarians: 7.62916e-6 USD
- Other basic inorganic chemicals; at manufacturer: 0.000242089 USD
- Limited-service restaurants: 0.00105404 USD
- Other computer related services, including facilities management: 0.00814828 USD
- Compressed Gases; at manufacturer: 6.86952e-5 USD
- Fresh wheat, corn, rice, and other grains; at farm: 1.39709e-6 USD
- Plastics; at manufacturer: 3.03715e-8 USD
- Postal service: 0.00271936 USD
- Machine shops; at manufacturer: 0.00109655 USD
- Cutlery and handtools; at manufacturer: 0.000217941 USD
- Accounting, tax preparation, bookkeeping, and payroll: 0.00587317 USD
- Motor vehicle steering, suspension components (except spring), and brake systems; at manufacturer: 0.000109399 USD
- Rubber tires; at manufacturer: 0.00129714 USD
- Vehicle repair: 0.000676132 USD
- Books, newspapers, magazines, and other print media; at manufacturer: 0.0100325 USD
- Advertising and public relations: 0.0273682 USD
- Gaskets, seals, musical instruments, fasteners, brooms, brushes, mop and other misc. goods; at manufacturer: 0.000167734 USD
- Wholesale trade: 0.00684917 USD
- Speed changers, industrial high-speed drives, and gears; at manufacturer: 3.92987e-8 USD
- Veneer, plywood, and engineered wood; at manufacturer: 6.73248e-5 USD
- Dentists: 1.04782e-6 USD
- Power tools; at manufacturer: 2.88529e-7 USD
- Fresh fruits and tree nuts; at farm: 4.10015e-7 USD
- Full-service restaurants: 0.00179737 USD
- Ball and roller bearings; at manufacturer: 9.06893e-9 USD
- Electronic equipment repair and maintenance: 0.000556722 USD
- Glass and glass products; at manufacturer: 0.000719497 USD
- Nondepository credit intermediation and related activities: 0.00332906 USD
- Books; at publisher: 0.000914137 USD
- Sugar, candy, and chocolate; at manufacturer: 6.81841e-6 USD
- Fabricated pipe and pipe fittings; at manufacturer: 5.6722e-8 USD
- Metal coatings, engravings, and heat treatments; at manufacturer: 4.73044e-5 USD
- Concrete pipe, bricks, and blocks; at manufacturer: 1.95691e-6 USD
- Vehicle rental and leasing: 0.0040836 USD
- Radio and television: 1.68714e-5 USD
- Rail transport: 0.000188433 USD
- Semiconductor machinery; at manufacturer: 2.3734e-6 USD
- Agriculture and forestry support: 6.3932e-6 USD
- Company and enterprise management: 0.0143845 USD
- Office machinery; at manufacturer: 2.85492e-6 USD
- Hotels and campgrounds: 0.00127535 USD
- Tobacco products; at manufacturer: 1.45935e-5 USD
- Chemicals (except basic chemicals, agrichemicals, polymers, paints, pharmaceuticals,soaps, cleaning compounds); at manufacturer: 0.000293406 USD
- Welding and Soldering Equipment, Scales and Balances, and other general purpose machinery; at manufacturer: 3.41038e-5 USD
- Other plastic products; at manufacturer: 0.000589531 USD

## Inputs from nature
- Energy, solar: 7.11338e-5 MJ; data quality (3,1,1,1,1)
- Energy, biomass: 1.7209e-5 MJ; data quality (3,1,1,1,1)
- Occupation, urban, discontinuously built: 0.0122874 m2*a; data quality (4,2,1,1,1)
- Water, fresh: 8.93605e-5, 5.16355e-5 m3 (2 entries, compartments not in this file); data quality (1,2,1,4,2)
- Energy, wind: 1.13236e-6 MJ; data quality (3,1,1,1,1)

## Emissions to nature
- Dibenz(a,h)anthracene: 3.68559e-14 kg; data quality (3,2,1,4,1)
- carbonyl sulfide: 2.68606e-13 kg; data quality (4,2,1,1,5)
- naphthalene: 4.34982e-9 kg; data quality (3,2,1,4,1)
- anthracene: 3.78647e-11 kg; data quality (3,2,1,4,1)
- ethylene glycol: 1.11791e-12 kg; data quality (5,1,1,1,5)
- lead: 4.84963e-13, 6.00239e-9 kg (2 entries, compartments not in this file); data quality (3,1,1,1,5)
- Propane, 1,1,1,3,3,3-hexafluoro-, HCFC-236fa: 1.78536e-10 kg; data quality (4,2,1,4,1)
- carbon tetrachloride: 1.32781e-11 kg; data quality (4,2,1,1,5)
- hydrogen fluoride: 9.59618e-11 kg; data quality (2,2,1,1,5)
- BUTYL ISOCYANATE: 3.31222e-12 kg; data quality (4,2,1,1,5)
- Benzo(a)anthracene: 1.55471e-15 kg; data quality (2,2,1,1,5)
- PYRENE, 1-NITRO-: 4.8207e-17 kg; data quality (2,2,1,1,5)
- 3,3'-dimethylbenzidine: 7.98411e-16 kg; data quality (1,2,1,1,5)
- 1,4-BENZOQUINONE: 1.50216e-17 kg; data quality (3,2,1,1,5)
- Dinitrotoluene, technical grade (2,4 (77%)- and 2,6 (19%)-): 3.22064e-10, 3.43971e-15 kg (2 entries, compartments not in this file); data quality (5,1,1,1,5)
- Xylene: 1.27269e-14 kg; data quality (4,1,1,1,5)
- hydrogen sulfide: 3.21927e-12 kg; data quality (3,2,1,1,5)
- Methane: 1.0092e-6 kg; data quality (4,2,1,4,1)
- methanol: 3.52792e-11 kg; data quality (4,2,1,1,5)
- Diethylene glycol butyl ether: 1.33928e-11 kg; data quality (4,2,1,1,5)
- 4-nitrophenol: 4.71277e-16 kg; data quality (2,2,1,1,5)
- acetonitrile: 8.8586e-13 kg; data quality (3,2,1,1,5)
- Propoxur: 6.70261e-16 kg; data quality (5,2,1,1,5)
- chlorine: 1.40575e-10 kg; data quality (4,2,1,1,5)
- benzene: 1.96064e-15 kg; data quality (3,1,1,1,5)
- ethylene glycol: 1.06126e-10 kg; data quality (5,2,1,1,5)
- Chrysene, 5-methyl-: 2.44568e-17 kg; data quality (2,2,1,1,5)
- NITROGLYCERIN: 1.99008e-10, 4.83974e-10, 1.27281e-10 kg (3 entries, compartments not in this file); data quality (5,1,1,1,5)
- 2,4-D: 4.16014e-12 kg; data quality (3,2,1,1,5)
- butadiene: 2.05333e-8 kg; data quality (3,2,1,4,1)
- Phthalate, dibutyl-: 1.18106e-10 kg; data quality (4,1,1,1,5)
- hydrogen chloride: 1.20613e-9 kg; data quality (2,2,1,1,5)
- monochloroethane: 3.99248e-12 kg; data quality (3,2,1,1,5)
- ethylbenzene: 2.41262e-11 kg; data quality (4,1,1,1,5)
- chromium: 5.37448e-14, 4.41694e-13, 5.19913e-11 kg (3 entries, compartments not in this file); data quality (4,1,1,1,5)
- toluene-2,4-diisocyante: 3.63809e-14 kg; data quality (3,2,1,1,5)
- t-butyl methyl ether: 1.00343e-10 kg; data quality (3,2,1,1,5)
- Chrysene: 5.73546e-12 kg; data quality (3,2,1,4,1)
- acenaphthylene: 1.91093e-10 kg; data quality (3,2,1,4,1)
- trichloroethylene: 8.37723e-11 kg; data quality (4,2,1,1,5)
- PHOSPHORUS: 3.82012e-11 kg; data quality (2,2,1,1,5)
- Ethene, chloro-: 1.81788e-11 kg; data quality (3,2,1,1,5)
- methane, dichloro-, hcc-30: 7.70432e-10 kg; data quality (4,2,1,1,5)
- isophorone: 2.30812e-12 kg; data quality (2,2,1,1,5)
- biphenyl: 1.24723e-12 kg; data quality (4,2,1,1,5)
- 7-OXABICYCLO[2,2,1]HEPTANE-2,3-DICARBOXYLIC ACID, DIPOTASSIUM SALT: 5.5087e-11 kg; data quality (5,1,1,1,5)
- particulates, < 10 um: 4.32826e-8 kg; data quality (3,2,1,2,4)
- dimethyl formamide: 1.64107e-11 kg; data quality (4,2,1,1,5)
- VOC, volatile organic compounds: 3.42577e-6 kg; data quality (3,2,1,1,1)
- hexane: 4.58759e-8 kg; data quality (3,2,1,4,2)
- Nitrogen: 1.33974e-7 kg; data quality (2,2,1,1,5)
- butanol: 2.77344e-10 kg; data quality (5,1,1,1,5)
- Water, fresh: 0.000119383 m3; data quality (1,2,1,4,2)
- Naphthalene: 4.0677e-12 kg; data quality (4,1,1,1,5)
- cyanide: 3.2103e-11 kg; data quality (2,2,1,1,5)
- cadmium: 4.58847e-12 kg; data quality (3,2,1,1,5)
- 2-ethoxyethyl acetate: 1.31213e-12 kg; data quality (5,2,1,1,5)
- p-phenylenediamine: 6.70261e-14 kg; data quality (5,2,1,1,5)
- arsenic: 1.31766e-11 kg; data quality (3,2,1,4,2)
- Benzo(g,h,i)perylene: 1.53581e-11 kg; data quality (3,2,1,4,1)
- 1-METHYLNAPTHALENE: 1.02509e-15 kg; data quality (2,2,1,1,5)
- hexachlorobenzene: 1.6365e-13 kg; data quality (3,2,1,1,5)
- ammonia: 1.47338e-8 kg; data quality (3,2,1,3,2)
- Carbon dioxide: 0.011063 kg; data quality (4,2,1,4,1)
- NITROUS ACID: 3.43971e-15 kg; data quality (5,1,1,1,5)
- Ethane, pentafluoro-, HFC-125: 1.5446e-8 kg; data quality (4,2,1,4,1)
- manganese: 4.171e-11, 6.72517e-13 kg (2 entries, compartments not in this file); data quality (4,1,1,1,5)
- Hydrocarbons, aromatic: 1.40685e-9 kg; data quality (3,2,1,4,1)
- aniline: 8.84744e-17 kg; data quality (4,2,1,1,5)
- acetaldehyde: 3.2328e-8 kg; data quality (3,2,1,4,1)
- formic acid: 1.19358e-12 kg; data quality (3,1,1,1,5)
- Hydrazine, methyl-: 2.10051e-13 kg; data quality (2,2,1,1,5)
- 1,2-BUTYLENE OXIDE: 3.95253e-13 kg; data quality (4,2,1,1,5)
- copper: 7.01212e-12, 6.91846e-11, 1.49017e-8 kg (3 entries, compartments not in this file); data quality (4,1,1,1,5)
- phthalate, dioctyl-: 1.904e-12 kg; data quality (3,2,1,1,5)
- nitric acid: 3.43971e-15, 9.81073e-10 kg (2 entries, compartments not in this file); data quality (3,1,1,1,5)
- Sulfuric acid: 5.21203e-10 kg; data quality (2,1,1,1,5)
- 1,1-DICHLOROETHYLENE: 1.94606e-13 kg; data quality (3,2,1,1,5)
- hexachloro-1,3-butadiene: 6.00168e-14 kg; data quality (4,2,1,1,5)
- acrolein: 2.61057e-9 kg; data quality (3,2,1,4,1)
- pentachlorophenol: 4.17871e-18 kg; data quality (3,2,1,1,5)
- Urethane: 3.91948e-16 kg; data quality (5,2,1,1,5)
- lead: 2.50313e-9 kg; data quality (3,2,1,1,5)
- formaldehyde: 8.26796e-8 kg; data quality (3,2,1,3,2)
- 1,1,2,2-tetrachloroethane: 1.47136e-12 kg; data quality (3,2,1,1,5)
- Chromium, ion: 2.03486e-11 kg; data quality (3,2,1,3,3)
- Dinitrogen monoxide: 2.94578e-8 kg; data quality (4,2,1,4,1)
- hydroquinone: 1.04303e-12 kg; data quality (3,2,1,1,5)
- bromoform: 5.35248e-14 kg; data quality (3,2,1,1,5)
- carbon monoxide: 7.52869e-5 kg; data quality (3,2,1,1,1)
- Phthalate, dimethyl-: 2.22246e-13 kg; data quality (4,2,1,1,5)
- 2,4-dinitrophenol: 5.43749e-16 kg; data quality (5,2,1,1,5)
- 2-(2-BUTOXYETHOXY) ETHYL ACETATE: 1.47862e-12 kg; data quality (5,2,1,1,5)
- Ethane, 1,1,1-trifluoro-, HFC-143a: 6.60872e-9 kg; data quality (4,2,1,4,1)
- propanal: 7.0424e-9 kg; data quality (3,2,1,4,1)
- 1,4-dichlorobenzene: 1.49139e-12 kg; data quality (2,2,1,1,5)
- 1,1,1-trichloroethane: 6.88922e-12 kg; data quality (4,2,1,1,5)
- chloroform: 1.46751e-11 kg; data quality (4,2,1,1,5)
- Phosphorus: 3.40532e-12, 1.70942e-6 kg (2 entries, compartments not in this file); data quality (4,1,1,1,5)
- acetamide: 6.70261e-16 kg; data quality (5,2,1,1,5)
- benz[a]anthracene: 6.76726e-12 kg; data quality (3,2,1,3,2)
- Triethyl amine: 1.42155e-13 kg; data quality (4,2,1,1,5)
- methyl isobutyl ketone: 1.85844e-10 kg; data quality (4,2,1,1,5)
- Xylene: 1.62795e-7 kg; data quality (3,2,1,4,1)
- Propane sultone: 6.70261e-16 kg; data quality (5,2,1,1,5)
- Asbestos: 8.29793e-15 kg; data quality (5,2,1,1,5)
- Hexachlorocyclopentadiene: 1.31979e-14 kg; data quality (3,2,1,1,5)
- 1,4-dioxane: 5.59281e-14 kg; data quality (4,2,1,1,5)
- pyrene: 6.3822e-11 kg; data quality (3,2,1,4,1)
- Benzo(b)fluoranthene: 5.69912e-12 kg; data quality (3,2,1,4,1)
- para-xylene: 1.26048e-10 kg; data quality (3,2,1,4,1)
- Cobalt: 1.0144e-11 kg; data quality (3,2,1,1,5)
- fluorene: 9.12725e-11 kg; data quality (3,2,1,4,1)
- bis(2-chloroethyl)ether: 8.9815e-19 kg; data quality (3,2,1,1,5)
- o-cresol: 4.90303e-16 kg; data quality (4,2,1,1,5)
- 2-METHOXYETHANOL: 1.55735e-15 kg; data quality (4,2,1,1,5)
- cyclohexane: 3.43971e-15 kg; data quality (4,1,1,1,5)
- Ethylene glycol monoethyl ether: 5.05428e-13 kg; data quality (4,2,1,1,5)
- 2-chloro-1-phenylethanone: 9.5136e-15 kg; data quality (2,2,1,1,5)
- Propene, 1,3-dichloro-: 2.71689e-13 kg; data quality (3,2,1,1,5)
- 1-Methyl-2-pyrrolidinone: 3.5556e-11, 2.67266e-12 kg (2 entries, compartments not in this file); data quality (5,1,1,1,5)
- Ethane, 1,1,1,2-tetrafluoro-, HFC-134a: 5.8218e-8 kg; data quality (4,2,1,4,1)
- beryllium: 1.36399e-13 kg; data quality (2,2,1,1,5)
- benzyl chloride: 9.51354e-13 kg; data quality (2,2,1,1,5)
- Benzo(k)fluoranthene: 5.55778e-12 kg; data quality (3,2,1,4,1)
- barium: 8.62233e-15 kg; data quality (4,1,1,1,5)
- ethane, 1,1,2-trichloro-: 4.28801e-14 kg; data quality (4,2,1,1,5)
- selenium: 2.1986e-12 kg; data quality (2,2,1,1,5)
- sulfur dioxide: 1.07956e-7 kg; data quality (2,2,1,1,5)
- benzene: 1.2643e-7 kg; data quality (3,2,1,4,1)
- Cresol: 4.61719e-13 kg; data quality (4,2,1,1,5)
- antimony: 3.0977e-12 kg; data quality (3,2,1,1,5)
- phenanthrene: 1.64512e-10 kg; data quality (3,2,1,4,1)
- o-Xylene: 2.38789e-9 kg; data quality (3,2,1,4,1)
- dibenzofuran: 9.41302e-14 kg; data quality (4,2,1,1,5)
- m-xylene: 6.64661e-9 kg; data quality (3,2,1,4,1)
- ammonia: 8.76972e-12 kg; data quality (3,1,1,1,5)
- ethene, tetrachloro-: 7.80529e-11 kg; data quality (3,2,1,1,5)
- 3-methylcholanthrene: 3.96783e-16 kg; data quality (2,2,1,1,5)
- 1,2,4-trimethylbenzene: 2.62106e-12 kg; data quality (5,1,1,1,5)
- Ethylene glycol: 1.16094e-10 kg; data quality (5,1,1,1,5)
- particulates, < 2.5 um: 3.47809e-7 kg; data quality (3,2,1,3,2)
- Triethylene glycol: 4.81918e-16 kg; data quality (5,2,1,1,5)
- methane, bromo-, halon 1001: 5.55537e-12 kg; data quality (3,2,1,1,5)
- carbon disulfide: 7.37668e-13 kg; data quality (4,2,1,1,5)
- methane, monochloro-, r-40: 1.12536e-12 kg; data quality (3,2,1,1,5)
- Indeno(1,2,3-cd)pyrene: 4.58608e-12 kg; data quality (3,2,1,4,1)
- 1,2,4-trichlorobenzene: 4.54832e-14 kg; data quality (4,2,1,1,5)
- phenol: 4.12766e-14 kg; data quality (3,1,1,1,5)
- Hydrazine: 1.35661e-13 kg; data quality (4,2,1,1,5)
- Aluminum: 9.11524e-13 kg; data quality (4,1,1,1,5)
- fluoranthene: 5.11879e-11 kg; data quality (3,2,1,4,1)
- polychlorinated biphenyls: 7.37599e-19 kg; data quality (3,2,1,1,5)
- cumene: 5.9323e-12 kg; data quality (4,2,1,1,5)
- Phthalate, dibutyl-: 6.97853e-13 kg; data quality (4,2,1,1,5)
- acenaphthene: 4.92039e-11 kg; data quality (3,2,1,4,1)
- diethanolamine: 1.53492e-12 kg; data quality (3,2,1,1,5)
- Propane, 1,2-dichloro-: 2.20003e-13 kg; data quality (4,2,1,1,5)
- chlorine: 4.95319e-13 kg; data quality (2,1,1,1,5)
- epichlorohydrin: 1.27508e-13 kg; data quality (3,2,1,1,5)
- nickel: 7.81812e-11, 1.46532e-15 kg (2 entries, compartments not in this file); data quality (4,1,1,1,5)
- acrylic acid: 2.78849e-15 kg; data quality (4,2,1,1,5)
- benzidine: 1.34052e-13 kg; data quality (2,2,1,1,5)
- ethane, 1,2-dichloro-: 1.27812e-11 kg; data quality (3,2,1,1,5)
- 2-nitropropane: 1.58383e-19 kg; data quality (5,2,1,1,5)
- ethane, 1,2-dibromo-: 1.10696e-11 kg; data quality (2,2,1,1,5)
- Nitrobenzene: 6.94806e-15 kg; data quality (4,2,1,1,5)
- Methane, difluoro-, HFC-32: 8.99505e-9 kg; data quality (4,2,1,4,1)
- methyl methacrylate: 8.69837e-14 kg; data quality (4,2,1,1,5)
- manganese: 2.89999e-11 kg; data quality (3,2,1,2,4)
- ALLYL CHLORIDE: 5.21631e-18 kg; data quality (3,2,1,1,5)
- benzene, chloro-: 6.54257e-13 kg; data quality (4,2,1,1,5)
- vinyl acetate: 6.68945e-12 kg; data quality (4,2,1,1,5)
- propylene oxide: 2.47355e-13 kg; data quality (3,2,1,1,5)
- toluene, 2,4-dinitro-: 5.49456e-16 kg; data quality (5,2,1,1,5)
- styrene: 1.95565e-9 kg; data quality (3,2,1,4,1)
- phenol: 1.55115e-10 kg; data quality (4,2,1,1,5)
- Toluene, 2,4-dinitro-: 6.87943e-15 kg; data quality (5,1,1,1,5)
- 2-methylnaphthalene: 8.41065e-12 kg; data quality (2,2,1,1,5)
- Propene: 1.71986e-13 kg; data quality (3,1,1,1,5)
- ethyl acrylate: 7.72351e-12 kg; data quality (4,2,1,1,5)
- nickel: 4.7369e-11 kg; data quality (3,2,1,3,3)
- NITRIC ACID: 2.55639e-12 kg; data quality (3,1,1,1,5)
- hexachloroethane: 3.3513e-15 kg; data quality (4,2,1,1,5)
- ETHYLENETHIOUREA: 1.07242e-15 kg; data quality (5,2,1,1,5)
- benzo(a)pyrene: 5.37247e-12 kg; data quality (3,2,1,4,1)
- benzene, ethyl-: 4.97082e-8 kg; data quality (3,2,1,4,1)
- toluene: 1.9272e-7 kg; data quality (3,2,1,4,1)
- nitrogen oxides: 4.02661e-6 kg; data quality (3,2,1,1,1)
- acrylonitrile: 3.6792e-12 kg; data quality (4,2,1,1,5)
- Chromium VI: 6.53168e-12 kg; data quality (3,2,1,2,4)
- acetophenone: 2.06879e-14 kg; data quality (4,2,1,1,5)
- ethylene oxide: 5.01356e-14 kg; data quality (3,2,1,1,5)
- 2,4,5-trichlorophenol: 6.70261e-16 kg; data quality (2,2,1,1,5)
- 2,2,4-trimethylpentane: 7.04631e-8 kg; data quality (3,2,1,4,1)
- Dimethyl sulfate: 1.04348e-13 kg; data quality (2,2,1,1,5)
- Dimethylcarbamyl chloride: 5.21631e-18 kg; data quality (5,2,1,1,5)
- CHLORONAPHTHALENE: 4.1606e-20 kg; data quality (1,2,1,1,5)
- methylene diphenyl diisocyanate: 2.1589e-11 kg; data quality (4,2,1,1,5)
- 2-Acetylaminofluorene: 6.70261e-14 kg; data quality (5,2,1,1,5)
- 2-NITROPROPANE: 1.71986e-14 kg; data quality (5,1,1,1,5)
- mercury: 6.76075e-12 kg; data quality (2,2,1,1,5)

## Inventory method
Input-output

## Modelling constants
The reference unit of all processes is 1 USD2013 of the good or service. The technosphere inputs are based on the US BEA detailed input-output tables for 2007. The IO tables are combined to develop a commodity-by-commodity model based on the the industry-technology assumption (see Suh et al., 2010), which assumes all commodities produced by a given industry have the same input structure, but that multiple industries can produce the same commodity. Thus, model technosphere flows represent commodity outputs (and not industry outputs) from other processes in the model. There are no by-products included in these processes. All commodity production is based on US-conditions, despite in reality that some goods and services are produced overseas, as USEEIO v1.1 is a single-region IO model.

## Completeness
The input-output approach assures that all purchased inputs associated with the sectors making these commodities as reported in the US census for 2007 are included. The direct resources extracted including minerals, energy sources, water and land occupied are included. Emissions to air include all critieria air pollutants, greenhouse gases, and hazardous and toxic air pollutants as defined by US EPA. Releases to water include toxics, total nitrogen and total phosphorus, and water discharges. Releases to soil or groundwater include toxics and agriculutural pesticides. Some metal releases to air, water and soil are not included because they could not be speciated. Solid hazardous and non-hazardous wastes generated are not included as an elementary flows although purchases of waste services are included.

## Data treatment
Greenhouse gases are primarily from the US Greenhouse Gas Emission Inventory (USEPA 2016a). Biogenic C uptake is not included (change from version 1.0), as biogenic C emission are not included. Toxic releases to air, water and soil (except pesticides) are from the 2013 Toxic Release Inventory (USEPA 2015a). Criteria air pollutants and hazardous air pollutants are from the 2011 National Emissions Inventory (USEPA 2015b). All estimates are normalized by industry based on sector output in the data year, then converted to 2013 USD using relative sector-specific CPIs (if data year is not 2013). Energy use represent raw renewables or fossil fuel energies and is based on EIA data for 2014. See Table 1 in Yang, Ingwersen et al. 2017 and Supporting Information 1, and the v1.1 data update notes (Ingwersen et al. 2017) for all details on environmental data sources used.Land occupation for commercial buildings was estimated based on the building floorspace data provided by the U.S. Energy Information Administration 2012 Commercial Building Energy Consumption Survey (CBECS) (EIA 2015). Total commercial public supply water use is reported by USGS (Maupin et al. 2014). Water use is allocated across commercial sectors based on their use of water, sewage, and other services in USD based on the 2007 Benchmark Use Table before redefinitions (BEA 2015).

## Data collection
2015-2016

## Sampling procedure
US federal government sources, including surveys and US EPA emissions databases are used as the primary sources. From these sources, data for US reporting establishments/facilities are aggregated by the NAICS sector as defined in the BEA detailed 2007 input-output tables. When level of sector aggregation differs, or when direct emissions are not reported but modeled, additional sources are used to make allocations and estimates.

## Review details
In regard to quality assurance and peer-review, each dataset created went through Quality Assurance as defined in a quality assurance project plans at US EPA, CSRA or ERG. The model was assembled with the IO model builder model (USEPA 2016c). Validation functions were used to check that all the model components were properly assembled and harmonized. Bayou Demeke and Santosh Ghimire provided internal peer review of the model methodology and the manuscript underwent standard EPA management review. An editor and two anonymous reviewers at the Journal of Cleaner Production reviewed the model. In regard to data quality evaluation, data quality assessment was performed at the flow and process levels according to the updated US EPA data quality assessment guidelines as defined in US EPA (2016b).

## Intended application
The primary application is for use in the US Environmentally-Extended Input-Ouput model, USEEIO, version 1.1. This model is being used by the US EPA for supporting tools that prioritize goods and services based on potential environmental impacts, resource use or emissions for large regions, including the US and US states, and as a strealined tool for organizations as a starting point to consider sustainable materials management. Model results are designed to provide meso/macro-level decision support.

## Project
USEEIO v1.1 was developed by the US EPA with CSRA and ERG with Wesley W. Ingwersen and David E. Meyer as research leads. Yi Yang was the technical lead on the work for CSRA (contract EP-C-15-012); Troy Hawkins was lead for ERG (contract EP-C-12-021).

## Sources
- USEPA 2016b
- USDA 2009b
- Blackhurst et al. 2010
- USEPA 2015a
- Edelen and Ingwersen 2017
- EIA 2017
- USEPA 2016c
- USEPA 2015b
- USDA 2016
- Ingwersen et al. 2017
- Yienger et al. 1995
- USDA 2014
- USDA 2006
- USGS 2016
- USDA 2009a
- Goebes et al. 2003
- USEPA 2016a
- Statistics Canada 2010
- Lovelace 2009
- Nickerson et al. 2011
- Ingwersen et al. DRAFT
- Maupin et al. 2014
- Torcellini et al. 2003
- USGS 2015
- BEA 2015
- Kim et el. 2013
- BLM 2008
- EIA 2013
- Macknick et al. 2011
- EIA 2015
- EIA 2016
