# Rubber and plastic belts and hoses; at manufacturer

Dataset: openLCA process, unit process
Category: 3262: Rubber Product Manufacturing
Geography: United States
Time period: 2017-01-01 to 2017-12-31
Data quality: US EPA - Process Pedigree Matrix (1;1)
Exchange data quality scheme: US EPA - Flow Pedigree Matrix
Generated by: US EPA with CSRA and ERG
Owner: US EPA
Published in: Yang, Ingwersen et al. 2017
restrictionsDescription: This model shold be appropriately cited (see Yang, Ingwersen et al. 2017 source or Publication field) when used. Any changes or derivations of this model by the user should be documented. The model itself and any results from use of this model shall not be construed to consitute US EPA opinion or policy.
copyright: false

## General comment
BEA Code & Name is '326220:Rubber and plastics hoses and belting manufacturing'. Description of the primary industry producing this good or service, adapted from the Census Bureau NAICS 2007 descriptions: This industry comprises establishments primarily engaged in manufacturing rubber hose and/or plastics (reinforced) hose and belting from natural and synthetic rubber and/or plastics resins. Establishments manufacturing garden hoses from purchased hose are included in this industry.

## Technology
The process describes the average US production of this good or service within this NAICS-based grouping defined in the BEA 2007 detailed input-output tables (BEA 2015). Distribution, wholesale and retailing of this good or service, use, and final disposal are not included. Creation of a product system with this process will enable modeling of all upstream (supply-chain) activities.

## Geography
Data represent the 50 US states

## Time period
2017 was the year in which this version of USEEIO was released and is the target date for the model

## Reference product
- Rubber and plastic belts and hoses; at manufacturer: 1 USD

## Inputs from technosphere
All rows: data quality (1,3,1,1,1)
- Home furniture - Cabinets and non-wood, nonupholstered; at manufacturer: 3.70834e-7 USD
- Passenger ground transport: 0.000667725 USD
- Semiconductors; at manufacturer: 0.00462466 USD
- Postal service: 9.02396e-6 USD
- Nonferrous metal casts; at manufacturer: 0.000786164 USD
- Coal; at mine: 0.000694644 USD
- Civic, social, professional, and similar organizations: 0.000453735 USD
- Industrial process variable instruments; at manufacturer: 2.78685e-6 USD
- Refined vegetable, olive, and seed oils; at manufacturer: 3.8742e-5 USD
- Optical instruments and lenses; at manufacturer: 6.2264e-6 USD
- Synthetic rubber and artificial and synthetic fibers; at manufacturer: 0.0684419 USD
- Packaging machinery; at manufacturer: 5.47869e-6 USD
- Air transport: 0.00273655 USD
- Unrefined oil and gas; at extraction site: 7.55624e-5 USD
- Investment advice, portfolio management, and other financial advising services: 0.000445821 USD
- Paper bags and coated paper; at manufacturer: 0.000335906 USD
- Springs and wires; at manufacturer: 2.7948e-5 USD
- Metal structural products; at manufacturer: 0.000250536 USD
- Dry-cleaning and laundry: 4.00988e-6 USD
- Wood kitchen cabinets and countertops; at manufacturer: 0.000178206 USD
- Waste management and remediation: 0.00189431 USD
- Mineral wool; at manufacturer: 0.000130498 USD
- Primary copper; at manufacturer: 0.000152461 USD
- Sports: 4.975e-6 USD
- Gasoline, fuels, and by-products of petroleum refining; at manufacturer: 0.00311313 USD
- Golf courses, marinas, ski resorts, fitness and other rec centers and industries: 0.000226361 USD
- Legal services: 0.00189135 USD
- Timber and raw forest products; at forest: 0.0114016 USD
- Plywood and veneer; at manufacturer: 0.000124237 USD
- Computer terminals and other computer peripheral equipment; at manufacturer: 1.00766e-5 USD
- Nondepository credit intermediation and related activities: 0.00316853 USD
- Ophthalmic goods; at manufacturer: 4.75795e-7 USD
- Household goods repair: 0.000238668 USD
- Scenic and sightseeing transportation and support activities for transportation: 6.72071e-6 USD
- Air and gas compressors; at manufacturer: 2.49056e-5 USD
- Aluminum products; at manufacturer: 6.05274e-5 USD
- Metal pipe fittings, ball and roller bearings, industrial patterns, metal bath fixtures, other misc. fabricated metals; at manufacturer: 0.00202504 USD
- Automatic controls for HVAC and refrigeration equipment; at manufacturer: 2.33867e-6 USD
- Surgical appliance and supplies; at manufacturer: 1.36124e-5 USD
- Office administration: 1.30829e-5 USD
- Motor vehicle steering, suspension components (except spring), and brake systems; at manufacturer: 9.47627e-5 USD
- Business support: 0.00204893 USD
- Screws, nuts, and bolts; at manufacturer: 0.00211009 USD
- Wooden windows, door, and flooring; at manufacturer: 7.25148e-5 USD
- Nonresidential building repair and maintanence: 0.00233014 USD
- Paper; at manufacturer: 0.000581111 USD
- Other nonmetallic mineral products; at manufacturer: 3.88219e-5 USD
- Environmental and other technical consulting services: 2.30663e-5 USD
- Glass and glass products; at manufacturer: 0.000142022 USD
- Secondary steel products; at manufacturer: 0.0196393 USD
- Fertilizers; at manufacturer: 0.000172507 USD
- Soap and cleaning compounds; at manufacturer: 6.20534e-5 USD
- Plastic pipe, fittings, and sausage casings; at manufacturer: 8.04603e-5 USD
- Independent artists, writers, and performers: 0.000229877 USD
- State and local government enterprises: 0.000713678 USD
- Other plastic products; at manufacturer: 0.00157415 USD
- Other basic organic chemicals; at manufacturer: 0.019621 USD
- Welding and Soldering Equipment, Scales and Balances, and other general purpose machinery; at manufacturer: 4.19946e-5 USD
- Relay and industrial controls; at manufacturer: 0.000642644 USD
- Pipeline transport: 1.68746e-5 USD
- Machine shops; at manufacturer: 0.00529948 USD
- All other food and drinking places: 5.00921e-6 USD
- Noncomparable imports: 0.00346287 USD
- Vending, commercial laundry, and other commercial and service industry machinery; at manufacturer: 1.71137e-5 USD
- Securities and commodities brokerage and exchanges: 0.00156494 USD
- Other concrete products; at manufacturer: 3.88219e-5 USD
- Laminated plastic plates and shapes; at manufacturer: 6.15615e-5 USD
- Clay and ceramic products; at manufacturer: 5.47248e-5 USD
- Satellite, telecommunications resellers, and all other telecommunications: 0.000223568 USD
- Electricity; at consumer: 0.00747684 USD
- Commercial equipment rental: 0.000259993 USD
- Lessors of nonfinancial intangible assets: 0.00319047 USD
- Other retail: 9.24507e-5 USD
- Rail transport: 0.00228587 USD
- Cutting and machine tool accessory, rolling mill, and other metalworking machines; at manufacturer: 0.000491502 USD
- Animal farms and aquaculture ponds (except cattle and poultry): 4.83696e-8 USD
- Asphalt pavement; at manufacturer: 9.35467e-6 USD
- Other computer related services, including facilities management: 0.000666897 USD
- Full-service restaurants: 0.00112909 USD
- Primary iron, steel, and ferroalloy products; at manufacturer: 0.00436289 USD
- Management consulting: 0.000527722 USD
- Motors and generators; at manufacturer: 0.000106612 USD
- Accounting, tax preparation, bookkeeping, and payroll: 0.00208561 USD
- Investigation and security: 0.000915776 USD
- Scientific research and development: 4.56607e-6 USD
- Cement; at manufacturer: 1.35643e-5 USD
- Packaged meat (except poultry); at manufacturer: 5.64312e-8 USD
- Metal plumbing drains, faucets, valves, and other fittings; at manufacturer: 2.19835e-5 USD
- Magazines and journals; at publisher: 7.48045e-6 USD
- Communication and energy wire and cable; at manufacturer: 0.000136965 USD
- Marketing research and all other miscellaneous professional, scientific, and technical services: 0.0058259 USD
- Advertising and public relations: 0.00333511 USD
- Newspapers; at publisher: 6.91822e-7 USD
- Mechanical power transmission equipment; at manufacturer: 0.000235019 USD
- Other support services: 0.00134603 USD
- Other primary nonferrous metals; at manufacturer: 6.6047e-6 USD
- Other textiles; at manufacturer: 6.12228e-6 USD
- Metal hinges, keys, lock, and other hardware; at manufacturer: 0.0649363 USD
- Power boilers and heat exchangers; at manufacturer: 2.3522e-5 USD
- Lumber and treated lumber; at manufacturer: 3.39022e-5 USD
- Light fixtures; at manufacturer: 2.24512e-5 USD
- Custom computer programming: 3.59748e-5 USD
- Electronic capacitors, resistors, coils, transformers, connectors and other components (except semiconductors and printed circuit assemblies); at manufacturer: 0.000933234 USD
- Metal windows, doors, and architectural products; at manufacturer: 0.000202978 USD
- Watches, clocks, and other measuring and controlling devices; at manufacturer: 1.61232e-8 USD
- Special tools, dies, jigs, and fixtures; at manufacturer: 1.87093e-5 USD
- Telecommunications: 0.00273858 USD
- Commercial machinery repair: 0.00184957 USD
- Architectural, engineering, and related services: 0.0112571 USD
- Fabricated pipe and pipe fittings; at manufacturer: 0.000391644 USD
- Used and secondhand goods: 1.61232e-8 USD
- Air purification and ventilation equipment; at manufacturer: 3.98144e-5 USD
- Data processing and hosting: 0.00401765 USD
- Lime and gypsum products; at manufacturer: 2.8064e-5 USD
- Other vehicle parts; at manufacturer: 0.00195184 USD
- Paints and coatings; at manufacturer: 0.00020234 USD
- Aluminum; at manufacturer: 0.00014971 USD
- Vegetable oils and by-products; at manufacturer: 0.000124528 USD
- Iron, gold, silver, and other metal ores; at mine: 2.24015e-5 USD
- Veneer, plywood, and engineered wood; at manufacturer: 0.000911529 USD
- Fiber, yarn, and thread; at manufacturer: 0.000386777 USD
- Facilities support: 0.000464024 USD
- Dimensional stone; at mine: 6.84904e-5 USD
- All other forging, stamping, and sintering; at manufacturer: 0.000356863 USD
- Urethane and other foam products; at manufacturer: 7.86488e-6 USD
- Secondary copper products; at manufacturer: 0.000475016 USD
- Vehicle electrical and electronic equipment; at manufacturer: 4.67734e-5 USD
- Other basic inorganic chemicals; at manufacturer: 0.0081619 USD
- Adhesives; at manufacturer: 0.000281624 USD
- Hydraulic pumps, motors, cylinders and actuators; at manufacturer: 0.000358225 USD
- Computer storage device readers; at manufacturer: 9.35467e-7 USD
- Company and enterprise management: 0.0266499 USD
- Clothing; at manufacturer: 9.56255e-5 USD
- Ball and roller bearings; at manufacturer: 0.000412585 USD
- Promoters and agents: 4.31583e-6 USD
- Warehousing: 0.00165519 USD
- Ground or treated minerals and earth; at manufacturer: 8.90123e-5 USD
- Ready-mix concrete; at manufacturer: 5.14507e-6 USD
- Hotels and campgrounds: 0.00112298 USD
- Finished and coated fabric; at manufacturer: 0.000554752 USD
- Electronic equipment repair and maintenance: 0.000470738 USD
- Software: 0.000218472 USD
- Other real estate: 0.000479256 USD
- Vehicle metal stamping; at manufacturer: 0.00151265 USD
- Heavy gauge metal tanks; at manufacturer: 2.00628e-5 USD
- Buildings and dwellings services: 0.00368873 USD
- Machinery for the paper, textile, food or other industries (except semiconductor machinery); at manufacturer: 3.66666e-5 USD
- Concrete pipe, bricks, and blocks; at manufacturer: 3.27414e-5 USD
- Air conditioning, refrigeration, and warm air heating equipment; at manufacturer: 0.000189 USD
- Monetary authorities and depository credit intermediation: 0.00740615 USD
- Rubber and plastic belts and hoses; at manufacturer: 0.00104901 USD
- Compressed Gases; at manufacturer: 0.000138712 USD
- Other secondary nonferrous metal products; at manufacturer: 6.01543e-5 USD
- Truck transport: 0.0110368 USD
- Petrochemicals; at manufacturer: 0.00137477 USD
- Other engine equipment; at manufacturer: 1.56143e-5 USD
- Vehicles and parts sales: 5.05362e-5 USD
- Greenhouse crops, mushrooms, nurseries, and flowers; at farm: 2.85381e-6 USD
- Plastic bags, films, and sheets; at manufacturer: 0.00302072 USD
- Metal coatings, engravings, and heat treatments; at manufacturer: 0.00605279 USD
- other miscellaneous electrical equipment and components; at manufacturer: 4.2096e-6 USD
- Natural gas; at consumer: 0.00699568 USD
- Consumer goods and general rental centers: 8.29295e-6 USD
- Cast iron and steel; at manufacturer: 0.000391544 USD
- Storage batteries; at manufacturer: 1.58882e-5 USD
- Specialty transformers; at manufacturer: 5.9776e-6 USD
- Food and beverage stores: 6.01868e-6 USD
- Material handling equipment; at manufacturer: 0.000277424 USD
- Wireless telecommunications: 0.000908666 USD
- Insurance carriers: 0.00317349 USD
- Cardboard containers; at manufacturer: 0.0121125 USD
- Heating equipment other than warm air furnaces; at manufacturer: 4.67734e-7 USD
- External hard drives, CDs, other storage media; at manufacturer: 1.49675e-5 USD
- Transmission and power train parts; at manufacturer: 8.232e-6 USD
- Cutlery and handtools; at manufacturer: 0.000349128 USD
- Employment services: 0.00115753 USD
- Custom metal rolls; at manufacturer: 0.000158375 USD
- Computer systems design: 0.00177717 USD
- Synthetic dyes and pigments; at manufacturer: 0.000677959 USD
- Plastics; at manufacturer: 0.0299229 USD
- Gaskets, seals, musical instruments, fasteners, brooms, brushes, mop and other misc. goods; at manufacturer: 0.000190425 USD
- Performances: 1.30458e-6 USD
- Other rubber products; at manufacturer: 0.0628349 USD
- Light gauge metal cans, boxes, and containers; at manufacturer: 0.000265412 USD
- Vehicle rental and leasing: 0.000505726 USD
- Wholesale trade: 0.0584585 USD
- Speed changers, industrial high-speed drives, and gears; at manufacturer: 7.84009e-5 USD
- Plastic bottles; at manufacturer: 5.81131e-5 USD
- General merchandise stores: 1.34246e-5 USD
- Other petroleum and coal products; at manufacturer: 0.00306786 USD
- Insurance agencies and brokerages: 0.00112492 USD
- Vehicle engines and engine parts; at manufacturer: 4.78636e-5 USD
- Wiring devices; at manufacturer: 0.000125949 USD
- Water transport (boats, ships, ferries): 0.00024807 USD
- Books, newspapers, magazines, and other print media; at manufacturer: 2.28184e-6 USD
- Drinking water and wastewater treatment; at consumer: 0.00070859 USD
- Abrasive products; at manufacturer: 6.42062e-5 USD
- Specialized design: 0.00139109 USD
- Vehicle repair: 0.000926706 USD
- Light bulbs; at manufacturer: 2.28634e-6 USD
- Cardboard; at manufacturer: 0.00118326 USD
- Chemicals (except basic chemicals, agrichemicals, polymers, paints, pharmaceuticals,soaps, cleaning compounds); at manufacturer: 0.00177937 USD
- Office supplies (not paper); at manufacturer: 8.88694e-6 USD
- Lids, jars, bottle caps, other metal closures and crowns; at manufacturer: 0.000557535 USD
- Limited-service restaurants: 0.00224108 USD
- Printed circuit and electronic assembly; at manufacturer: 0.00214087 USD
- Fabric; at manufacturer: 0.0726161 USD
- Valve and fittings (except for plumbing); at manufacturer: 0.00082103 USD
- Polystyrene foam products; at manufacturer: 1.63811e-5 USD
- Rubber tires; at manufacturer: 2.75071e-5 USD
- Switchgear and switchboards; at manufacturer: 2.05803e-5 USD

## Inputs from nature
- Occupation, urban, discontinuously built: 0.000174593 m2*a; data quality (4,2,1,1,1)
- Energy, solar: 3.34936e-7 MJ; data quality (3,1,1,1,1)
- Water, fresh: 0.000338695 m3; data quality (2,2,1,4,2)
- Water, fresh: 0.000902659 m3; data quality (3,2,1,4,2)
- Energy, biomass: 0.00085064 MJ; data quality (3,1,1,1,1)
- Occupation, industrial area: 0.00154245 m2*a; data quality (4,2,1,1,1)
- Energy, wind: 5.94049e-5 MJ; data quality (3,1,1,1,1)
- Occupation, industrial area, built up: 0.000514149 m2*a; data quality (4,2,1,1,1)
- Water, saline: 4.41225e-5 m3; data quality (4,2,1,4,2)

## Emissions to nature
- vinyl acetate: 6.50773e-9 kg; data quality (4,2,1,1,4)
- Indeno(1,2,3-cd)pyrene: 3.00809e-12 kg; data quality (2,2,1,1,4)
- Diethylene glycol butyl ether: 1.23666e-9 kg; data quality (4,2,1,1,5)
- AZIRIDINE: 2.39764e-11 kg; data quality (4,2,1,1,4)
- methanol: 2.08431e-8, 1.28685e-9 kg (2 entries, compartments not in this file); data quality (3,1,1,1,4)
- carbon tetrachloride: 2.04859e-9 kg; data quality (4,2,1,1,4)
- manganese: 2.48047e-11 kg; data quality (4,1,1,1,5)
- ETHYLENETHIOUREA: 6.05831e-13 kg; data quality (2,1,1,1,5)
- phenol: 2.07622e-7 kg; data quality (4,2,1,1,4)
- PERACETIC ACID: 2.75144e-12 kg; data quality (4,1,1,1,4)
- Methane, dibromo-: 2.80487e-10 kg; data quality (5,1,1,1,4)
- Benzo(a)anthracene: 1.23844e-13 kg; data quality (2,2,1,1,5)
- antimony: 1.39371e-12, 2.24353e-9 kg (2 entries, compartments not in this file); data quality (2,1,1,1,4)
- BUTYL ISOCYANATE: 6.6924e-10 kg; data quality (3,2,1,1,5)
- ethane, 1,1,2-trichloro-: 5.85959e-11 kg; data quality (4,2,1,1,4)
- 1,1-DICHLOROETHYLENE: 1.13289e-10 kg; data quality (3,2,1,1,5)
- ethene, tetrachloro-: 1.19132e-7 kg; data quality (3,2,1,1,5)
- Phosphorus: 2.14712e-6 kg; data quality (4,1,1,1,5)
- 4-Methyl-2-pentanone: 6.8786e-11 kg; data quality (4,1,1,1,4)
- 2,2-BIS(4-HYDROXY-3,5-DIBROMOPHENYL)PROPANE: 8.3619e-11 kg; data quality (5,1,1,1,5)
- Benzo(b)fluoranthene: 4.82959e-12 kg; data quality (2,2,1,1,4)
- diisocyanates: 8.05248e-8 kg; data quality (4,1,1,1,4)
- 2-Mercaptobenzothiazole: 7.86131e-10, 3.63498e-12, 6.05831e-12 kg (3 entries, compartments not in this file); data quality (3,1,1,1,5)
- Phenol, 2,4-dimethyl-: 1.63711e-12 kg; data quality (4,1,1,1,4)
- ethylbenzene: 1.33518e-7 kg; data quality (4,1,1,1,4)
- CHLORONAPHTHALENE: 1.81599e-18 kg; data quality (1,2,1,1,5)
- bis(2-chloroethyl)ether: 4.65917e-11 kg; data quality (2,1,1,1,4)
- Phosphine: 2.28806e-12 kg; data quality (4,2,1,1,4)
- Chromium VI: 1.36093e-9 kg; data quality (3,2,1,1,5)
- Triethyl amine: 1.70039e-10 kg; data quality (5,1,1,1,4)
- chlorine: 3.36048e-7 kg; data quality (4,2,1,1,5)
- 2-nitropropane: 2.33115e-10 kg; data quality (3,2,1,1,5)
- 1,2,4-trimethylbenzene: 4.5209e-8, 1.22901e-9 kg (2 entries, compartments not in this file); data quality (5,1,1,1,4)
- acetaldehyde: 6.12405e-8 kg; data quality (3,2,1,2,3)
- Phthalate, dibutyl-: 8.71497e-7 kg; data quality (4,2,1,1,5)
- nickel: 3.0522e-10, 7.80048e-11 kg (2 entries, compartments not in this file); data quality (4,1,1,1,5)
- ammonia: 7.635e-7 kg; data quality (3,2,1,1,4)
- 4-nitroaniline: 1.14185e-11 kg; data quality (5,1,1,1,4)
- 4-aminobiphenyl: 2.40064e-16 kg; data quality (5,2,1,1,5)
- Propane, 1,1,1,3,3,3-hexafluoro-, HCFC-236fa: 4.06018e-10 kg; data quality (4,2,1,4,1)
- pentachlorophenol: 1.09081e-13 kg; data quality (3,2,1,1,5)
- 1,1,1-trichloroethane: 9.78335e-9 kg; data quality (4,2,1,1,5)
- Methyl acrylate: 3.02383e-9, 8.25432e-13 kg (2 entries, compartments not in this file); data quality (3,1,1,1,4)
- mercury: 4.61139e-11 kg; data quality (2,2,1,1,4)
- Ethane, 1,1,1,2-tetrafluoro-, HFC-134a: 1.32397e-7 kg; data quality (4,2,1,4,1)
- benzene, chloro-: 5.18605e-10 kg; data quality (4,2,1,1,4)
- diethanolamine: 1.35064e-9 kg; data quality (3,2,1,1,4)
- Hydrazine: 1.06242e-11 kg; data quality (4,2,1,1,4)
- Triethylene glycol: 3.21923e-10 kg; data quality (3,2,1,1,5)
- Chloroacetic acid: 1.0378e-9 kg; data quality (3,2,1,1,4)
- DIETHANOLAMINE: 8.46618e-10, 8.65442e-11 kg (2 entries, compartments not in this file); data quality (4,1,1,1,4)
- Ethane, pentafluoro-, HFC-125: 3.51266e-8 kg; data quality (4,2,1,4,1)
- 1,1,2,2-tetrachloroethane: 2.7965e-11 kg; data quality (3,2,1,1,4)
- DMTT (DAZOMET): 1.54081e-11 kg; data quality (4,1,1,1,4)
- hexachloroethane: 1.93681e-11 kg; data quality (4,2,1,1,5)
- 4,4'-METHYLENEBIS(2-CHLOROANALINE): 1.32447e-9 kg; data quality (5,2,1,1,5)
- benzo(a)pyrene: 1.49483e-11 kg; data quality (2,2,1,1,4)
- silver: 2.67352e-11 kg; data quality (4,1,1,1,5)
- ETHENE: 2.79546e-9 kg; data quality (3,1,1,1,4)
- Methane, tetrachloro-, R-10: 9.46496e-11, 6.8786e-13 kg (2 entries, compartments not in this file); data quality (3,1,1,1,4)
- Benzo(g,h,i)perylene: 1.42673e-13 kg; data quality (2,1,1,1,4)
- Thiram: 8.53208e-11 kg; data quality (4,1,1,1,4)
- hydrogen fluoride: 4.95981e-8 kg; data quality (2,2,1,1,4)
- 4,4'-isopropylidenediphenol: 3.97317e-8 kg; data quality (4,1,1,1,4)
- phenanthrene: 1.40065e-10 kg; data quality (3,2,1,3,3)
- Xylene: 3.73847e-6 kg; data quality (4,2,1,1,5)
- Naphthalene: 1.87813e-9 kg; data quality (4,1,1,1,4)
- Propane, 1,2-dichloro-: 4.90629e-11 kg; data quality (4,2,1,1,4)
- para-xylene: 9.545e-8 kg; data quality (3,2,1,1,5)
- benzyl chloride: 4.99942e-10 kg; data quality (2,2,1,1,4)
- Propane, 1,2-dichloro-: 9.85016e-13 kg; data quality (5,1,1,1,4)
- phenol: 6.72727e-12 kg; data quality (3,1,1,1,4)
- Chrysene, 5-methyl-: 3.21835e-18 kg; data quality (2,2,1,1,5)
- copper: 4.1203e-11 kg; data quality (4,1,1,1,4)
- epichlorohydrin: 5.58539e-9 kg; data quality (3,2,1,1,4)
- Sodium formate: 3.16416e-11, 7.59398e-12 kg (2 entries, compartments not in this file); data quality (3,1,1,1,4)
- benzene: 3.07411e-8 kg; data quality (3,2,1,2,3)
- maleic anhydride: 3.56579e-8 kg; data quality (2,2,1,1,4)
- Ethylene glycol monoethyl ether: 3.25868e-8 kg; data quality (4,1,1,1,5)
- ALLYL ALCOHOL: 1.47428e-9 kg; data quality (4,1,1,1,4)
- HYDROQUINONE: 6.85411e-11 kg; data quality (2,1,1,1,4)
- aniline: 1.07771e-8 kg; data quality (4,2,1,1,5)
- CHLOROPRENE: 1.49122e-8 kg; data quality (2,2,1,1,5)
- ALLYL CHLORIDE: 1.26252e-9 kg; data quality (3,2,1,1,4)
- NITROUS ACID: 2.66096e-9, 5.34272e-8 kg (2 entries, compartments not in this file); data quality (5,1,1,1,4)
- particulates, < 10 um: 7.28114e-6 kg; data quality (3,2,1,1,5)
- propanal: 6.25401e-9 kg; data quality (3,2,1,2,3)
- Phthalate, dimethyl-: 9.04653e-10 kg; data quality (4,2,1,1,5)
- pyrene: 1.58033e-11 kg; data quality (2,2,1,1,4)
- nickel: 4.73452e-9 kg; data quality (3,2,1,1,4)
- CATECHOL: 3.30173e-12 kg; data quality (2,1,1,1,4)
- acrylic acid: 1.8728e-8 kg; data quality (4,2,1,1,4)
- 2-PHENYLPHENOL: 4.04462e-11, 3.57687e-11 kg (2 entries, compartments not in this file); data quality (3,1,1,1,4)
- sulfur dioxide: 1.87138e-5 kg; data quality (2,2,1,1,4)
- DIMETHYLAMINOAZOBENZENE: 8.80245e-14 kg; data quality (5,2,1,1,5)
- acrolein: 1.46472e-8 kg; data quality (2,2,1,1,5)
- hydrogen sulfide: 1.20379e-9 kg; data quality (3,1,1,1,5)
- acetophenone: 2.8348e-7 kg; data quality (4,2,1,1,5)
- Phthalate, dimethyl-: 1.47096e-10 kg; data quality (4,1,1,1,4)
- Benzene, ethyl-: 5.0879e-10, 2.75144e-13 kg (2 entries, compartments not in this file); data quality (4,1,1,1,4)
- BENEFIN: 8.9877e-13 kg; data quality (5,1,1,1,5)
- Dimethyl sulfate: 4.50334e-10 kg; data quality (2,2,1,1,4)
- anthracene: 4.47643e-11 kg; data quality (3,2,1,1,4)
- 1-Methyl-2-pyrrolidinone: 1.59409e-8 kg; data quality (5,1,1,1,5)
- Water, saline: 2.23567e-5 m3; data quality (4,2,1,4,2)
- N,N-DIMETHYLANILINE: 1.00051e-11 kg; data quality (5,2,1,1,5)
- Chromium, ion: 4.95202e-9 kg; data quality (2,2,1,1,4)
- Propene, 1,3-dichloro-: 1.11909e-11 kg; data quality (3,2,1,1,5)
- HCFC-225ca: 1.51329e-11 kg; data quality (5,1,1,1,4)
- NITRATE: 9.77546e-11 kg; data quality (5,1,1,1,5)
- Phthalate, dioctyl-: 3.33549e-10 kg; data quality (4,1,1,1,4)
- catechol: 3.63741e-10 kg; data quality (2,1,1,1,4)
- 1,2-DICHLOROETHYLENE: 4.89757e-12 kg; data quality (5,1,1,1,4)
- arsenic: 7.44616e-10 kg; data quality (3,2,1,1,4)
- 3-methylcholanthrene: 1.51152e-14 kg; data quality (2,2,1,1,5)
- Acrylic acid: 3.78804e-10 kg; data quality (4,1,1,1,4)
- Nitrogen: 1.68744e-5 kg; data quality (5,2,1,1,5)
- Hydrocarbons, aromatic: 1.40734e-9 kg; data quality (3,2,1,3,3)
- Dibenz(a,h)anthracene: 2.2231e-12 kg; data quality (2,2,1,1,4)
- p-cresol: 1.63433e-12 kg; data quality (4,2,1,1,4)
- Triethyl amine: 1.42324e-8 kg; data quality (3,2,1,1,5)
- Chrysene: 4.6044e-12 kg; data quality (2,2,1,1,4)
- benzidine: 9.72828e-11 kg; data quality (2,2,1,1,5)
- Nitrilotriacetic acid: 5.64045e-12 kg; data quality (5,1,1,1,4)
- Methane: 6.78943e-7 kg; data quality (4,2,1,4,1)
- BENZOIC TRICHLORIDE (BENZOTRICHLORIDE): 7.0821e-12 kg; data quality (3,2,1,1,4)
- cyanide: 1.22252e-8 kg; data quality (2,2,1,1,5)
- propylene oxide: 9.95741e-8 kg; data quality (3,2,1,1,5)
- BUTYL ACRYLATE: 1.48306e-9, 6.46058e-10 kg (2 entries, compartments not in this file); data quality (4,1,1,1,4)
- 4,4'-METHYLENEDIANILINE: 7.09468e-15 kg; data quality (4,2,1,1,5)
- Acetonitrile: 2.83123e-10 kg; data quality (3,1,1,1,4)
- SEC-BUTYL ALCOHOL: 2.2949e-10 kg; data quality (5,1,1,1,4)
- 2,4-dimethylphenol: 1.91803e-11 kg; data quality (4,1,1,1,4)
- dimethyl formamide: 2.5217e-11, 5.80554e-11 kg (2 entries, compartments not in this file); data quality (4,1,1,1,4)
- ACETONE CYANOHYDRIN: 1.57382e-9 kg; data quality (3,1,1,1,4)
- isophorone: 1.66817e-7 kg; data quality (2,2,1,1,5)
- 2-PHENOXYETHANOL: 6.23225e-10 kg; data quality (5,2,1,1,4)
- acrylonitrile: 1.59405e-7 kg; data quality (4,2,1,1,5)
- o-cresol: 4.17653e-11 kg; data quality (4,2,1,1,5)
- Bisphenol A: 2.75144e-13 kg; data quality (4,1,1,1,4)
- Phthalate, dioctyl-: 1.2144e-8 kg; data quality (4,1,1,1,5)
- NITROGLYCERIN: 6.04959e-9 kg; data quality (5,1,1,1,4)
- methyl methacrylate: 8.00729e-9 kg; data quality (4,2,1,1,4)
- chromium: 6.54164e-9, 1.06029e-10, 2.25831e-10 kg (3 entries, compartments not in this file); data quality (4,1,1,1,5)
- 2-ethoxyethyl acetate: 1.18458e-8 kg; data quality (3,2,1,1,5)
- fluoranthene: 8.95611e-11 kg; data quality (2,2,1,1,4)
- 2-METHYLPYRIDINE: 4.48485e-14 kg; data quality (3,1,1,1,4)
- Water, fresh: 0.00105035 m3; data quality (2,2,1,4,2)
- t-Butyl methyl ether: 3.67868e-10 kg; data quality (4,1,1,1,4)
- Ethene, chloro-: 6.40343e-9 kg; data quality (3,2,1,1,4)
- polychlorinated biphenyls: 1.04302e-12 kg; data quality (3,2,1,1,4)
- oxadiazon: 8.9877e-13 kg; data quality (3,1,1,1,5)
- Ethene, tetrachloro-: 6.8786e-11 kg; data quality (3,1,1,1,4)
- Vinyl acetate: 9.14947e-11 kg; data quality (4,1,1,1,5)
- Methane, difluoro-, HFC-32: 2.04561e-8 kg; data quality (4,2,1,4,1)
- chloroform: 3.11474e-10 kg; data quality (4,2,1,1,4)
- Vinyl acetate: 4.84136e-10 kg; data quality (4,1,1,1,4)
- Benzo(k)fluoranthene: 3.15666e-12 kg; data quality (2,2,1,1,4)
- Ethane, 1,1,1-trifluoro-, HFC-143a: 1.50292e-8 kg; data quality (4,2,1,4,1)
- butadiene: 1.08201e-8 kg; data quality (2,2,1,1,4)
- AMMONIA: 1.46212e-9 kg; data quality (3,1,1,1,4)
- phosgene: 8.17166e-13 kg; data quality (5,2,1,1,4)
- dimethyl formamide: 1.38833e-8 kg; data quality (4,2,1,1,5)
- bromoform: 6.5088e-12 kg; data quality (3,2,1,1,4)
- Thiram: 1.63462e-9, 3.23998e-10 kg (2 entries, compartments not in this file); data quality (4,1,1,1,5)
- Thiophanat-methyl: 3.81079e-13 kg; data quality (4,1,1,1,5)
- manganese: 7.083e-9 kg; data quality (3,2,1,1,5)
- phthalic anhydride: 2.23391e-8 kg; data quality (2,2,1,1,4)
- beryllium: 7.39876e-11 kg; data quality (2,2,1,1,4)
- copper: 1.78044e-9, 4.06941e-10 kg (2 entries, compartments not in this file); data quality (4,1,1,1,5)
- Formic acid: 2.2537e-10 kg; data quality (3,1,1,1,4)
- PHTHALIC ANHYDRIDE: 1.37572e-12 kg; data quality (3,1,1,1,4)
- manganese: 3.74847e-10 kg; data quality (4,1,1,1,4)
- Dinitrogen monoxide: 7.4866e-8 kg; data quality (4,2,1,4,1)
- Sulfuric acid: 6.20273e-8 kg; data quality (2,1,1,1,4)
- chlorine: 2.74581e-9 kg; data quality (2,1,1,1,4)
- NITRIC ACID: 4.81502e-10 kg; data quality (3,1,1,1,4)
- PYRIDINE: 5.31028e-11, 6.08069e-11 kg (2 entries, compartments not in this file); data quality (4,1,1,1,4)
- TERT-BUTYL ALCOHOL: 9.30155e-13 kg; data quality (4,1,1,1,5)
- 2,4-dinitrophenol: 6.60433e-10 kg; data quality (5,1,1,1,4)
- cumene: 6.79851e-9 kg; data quality (4,2,1,1,5)
- 1,2-BUTYLENE OXIDE: 5.5633e-11 kg; data quality (4,2,1,1,5)
- SULFURYL FLUORIDE: 1.07306e-8 kg; data quality (4,1,1,1,4)
- sodium dimethyldithiocarbamate: 1.35901e-12 kg; data quality (5,1,1,1,5)
- Propene: 1.37457e-8 kg; data quality (3,1,1,1,4)
- 1,2,4-trichlorobenzene: 3.43867e-12 kg; data quality (3,2,1,1,5)
- ACRYLAMIDE: 5.35924e-9 kg; data quality (4,2,1,1,4)
- O-ANISIDINE: 2.72389e-13 kg; data quality (5,2,1,1,4)
- ethane, 1,2-dichloro-: 4.18684e-9 kg; data quality (3,2,1,1,4)
- mercury: 2.83398e-13, 9.57502e-13 kg (2 entries, compartments not in this file); data quality (3,1,1,1,4)
- Methane, monochloro-, R-40: 1.37572e-12 kg; data quality (3,1,1,1,4)
- Aluminum: 4.95768e-10 kg; data quality (4,1,1,1,4)
- methylene diphenyl diisocyanate: 1.85748e-7 kg; data quality (4,2,1,1,5)
- VOC, volatile organic compounds: 0.000134852 kg; data quality (3,2,1,1,5)
- hexachloro-1,3-butadiene: 5.1312e-13 kg; data quality (4,2,1,1,5)
- trichloroethylene: 2.54562e-6 kg; data quality (4,2,1,1,5)
- 1,4-dichlorobenzene: 4.93524e-11 kg; data quality (2,2,1,1,4)
- TERT-BUTYL ALCOHOL: 2.22039e-9, 1.15561e-11 kg (2 entries, compartments not in this file); data quality (4,1,1,1,4)
- selenium: 6.3328e-10 kg; data quality (2,2,1,1,4)
- 1,4-dioxane: 2.69406e-9 kg; data quality (4,2,1,1,4)
- Ethylene glycol monoethyl ether: 2.24451e-9, 1.96296e-9 kg (2 entries, compartments not in this file); data quality (5,1,1,1,4)
- fluorene: 6.47404e-11 kg; data quality (2,2,1,3,2)
- HYDROCHLORIC ACID: 1.49238e-9 kg; data quality (2,1,1,1,4)
- Dimethylamine: 2.24192e-9 kg; data quality (3,1,1,1,4)
- Xylene: 8.27015e-12, 2.00885e-9 kg (2 entries, compartments not in this file); data quality (4,1,1,1,4)
- propargyl alcohol: 8.54896e-11, 2.61556e-11 kg (2 entries, compartments not in this file); data quality (4,1,1,1,4)
- Decabromodiphenyl oxide: 3.08161e-12, 8.01431e-9 kg (2 entries, compartments not in this file); data quality (4,1,1,1,4)
- carbon monoxide: 3.83198e-5 kg; data quality (3,2,1,1,2)
- MOLYBDENUM(VI): 1.89244e-10 kg; data quality (3,1,1,1,4)
- Benzyl chloride: 2.59827e-9 kg; data quality (3,1,1,1,4)
- Methane, dichloro-, HCC-30: 3.71445e-11 kg; data quality (5,1,1,1,4)
- lead: 1.68199e-8 kg; data quality (3,2,1,1,5)
- Benzo(g,h,i)perylene: 1.62887e-10 kg; data quality (3,2,1,1,4)
- naphthalene: 3.48374e-8 kg; data quality (3,2,1,1,5)
- CHLORINE: 2.75144e-13 kg; data quality (2,1,1,1,4)
- o-toluidine: 1.21005e-9 kg; data quality (4,2,1,1,5)
- Cobalt: 1.55053e-9 kg; data quality (3,2,1,1,4)
- Formaldehyde: 1.50866e-10 kg; data quality (2,1,1,1,4)
- butanol: 1.15543e-8 kg; data quality (5,1,1,1,5)
- benzene, ethyl-: 5.48393e-7 kg; data quality (4,2,1,1,5)
- ACRYLAMIDE: 4.95259e-12 kg; data quality (4,1,1,1,4)
- cyclohexane: 4.62822e-8 kg; data quality (4,1,1,1,5)
- Butanol: 7.73332e-12, 1.89299e-10 kg (2 entries, compartments not in this file); data quality (5,1,1,1,4)
- toluene-2,4-diisocyante: 1.86256e-7 kg; data quality (3,2,1,1,5)
- acetonitrile: 1.62757e-8 kg; data quality (3,2,1,1,4)
- naphthalene: 9.7666e-11 kg; data quality (4,1,1,1,5)
- methane, bromo-, halon 1001: 6.29594e-11 kg; data quality (3,2,1,1,4)
- Ethylene glycol: 2.26422e-9 kg; data quality (5,1,1,1,4)
- Benzene, 1,2,4-trimethyl-: 1.37572e-12 kg; data quality (5,1,1,1,4)
- ethane, 1,2-dibromo-: 4.53741e-12 kg; data quality (2,2,1,1,5)
- ALUMINUM OXIDE: 4.23652e-10 kg; data quality (5,1,1,1,4)
- 2,4-Diaminotoluene: 5.39329e-11 kg; data quality (2,2,1,1,4)
- toluene: 2.40705e-6, 4.02384e-10 kg (2 entries, compartments not in this file); data quality (5,1,1,1,4)
- Bis(2-chloroethyl)ether: 2.75144e-13 kg; data quality (2,1,1,1,4)
- toluene, 2,4-dinitro-: 1.19854e-9 kg; data quality (5,2,1,1,4)
- benz[a]anthracene: 4.29557e-11 kg; data quality (2,2,1,1,5)
- toluene: 3.85159e-5 kg; data quality (4,2,1,1,5)
- acenaphthene: 1.36729e-10 kg; data quality (3,2,1,1,4)
- Chloroform: 8.91302e-11, 7.19144e-11 kg (2 entries, compartments not in this file); data quality (3,1,1,1,4)
- carbon disulfide: 2.29986e-6 kg; data quality (4,2,1,1,5)
- methane, chlorodifluoro-, hcfc-22: 5.50288e-11 kg; data quality (4,1,1,1,4)
- Epichlorohydrin: 5.69472e-10 kg; data quality (2,1,1,1,4)
- carbonyl sulfide: 4.15282e-7 kg; data quality (4,2,1,1,5)
- formaldehyde: 1.34939e-7 kg; data quality (2,2,1,2,4)
- Aniline: 9.60253e-12 kg; data quality (3,1,1,1,4)
- Nitrobenzene: 1.04927e-10 kg; data quality (4,2,1,1,4)
- 4-nitrophenol: 5.30351e-14 kg; data quality (2,2,1,1,5)
- antimony: 3.89068e-9 kg; data quality (3,2,1,1,5)
- lead: 1.00764e-9, 4.59627e-11 kg (2 entries, compartments not in this file); data quality (3,1,1,1,4)
- 2,6-Dinitrotoluene: 4.40231e-10 kg; data quality (5,1,1,1,4)
- acetamide: 2.75144e-13 kg; data quality (4,1,1,1,4)
- ethylene glycol: 1.3849e-7 kg; data quality (5,2,1,1,5)
- Carbaryl: 8.9877e-13 kg; data quality (5,1,1,1,5)
- m-cresol: 3.12103e-12 kg; data quality (4,2,1,1,4)
- hydroquinone: 1.3324e-9 kg; data quality (3,2,1,1,5)
- 2,2,4-trimethylpentane: 3.914e-7 kg; data quality (3,2,1,1,5)
- QUINOLINE: 5.65027e-11 kg; data quality (2,1,1,1,4)
- t-butyl methyl ether: 6.16366e-10 kg; data quality (3,2,1,1,4)
- ethylene oxide: 8.6704e-10 kg; data quality (3,2,1,1,4)
- Permethrin: 4.53988e-11 kg; data quality (2,1,1,1,4)
- Phenol: 9.53099e-10 kg; data quality (3,1,1,1,4)
- acenaphthylene: 5.25473e-11 kg; data quality (3,2,1,3,2)
- hydrogen chloride: 4.49084e-7 kg; data quality (2,2,1,1,4)
- hexane: 5.38532e-6 kg; data quality (3,2,1,1,5)
- QUINOLINE: 1.26385e-10 kg; data quality (3,2,1,1,5)
- methyl isobutyl ketone: 1.04749e-6 kg; data quality (3,2,1,1,5)
- ethyl acrylate: 1.47622e-9 kg; data quality (4,2,1,1,4)
- 2,4,6-trichlorophenol: 2.92311e-18 kg; data quality (2,2,1,1,5)
- M-CRESOL: 1.13359e-11 kg; data quality (3,1,1,1,4)
- DIPHENYLAMINE: 1.14735e-11 kg; data quality (1,1,1,1,4)
- METHACRYLONITRILE: 2.75144e-13 kg; data quality (5,1,1,1,4)
- nitrogen oxides: 2.96149e-5 kg; data quality (2,2,1,1,4)
- Zinc: 3.51212e-10 kg; data quality (5,1,1,1,5)
- Cresol: 1.16824e-11 kg; data quality (4,2,1,1,4)
- Hydrazine, methyl-: 1.88747e-11 kg; data quality (2,2,1,1,4)
- n-nitrosodimethylamine: 8.78607e-15 kg; data quality (5,2,1,1,5)
- bromine: 8.25432e-13 kg; data quality (5,1,1,1,4)
- MALEIC ANHYDRIDE: 4.26116e-10 kg; data quality (4,1,1,1,4)
- tertiary-Butyl Acetate: 4.58113e-7 kg; data quality (3,2,1,1,5)
- Styrene: 2.75144e-13 kg; data quality (3,1,1,1,4)
- dibenzofuran: 7.52513e-11 kg; data quality (4,2,1,1,4)
- phthalate, dioctyl-: 3.9807e-7 kg; data quality (3,2,1,1,5)
- ethylene glycol: 2.21766e-10 kg; data quality (5,1,1,1,4)
- THIOUREA: 6.90337e-14 kg; data quality (3,1,1,1,4)
- o-Xylene: 9.88114e-8 kg; data quality (3,2,1,1,5)
- 2-METHOXYETHANOL: 2.87444e-9 kg; data quality (4,2,1,1,4)
- m-xylene: 2.17327e-7 kg; data quality (3,2,1,1,5)
- ammonia: 4.21614e-9 kg; data quality (3,1,1,1,4)
- particulates, < 2.5 um: 1.16386e-5 kg; data quality (3,2,1,1,5)
- Methyl iodide: 3.37137e-10 kg; data quality (4,2,1,1,5)
- 2-methylnaphthalene: 7.71854e-12 kg; data quality (2,2,1,1,5)
- methane, dichloro-, hcc-30: 6.05819e-7 kg; data quality (4,2,1,1,5)
- 2-chloro-1-phenylethanone: 1.03937e-12 kg; data quality (2,2,1,1,4)
- p-phenylenediamine: 2.46315e-17 kg; data quality (5,2,1,1,4)
- PHOSPHORUS: 2.37636e-10 kg; data quality (2,2,1,1,4)
- nitric acid: 4.3352e-8 kg; data quality (3,1,1,1,4)
- monochloroethane: 3.4305e-10 kg; data quality (3,2,1,1,4)
- trifluralin: 3.59508e-13 kg; data quality (4,1,1,1,5)
- Hexachlorocyclopentadiene: 1.15539e-12 kg; data quality (3,2,1,1,5)
- 2,4/2,6-toluenediisocyanate (mixture): 1.84606e-10 kg; data quality (1,1,1,1,5)
- Pendimethalin: 1.21873e-12 kg; data quality (5,1,1,1,5)
- methanol: 3.48599e-7 kg; data quality (4,2,1,1,4)
- 1,4-BENZOQUINONE: 2.58577e-12 kg; data quality (3,2,1,1,4)
- methane, monochloro-, r-40: 1.01569e-8 kg; data quality (3,2,1,1,4)
- styrene: 3.53445e-7 kg; data quality (4,2,1,1,4)
- hexachlorobenzene: 4.95112e-14 kg; data quality (3,2,1,1,5)
- HCFC-225cb: 2.15988e-11 kg; data quality (2,1,1,1,4)
- biphenyl: 4.65739e-10 kg; data quality (4,2,1,1,5)
- Carbon dioxide: 0.034158 kg; data quality (4,2,1,4,1)
- formic acid: 6.64934e-9 kg; data quality (3,1,1,1,4)
- cadmium: 8.39661e-10 kg; data quality (3,2,1,1,5)
- ETHYLENETHIOUREA: 4.23431e-11 kg; data quality (2,1,1,1,4)
- formaldehyde: 2.70451e-10 kg; data quality (2,1,1,1,5)

## Inventory method
Input-output

## Modelling constants
The reference unit of all processes is 1 USD2013 of the good or service. The technosphere inputs are based on the US BEA detailed input-output tables for 2007. The IO tables are combined to develop a commodity-by-commodity model based on the the industry-technology assumption (see Suh et al., 2010), which assumes all commodities produced by a given industry have the same input structure, but that multiple industries can produce the same commodity. Thus, model technosphere flows represent commodity outputs (and not industry outputs) from other processes in the model. There are no by-products included in these processes. All commodity production is based on US-conditions, despite in reality that some goods and services are produced overseas, as USEEIO v1.1 is a single-region IO model.

## Completeness
The input-output approach assures that all purchased inputs associated with the sectors making these commodities as reported in the US census for 2007 are included. The direct resources extracted including minerals, energy sources, water and land occupied are included. Emissions to air include all critieria air pollutants, greenhouse gases, and hazardous and toxic air pollutants as defined by US EPA. Releases to water include toxics, total nitrogen and total phosphorus, and water discharges. Releases to soil or groundwater include toxics and agriculutural pesticides. Some metal releases to air, water and soil are not included because they could not be speciated. Solid hazardous and non-hazardous wastes generated are not included as an elementary flows although purchases of waste services are included.

## Data treatment
Greenhouse gases are primarily from the US Greenhouse Gas Emission Inventory (USEPA 2016a). Biogenic C uptake is not included (change from version 1.0), as biogenic C emission are not included. Toxic releases to air, water and soil (except pesticides) are from the 2013 Toxic Release Inventory (USEPA 2015a). Criteria air pollutants and hazardous air pollutants are from the 2011 National Emissions Inventory (USEPA 2015b). All estimates are normalized by industry based on sector output in the data year, then converted to 2013 USD using relative sector-specific CPIs (if data year is not 2013). Energy use represent raw renewables or fossil fuel energies and is based on EIA data for 2014. See Table 1 in Yang, Ingwersen et al. 2017 and Supporting Information 1, and the v1.1 data update notes (Ingwersen et al. 2017) for all details on environmental data sources used.Land occupation associated with manufacturing buildings was estimated based on the building floorspace data provided by the U.S. Energy Information Administration in the 2010 Manufacturing Energy Consumption Survey (EIA 2013). Portions of total renewable energy (EIA 2016) based on EIA-923 reports for 2014 (EIA 2017) are included. Nitrogen and Phosphorus releases are modeled in total N and total P equivalents as estimated by the Discharge Monitoring Report Nutrient Loading tool (USEPA 2016b). Self-supplied withdrawals were assigned to industrial sectors based on water use statistics for Canadian industries by NAICS 3-digit sector scaled to US production levels based on gross domestic product by industry (BEA 2015; Statistics Canada 2010), and further disaggregated to the manufacturing sectors based on compensation of employees as provided by the 2007 IO tables (BEA 2015). Water withdrawals associated with public supply were allocated to sectors based on their use of water, sewage, and other services in USD based on the IO tables (BEA 2015). Portions of total renewable energy (EIA 2016) by type are assigned to sectors (hydro, wind, solar, or) based on EIA-923 reports for 2014 (EIA 2017).

## Data collection
2015-2016

## Sampling procedure
US federal government sources, including surveys and US EPA emissions databases are used as the primary sources. From these sources, data for US reporting establishments/facilities are aggregated by the NAICS sector as defined in the BEA detailed 2007 input-output tables. When level of sector aggregation differs, or when direct emissions are not reported but modeled, additional sources are used to make allocations and estimates.

## Review details
In regard to quality assurance and peer-review, each dataset created went through Quality Assurance as defined in a quality assurance project plans at US EPA, CSRA or ERG. The model was assembled with the IO model builder model (USEPA 2016c). Validation functions were used to check that all the model components were properly assembled and harmonized. Bayou Demeke and Santosh Ghimire provided internal peer review of the model methodology and the manuscript underwent standard EPA management review. An editor and two anonymous reviewers at the Journal of Cleaner Production reviewed the model. In regard to data quality evaluation, data quality assessment was performed at the flow and process levels according to the updated US EPA data quality assessment guidelines as defined in US EPA (2016b).

## Intended application
The primary application is for use in the US Environmentally-Extended Input-Ouput model, USEEIO, version 1.1. This model is being used by the US EPA for supporting tools that prioritize goods and services based on potential environmental impacts, resource use or emissions for large regions, including the US and US states, and as a strealined tool for organizations as a starting point to consider sustainable materials management. Model results are designed to provide meso/macro-level decision support.

## Project
USEEIO v1.1 was developed by the US EPA with CSRA and ERG with Wesley W. Ingwersen and David E. Meyer as research leads. Yi Yang was the technical lead on the work for CSRA (contract EP-C-15-012); Troy Hawkins was lead for ERG (contract EP-C-12-021).

## Sources
- USGS 2016
- USEPA 2015a
- Lovelace 2009
- USEPA 2016a
- Goebes et al. 2003
- Statistics Canada 2010
- EIA 2017
- EIA 2016
- USEPA 2015b
- Edelen and Ingwersen 2017
- USDA 2009b
- Ingwersen et al. 2017
- USEPA 2016c
- Torcellini et al. 2003
- USDA 2014
- USGS 2015
- Ingwersen et al. DRAFT
- USDA 2009a
- Nickerson et al. 2011
- USDA 2016
- EIA 2015
- Maupin et al. 2014
- EIA 2013
- BEA 2015
- BLM 2008
- Yienger et al. 1995
- USDA 2006
- USEPA 2016b
- Kim et el. 2013
- Macknick et al. 2011
- Blackhurst et al. 2010
