# Cast iron and steel; at manufacturer

Dataset: openLCA process, unit process
Category: 3315: Foundries
Geography: United States
Time period: 2017-01-01 to 2017-12-31
Data quality: US EPA - Process Pedigree Matrix (1;1)
Exchange data quality scheme: US EPA - Flow Pedigree Matrix
Generated by: US EPA with CSRA and ERG
Owner: US EPA
Published in: Yang, Ingwersen et al. 2017
restrictionsDescription: This model shold be appropriately cited (see Yang, Ingwersen et al. 2017 source or Publication field) when used. Any changes or derivations of this model by the user should be documented. The model itself and any results from use of this model shall not be construed to consitute US EPA opinion or policy.
copyright: false

## General comment
BEA Code & Name is '331510:Ferrous metal foundries'. Description of the primary industry producing this good or service, adapted from the Census Bureau NAICS 2007 descriptions: This industry comprises establishments primarily engaged in pouring molten iron and steel into molds of a desired shape to make castings. Establishments in this industry purchase iron and steel made in other establishments.

## Technology
The process describes the average US production of this good or service within this NAICS-based grouping defined in the BEA 2007 detailed input-output tables (BEA 2015). Distribution, wholesale and retailing of this good or service, use, and final disposal are not included. Creation of a product system with this process will enable modeling of all upstream (supply-chain) activities.

## Geography
Data represent the 50 US states

## Time period
2017 was the year in which this version of USEEIO was released and is the target date for the model

## Reference product
- Cast iron and steel; at manufacturer: 1 USD

## Inputs from technosphere
All rows: data quality (1,3,1,1,1)
- Cutlery and handtools; at manufacturer: 0.000547452 USD
- Machinery for the paper, textile, food or other industries (except semiconductor machinery); at manufacturer: 0.00452253 USD
- Air transport: 0.0019875 USD
- Metal windows, doors, and architectural products; at manufacturer: 9.5561e-6 USD
- Synthetic dyes and pigments; at manufacturer: 1.05046e-5 USD
- Specialty transformers; at manufacturer: 6.39198e-7 USD
- Other real estate: 0.000115778 USD
- Coal; at mine: 0.00572839 USD
- Rail transport: 0.0101527 USD
- Plastic bags, films, and sheets; at manufacturer: 0.00224323 USD
- Primary iron, steel, and ferroalloy products; at manufacturer: 0.0782903 USD
- Timber and raw forest products; at forest: 9.49328e-7 USD
- Semiconductors; at manufacturer: 0.0010437 USD
- Civic, social, professional, and similar organizations: 0.000376249 USD
- Environmental and other technical consulting services: 0.000108276 USD
- Plastics; at manufacturer: 1.09173e-5 USD
- Other vehicle parts; at manufacturer: 0.00189448 USD
- Air purification and ventilation equipment; at manufacturer: 0.0015854 USD
- other miscellaneous electrical equipment and components; at manufacturer: 1.58221e-7 USD
- Office administration: 5.4616e-5 USD
- Urethane and other foam products; at manufacturer: 6.52133e-7 USD
- Buildings and dwellings services: 0.00505117 USD
- Other secondary nonferrous metal products; at manufacturer: 0.00474292 USD
- Other rubber products; at manufacturer: 5.54943e-5 USD
- Rubber tires; at manufacturer: 0.000105693 USD
- Electronic equipment repair and maintenance: 0.000753047 USD
- Consumer goods and general rental centers: 0.000108314 USD
- All other forging, stamping, and sintering; at manufacturer: 0.000135417 USD
- Rubber and plastic belts and hoses; at manufacturer: 0.000277163 USD
- Promoters and agents: 5.40866e-5 USD
- Vehicles and parts sales: 0.000430008 USD
- Scenic and sightseeing transportation and support activities for transportation: 0.000105693 USD
- Commercial equipment rental: 0.000435628 USD
- Primary copper; at manufacturer: 0.00439727 USD
- Surgical appliance and supplies; at manufacturer: 0.000106278 USD
- Material handling equipment; at manufacturer: 0.000324765 USD
- Valve and fittings (except for plumbing); at manufacturer: 0.00031509 USD
- Securities and commodities brokerage and exchanges: 0.0106875 USD
- Ball and roller bearings; at manufacturer: 0.000102033 USD
- Employment services: 0.00317741 USD
- Architectural, engineering, and related services: 0.00490287 USD
- Air conditioning, refrigeration, and warm air heating equipment; at manufacturer: 5.32534e-5 USD
- Wiring devices; at manufacturer: 6.01241e-6 USD
- Glass and glass products; at manufacturer: 0.000323408 USD
- Passenger ground transport: 0.00042984 USD
- Aluminum; at manufacturer: 0.00272275 USD
- Gasoline, fuels, and by-products of petroleum refining; at manufacturer: 0.00284673 USD
- General merchandise stores: 8.45894e-7 USD
- Gaskets, seals, musical instruments, fasteners, brooms, brushes, mop and other misc. goods; at manufacturer: 6.64334e-5 USD
- Household goods repair: 0.000483555 USD
- Machine shops; at manufacturer: 0.0151819 USD
- Specialized design: 0.00269425 USD
- Scientific research and development: 5.41221e-5 USD
- Petrochemicals; at manufacturer: 5.31239e-6 USD
- Metal hinges, keys, lock, and other hardware; at manufacturer: 1.6014e-6 USD
- Other primary nonferrous metals; at manufacturer: 0.0376213 USD
- Transmission and power train parts; at manufacturer: 8.73131e-5 USD
- Veneer, plywood, and engineered wood; at manufacturer: 0.000303658 USD
- Limited-service restaurants: 0.00150485 USD
- Ground or treated minerals and earth; at manufacturer: 0.000107592 USD
- Metal pipe fittings, ball and roller bearings, industrial patterns, metal bath fixtures, other misc. fabricated metals; at manufacturer: 0.00680893 USD
- Paper; at manufacturer: 2.55361e-6 USD
- Electronic capacitors, resistors, coils, transformers, connectors and other components (except semiconductors and printed circuit assemblies); at manufacturer: 0.000504544 USD
- Metal structural products; at manufacturer: 4.37033e-5 USD
- Other computer related services, including facilities management: 0.000323136 USD
- Management consulting: 0.000381409 USD
- Monetary authorities and depository credit intermediation: 0.00467895 USD
- Magazines and journals; at publisher: 1.42044e-7 USD
- Performances: 7.10221e-8 USD
- Metal coatings, engravings, and heat treatments; at manufacturer: 0.00851767 USD
- Secondary copper products; at manufacturer: 0.000468932 USD
- Iron, gold, silver, and other metal ores; at mine: 9.49328e-7 USD
- Food and beverage stores: 2.64726e-7 USD
- Natural gas; at consumer: 0.0133542 USD
- Plastic pipe, fittings, and sausage casings; at manufacturer: 2.66656e-6 USD
- Computer terminals and other computer peripheral equipment; at manufacturer: 0.000108422 USD
- Facilities support: 0.00177707 USD
- Speed changers, industrial high-speed drives, and gears; at manufacturer: 2.53538e-5 USD
- Wireless telecommunications: 0.000434873 USD
- Stationery; at manufacturer: 2.84088e-7 USD
- Other basic inorganic chemicals; at manufacturer: 6.25662e-5 USD
- Sand, gravel, clay, phosphate, other nonmetallic minerals; at mine: 0.00318172 USD
- Golf courses, marinas, ski resorts, fitness and other rec centers and industries: 0.000161427 USD
- Other basic organic chemicals; at manufacturer: 0.000346583 USD
- Other nonmetallic mineral products; at manufacturer: 0.000161546 USD
- Clay and ceramic products; at manufacturer: 0.00481189 USD
- Aluminum products; at manufacturer: 8.06457e-6 USD
- Drinking water and wastewater treatment; at consumer: 0.000856245 USD
- Pumps and pumping equipment; at manufacturer: 2.41475e-6 USD
- Mechanical power transmission equipment; at manufacturer: 9.98366e-5 USD
- Air and gas compressors; at manufacturer: 6.54113e-5 USD
- Synthetic rubber and artificial and synthetic fibers; at manufacturer: 5.53774e-6 USD
- Investigation and security: 0.00247538 USD
- Other plastic products; at manufacturer: 0.000882412 USD
- Adhesives; at manufacturer: 2.68976e-6 USD
- Investment advice, portfolio management, and other financial advising services: 0.000321242 USD
- Paper bags and coated paper; at manufacturer: 0.00016641 USD
- Relay and industrial controls; at manufacturer: 0.000343659 USD
- Marketing research and all other miscellaneous professional, scientific, and technical services: 0.00381809 USD
- Vehicle rental and leasing: 0.000814039 USD
- Polystyrene foam products; at manufacturer: 6.52133e-7 USD
- Waste management and remediation: 0.00235489 USD
- Welding and Soldering Equipment, Scales and Balances, and other general purpose machinery; at manufacturer: 0.000164944 USD
- Insurance carriers: 0.00083778 USD
- Other retail: 5.81735e-5 USD
- Computer storage device readers; at manufacturer: 9.23287e-7 USD
- Hotels and campgrounds: 0.000752799 USD
- Nonresidential building repair and maintanence: 0.0038149 USD
- Postal service: 7.87892e-6 USD
- Advertising and public relations: 0.00281173 USD
- Cardboard; at manufacturer: 0.00171812 USD
- Special tools, dies, jigs, and fixtures; at manufacturer: 0.003398 USD
- Printed circuit and electronic assembly; at manufacturer: 0.00087904 USD
- Warehousing: 0.00204832 USD
- Other support services: 0.00280037 USD
- Motor vehicle steering, suspension components (except spring), and brake systems; at manufacturer: 0.000146534 USD
- Lumber and treated lumber; at manufacturer: 0.000485904 USD
- Motors and generators; at manufacturer: 2.02229e-5 USD
- Truck transport: 0.0188559 USD
- Hydraulic pumps, motors, cylinders and actuators; at manufacturer: 3.39904e-5 USD
- Company and enterprise management: 0.0305277 USD
- Carbon and graphite products; at manufacturer: 0.0022724 USD
- Custom computer programming: 9.09082e-6 USD
- Paints and coatings; at manufacturer: 7.75284e-6 USD
- Noncomparable imports: 0.00239801 USD
- Other petroleum and coal products; at manufacturer: 5.90715e-5 USD
- Dry-cleaning and laundry: 1.96674e-6 USD
- Power boilers and heat exchangers; at manufacturer: 2.08095e-5 USD
- Legal services: 0.00145839 USD
- Screws, nuts, and bolts; at manufacturer: 0.00173042 USD
- Data processing and hosting: 0.00247859 USD
- Cutting and machine tool accessory, rolling mill, and other metalworking machines; at manufacturer: 0.00124062 USD
- Business support: 0.00457575 USD
- Heavy gauge metal tanks; at manufacturer: 2.07384e-5 USD
- Light gauge metal cans, boxes, and containers; at manufacturer: 2.19995e-5 USD
- Wholesale trade: 0.0802616 USD
- Accounting, tax preparation, bookkeeping, and payroll: 0.00167098 USD
- Other concrete products; at manufacturer: 5.37959e-5 USD
- Books, newspapers, magazines, and other print media; at manufacturer: 5.13332e-7 USD
- Secondary steel products; at manufacturer: 2.21912e-5 USD
- Mineral wool; at manufacturer: 0.000430684 USD
- Telecommunications: 0.00125659 USD
- Custom metal rolls; at manufacturer: 0.000176068 USD
- Software: 5.33243e-5 USD
- Water transport (boats, ships, ferries): 0.000852828 USD
- Chemicals (except basic chemicals, agrichemicals, polymers, paints, pharmaceuticals,soaps, cleaning compounds); at manufacturer: 0.00107323 USD
- Nondepository credit intermediation and related activities: 0.00179664 USD
- Vehicle engines and engine parts; at manufacturer: 5.49745e-5 USD
- Plastics and rubber industry machinery; at manufacturer: 7.10221e-8 USD
- Cast iron and steel; at manufacturer: 0.00307391 USD
- Lids, jars, bottle caps, other metal closures and crowns; at manufacturer: 0.000177096 USD
- Electricity; at consumer: 0.0178755 USD
- Vehicle metal stamping; at manufacturer: 8.87621e-5 USD
- Vehicle repair: 0.00144985 USD
- Vending, commercial laundry, and other commercial and service industry machinery; at manufacturer: 5.81079e-5 USD
- Other engine equipment; at manufacturer: 1.1744e-5 USD
- Abrasive products; at manufacturer: 0.00167204 USD
- Computer systems design: 0.00075483 USD
- Cardboard containers; at manufacturer: 0.00451579 USD
- All other food and drinking places: 0.00010704 USD
- Communication and energy wire and cable; at manufacturer: 1.61395e-5 USD
- Wooden windows, door, and flooring; at manufacturer: 0.000111576 USD
- State and local government enterprises: 0.000909092 USD
- Unrefined oil and gas; at extraction site: 2.29243e-7 USD
- Laminated plastic plates and shapes; at manufacturer: 3.4925e-6 USD
- Insurance agencies and brokerages: 0.000279133 USD
- Satellite, telecommunications resellers, and all other telecommunications: 5.56106e-5 USD
- Industrial molds; at manufacturer: 0.000466177 USD
- Commercial machinery repair: 0.00279369 USD
- Fertilizers; at manufacturer: 4.74664e-7 USD
- Full-service restaurants: 0.000912791 USD
- Independent artists, writers, and performers: 0.000268059 USD
- Metal cutting and forming machine tools; at manufacturer: 0.000145585 USD
- Nonferrous metal casts; at manufacturer: 0.000168494 USD
- Compressed Gases; at manufacturer: 8.49474e-5 USD
- Lessors of nonfinancial intangible assets: 0.00287835 USD
- Sports: 5.41576e-5 USD
- Vehicle electrical and electronic equipment; at manufacturer: 2.32585e-5 USD
- Springs and wires; at manufacturer: 5.87029e-6 USD
- Fabricated pipe and pipe fittings; at manufacturer: 1.99057e-5 USD

## Inputs from nature
- Water, fresh: 0.0246755, 0.0061151 m3 (2 entries, compartments not in this file); data quality (4,2,1,4,2)
- Occupation, industrial area, built up: 0.000387201 m2*a; data quality (4,2,1,1,1)
- Water, saline: 0.00196455 m3; data quality (4,2,1,4,2)
- Occupation, industrial area: 0.0011616 m2*a; data quality (4,2,1,1,1)
- Occupation, urban, discontinuously built: 0.000186651 m2*a; data quality (4,2,1,1,1)

## Emissions to nature
- acenaphthylene: 3.19091e-11 kg; data quality (3,2,1,4,1)
- nickel: 4.77496e-9, 3.87443e-8 kg (2 entries, compartments not in this file); data quality (4,1,1,1,3)
- chlorine: 5.90359e-9 kg; data quality (2,1,1,1,3)
- Ethene, chloro-: 3.36286e-11 kg; data quality (3,2,1,1,3)
- Naphthalene: 2.29195e-8 kg; data quality (4,1,1,1,3)
- benzene: 1.25352e-10 kg; data quality (3,1,1,1,3)
- selenium: 4.54081e-9 kg; data quality (2,2,1,1,3)
- p-cresol: 5.99305e-12 kg; data quality (4,2,1,1,3)
- benzene: 8.90749e-6 kg; data quality (3,2,1,1,3)
- cyanide: 5.84864e-7 kg; data quality (2,2,1,1,3)
- 2,4/2,6-toluenediisocyanate (mixture): 3.00845e-11, 3.00845e-13 kg (2 entries, compartments not in this file); data quality (4,1,1,1,3)
- methanol: 2.00508e-6 kg; data quality (4,2,1,1,3)
- Asbestos: 9.48673e-15 kg; data quality (5,2,1,1,5)
- tertiary-Butyl Acetate: 1.33134e-8 kg; data quality (3,2,1,1,5)
- particulates, < 10 um: 0.000121508 kg; data quality (3,2,1,1,3)
- carbonyl sulfide: 3.61884e-10 kg; data quality (4,2,1,1,3)
- Carbon dioxide: 0.0522697 kg; data quality (4,2,1,4,1)
- barium: 2.50704e-10, 8.44372e-10 kg (2 entries, compartments not in this file); data quality (4,1,1,1,3)
- BUTYL ISOCYANATE: 1.25785e-14 kg; data quality (4,2,1,1,5)
- Benzo(a)anthracene: 2.74686e-13 kg; data quality (2,2,1,1,3)
- Phenol: 8.77055e-10 kg; data quality (3,1,1,1,3)
- beryllium: 2.33431e-9 kg; data quality (2,2,1,1,3)
- 1,4-dioxane: 6.65193e-13 kg; data quality (4,2,1,1,5)
- Ethylene glycol monoethyl ether: 1.28554e-6 kg; data quality (5,1,1,1,3)
- cobalt: 3.39045e-12 kg; data quality (4,1,1,1,4)
- Cresol: 5.87145e-7 kg; data quality (4,2,1,1,3)
- phenol: 7.27194e-6 kg; data quality (4,2,1,1,3)
- Sulfur hexafluoride: 2.06751e-8 kg; data quality (4,2,1,4,1)
- Chromium VI: 2.84522e-8 kg; data quality (3,2,1,1,3)
- trichloroethylene: 8.30186e-7 kg; data quality (4,2,1,1,3)
- chlorine: 1.27061e-8 kg; data quality (4,2,1,1,3)
- Water, fresh: 0.0268778 m3; data quality (4,2,1,4,2)
- Cobalt: 1.6087e-9 kg; data quality (4,1,1,1,3)
- ALUMINUM OXIDE: 6.64904e-9, 2.50704e-11 kg (2 entries, compartments not in this file); data quality (5,1,1,1,3)
- PHOSPHORUS: 3.03371e-9 kg; data quality (2,2,1,1,3)
- Propane, 1,1,1,3,3,3-hexafluoro-, HCFC-236fa: 1.38154e-10 kg; data quality (4,2,1,4,1)
- Propene, 1,3-dichloro-: 5.83409e-11 kg; data quality (3,2,1,1,3)
- naphthalene: 5.46536e-9 kg; data quality (4,1,1,1,3)
- o-cresol: 8.9938e-8 kg; data quality (4,2,1,1,3)
- hydrogen fluoride: 1.24219e-8 kg; data quality (2,2,1,1,4)
- Aluminum: 3.43675e-9, 1.73804e-7 kg (2 entries, compartments not in this file); data quality (4,1,1,1,3)
- formaldehyde: 8.9484e-7 kg; data quality (2,2,1,1,3)
- hydrogen sulfide: 3.85046e-9 kg; data quality (3,2,1,1,3)
- 1-Methyl-2-pyrrolidinone: 1.22395e-6 kg; data quality (5,1,1,1,3)
- 2-ethoxyethyl acetate: 1.79653e-9 kg; data quality (3,2,1,1,5)
- Nitrogen: 3.72162e-7 kg; data quality (5,2,1,1,5)
- biphenyl: 4.37823e-8 kg; data quality (4,2,1,1,3)
- methyl isobutyl ketone: 9.68683e-7 kg; data quality (4,2,1,1,3)
- 3-methylcholanthrene: 3.40307e-14 kg; data quality (2,2,1,1,3)
- 4-nitrophenol: 2.79981e-16 kg; data quality (2,2,1,1,5)
- acrylic acid: 4.91281e-13 kg; data quality (4,2,1,1,5)
- hexane: 5.72627e-7 kg; data quality (3,2,1,1,3)
- toluene-2,4-diisocyante: 9.04988e-15 kg; data quality (3,2,1,1,5)
- Benzene, 1,2,4-trimethyl-: 4.06141e-9 kg; data quality (5,1,1,1,3)
- Triethyl amine: 5.68816e-7 kg; data quality (4,2,1,1,3)
- m-cresol: 2.84035e-9 kg; data quality (4,2,1,1,3)
- ethylene glycol: 6.68381e-8 kg; data quality (5,2,1,1,3)
- N,N-DIMETHYLANILINE: 1.88131e-8 kg; data quality (5,2,1,1,3)
- 2-methylnaphthalene: 2.99717e-9 kg; data quality (2,2,1,1,3)
- Indeno(1,2,3-cd)pyrene: 3.57586e-13 kg; data quality (3,2,1,3,2)
- Ethane, 1,1,1,2-tetrafluoro-, HFC-134a: 6.85961e-8 kg; data quality (4,2,1,4,1)
- acrylonitrile: 1.05137e-15 kg; data quality (4,2,1,1,4)
- chromium: 3.44658e-7, 1.85156e-9, 3.46575e-9 kg (3 entries, compartments not in this file); data quality (4,1,1,1,3)
- Titanium: 2.40305e-9 kg; data quality (5,2,1,1,3)
- MOLYBDENUM(VI): 5.00115e-9, 2.50704e-11 kg (2 entries, compartments not in this file); data quality (3,1,1,1,3)
- Bisphenol A: 2.51968e-9 kg; data quality (4,1,1,1,4)
- Xylene: 5.17709e-6 kg; data quality (4,2,1,1,3)
- pyrene: 1.03435e-11 kg; data quality (2,2,1,2,2)
- arsenic: 1.20338e-12 kg; data quality (2,1,1,1,3)
- monochloroethane: 6.80521e-15 kg; data quality (3,2,1,1,3)
- ammonia: 8.42875e-6 kg; data quality (3,2,1,1,3)
- Water, saline: 0.000995431 m3; data quality (4,2,1,4,2)
- Chrysene: 2.98327e-8 kg; data quality (2,2,1,1,3)
- copper: 5.69052e-9, 3.12392e-7, 4.74827e-8 kg (3 entries, compartments not in this file); data quality (4,1,1,1,3)
- Benzo(b)fluoranthene: 5.84881e-13 kg; data quality (3,2,1,3,1)
- Cumene: 5.5155e-13 kg; data quality (3,1,1,1,3)
- o-Xylene: 6.24357e-8 kg; data quality (3,2,1,1,3)
- silver: 3.40958e-8 kg; data quality (4,1,1,1,3)
- ethylbenzene: 4.50447e-12 kg; data quality (4,1,1,1,5)
- lead: 9.38622e-8, 2.17784e-9 kg (2 entries, compartments not in this file); data quality (3,1,1,1,3)
- propanal: 2.09551e-8 kg; data quality (3,2,1,2,3)
- nitrogen oxides: 0.000150894 kg; data quality (2,2,1,1,3)
- methylene diphenyl diisocyanate: 2.4704e-7 kg; data quality (4,2,1,1,3)
- Methane, difluoro-, HFC-32: 6.9605e-9 kg; data quality (4,2,1,4,1)
- chloroform: 6.27369e-11 kg; data quality (4,2,1,1,3)
- mercury: 1.75493e-12, 7.52113e-12 kg (2 entries, compartments not in this file); data quality (3,1,1,1,3)
- Zinc: 9.89925e-8 kg; data quality (5,1,1,1,3)
- Zinc: 2.57796e-9 kg; data quality (5,1,1,1,4)
- polychlorinated biphenyls: 2.6364e-19 kg; data quality (3,2,1,1,5)
- hydroquinone: 1.45629e-15 kg; data quality (3,2,1,1,5)
- CHLOROPRENE: 9.451e-14 kg; data quality (2,2,1,1,5)
- methane, monochloro-, r-40: 1.23042e-10 kg; data quality (3,2,1,1,4)
- Phthalate, dibutyl-: 2.11801e-10 kg; data quality (4,2,1,1,3)
- fluoranthene: 3.9812e-10 kg; data quality (2,2,1,1,3)
- styrene: 9.90284e-7 kg; data quality (4,2,1,1,3)
- Cobalt: 6.61029e-8 kg; data quality (3,2,1,1,3)
- Chromium, ion: 6.28036e-7 kg; data quality (2,2,1,1,3)
- Dibenz(a,h)anthracene: 1.08379e-13 kg; data quality (2,2,1,1,3)
- acenaphthene: 2.67916e-11 kg; data quality (3,2,1,4,1)
- SEC-BUTYL ALCOHOL: 9.03191e-7 kg; data quality (5,1,1,1,3)
- propylene oxide: 1.08117e-12 kg; data quality (3,2,1,1,5)
- carbon tetrachloride: 8.26425e-11 kg; data quality (4,2,1,1,3)
- 2,2,4-trimethylpentane: 4.90024e-9 kg; data quality (3,2,1,3,1)
- Sulfuric acid: 2.74934e-7 kg; data quality (2,1,1,1,3)
- butadiene: 5.48719e-9 kg; data quality (2,2,1,2,2)
- Propene: 7.39727e-12 kg; data quality (3,1,1,1,5)
- 1,1,1-trichloroethane: 1.28126e-8 kg; data quality (3,2,1,1,4)
- ethane, 1,2-dibromo-: 2.32913e-12 kg; data quality (2,2,1,1,4)
- 1,1,2,2-tetrachloroethane: 8.83108e-11 kg; data quality (3,2,1,1,3)
- 4,4'-isopropylidenediphenol: 2.42713e-7 kg; data quality (4,1,1,1,3)
- antimony: 8.38454e-9 kg; data quality (3,2,1,1,3)
- fluorene: 6.22037e-11 kg; data quality (2,2,1,2,2)
- Propane, 1,2-dichloro-: 3.31185e-12 kg; data quality (4,2,1,1,4)
- cadmium: 2.75547e-8 kg; data quality (3,2,1,1,3)
- 4,4'-METHYLENEBIS(2-CHLOROANALINE): 9.44926e-10 kg; data quality (5,2,1,1,3)
- Methane: 1.00962e-6 kg; data quality (4,2,1,4,1)
- lead: 8.07871e-7 kg; data quality (3,2,1,1,3)
- nickel: 5.92253e-7 kg; data quality (3,2,1,1,3)
- Hydrocarbons, aromatic: 8.43518e-7 kg; data quality (4,2,1,1,3)
- Ethane, 1,1,1-trifluoro-, HFC-143a: 5.11392e-9 kg; data quality (4,2,1,4,1)
- VOC, volatile organic compounds: 0.000451328 kg; data quality (3,2,1,1,3)
- anthracene: 4.65096e-12 kg; data quality (3,2,1,3,2)
- 2-METHOXYETHANOL: 3.7508e-11 kg; data quality (4,2,1,1,3)
- Phosphorus: 7.22557e-9 kg; data quality (4,1,1,1,3)
- Ethane, pentafluoro-, HFC-125: 1.19524e-8 kg; data quality (4,2,1,4,1)
- diethanolamine: 4.91587e-11 kg; data quality (3,2,1,1,5)
- t-butyl methyl ether: 4.76649e-17 kg; data quality (3,2,1,1,5)
- benzo(a)pyrene: 5.96701e-9 kg; data quality (2,2,1,1,3)
- ethane, 1,2-dichloro-: 1.09552e-10 kg; data quality (3,2,1,1,3)
- diisocyanates: 6.9941e-7 kg; data quality (4,1,1,1,3)
- methyl methacrylate: 3.50452e-9 kg; data quality (4,2,1,1,3)
- ethane, 1,1,2-trichloro-: 7.01957e-11 kg; data quality (4,2,1,1,3)
- phenanthrene: 1.07248e-10 kg; data quality (3,2,1,3,2)
- Benzo(k)fluoranthene: 5.4093e-13 kg; data quality (3,2,1,3,1)
- acetophenone: 1.47846e-8 kg; data quality (4,2,1,1,3)
- acetaldehyde: 3.81758e-7 kg; data quality (3,2,1,1,3)
- 1,2-BUTYLENE OXIDE: 1.50622e-11 kg; data quality (4,2,1,1,5)
- ethylene oxide: 3.67291e-14 kg; data quality (3,2,1,1,4)
- benzene, ethyl-: 4.65163e-7 kg; data quality (4,2,1,1,3)
- benz[a]anthracene: 3.82034e-8 kg; data quality (2,2,1,1,3)
- Styrene: 5.38284e-13 kg; data quality (3,1,1,1,4)
- Diethylene glycol butyl ether: 4.65513e-10 kg; data quality (3,2,1,1,5)
- carbon monoxide: 0.00097973 kg; data quality (2,2,1,1,3)
- dibenzofuran: 9.7502e-10 kg; data quality (4,2,1,1,3)
- para-xylene: 2.08169e-9 kg; data quality (3,2,1,1,5)
- particulates, < 2.5 um: 0.000483513 kg; data quality (3,2,1,1,3)
- 2,4-dinitrophenol: 3.9876e-16 kg; data quality (5,2,1,1,5)
- isophorone: 2.1946e-11 kg; data quality (3,2,1,1,5)
- manganese: 2.0999e-6 kg; data quality (3,2,1,1,3)
- manganese: 7.31575e-7, 7.7288e-9 kg (2 entries, compartments not in this file); data quality (4,1,1,1,3)
- hydrogen chloride: 3.04212e-7 kg; data quality (2,2,1,1,3)
- Dinitrogen monoxide: 1.04988e-7 kg; data quality (4,2,1,4,1)
- nitric acid: 1.31607e-8 kg; data quality (3,1,1,1,4)
- sulfur dioxide: 6.50477e-5 kg; data quality (2,2,1,1,3)
- phthalate, dioctyl-: 2.81721e-11 kg; data quality (3,2,1,1,5)
- phenol: 2.58437e-9 kg; data quality (3,1,1,1,3)
- 1,4-dichlorobenzene: 2.45234e-13 kg; data quality (2,2,1,1,3)
- cumene: 1.10537e-7 kg; data quality (4,2,1,1,3)
- 1,2,4-trimethylbenzene: 1.30617e-8, 3.44673e-7 kg (2 entries, compartments not in this file); data quality (5,1,1,1,3)
- aniline: 3.95173e-7 kg; data quality (4,2,1,1,3)
- p-phenylenediamine: 1.03029e-8 kg; data quality (5,2,1,1,3)
- benzene, chloro-: 5.91532e-11 kg; data quality (4,2,1,1,3)
- acrolein: 1.01465e-7 kg; data quality (2,2,1,1,3)
- naphthalene: 2.6616e-6 kg; data quality (3,2,1,1,3)
- m-xylene: 7.66837e-8 kg; data quality (3,2,1,1,3)
- toluene: 3.45847e-6 kg; data quality (4,2,1,1,3)
- Benzo(g,h,i)perylene: 1.0646e-8 kg; data quality (3,2,1,1,3)
- Nitrobenzene: 1.74786e-11 kg; data quality (4,2,1,1,3)
- ethene, tetrachloro-: 7.21576e-9 kg; data quality (3,2,1,1,3)
- Nickel, ion: 1.72326e-9 kg; data quality (3,2,1,1,3)
- mercury: 2.13455e-8 kg; data quality (2,2,1,1,3)
- methane, dichloro-, hcc-30: 5.16544e-8 kg; data quality (4,2,1,1,3)
- arsenic: 2.70269e-9 kg; data quality (3,2,1,1,3)

## Inventory method
Input-output

## Modelling constants
The reference unit of all processes is 1 USD2013 of the good or service. The technosphere inputs are based on the US BEA detailed input-output tables for 2007. The IO tables are combined to develop a commodity-by-commodity model based on the the industry-technology assumption (see Suh et al., 2010), which assumes all commodities produced by a given industry have the same input structure, but that multiple industries can produce the same commodity. Thus, model technosphere flows represent commodity outputs (and not industry outputs) from other processes in the model. There are no by-products included in these processes. All commodity production is based on US-conditions, despite in reality that some goods and services are produced overseas, as USEEIO v1.1 is a single-region IO model.

## Completeness
The input-output approach assures that all purchased inputs associated with the sectors making these commodities as reported in the US census for 2007 are included. The direct resources extracted including minerals, energy sources, water and land occupied are included. Emissions to air include all critieria air pollutants, greenhouse gases, and hazardous and toxic air pollutants as defined by US EPA. Releases to water include toxics, total nitrogen and total phosphorus, and water discharges. Releases to soil or groundwater include toxics and agriculutural pesticides. Some metal releases to air, water and soil are not included because they could not be speciated. Solid hazardous and non-hazardous wastes generated are not included as an elementary flows although purchases of waste services are included.

## Data treatment
Greenhouse gases are primarily from the US Greenhouse Gas Emission Inventory (USEPA 2016a). Biogenic C uptake is not included (change from version 1.0), as biogenic C emission are not included. Toxic releases to air, water and soil (except pesticides) are from the 2013 Toxic Release Inventory (USEPA 2015a). Criteria air pollutants and hazardous air pollutants are from the 2011 National Emissions Inventory (USEPA 2015b). All estimates are normalized by industry based on sector output in the data year, then converted to 2013 USD using relative sector-specific CPIs (if data year is not 2013). Energy use represent raw renewables or fossil fuel energies and is based on EIA data for 2014. See Table 1 in Yang, Ingwersen et al. 2017 and Supporting Information 1, and the v1.1 data update notes (Ingwersen et al. 2017) for all details on environmental data sources used.Land occupation associated with manufacturing buildings was estimated based on the building floorspace data provided by the U.S. Energy Information Administration in the 2010 Manufacturing Energy Consumption Survey (EIA 2013). Portions of total renewable energy (EIA 2016) based on EIA-923 reports for 2014 (EIA 2017) are included. Nitrogen and Phosphorus releases are modeled in total N and total P equivalents as estimated by the Discharge Monitoring Report Nutrient Loading tool (USEPA 2016b). Self-supplied withdrawals were assigned to industrial sectors based on water use statistics for Canadian industries by NAICS 3-digit sector scaled to US production levels based on gross domestic product by industry (BEA 2015; Statistics Canada 2010), and further disaggregated to the manufacturing sectors based on compensation of employees as provided by the 2007 IO tables (BEA 2015). Water withdrawals associated with public supply were allocated to sectors based on their use of water, sewage, and other services in USD based on the IO tables (BEA 2015). Portions of total renewable energy (EIA 2016) by type are assigned to sectors (hydro, wind, solar, or) based on EIA-923 reports for 2014 (EIA 2017).

## Data collection
2015-2016

## Sampling procedure
US federal government sources, including surveys and US EPA emissions databases are used as the primary sources. From these sources, data for US reporting establishments/facilities are aggregated by the NAICS sector as defined in the BEA detailed 2007 input-output tables. When level of sector aggregation differs, or when direct emissions are not reported but modeled, additional sources are used to make allocations and estimates.

## Review details
In regard to quality assurance and peer-review, each dataset created went through Quality Assurance as defined in a quality assurance project plans at US EPA, CSRA or ERG. The model was assembled with the IO model builder model (USEPA 2016c). Validation functions were used to check that all the model components were properly assembled and harmonized. Bayou Demeke and Santosh Ghimire provided internal peer review of the model methodology and the manuscript underwent standard EPA management review. An editor and two anonymous reviewers at the Journal of Cleaner Production reviewed the model. In regard to data quality evaluation, data quality assessment was performed at the flow and process levels according to the updated US EPA data quality assessment guidelines as defined in US EPA (2016b).

## Intended application
The primary application is for use in the US Environmentally-Extended Input-Ouput model, USEEIO, version 1.1. This model is being used by the US EPA for supporting tools that prioritize goods and services based on potential environmental impacts, resource use or emissions for large regions, including the US and US states, and as a strealined tool for organizations as a starting point to consider sustainable materials management. Model results are designed to provide meso/macro-level decision support.

## Project
USEEIO v1.1 was developed by the US EPA with CSRA and ERG with Wesley W. Ingwersen and David E. Meyer as research leads. Yi Yang was the technical lead on the work for CSRA (contract EP-C-15-012); Troy Hawkins was lead for ERG (contract EP-C-12-021).

## Sources
- USDA 2014
- Blackhurst et al. 2010
- EIA 2017
- Edelen and Ingwersen 2017
- USEPA 2015b
- BLM 2008
- Statistics Canada 2010
- USEPA 2016b
- USDA 2009a
- USDA 2009b
- Nickerson et al. 2011
- Macknick et al. 2011
- USDA 2016
- USEPA 2016a
- USEPA 2015a
- EIA 2015
- Kim et el. 2013
- Lovelace 2009
- USGS 2016
- Yienger et al. 1995
- Ingwersen et al. 2017
- Ingwersen et al. DRAFT
- Maupin et al. 2014
- USEPA 2016c
- Goebes et al. 2003
- USDA 2006
- USGS 2015
- Torcellini et al. 2003
- EIA 2016
- EIA 2013
- BEA 2015
