# Asphalt shingles; at manufacturer

Dataset: openLCA process, unit process
Category: 3241: Petroleum and Coal Products Manufacturing
Geography: United States
Time period: 2017-01-01 to 2017-12-31
Data quality: US EPA - Process Pedigree Matrix (1;1)
Exchange data quality scheme: US EPA - Flow Pedigree Matrix
Generated by: US EPA with CSRA and ERG
Owner: US EPA
Published in: Yang, Ingwersen et al. 2017
restrictionsDescription: This model shold be appropriately cited (see Yang, Ingwersen et al. 2017 source or Publication field) when used. Any changes or derivations of this model by the user should be documented. The model itself and any results from use of this model shall not be construed to consitute US EPA opinion or policy.
copyright: false

## General comment
BEA Code & Name is '324122:Asphalt shingle and coating materials manufacturing'. Description of the primary industry producing this good or service, adapted from the Census Bureau NAICS 2007 descriptions: This U.S. industry comprises establishments primarily engaged in (1) saturating purchased mats and felts with asphalt or tar from purchased asphaltic materials and (2) manufacturing asphalt and tar and roofing cements and coatings from purchased asphaltic materials.

## Technology
The process describes the average US production of this good or service within this NAICS-based grouping defined in the BEA 2007 detailed input-output tables (BEA 2015). Distribution, wholesale and retailing of this good or service, use, and final disposal are not included. Creation of a product system with this process will enable modeling of all upstream (supply-chain) activities.

## Geography
Data represent the 50 US states

## Time period
2017 was the year in which this version of USEEIO was released and is the target date for the model

## Reference product
- Asphalt shingles; at manufacturer: 1 USD

## Inputs from technosphere
All rows: data quality (1,3,1,1,1)
- Buildings and dwellings services: 0.00273625 USD
- Vehicle rental and leasing: 0.00148795 USD
- Independent artists, writers, and performers: 0.00024738 USD
- Other basic inorganic chemicals; at manufacturer: 0.000260744 USD
- Plastics; at manufacturer: 0.000191061 USD
- Dry-cleaning and laundry: 1.79569e-7 USD
- Data processing and hosting: 0.00161608 USD
- Commercial machinery repair: 0.0012454 USD
- Employment services: 0.000135249 USD
- Other engine equipment; at manufacturer: 3.10505e-6 USD
- Insurance agencies and brokerages: 0.000861813 USD
- Noncomparable imports: 2.91648e-5 USD
- Adhesives; at manufacturer: 2.11552e-5 USD
- Secondary steel products; at manufacturer: 1.80474e-5 USD
- Abrasive products; at manufacturer: 1.68214e-6 USD
- Heating equipment other than warm air furnaces; at manufacturer: 1.00914e-5 USD
- Cutting and machine tool accessory, rolling mill, and other metalworking machines; at manufacturer: 2.48221e-6 USD
- Mineral wool; at manufacturer: 1.41522e-5 USD
- State and local government enterprises: 0.00122915 USD
- Paper; at manufacturer: 0.0153188 USD
- Synthetic rubber and artificial and synthetic fibers; at manufacturer: 4.61084e-5 USD
- Semiconductors; at manufacturer: 0.00552275 USD
- Scientific research and development: 0.000123554 USD
- Machine shops; at manufacturer: 0.00185405 USD
- Environmental and other technical consulting services: 0.00012367 USD
- Sports: 3.67421e-7 USD
- Paper bags and coated paper; at manufacturer: 3.40475e-5 USD
- Aluminum; at manufacturer: 5.82943e-6 USD
- Clothing; at manufacturer: 3.17497e-8 USD
- Legal services: 0.00148697 USD
- Commercial equipment rental: 0.000866936 USD
- Vehicle engines and engine parts; at manufacturer: 2.32138e-7 USD
- Primary iron, steel, and ferroalloy products; at manufacturer: 0.000197894 USD
- Iron, gold, silver, and other metal ores; at mine: 1.13469e-5 USD
- Satellite, telecommunications resellers, and all other telecommunications: 0.000123586 USD
- All other food and drinking places: 1.17543e-6 USD
- Valve and fittings (except for plumbing); at manufacturer: 5.313e-5 USD
- Software: 3.03921e-7 USD
- Other computer related services, including facilities management: 0.000371029 USD
- Sand, gravel, clay, phosphate, other nonmetallic minerals; at mine: 0.00515901 USD
- Ground or treated minerals and earth; at manufacturer: 0.0118781 USD
- Light gauge metal cans, boxes, and containers; at manufacturer: 0.000368878 USD
- Computer systems design: 0.000741899 USD
- Vehicles and parts sales: 4.53347e-7 USD
- Nondepository credit intermediation and related activities: 0.0027138 USD
- Magazines and journals; at publisher: 3.67421e-7 USD
- Computer terminals and other computer peripheral equipment; at manufacturer: 2.36188e-5 USD
- Air and gas compressors; at manufacturer: 6.28379e-6 USD
- Water transport (boats, ships, ferries): 0.00258131 USD
- Watches, clocks, and other measuring and controlling devices; at manufacturer: 1.4749e-5 USD
- Waste management and remediation: 0.00319715 USD
- Business support: 0.000497302 USD
- Other rubber products; at manufacturer: 1.79993e-5 USD
- Rubber and plastic belts and hoses; at manufacturer: 7.54055e-6 USD
- Secondary copper products; at manufacturer: 5.1842e-6 USD
- Truck transport: 0.0175236 USD
- Clay and ceramic products; at manufacturer: 7.84361e-6 USD
- Other nonmetallic mineral products; at manufacturer: 0.0536958 USD
- Other concrete products; at manufacturer: 4.73071e-6 USD
- Other secondary nonferrous metal products; at manufacturer: 3.11978e-5 USD
- Monetary authorities and depository credit intermediation: 0.0022403 USD
- Household goods repair: 0.000248786 USD
- Shelving and lockers; at manufacturer: 6.34994e-8 USD
- Ready-mix concrete; at manufacturer: 5.52445e-6 USD
- Storage batteries; at manufacturer: 4.26945e-5 USD
- Natural gas; at consumer: 0.00880407 USD
- Gaskets, seals, musical instruments, fasteners, brooms, brushes, mop and other misc. goods; at manufacturer: 7.17375e-6 USD
- Investigation and security: 0.00012567 USD
- Fabric; at manufacturer: 2.81817e-5 USD
- Surgical appliance and supplies; at manufacturer: 1.3585e-7 USD
- Primary copper; at manufacturer: 2.60272e-5 USD
- Veneer, plywood, and engineered wood; at manufacturer: 4.9182e-6 USD
- Cutlery and handtools; at manufacturer: 8.48833e-7 USD
- Marketing research and all other miscellaneous professional, scientific, and technical services: 0.00272669 USD
- Metal windows, doors, and architectural products; at manufacturer: 2.43641e-6 USD
- Cardboard containers; at manufacturer: 0.00627437 USD
- Vending, commercial laundry, and other commercial and service industry machinery; at manufacturer: 2.08201e-8 USD
- Limited-service restaurants: 0.00111809 USD
- Electricity; at consumer: 0.00521387 USD
- Synthetic dyes and pigments; at manufacturer: 7.54055e-7 USD
- Relay and industrial controls; at manufacturer: 0.000752686 USD
- Air conditioning, refrigeration, and warm air heating equipment; at manufacturer: 8.49484e-5 USD
- Metal coatings, engravings, and heat treatments; at manufacturer: 0.00650987 USD
- Wireless telecommunications: 0.000373631 USD
- Vegetable oils and by-products; at manufacturer: 9.31516e-6 USD
- Books, newspapers, magazines, and other print media; at manufacturer: 9.31516e-6 USD
- Finished and coated fabric; at manufacturer: 2.42404e-6 USD
- Other plastic products; at manufacturer: 0.000268588 USD
- Specialized design: 0.000250174 USD
- Investment advice, portfolio management, and other financial advising services: 0.000247715 USD
- Vehicle repair: 0.000623097 USD
- Insurance carriers: 0.00295468 USD
- Advertising and public relations: 0.00148855 USD
- Golf courses, marinas, ski resorts, fitness and other rec centers and industries: 0.000123964 USD
- Wooden windows, door, and flooring; at manufacturer: 6.00127e-7 USD
- Civic, social, professional, and similar organizations: 0.000494552 USD
- Company and enterprise management: 0.0578559 USD
- Air transport: 0.00112255 USD
- Accounting, tax preparation, bookkeeping, and payroll: 0.00173545 USD
- Other support services: 0.000248606 USD
- Scenic and sightseeing transportation and support activities for transportation: 0.000991677 USD
- Plastics and rubber industry machinery; at manufacturer: 7.54055e-7 USD
- External hard drives, CDs, other storage media; at manufacturer: 4.65758e-6 USD
- Lumber and treated lumber; at manufacturer: 1.14299e-6 USD
- Compressed Gases; at manufacturer: 2.44961e-5 USD
- Architectural, engineering, and related services: 0.00383344 USD
- Cement; at manufacturer: 1.81926e-5 USD
- Ophthalmic goods; at manufacturer: 4.27298e-6 USD
- Management consulting: 0.000618244 USD
- Full-service restaurants: 0.000743894 USD
- Welding and Soldering Equipment, Scales and Balances, and other general purpose machinery; at manufacturer: 8.32803e-8 USD
- Custom metal rolls; at manufacturer: 3.14322e-6 USD
- Fertilizers; at manufacturer: 1.25676e-6 USD
- Facilities support: 1.17001e-6 USD
- Electronic capacitors, resistors, coils, transformers, connectors and other components (except semiconductors and printed circuit assemblies); at manufacturer: 0.00134853 USD
- Consumer goods and general rental centers: 0.000124394 USD
- Soap and cleaning compounds; at manufacturer: 1.83568e-5 USD
- Hotels and campgrounds: 0.00049809 USD
- Transmission and power train parts; at manufacturer: 0.000122737 USD
- Mechanical power transmission equipment; at manufacturer: 6.02225e-5 USD
- Screws, nuts, and bolts; at manufacturer: 0.00147366 USD
- Wholesale trade: 0.0360076 USD
- Office administration: 0.000123586 USD
- Drinking water and wastewater treatment; at consumer: 0.00110588 USD
- Material handling equipment; at manufacturer: 0.000123271 USD
- Asphalt pavement; at manufacturer: 5.8996e-5 USD
- Copper, nickel, lead, and zinc; at mine: 7.66179e-6 USD
- Electronic equipment repair and maintenance: 0.000372644 USD
- Cardboard; at manufacturer: 0.00135863 USD
- Securities and commodities brokerage and exchanges: 0.00124021 USD
- Dimensional stone; at mine: 0.00321215 USD
- Urethane and other foam products; at manufacturer: 1.13108e-5 USD
- Warehousing: 0.000866557 USD
- Metal structural products; at manufacturer: 7.14368e-6 USD
- Paints and coatings; at manufacturer: 5.33395e-6 USD
- Other primary nonferrous metals; at manufacturer: 7.83668e-5 USD
- Chemicals (except basic chemicals, agrichemicals, polymers, paints, pharmaceuticals,soaps, cleaning compounds); at manufacturer: 0.000787341 USD
- Other vehicle parts; at manufacturer: 0.00446765 USD
- Passenger ground transport: 0.00024904 USD
- Nonresidential building repair and maintanence: 0.00162055 USD
- All other converted paper products; at manufacturer: 0.0014693 USD
- Pipeline transport: 0.00148325 USD
- Gasoline, fuels, and by-products of petroleum refining; at manufacturer: 0.239341 USD
- Vehicle electrical and electronic equipment; at manufacturer: 3.17497e-7 USD
- Rubber tires; at manufacturer: 9.52491e-8 USD
- Communication and energy wire and cable; at manufacturer: 8.74443e-6 USD
- Corn products; at manufacturer: 2.11135e-5 USD
- Petrochemicals; at manufacturer: 8.85977e-6 USD
- Laminated plastic plates and shapes; at manufacturer: 8.54596e-6 USD
- Carbon and graphite products; at manufacturer: 2.28882e-5 USD
- Other retail: 5.25698e-8 USD
- Other real estate: 0.000250086 USD
- Lessors of nonfinancial intangible assets: 0.00296789 USD
- Speed changers, industrial high-speed drives, and gears; at manufacturer: 1.86303e-5 USD
- Other basic organic chemicals; at manufacturer: 0.00346997 USD
- Metal pipe fittings, ball and roller bearings, industrial patterns, metal bath fixtures, other misc. fabricated metals; at manufacturer: 0.00406393 USD
- Aluminum products; at manufacturer: 1.45791e-6 USD
- Polystyrene foam products; at manufacturer: 1.25676e-6 USD
- Light fixtures; at manufacturer: 1.78541e-5 USD
- Telecommunications: 0.00148955 USD
- Other petroleum and coal products; at manufacturer: 9.09634e-6 USD
- Plastic bags, films, and sheets; at manufacturer: 0.0038174 USD
- Promoters and agents: 1.08018e-6 USD
- Coal; at mine: 0.00150922 USD
- Other textiles; at manufacturer: 2.79455e-5 USD
- Printed circuit and electronic assembly; at manufacturer: 0.0023327 USD
- Motor vehicle steering, suspension components (except spring), and brake systems; at manufacturer: 2.74818e-7 USD
- Glass and glass products; at manufacturer: 0.0427472 USD
- Plastic pipe, fittings, and sausage casings; at manufacturer: 8.43886e-5 USD
- Performances: 3.17497e-8 USD
- Rail transport: 0.00631685 USD
- Asphalt shingles; at manufacturer: 0.0251006 USD
- Unrefined oil and gas; at extraction site: 0.000126574 USD

## Inputs from nature
- Occupation, industrial area: 7.20495e-5 m2*a; data quality (4,2,1,1,1)
- Water, fresh: 0.0319258, 0.00785146 m3 (2 entries, compartments not in this file); data quality (4,2,1,4,2)
- Occupation, urban, discontinuously built: 7.1625e-5 m2*a; data quality (4,2,1,1,1)
- Water, saline: 0.00255636 m3; data quality (4,2,1,4,2)
- Occupation, industrial area, built up: 2.40165e-5 m2*a; data quality (4,2,1,1,1)

## Emissions to nature
- formaldehyde: 4.25831e-6 kg; data quality (3,2,1,3,2)
- hydrogen chloride: 1.08928e-5 kg; data quality (2,2,1,1,4)
- beryllium: 7.60913e-12 kg; data quality (2,2,1,1,1)
- propylene oxide: 6.16523e-11 kg; data quality (3,2,1,1,5)
- carbon disulfide: 6.29139e-9 kg; data quality (4,2,1,1,4)
- lead: 2.46347e-8 kg; data quality (3,2,1,1,4)
- maleic anhydride: 2.63236e-15 kg; data quality (3,2,1,1,5)
- Indeno(1,2,3-cd)pyrene: 1.63502e-11 kg; data quality (3,2,1,4,1)
- Benzo(g,h,i)perylene: 1.78556e-8 kg; data quality (3,2,1,1,4)
- Methyl acrylate: 4.21551e-10 kg; data quality (3,1,1,1,3)
- toluene: 1.2942e-6 kg; data quality (3,2,1,3,2)
- 4,4'-METHYLENEBIS(2-CHLOROANALINE): 2.92864e-13, 1.63004e-11 kg (2 entries, compartments not in this file); data quality (1,1,1,1,4)
- Ethane, 1,1,1,2-tetrafluoro-, HFC-134a: 6.73626e-8 kg; data quality (4,2,1,4,1)
- ethane, 1,1,2-trichloro-: 5.49601e-14 kg; data quality (4,2,1,1,4)
- Xylene: 9.7503e-7 kg; data quality (3,2,1,3,2)
- carbon tetrachloride: 3.46582e-13 kg; data quality (4,2,1,1,3)
- Dinitrogen monoxide: 3.21624e-6 kg; data quality (4,2,1,4,1)
- BUTYL ISOCYANATE: 1.40393e-12 kg; data quality (3,2,1,1,5)
- particulates, < 2.5 um: 9.14525e-5 kg; data quality (3,2,1,2,3)
- antimony: 2.21548e-11, 2.52665e-12 kg (2 entries, compartments not in this file); data quality (2,1,1,1,4)
- acenaphthene: 4.19155e-9 kg; data quality (3,2,1,2,3)
- Phthalate, dimethyl-: 2.10589e-13 kg; data quality (3,2,1,1,5)
- pyrene: 1.13294e-9 kg; data quality (2,2,1,2,3)
- HYDROCHLORIC ACID: 2.19233e-10 kg; data quality (2,1,1,1,5)
- cyanide: 9.98884e-12 kg; data quality (3,2,1,1,5)
- manganese: 1.78131e-12 kg; data quality (4,1,1,1,5)
- phosgene: 2.94427e-11 kg; data quality (5,2,1,1,4)
- 2-nitropropane: 5.87894e-13 kg; data quality (3,2,1,1,5)
- ethylene oxide: 3.3161e-15 kg; data quality (3,2,1,1,5)
- Propane, 1,1,1,3,3,3-hexafluoro-, HCFC-236fa: 2.04774e-10 kg; data quality (4,2,1,4,1)
- chromium: 9.27925e-13, 5.43291e-11, 1.16311e-12 kg (3 entries, compartments not in this file); data quality (4,1,1,1,4)
- hexane: 5.68619e-7 kg; data quality (3,2,1,2,3)
- dimethyl formamide: 9.07633e-11 kg; data quality (4,2,1,1,5)
- selenium: 6.27151e-11 kg; data quality (2,2,1,1,1)
- CYANAMIDE: 9.31679e-14 kg; data quality (2,1,1,1,4)
- o-Xylene: 5.83639e-8 kg; data quality (3,2,1,4,1)
- acrylic acid: 4.21695e-10 kg; data quality (4,1,1,1,3)
- fluorene: 6.93462e-9 kg; data quality (2,2,1,2,3)
- NITROUS ACID: 9.78825e-11 kg; data quality (5,1,1,1,4)
- aniline: 2.26343e-15 kg; data quality (4,2,1,1,4)
- cobalt: 1.8262e-12 kg; data quality (4,1,1,1,4)
- Benzo(k)fluoranthene: 3.04178e-11 kg; data quality (3,2,1,4,1)
- styrene: 5.43347e-13 kg; data quality (3,1,1,1,4)
- ethyl acrylate: 8.62072e-8 kg; data quality (3,1,1,1,3)
- 2,4/2,6-toluenediisocyanate (mixture): 2.71673e-11 kg; data quality (1,1,1,1,4)
- Styrene: 1.61188e-12 kg; data quality (3,1,1,1,5)
- o-cresol: 1.35752e-9 kg; data quality (4,2,1,1,4)
- 1,4-dichlorobenzene: 6.99216e-12 kg; data quality (2,2,1,1,4)
- 1,2,4-trimethylbenzene: 1.34625e-7 kg; data quality (5,1,1,1,3)
- methane, dichloro-, hcc-30: 3.74478e-8 kg; data quality (4,2,1,1,4)
- para-xylene: 5.57101e-9 kg; data quality (3,2,1,4,1)
- Propane, 1,2-dichloro-: 6.45373e-14 kg; data quality (4,2,1,1,4)
- MOLYBDENUM(VI): 5.39299e-11, 4.27593e-11 kg (2 entries, compartments not in this file); data quality (3,1,1,1,4)
- m-xylene: 1.35414e-7 kg; data quality (3,2,1,4,1)
- Water, saline: 0.0012953 m3; data quality (4,2,1,4,2)
- BUTYL ACRYLATE: 1.24358e-8 kg; data quality (4,1,1,1,3)
- bromoform: 2.7845e-16 kg; data quality (3,2,1,1,5)
- benzene: 1.24473e-6 kg; data quality (3,2,1,3,2)
- methyl isobutyl ketone: 2.175e-9 kg; data quality (3,2,1,1,5)
- 2,4/2,6-toluenediisocyanate (mixture): 1.66561e-9 kg; data quality (3,1,1,1,4)
- monochloroethane: 7.51465e-10 kg; data quality (3,2,1,1,4)
- 1,1,2,2-tetrachloroethane: 8.06253e-11 kg; data quality (3,2,1,1,4)
- carbon monoxide: 0.00191424 kg; data quality (3,2,1,1,1)
- silver: 1.46883e-11 kg; data quality (4,1,1,1,4)
- Zinc: 1.85635e-10 kg; data quality (5,1,1,1,4)
- ethene, tetrachloro-: 1.23439e-11 kg; data quality (3,2,1,1,2)
- 1-Methyl-2-pyrrolidinone: 8.20454e-11 kg; data quality (5,1,1,1,4)
- Propene: 5.33068e-11 kg; data quality (3,1,1,1,5)
- antimony: 7.80568e-11 kg; data quality (3,2,1,1,3)
- Ethylene glycol monoethyl ether: 5.41056e-11 kg; data quality (4,2,1,1,5)
- polychlorinated biphenyls: 4.71785e-11 kg; data quality (3,2,1,1,1)
- AMMONIA: 3.98324e-14 kg; data quality (3,1,1,1,4)
- DIETHANOLAMINE: 2.71673e-11 kg; data quality (4,1,1,1,4)
- benzene, chloro-: 4.87214e-12 kg; data quality (4,2,1,1,4)
- benz[a]anthracene: 6.99971e-11 kg; data quality (3,2,1,3,2)
- Triethyl amine: 1.41075e-11 kg; data quality (3,2,1,1,5)
- chlorine: 1.06751e-12 kg; data quality (2,1,1,1,4)
- butanol: 6.69184e-12 kg; data quality (5,1,1,1,4)
- 1,1,1-trichloroethane: 2.91044e-9 kg; data quality (4,2,1,1,4)
- Hydrocarbons, aromatic: 1.48301e-7 kg; data quality (4,2,1,2,3)
- Ethane, 1,1,1-trifluoro-, HFC-143a: 7.57994e-9 kg; data quality (4,2,1,4,1)
- Ethene, chloro-: 1.63168e-9 kg; data quality (3,2,1,1,4)
- Cadmium: 3.30609e-13 kg; data quality (3,1,1,1,4)
- ethylene glycol: 1.027e-7 kg; data quality (5,2,1,1,4)
- Hydrazine: 1.52006e-12 kg; data quality (4,2,1,1,4)
- ethylbenzene: 1.22592e-9 kg; data quality (4,1,1,1,4)
- nickel: 2.08067e-11, 2.05615e-11 kg (2 entries, compartments not in this file); data quality (4,1,1,1,4)
- phenol: 1.76697e-8 kg; data quality (4,2,1,1,4)
- Sulfuric acid: 1.55674e-10 kg; data quality (2,1,1,1,4)
- t-butyl methyl ether: 6.60686e-11 kg; data quality (3,2,1,1,4)
- Methane: 1.96533e-5 kg; data quality (4,2,1,4,1)
- hydrogen sulfide: 1.10673e-7 kg; data quality (3,2,1,1,4)
- 1,4-BENZOQUINONE: 1.91256e-9 kg; data quality (3,2,1,1,1)
- Naphthalene: 1.26465e-10 kg; data quality (4,1,1,1,3)
- BENZ(A)ACRIDINE: 5.99114e-16 kg; data quality (2,2,1,1,4)
- Asbestos: 1.88518e-11 kg; data quality (5,2,1,1,1)
- Dibenz(a,h)anthracene: 4.01185e-13 kg; data quality (2,2,1,2,2)
- Methane, difluoro-, HFC-32: 1.0317e-8 kg; data quality (4,2,1,4,1)
- dibenzofuran: 1.48801e-9 kg; data quality (4,2,1,1,4)
- toluene-2,4-diisocyante: 1.92786e-10 kg; data quality (3,2,1,1,5)
- cyclohexane: 2.47201e-9 kg; data quality (4,1,1,1,4)
- naphthalene: 1.1585e-5 kg; data quality (3,2,1,1,4)
- Dibenzofuran: 3.79396e-10 kg; data quality (3,1,1,1,3)
- Benzo(b)fluoranthene: 4.27665e-11 kg; data quality (3,2,1,3,2)
- Ethane, pentafluoro-, HFC-125: 1.7716e-8 kg; data quality (4,2,1,4,1)
- m-cresol: 7.19938e-12 kg; data quality (4,2,1,1,4)
- manganese: 7.08266e-9 kg; data quality (3,2,1,1,3)
- butadiene: 2.01332e-7 kg; data quality (3,2,1,3,2)
- copper: 9.30717e-11, 2.61418e-9 kg (2 entries, compartments not in this file); data quality (4,1,1,1,3)
- Phenanthrene: 2.14991e-9 kg; data quality (3,1,1,1,3)
- Methyl iodide: 2.53535e-12 kg; data quality (4,2,1,1,4)
- arsenic: 8.20116e-10 kg; data quality (3,2,1,5,1)
- methane, monochloro-, r-40: 7.62401e-9 kg; data quality (3,2,1,1,4)
- 1,2,4-trichlorobenzene: 8.77453e-15 kg; data quality (3,2,1,1,5)
- acrylonitrile: 2.54112e-12 kg; data quality (4,2,1,1,5)
- ethane, 1,2-dibromo-: 2.41909e-13 kg; data quality (2,2,1,1,4)
- benzo(a)pyrene: 1.09859e-10 kg; data quality (2,2,1,2,3)
- 2,2,4-trimethylpentane: 2.47781e-7 kg; data quality (3,2,1,4,1)
- methanol: 8.59913e-8 kg; data quality (4,2,1,1,4)
- Titanium: 4.77962e-11 kg; data quality (5,2,1,1,1)
- diethanolamine: 2.12623e-10 kg; data quality (3,2,1,1,5)
- carbonyl sulfide: 4.34632e-7 kg; data quality (4,2,1,1,4)
- Phthalate, dibutyl-: 8.48749e-12 kg; data quality (4,2,1,1,5)
- ammonia: 2.38665e-6 kg; data quality (3,2,1,2,3)
- 1,1-DICHLOROETHYLENE: 7.40116e-14 kg; data quality (3,2,1,1,1)
- hydrogen fluoride: 9.96982e-11 kg; data quality (2,2,1,1,4)
- anthracene: 5.30757e-10 kg; data quality (3,2,1,2,3)
- Benzo(a)anthracene: 2.35256e-13 kg; data quality (2,2,1,1,4)
- Cobalt: 1.07547e-12 kg; data quality (4,1,1,1,4)
- cadmium: 3.5943e-10 kg; data quality (3,2,1,1,4)
- ethane, 1,2-dichloro-: 2.042e-13 kg; data quality (3,2,1,1,2)
- 1,4-dioxane: 2.87934e-10 kg; data quality (4,2,1,1,5)
- formic acid: 1.86416e-15 kg; data quality (3,1,1,1,4)
- arsenic: 1.663e-12, 1.3296e-11 kg (2 entries, compartments not in this file); data quality (2,1,1,1,4)
- 4,4'-METHYLENEDIANILINE: 1.64727e-12 kg; data quality (4,2,1,1,5)
- 1,3-PHENYLENEDIAMINE: 8.69355e-15 kg; data quality (4,1,1,1,4)
- chlorine: 7.03375e-8 kg; data quality (4,2,1,1,4)
- mercury: 1.38864e-8 kg; data quality (2,2,1,1,4)
- sulfur dioxide: 9.18533e-5 kg; data quality (2,2,1,1,4)
- acrolein: 7.69202e-8 kg; data quality (3,2,1,4,1)
- 3-methylcholanthrene: 2.64662e-14 kg; data quality (2,2,1,1,4)
- QUINOLINE: 1.53349e-11 kg; data quality (3,2,1,1,1)
- methylene diphenyl diisocyanate: 4.33754e-10 kg; data quality (4,2,1,1,5)
- vinyl acetate: 3.79517e-14 kg; data quality (4,2,1,1,5)
- toluene-2,4-diisocyante: 2.8254e-12 kg; data quality (2,1,1,1,4)
- 1,2-DICHLOROETHYLENE: 2.5646e-11 kg; data quality (5,1,1,1,4)
- Dimethipin: 1.06496e-11 kg; data quality (5,1,1,1,4)
- chloroform: 3.39177e-10 kg; data quality (4,2,1,1,4)
- Diethylene glycol butyl ether: 9.91771e-13 kg; data quality (3,2,1,1,5)
- Anthracene: 2.95086e-10 kg; data quality (4,1,1,1,3)
- tertiary-Butyl Acetate: 7.57688e-10 kg; data quality (3,2,1,1,5)
- acetophenone: 2.49065e-10 kg; data quality (4,2,1,1,4)
- VOC, volatile organic compounds: 0.00037562 kg; data quality (3,2,1,1,3)
- Water, fresh: 0.0347399 m3; data quality (4,2,1,4,2)
- 2-ethoxyethyl acetate: 2.26343e-15 kg; data quality (5,2,1,1,4)
- Chrysene: 2.36388e-10 kg; data quality (2,2,1,2,3)
- methane, bromo-, halon 1001: 4.38294e-11 kg; data quality (3,2,1,1,1)
- lead: 3.38398e-11, 5.5762e-11 kg (2 entries, compartments not in this file); data quality (3,1,1,1,3)
- trichloroethylene: 4.11039e-10 kg; data quality (4,2,1,1,3)
- phenanthrene: 7.96128e-9 kg; data quality (3,2,1,3,2)
- p-cresol: 2.25942e-9 kg; data quality (4,2,1,1,4)
- benzene, ethyl-: 7.39456e-7 kg; data quality (4,2,1,2,3)
- 2,4/2,6-toluenediisocyanate (mixture): 8.46534e-11 kg; data quality (4,1,1,1,4)
- Benzo(g,h,i)perylene: 5.48019e-10, 4.21551e-15 kg (2 entries, compartments not in this file); data quality (2,1,1,1,3)
- nitric acid: 6.78875e-10 kg; data quality (3,1,1,1,4)
- Chromium, ion: 5.32879e-9 kg; data quality (2,2,1,1,4)
- methyl methacrylate: 7.73231e-8 kg; data quality (3,1,1,1,3)
- Nitrogen: 3.76838e-5 kg; data quality (5,2,1,1,5)
- acenaphthylene: 2.79941e-9 kg; data quality (3,2,1,3,2)
- Chromium VI: 2.94087e-10 kg; data quality (3,2,1,1,4)
- Cobalt: 8.34946e-11 kg; data quality (3,2,1,1,3)
- 3,3'-dimethylbenzidine: 4.34778e-15 kg; data quality (1,2,1,1,5)
- nickel: 5.77972e-9 kg; data quality (3,2,1,1,2)
- 2-methylnaphthalene: 1.91396e-9 kg; data quality (2,2,1,1,1)
- ammonia: 5.17423e-11 kg; data quality (3,1,1,1,4)
- Sulfur hexafluoride: 5.17014e-10 kg; data quality (4,2,1,4,1)
- fluoranthene: 6.60691e-10 kg; data quality (3,2,1,3,2)
- propanal: 2.3479e-7 kg; data quality (3,2,1,4,1)
- Propene, 1,3-dichloro-: 1.14193e-12 kg; data quality (3,2,1,1,4)
- biphenyl: 3.86748e-11 kg; data quality (4,2,1,1,3)
- nitrogen oxides: 0.000485935 kg; data quality (3,2,1,1,1)
- phthalate, dioctyl-: 4.19741e-11 kg; data quality (3,2,1,1,4)
- mercury: 4.29328e-15 kg; data quality (3,1,1,1,3)
- diisocyanates: 9.99244e-10 kg; data quality (4,1,1,1,4)
- Phosphorus: 2.14075e-5 kg; data quality (2,1,1,1,5)
- PHOSPHORUS: 2.07592e-9 kg; data quality (2,2,1,1,2)
- cumene: 4.53909e-8 kg; data quality (4,2,1,1,4)
- acetaldehyde: 1.20078e-6 kg; data quality (3,2,1,4,1)
- Aluminum: 9.10903e-11 kg; data quality (4,1,1,1,5)
- styrene: 6.58487e-8 kg; data quality (4,2,1,2,3)
- Carbon dioxide: 0.626019 kg; data quality (4,2,1,4,1)
- Methane, dichloro-, HCC-30: 4.56411e-11 kg; data quality (5,1,1,1,4)
- particulates, < 10 um: 1.69144e-5 kg; data quality (3,2,1,1,4)

## Inventory method
Input-output

## Modelling constants
The reference unit of all processes is 1 USD2013 of the good or service. The technosphere inputs are based on the US BEA detailed input-output tables for 2007. The IO tables are combined to develop a commodity-by-commodity model based on the the industry-technology assumption (see Suh et al., 2010), which assumes all commodities produced by a given industry have the same input structure, but that multiple industries can produce the same commodity. Thus, model technosphere flows represent commodity outputs (and not industry outputs) from other processes in the model. There are no by-products included in these processes. All commodity production is based on US-conditions, despite in reality that some goods and services are produced overseas, as USEEIO v1.1 is a single-region IO model.

## Completeness
The input-output approach assures that all purchased inputs associated with the sectors making these commodities as reported in the US census for 2007 are included. The direct resources extracted including minerals, energy sources, water and land occupied are included. Emissions to air include all critieria air pollutants, greenhouse gases, and hazardous and toxic air pollutants as defined by US EPA. Releases to water include toxics, total nitrogen and total phosphorus, and water discharges. Releases to soil or groundwater include toxics and agriculutural pesticides. Some metal releases to air, water and soil are not included because they could not be speciated. Solid hazardous and non-hazardous wastes generated are not included as an elementary flows although purchases of waste services are included.

## Data treatment
Greenhouse gases are primarily from the US Greenhouse Gas Emission Inventory (USEPA 2016a). Biogenic C uptake is not included (change from version 1.0), as biogenic C emission are not included. Toxic releases to air, water and soil (except pesticides) are from the 2013 Toxic Release Inventory (USEPA 2015a). Criteria air pollutants and hazardous air pollutants are from the 2011 National Emissions Inventory (USEPA 2015b). All estimates are normalized by industry based on sector output in the data year, then converted to 2013 USD using relative sector-specific CPIs (if data year is not 2013). Energy use represent raw renewables or fossil fuel energies and is based on EIA data for 2014. See Table 1 in Yang, Ingwersen et al. 2017 and Supporting Information 1, and the v1.1 data update notes (Ingwersen et al. 2017) for all details on environmental data sources used.Land occupation associated with manufacturing buildings was estimated based on the building floorspace data provided by the U.S. Energy Information Administration in the 2010 Manufacturing Energy Consumption Survey (EIA 2013). Portions of total renewable energy (EIA 2016) based on EIA-923 reports for 2014 (EIA 2017) are included. Nitrogen and Phosphorus releases are modeled in total N and total P equivalents as estimated by the Discharge Monitoring Report Nutrient Loading tool (USEPA 2016b). Self-supplied withdrawals were assigned to industrial sectors based on water use statistics for Canadian industries by NAICS 3-digit sector scaled to US production levels based on gross domestic product by industry (BEA 2015; Statistics Canada 2010), and further disaggregated to the manufacturing sectors based on compensation of employees as provided by the 2007 IO tables (BEA 2015). Water withdrawals associated with public supply were allocated to sectors based on their use of water, sewage, and other services in USD based on the IO tables (BEA 2015). Portions of total renewable energy (EIA 2016) by type are assigned to sectors (hydro, wind, solar, or) based on EIA-923 reports for 2014 (EIA 2017).

## Data collection
2015-2016

## Sampling procedure
US federal government sources, including surveys and US EPA emissions databases are used as the primary sources. From these sources, data for US reporting establishments/facilities are aggregated by the NAICS sector as defined in the BEA detailed 2007 input-output tables. When level of sector aggregation differs, or when direct emissions are not reported but modeled, additional sources are used to make allocations and estimates.

## Review details
In regard to quality assurance and peer-review, each dataset created went through Quality Assurance as defined in a quality assurance project plans at US EPA, CSRA or ERG. The model was assembled with the IO model builder model (USEPA 2016c). Validation functions were used to check that all the model components were properly assembled and harmonized. Bayou Demeke and Santosh Ghimire provided internal peer review of the model methodology and the manuscript underwent standard EPA management review. An editor and two anonymous reviewers at the Journal of Cleaner Production reviewed the model. In regard to data quality evaluation, data quality assessment was performed at the flow and process levels according to the updated US EPA data quality assessment guidelines as defined in US EPA (2016b).

## Intended application
The primary application is for use in the US Environmentally-Extended Input-Ouput model, USEEIO, version 1.1. This model is being used by the US EPA for supporting tools that prioritize goods and services based on potential environmental impacts, resource use or emissions for large regions, including the US and US states, and as a strealined tool for organizations as a starting point to consider sustainable materials management. Model results are designed to provide meso/macro-level decision support.

## Project
USEEIO v1.1 was developed by the US EPA with CSRA and ERG with Wesley W. Ingwersen and David E. Meyer as research leads. Yi Yang was the technical lead on the work for CSRA (contract EP-C-15-012); Troy Hawkins was lead for ERG (contract EP-C-12-021).

## Sources
- Kim et el. 2013
- Ingwersen et al. 2017
- Maupin et al. 2014
- Goebes et al. 2003
- USGS 2016
- EIA 2017
- EIA 2015
- USEPA 2016a
- Blackhurst et al. 2010
- Nickerson et al. 2011
- USEPA 2016b
- Edelen and Ingwersen 2017
- Torcellini et al. 2003
- USDA 2009a
- Statistics Canada 2010
- USEPA 2015a
- USDA 2009b
- Lovelace 2009
- EIA 2016
- Macknick et al. 2011
- USEPA 2015b
- USDA 2016
- USGS 2015
- USEPA 2016c
- BEA 2015
- EIA 2013
- BLM 2008
- USDA 2014
- Ingwersen et al. DRAFT
- USDA 2006
- Yienger et al. 1995
