# Computer systems design

Dataset: openLCA process, unit process
Category: 5415: Computer Systems Design and Related Services
Geography: United States
Time period: 2017-01-01 to 2017-12-31
Data quality: US EPA - Process Pedigree Matrix (1;1)
Exchange data quality scheme: US EPA - Flow Pedigree Matrix
Generated by: US EPA with CSRA and ERG
Owner: US EPA
Published in: Yang, Ingwersen et al. 2017
restrictionsDescription: This model shold be appropriately cited (see Yang, Ingwersen et al. 2017 source or Publication field) when used. Any changes or derivations of this model by the user should be documented. The model itself and any results from use of this model shall not be construed to consitute US EPA opinion or policy.
copyright: false

## General comment
BEA Code & Name is '541512:Computer systems design services'. Description of the primary industry producing this good or service, adapted from the Census Bureau NAICS 2007 descriptions: This U.S. industry comprises establishments primarily engaged in planning and designing computer systems that integrate computer hardware, software, and communication technologies. The hardware and software components of the system may be provided by this establishment or company as part of integrated services or may be provided by third parties or vendors. These establishments often install the system and train and support users of the system.

## Technology
The process describes the average US production of this good or service within this NAICS-based grouping defined in the BEA 2007 detailed input-output tables (BEA 2015). Distribution, wholesale and retailing of this good or service, use, and final disposal are not included. Creation of a product system with this process will enable modeling of all upstream (supply-chain) activities.

## Geography
Data represent the 50 US states

## Time period
2017 was the year in which this version of USEEIO was released and is the target date for the model

## Reference product
- Computer systems design: 1 USD

## Inputs from technosphere
All rows: data quality (1,3,1,1,1)
- Dimensional stone; at mine: 3.57332e-6 USD
- Ink and ink cartridges; at manufacturer: 2.86371e-5 USD
- Speed changers, industrial high-speed drives, and gears; at manufacturer: 3.24635e-6 USD
- Air transport: 0.0061394 USD
- Securities and commodities brokerage and exchanges: 0.00130749 USD
- Movies and film: 9.81974e-5 USD
- Cardboard; at manufacturer: 0.000215033 USD
- Gaskets, seals, musical instruments, fasteners, brooms, brushes, mop and other misc. goods; at manufacturer: 0.000215545 USD
- Internet publishing and broadcasting: 0.000437268 USD
- Asphalt shingles; at manufacturer: 1.16775e-7 USD
- Power boilers and heat exchangers; at manufacturer: 1.90758e-5 USD
- Other textiles; at manufacturer: 2.56905e-7 USD
- Lessors of nonfinancial intangible assets: 0.00321455 USD
- Printed circuit and electronic assembly; at manufacturer: 0.000572229 USD
- Vehicle engines and engine parts; at manufacturer: 1.20477e-5 USD
- Wholesale trade: 0.00470728 USD
- Computer storage device readers; at manufacturer: 8.62641e-5 USD
- Light bulbs; at manufacturer: 1.49365e-7 USD
- Satellite, telecommunications resellers, and all other telecommunications: 0.000846171 USD
- Warehousing: 0.000397902 USD
- Relay and industrial controls; at manufacturer: 1.78058e-6 USD
- Asphalt pavement; at manufacturer: 1.63485e-7 USD
- Fabricated pipe and pipe fittings; at manufacturer: 0.000171332 USD
- Nondepository credit intermediation and related activities: 0.000786214 USD
- Semiconductors; at manufacturer: 0.000954773 USD
- Magazines and journals; at publisher: 0.000177425 USD
- Electronic equipment repair and maintenance: 0.00125123 USD
- Transmission and power train parts; at manufacturer: 1.12743e-5 USD
- Wooden windows, door, and flooring; at manufacturer: 2.31215e-6 USD
- Monetary authorities and depository credit intermediation: 0.0168533 USD
- Sand, gravel, clay, phosphate, other nonmetallic minerals; at mine: 1.91511e-6 USD
- Facilities support: 0.00236381 USD
- Light fixtures; at manufacturer: 9.62471e-5 USD
- Sports: 0.000543138 USD
- Vehicle repair: 0.00116591 USD
- Abrasive products; at manufacturer: 2.3355e-8 USD
- Watches, clocks, and other measuring and controlling devices; at manufacturer: 0.000225991 USD
- Pet care, photofinishing, parking and other sundry services: 1.68472e-5 USD
- Insurance carriers: 0.00467468 USD
- Concrete pipe, bricks, and blocks; at manufacturer: 1.15374e-5 USD
- Sporting and athletic goods; at manufacturer: 9.35108e-6 USD
- Wireless telecommunications: 0.00393701 USD
- Vaccines and other biological medical products; at manufacturer: 8.85156e-6 USD
- Fluid meters and counting devices; at manufacturer: 8.17426e-7 USD
- Rail transport: 3.39322e-5 USD
- Air conditioning, refrigeration, and warm air heating equipment; at manufacturer: 0.00101016 USD
- Mining and oil/gas field machinery; at manufacturer: 2.73254e-6 USD
- Other support services: 0.00335511 USD
- Postal service: 0.00137321 USD
- Metal windows, doors, and architectural products; at manufacturer: 0.00322332 USD
- Stationery; at manufacturer: 1.94748e-5 USD
- Iron, gold, silver, and other metal ores; at mine: 7.94071e-7 USD
- Books; at publisher: 4.07926e-7 USD
- Commercial equipment rental: 0.000343474 USD
- Mechanical power transmission equipment; at manufacturer: 2.75589e-6 USD
- Communication and energy wire and cable; at manufacturer: 0.00375168 USD
- Polystyrene foam products; at manufacturer: 0.000219305 USD
- Greenhouse crops, mushrooms, nurseries, and flowers; at farm: 6.1003e-7 USD
- Audio and video equipment; at manufacturer: 2.44915e-6 USD
- Other basic organic chemicals; at manufacturer: 4.3618e-5 USD
- Plastic bottles; at manufacturer: 1.0046e-5 USD
- Medicinal and botanical ingredients; at manufacturer: 1.75163e-6 USD
- All other forging, stamping, and sintering; at manufacturer: 4.27397e-6 USD
- Synthetic rubber and artificial and synthetic fibers; at manufacturer: 2.19537e-6 USD
- Independent artists, writers, and performers: 0.000183205 USD
- Specialty transformers; at manufacturer: 6.46466e-8 USD
- Lumber and treated lumber; at manufacturer: 1.49472e-6 USD
- Directory, mailing list, and other publishers; at publisher: 2.28097e-5 USD
- Other rubber products; at manufacturer: 0.000166675 USD
- Heating equipment other than warm air furnaces; at manufacturer: 2.96609e-6 USD
- Nonresidential building repair and maintanence: 0.000183442 USD
- Civic, social, professional, and similar organizations: 0.00126499 USD
- Veneer, plywood, and engineered wood; at manufacturer: 3.88744e-5 USD
- Valve and fittings (except for plumbing); at manufacturer: 0.000673642 USD
- Welding and Soldering Equipment, Scales and Balances, and other general purpose machinery; at manufacturer: 2.3355e-8 USD
- Metal pipe fittings, ball and roller bearings, industrial patterns, metal bath fixtures, other misc. fabricated metals; at manufacturer: 0.000347611 USD
- Paints and coatings; at manufacturer: 3.947e-6 USD
- Other vehicle parts; at manufacturer: 1.5275e-5 USD
- Buildings and dwellings services: 0.00268694 USD
- Insurance agencies and brokerages: 4.2827e-5 USD
- Vehicle metal stamping; at manufacturer: 1.47137e-6 USD
- Machinery for the paper, textile, food or other industries (except semiconductor machinery); at manufacturer: 5.83446e-7 USD
- Coal; at mine: 2.19431e-7 USD
- Metal coatings, engravings, and heat treatments; at manufacturer: 6.74047e-5 USD
- Business support: 0.00308401 USD
- Paper; at manufacturer: 0.000115863 USD
- Jewelry and silverware; at manufacturer: 3.25903e-8 USD
- Consumer goods and general rental centers: 8.04383e-5 USD
- Compressed Gases; at manufacturer: 0.000209516 USD
- Motors and generators; at manufacturer: 5.62856e-6 USD
- Material handling equipment; at manufacturer: 3.84645e-5 USD
- Industrial molds; at manufacturer: 3.10622e-6 USD
- Communications equipment; at manufacturer: 2.84763e-5 USD
- Cardboard containers; at manufacturer: 0.000220733 USD
- Propulsion units and parts for space vehicles and guided missiles; at manufacturer: 1.49472e-6 USD
- Computer terminals and other computer peripheral equipment; at manufacturer: 0.000818327 USD
- Office supplies (not paper); at manufacturer: 3.94836e-5 USD
- Full-service restaurants: 0.00839587 USD
- Surgical appliance and supplies; at manufacturer: 2.98944e-6 USD
- Cutting and machine tool accessory, rolling mill, and other metalworking machines; at manufacturer: 7.8555e-7 USD
- Industrial process variable instruments; at manufacturer: 6.26587e-5 USD
- Primary copper; at manufacturer: 3.87694e-6 USD
- Couriers and messengers: 0.00116952 USD
- Rubber tires; at manufacturer: 1.17657e-5 USD
- Natural gas; at consumer: 3.16016e-5 USD
- Colleges, universities, junior colleges, and professional schools: 0.000196723 USD
- Household goods repair: 0.000943334 USD
- Springs and wires; at manufacturer: 0.000106645 USD
- Truck transport: 0.000717495 USD
- Scientific research and development: 0.000527724 USD
- Electronic capacitors, resistors, coils, transformers, connectors and other components (except semiconductors and printed circuit assemblies); at manufacturer: 0.00214483 USD
- Storage batteries; at manufacturer: 0.000783088 USD
- Electricity; at consumer: 0.00187139 USD
- Primary iron, steel, and ferroalloy products; at manufacturer: 2.34251e-5 USD
- Pharmaceutical products (pills, powders, solutions, etc.); at manufacturer: 3.80816e-5 USD
- Vehicle rental and leasing: 0.000779941 USD
- Commercial machinery repair: 0.0026044 USD
- External hard drives, CDs, other storage media; at manufacturer: 0.000214991 USD
- Performances: 0.000200552 USD
- Other plastic products; at manufacturer: 0.00110529 USD
- Printing support; at manufacturer: 1.3952e-5 USD
- General merchandise stores: 1.96089e-5 USD
- Specialized design: 0.00885942 USD
- Hotels and campgrounds: 0.00739132 USD
- Investigation and security: 0.0018598 USD
- Legal services: 0.00906053 USD
- Scenic and sightseeing transportation and support activities for transportation: 0.000857923 USD
- Laminated plastic plates and shapes; at manufacturer: 0.000105641 USD
- Plastics; at manufacturer: 0.0001239 USD
- Motor vehicle steering, suspension components (except spring), and brake systems; at manufacturer: 1.06241e-5 USD
- Books, newspapers, magazines, and other print media; at manufacturer: 0.000498122 USD
- Urethane and other foam products; at manufacturer: 4.78325e-5 USD
- Passenger ground transport: 0.00276701 USD
- Other petroleum and coal products; at manufacturer: 0.00012343 USD
- Corn products; at manufacturer: 2.56905e-7 USD
- Photographers: 0.000320961 USD
- Aluminum; at manufacturer: 2.84931e-6 USD
- Architectural, engineering, and related services: 0.0469864 USD
- Newspapers; at publisher: 1.03476e-5 USD
- Water transport (boats, ships, ferries): 2.9163e-5 USD
- Shelving and lockers; at manufacturer: 2.2223e-7 USD
- Clay and ceramic products; at manufacturer: 3.0128e-6 USD
- Computer systems design: 0.00380131 USD
- Toiletries; at manufacturer: 3.50325e-7 USD
- Surgical and medical instruments; at manufacturer: 3.2697e-7 USD
- Company and enterprise management: 0.00820766 USD
- Chemicals (except basic chemicals, agrichemicals, polymers, paints, pharmaceuticals,soaps, cleaning compounds); at manufacturer: 0.000137602 USD
- Gasoline, fuels, and by-products of petroleum refining; at manufacturer: 0.00171942 USD
- Advertising and public relations: 0.0198151 USD
- Data processing and hosting: 0.0034021 USD
- Nonferrous metal casts; at manufacturer: 9.88481e-6 USD
- Environmental and other technical consulting services: 0.00295091 USD
- Unrefined oil and gas; at extraction site: 1.08916e-5 USD
- Cutlery and handtools; at manufacturer: 5.0529e-7 USD
- Vehicle electrical and electronic equipment; at manufacturer: 1.76438e-6 USD
- Pipeline transport: 9.75929e-6 USD
- Other retail: 0.000127688 USD
- Metal structural products; at manufacturer: 0.000850228 USD
- All other food and drinking places: 0.00117897 USD
- Cement; at manufacturer: 2.75589e-6 USD
- Copper, nickel, lead, and zinc; at mine: 3.05951e-6 USD
- Employment services: 0.0188054 USD
- Switchgear and switchboards; at manufacturer: 6.55521e-6 USD
- Travel arrangement and reservation: 0.000586644 USD
- Other primary nonferrous metals; at manufacturer: 3.71345e-6 USD
- State and local government enterprises: 0.000196512 USD
- Mineral wool; at manufacturer: 6.53941e-7 USD
- News syndicates, libraries, archives, Internet publishing and all other information services: 8.26311e-5 USD
- Wireless communications; at manufacturer: 0.000153165 USD
- Food and beverage stores: 9.4445e-6 USD
- Ready-mix concrete; at manufacturer: 1.5391e-5 USD
- Lime and gypsum products; at manufacturer: 0.000314214 USD
- Paper bags and coated paper; at manufacturer: 7.90789e-5 USD
- Other engine equipment; at manufacturer: 2.31215e-6 USD
- Synthetic dyes and pigments; at manufacturer: 1.66234e-7 USD
- Other concrete products; at manufacturer: 1.40921e-5 USD
- Automatic controls for HVAC and refrigeration equipment; at manufacturer: 0.000114305 USD
- Other computer related services, including facilities management: 0.00915336 USD
- Waste management and remediation: 0.000601518 USD
- Blood sugar, pregnancy, and other diagnostic test kits; at manufacturer: 9.53792e-6 USD
- Sugar, candy, and chocolate; at manufacturer: 7.00651e-8 USD
- Glass and glass products; at manufacturer: 4.00465e-6 USD
- Air purification and ventilation equipment; at manufacturer: 0.00197203 USD
- Golf courses, marinas, ski resorts, fitness and other rec centers and industries: 0.00131121 USD
- Plastic bags, films, and sheets; at manufacturer: 2.16557e-5 USD
- Office administration: 0.00515876 USD
- Metal hinges, keys, lock, and other hardware; at manufacturer: 5.86876e-5 USD
- Dry-cleaning and laundry: 2.94083e-5 USD
- Carbon and graphite products; at manufacturer: 8.59364e-5 USD
- Adhesives; at manufacturer: 5.59453e-8 USD
- Screws, nuts, and bolts; at manufacturer: 8.75614e-6 USD
- Construction machinery; at manufacturer: 5.53514e-6 USD
- Management consulting: 0.0074196 USD
- Vehicles and parts sales: 1.0106e-5 USD
- Telecommunications: 0.00643382 USD
- Other real estate: 0.0208667 USD
- Limited-service restaurants: 0.0067767 USD
- Promoters and agents: 5.69745e-5 USD
- Semiconductor machinery; at manufacturer: 0.000178616 USD
- Drinking water and wastewater treatment; at consumer: 5.96326e-5 USD
- Accounting, tax preparation, bookkeeping, and payroll: 0.0084982 USD
- Marketing research and all other miscellaneous professional, scientific, and technical services: 0.00375346 USD
- Investment advice, portfolio management, and other financial advising services: 0.000631432 USD
- Noncomparable imports: 0.00411069 USD
- Machine shops; at manufacturer: 0.000122865 USD
- Soap and cleaning compounds; at manufacturer: 5.77777e-5 USD
- Analytical laboratory instruments; at manufacturer: 0.0002179 USD
- Software: 0.00392468 USD
- Plastic pipe, fittings, and sausage casings; at manufacturer: 0.000476575 USD

## Inputs from nature
- Occupation, urban, discontinuously built: 0.000292212 m2*a; data quality (4,2,1,1,1)
- Water, fresh: 1.95435e-5, 3.3822e-5 m3 (2 entries, compartments not in this file); data quality (1,2,1,4,2)

## Emissions to nature
- pyrene: 2.051e-11 kg; data quality (3,2,1,4,1)
- Ethane, pentafluoro-, HFC-125: 1.87953e-7 kg; data quality (4,2,1,4,1)
- acetophenone: 7.45265e-22 kg; data quality (4,2,1,1,5)
- cyanide: 1.95244e-12 kg; data quality (3,2,1,1,5)
- Dinitrogen monoxide: 3.6595e-9 kg; data quality (4,2,1,4,1)
- acenaphthylene: 6.1154e-11 kg; data quality (3,2,1,4,1)
- Methane, difluoro-, HFC-32: 1.09455e-7 kg; data quality (4,2,1,4,1)
- Phthalate, dibutyl-: 5.61942e-13 kg; data quality (4,2,1,1,5)
- Hydrocarbons, aromatic: 4.51396e-10 kg; data quality (3,2,1,4,1)
- particulates, < 10 um: 1.24476e-8 kg; data quality (3,2,1,2,3)
- Ethane, 1,1,1,2-tetrafluoro-, HFC-134a: 7.08417e-7 kg; data quality (4,2,1,4,1)
- ethene, tetrachloro-: 2.11324e-10 kg; data quality (3,2,1,1,5)
- ethylene glycol: 1.48335e-11 kg; data quality (5,2,1,1,5)
- nitrogen oxides: 1.44114e-6 kg; data quality (3,2,1,1,2)
- Water, fresh: 4.51853e-5 m3; data quality (1,2,1,4,2)
- t-butyl methyl ether: 3.29878e-12 kg; data quality (3,2,1,1,5)
- fluorene: 2.94619e-11 kg; data quality (3,2,1,4,1)
- Chrysene: 1.79892e-12 kg; data quality (3,2,1,4,1)
- ethane, 1,1,2-trichloro-: 8.86209e-16 kg; data quality (4,2,1,1,5)
- phenanthrene: 5.35372e-11 kg; data quality (3,2,1,4,1)
- Propene, 1,3-dichloro-: 7.37825e-16 kg; data quality (3,2,1,1,5)
- bromoform: 2.48508e-17 kg; data quality (3,2,1,1,5)
- hexane: 1.48706e-8 kg; data quality (3,2,1,4,1)
- lead: 1.33318e-12 kg; data quality (3,2,1,1,5)
- Benzo(b)fluoranthene: 1.86079e-12 kg; data quality (3,2,1,4,1)
- 1,4-dichlorobenzene: 1.07199e-14 kg; data quality (2,2,1,1,5)
- methane, bromo-, halon 1001: 2.5596e-16 kg; data quality (3,2,1,1,5)
- trichloroethylene: 3.48066e-17 kg; data quality (4,2,1,1,5)
- antimony: 1.29686e-14 kg; data quality (3,2,1,1,5)
- VOC, volatile organic compounds: 1.08479e-6 kg; data quality (3,2,1,1,1)
- Nitrogen: 3.17114e-11 kg; data quality (5,2,1,1,5)
- o-Xylene: 7.63408e-10 kg; data quality (3,2,1,4,1)
- PHOSPHORUS: 1.79202e-13 kg; data quality (2,2,1,1,5)
- Diethylene glycol butyl ether: 4.83821e-13 kg; data quality (4,2,1,1,5)
- 1,1,1-trichloroethane: 4.32864e-17 kg; data quality (4,2,1,1,5)
- 1,1-DICHLOROETHYLENE: 6.03677e-17 kg; data quality (3,2,1,1,5)
- 3-methylcholanthrene: 4.62971e-16 kg; data quality (2,2,1,1,5)
- 4-nitrophenol: 2.56185e-20 kg; data quality (2,2,1,1,5)
- nickel: 1.31985e-11 kg; data quality (3,2,1,3,3)
- Benzo(g,h,i)perylene: 4.819e-12 kg; data quality (3,2,1,4,1)
- cumene: 3.64101e-14 kg; data quality (4,2,1,1,5)
- Ethane, 1,1,1-trifluoro-, HFC-143a: 8.04171e-8 kg; data quality (4,2,1,4,1)
- ethane, 1,2-dichloro-: 3.09e-15 kg; data quality (3,2,1,1,5)
- Benzo(a)anthracene: 3.9796e-15 kg; data quality (2,2,1,1,5)
- benzene, ethyl-: 1.58563e-8 kg; data quality (3,2,1,4,1)
- cadmium: 3.20874e-12 kg; data quality (3,2,1,1,5)
- para-xylene: 3.98083e-11 kg; data quality (3,2,1,4,1)
- benzo(a)pyrene: 1.75089e-12 kg; data quality (3,2,1,4,1)
- Chromium, ion: 4.00792e-12 kg; data quality (3,2,1,4,2)
- 2-methylnaphthalene: 6.1876e-14 kg; data quality (2,2,1,1,5)
- acenaphthene: 1.58539e-11 kg; data quality (3,2,1,4,1)
- propanal: 2.2545e-9 kg; data quality (3,2,1,4,1)
- methyl isobutyl ketone: 2.66545e-12 kg; data quality (4,2,1,1,5)
- Chromium VI: 1.2454e-12 kg; data quality (3,2,1,3,3)
- 2,2,4-trimethylpentane: 2.25593e-8 kg; data quality (3,2,1,4,1)
- particulates, < 2.5 um: 1.14359e-7 kg; data quality (3,2,1,3,2)
- toluene: 6.1441e-8 kg; data quality (3,2,1,4,1)
- Xylene: 5.17934e-8 kg; data quality (3,2,1,4,1)
- phthalate, dioctyl-: 1.09461e-20 kg; data quality (3,2,1,1,5)
- sulfur dioxide: 1.81254e-8 kg; data quality (2,2,1,2,4)
- beryllium: 1.67664e-13 kg; data quality (2,2,1,1,5)
- m-xylene: 2.12702e-9 kg; data quality (3,2,1,4,1)
- benzene: 4.04898e-8 kg; data quality (3,2,1,4,1)
- Benzo(k)fluoranthene: 1.79044e-12 kg; data quality (3,2,1,4,1)
- hydrogen chloride: 9.07829e-12 kg; data quality (2,2,1,1,5)
- benz[a]anthracene: 1.84978e-12 kg; data quality (3,2,1,4,1)
- methanol: 1.26753e-10 kg; data quality (4,2,1,1,5)
- Ethene, chloro-: 4.8648e-15 kg; data quality (3,2,1,1,5)
- pentachlorophenol: 1.18777e-20 kg; data quality (3,2,1,1,5)
- chloroform: 2.4363e-11 kg; data quality (4,2,1,1,5)
- carbon tetrachloride: 1.09978e-15 kg; data quality (4,2,1,1,5)
- hydrogen fluoride: 1.94971e-12 kg; data quality (2,2,1,1,5)
- chlorine: 6.27322e-17 kg; data quality (4,2,1,1,5)
- 1,1,2,2-tetrachloroethane: 1.7926e-14 kg; data quality (3,2,1,1,5)
- biphenyl: 6.91819e-14 kg; data quality (4,2,1,1,5)
- monochloroethane: 6.09684e-16 kg; data quality (3,2,1,1,5)
- benzene, chloro-: 1.54799e-12 kg; data quality (4,2,1,1,5)
- acetaldehyde: 1.03397e-8 kg; data quality (3,2,1,4,1)
- Dibenz(a,h)anthracene: 2.95478e-14 kg; data quality (2,2,1,2,3)
- methane, monochloro-, r-40: 3.12143e-16 kg; data quality (3,2,1,1,5)
- phenol: 8.91627e-14 kg; data quality (4,2,1,1,5)
- ammonia: 6.35211e-9 kg; data quality (3,2,1,3,3)
- methane, dichloro-, hcc-30: 9.85687e-10 kg; data quality (4,2,1,1,5)
- arsenic: 4.08384e-12 kg; data quality (3,2,1,4,2)
- manganese: 4.08444e-11 kg; data quality (3,2,1,1,5)
- naphthalene: 1.39403e-9 kg; data quality (3,2,1,4,1)
- selenium: 7.33479e-13 kg; data quality (2,2,1,1,5)
- fluoranthene: 1.65661e-11 kg; data quality (3,2,1,4,1)
- Propane, 1,1,1,3,3,3-hexafluoro-, HCFC-236fa: 2.17249e-9 kg; data quality (4,2,1,4,1)
- mercury: 2.0068e-13 kg; data quality (2,2,1,2,4)
- acrolein: 8.32008e-10 kg; data quality (3,2,1,4,1)
- formaldehyde: 2.22312e-8 kg; data quality (3,2,1,4,1)
- ethane, 1,2-dibromo-: 1.28335e-15 kg; data quality (2,2,1,1,5)
- 2,4-dinitrophenol: 4.19211e-20 kg; data quality (5,2,1,1,5)
- Cobalt: 2.21121e-13 kg; data quality (3,2,1,1,5)
- Propane, 1,2-dichloro-: 1.84583e-15 kg; data quality (4,2,1,1,5)
- carbon monoxide: 2.41564e-5 kg; data quality (3,2,1,1,1)
- Phosphorus: 1.0507e-11 kg; data quality (2,1,1,1,5)
- Carbon dioxide: 0.000527482 kg; data quality (4,2,1,4,1)
- styrene: 6.1906e-10 kg; data quality (3,2,1,4,1)
- anthracene: 1.21827e-11 kg; data quality (3,2,1,4,1)
- acetonitrile: 1.55684e-10 kg; data quality (3,2,1,1,5)
- Indeno(1,2,3-cd)pyrene: 1.48817e-12 kg; data quality (3,2,1,4,1)
- nitric acid: 2.15933e-12 kg; data quality (3,1,1,1,5)
- butadiene: 6.54745e-9 kg; data quality (3,2,1,4,1)
- propylene oxide: 1.85708e-13 kg; data quality (3,2,1,1,5)
- Methane: 5.27562e-8 kg; data quality (4,2,1,4,1)

## Inventory method
Input-output

## Modelling constants
The reference unit of all processes is 1 USD2013 of the good or service. The technosphere inputs are based on the US BEA detailed input-output tables for 2007. The IO tables are combined to develop a commodity-by-commodity model based on the the industry-technology assumption (see Suh et al., 2010), which assumes all commodities produced by a given industry have the same input structure, but that multiple industries can produce the same commodity. Thus, model technosphere flows represent commodity outputs (and not industry outputs) from other processes in the model. There are no by-products included in these processes. All commodity production is based on US-conditions, despite in reality that some goods and services are produced overseas, as USEEIO v1.1 is a single-region IO model.

## Completeness
The input-output approach assures that all purchased inputs associated with the sectors making these commodities as reported in the US census for 2007 are included. The direct resources extracted including minerals, energy sources, water and land occupied are included. Emissions to air include all critieria air pollutants, greenhouse gases, and hazardous and toxic air pollutants as defined by US EPA. Releases to water include toxics, total nitrogen and total phosphorus, and water discharges. Releases to soil or groundwater include toxics and agriculutural pesticides. Some metal releases to air, water and soil are not included because they could not be speciated. Solid hazardous and non-hazardous wastes generated are not included as an elementary flows although purchases of waste services are included.

## Data treatment
Greenhouse gases are primarily from the US Greenhouse Gas Emission Inventory (USEPA 2016a). Biogenic C uptake is not included (change from version 1.0), as biogenic C emission are not included. Toxic releases to air, water and soil (except pesticides) are from the 2013 Toxic Release Inventory (USEPA 2015a). Criteria air pollutants and hazardous air pollutants are from the 2011 National Emissions Inventory (USEPA 2015b). All estimates are normalized by industry based on sector output in the data year, then converted to 2013 USD using relative sector-specific CPIs (if data year is not 2013). Energy use represent raw renewables or fossil fuel energies and is based on EIA data for 2014. See Table 1 in Yang, Ingwersen et al. 2017 and Supporting Information 1, and the v1.1 data update notes (Ingwersen et al. 2017) for all details on environmental data sources used.Land occupation for commercial buildings was estimated based on the building floorspace data provided by the U.S. Energy Information Administration 2012 Commercial Building Energy Consumption Survey (CBECS) (EIA 2015). Total commercial public supply water use is reported by USGS (Maupin et al. 2014). Water use is allocated across commercial sectors based on their use of water, sewage, and other services in USD based on the 2007 Benchmark Use Table before redefinitions (BEA 2015).

## Data collection
2015-2016

## Sampling procedure
US federal government sources, including surveys and US EPA emissions databases are used as the primary sources. From these sources, data for US reporting establishments/facilities are aggregated by the NAICS sector as defined in the BEA detailed 2007 input-output tables. When level of sector aggregation differs, or when direct emissions are not reported but modeled, additional sources are used to make allocations and estimates.

## Review details
In regard to quality assurance and peer-review, each dataset created went through Quality Assurance as defined in a quality assurance project plans at US EPA, CSRA or ERG. The model was assembled with the IO model builder model (USEPA 2016c). Validation functions were used to check that all the model components were properly assembled and harmonized. Bayou Demeke and Santosh Ghimire provided internal peer review of the model methodology and the manuscript underwent standard EPA management review. An editor and two anonymous reviewers at the Journal of Cleaner Production reviewed the model. In regard to data quality evaluation, data quality assessment was performed at the flow and process levels according to the updated US EPA data quality assessment guidelines as defined in US EPA (2016b).

## Intended application
The primary application is for use in the US Environmentally-Extended Input-Ouput model, USEEIO, version 1.1. This model is being used by the US EPA for supporting tools that prioritize goods and services based on potential environmental impacts, resource use or emissions for large regions, including the US and US states, and as a strealined tool for organizations as a starting point to consider sustainable materials management. Model results are designed to provide meso/macro-level decision support.

## Project
USEEIO v1.1 was developed by the US EPA with CSRA and ERG with Wesley W. Ingwersen and David E. Meyer as research leads. Yi Yang was the technical lead on the work for CSRA (contract EP-C-15-012); Troy Hawkins was lead for ERG (contract EP-C-12-021).

## Sources
- USEPA 2015b
- Maupin et al. 2014
- USEPA 2015a
- USDA 2014
- USDA 2009b
- EIA 2013
- Yienger et al. 1995
- Statistics Canada 2010
- Ingwersen et al. DRAFT
- Edelen and Ingwersen 2017
- USDA 2016
- USGS 2015
- BEA 2015
- Goebes et al. 2003
- BLM 2008
- USDA 2009a
- EIA 2016
- USEPA 2016c
- USGS 2016
- EIA 2015
- Kim et el. 2013
- EIA 2017
- Ingwersen et al. 2017
- USEPA 2016b
- Torcellini et al. 2003
- USDA 2006
- Nickerson et al. 2011
- Macknick et al. 2011
- Blackhurst et al. 2010
- USEPA 2016a
- Lovelace 2009
