# Breweries and beer; at manufacturer

Dataset: openLCA process, unit process
Category: 3121: Beverage Manufacturing
Geography: United States
Time period: 2017-01-01 to 2017-12-31
Data quality: US EPA - Process Pedigree Matrix (1;1)
Exchange data quality scheme: US EPA - Flow Pedigree Matrix
Generated by: US EPA with CSRA and ERG
Owner: US EPA
Published in: Yang, Ingwersen et al. 2017
restrictionsDescription: This model shold be appropriately cited (see Yang, Ingwersen et al. 2017 source or Publication field) when used. Any changes or derivations of this model by the user should be documented. The model itself and any results from use of this model shall not be construed to consitute US EPA opinion or policy.
copyright: false

## General comment
BEA Code & Name is '312120:Breweries'. Description of the primary industry producing this good or service, adapted from the Census Bureau NAICS 2007 descriptions: This industry comprises establishments primarily engaged in brewing beer, ale, malt liquors, and nonalcoholic beer.

## Technology
The process describes the average US production of this good or service within this NAICS-based grouping defined in the BEA 2007 detailed input-output tables (BEA 2015). Distribution, wholesale and retailing of this good or service, use, and final disposal are not included. Creation of a product system with this process will enable modeling of all upstream (supply-chain) activities.

## Geography
Data represent the 50 US states

## Time period
2017 was the year in which this version of USEEIO was released and is the target date for the model

## Reference product
- Breweries and beer; at manufacturer: 1 USD

## Inputs from technosphere
All rows: data quality (1,3,1,1,1)
- Vehicle electrical and electronic equipment; at manufacturer: 8.27643e-5 USD
- Corn products; at manufacturer: 0.00960066 USD
- Other computer related services, including facilities management: 8.27643e-5 USD
- Cutlery and handtools; at manufacturer: 4.13822e-5 USD
- Electronic equipment repair and maintenance: 0.000413822 USD
- Nonresidential building repair and maintanence: 0.00148976 USD
- Tobacco, cotton, sugarcane, peanuts, sugar beets, herbs and spices, and other crops; at farm: 0.00686944 USD
- Commercial machinery repair: 0.00107594 USD
- Vehicle rental and leasing: 0.000248293 USD
- Employment services: 0.000165529 USD
- Light bulbs; at manufacturer: 0.000124146 USD
- Sugar, candy, and chocolate; at manufacturer: 4.13822e-5 USD
- Commercial equipment rental: 0.000248293 USD
- Household goods repair: 8.27643e-5 USD
- Company and enterprise management: 0.0632733 USD
- Electricity; at consumer: 0.00591765 USD
- Wholesale trade: 0.041796 USD
- Management consulting: 0.000703497 USD
- Cardboard containers; at manufacturer: 0.0380302 USD
- Gasoline, fuels, and by-products of petroleum refining; at manufacturer: 0.00273122 USD
- Natural gas; at consumer: 0.0100145 USD
- Accounting, tax preparation, bookkeeping, and payroll: 0.000703497 USD
- Computer systems design: 0.000165529 USD
- Architectural, engineering, and related services: 0.000206911 USD
- Satellite, telecommunications resellers, and all other telecommunications: 4.13822e-5 USD
- Waste management and remediation: 0.00310366 USD
- Wireless telecommunications: 0.000248293 USD
- Environmental and other technical consulting services: 0.000165529 USD
- Other retail: 0.000124146 USD
- Rail transport: 0.00537968 USD
- Nondepository credit intermediation and related activities: 0.00165529 USD
- Electronic capacitors, resistors, coils, transformers, connectors and other components (except semiconductors and printed circuit assemblies); at manufacturer: 0.000372439 USD
- Printed circuit and electronic assembly; at manufacturer: 0.00293813 USD
- Rubber tires; at manufacturer: 0.000206911 USD
- Unrefined oil and gas; at extraction site: 4.13822e-5 USD
- Metal pipe fittings, ball and roller bearings, industrial patterns, metal bath fixtures, other misc. fabricated metals; at manufacturer: 4.13822e-5 USD
- Warehousing: 0.00136561 USD
- Other petroleum and coal products; at manufacturer: 0.00550383 USD
- Gaskets, seals, musical instruments, fasteners, brooms, brushes, mop and other misc. goods; at manufacturer: 8.27643e-5 USD
- Scenic and sightseeing transportation and support activities for transportation: 4.13822e-5 USD
- General merchandise stores: 4.13822e-5 USD
- Limited-service restaurants: 0.000413822 USD
- Paper bags and coated paper; at manufacturer: 0.000165529 USD
- Pipeline transport: 8.27643e-5 USD
- Consumer goods and general rental centers: 4.13822e-5 USD
- Screws, nuts, and bolts; at manufacturer: 0.00182082 USD
- Specialty transformers; at manufacturer: 0.000124146 USD
- Other textiles; at manufacturer: 4.13822e-5 USD
- Other vehicle parts; at manufacturer: 0.00306228 USD
- Passenger ground transport: 0.000124146 USD
- Valve and fittings (except for plumbing); at manufacturer: 0.00281399 USD
- Breweries and beer; at manufacturer: 0.00264846 USD
- Vehicle repair: 0.000455204 USD
- Vehicles and parts sales: 0.000744879 USD
- Coal; at mine: 0.00223464 USD
- Plastic bags, films, and sheets; at manufacturer: 0.00310366 USD
- Transmission and power train parts; at manufacturer: 0.000413822 USD
- Cutting and machine tool accessory, rolling mill, and other metalworking machines; at manufacturer: 0.000124146 USD
- State and local government enterprises: 0.00136561 USD
- Sanitary paper (tissues, napkins, diapers, etc.); at manufacturer: 4.13822e-5 USD
- Glass and glass products; at manufacturer: 0.0847921 USD
- Other basic organic chemicals; at manufacturer: 0.000413822 USD
- Hotels and campgrounds: 0.000206911 USD
- Material handling equipment; at manufacturer: 0.000248293 USD
- Marketing research and all other miscellaneous professional, scientific, and technical services: 0.000993172 USD
- Cardboard; at manufacturer: 0.00148976 USD
- Specialized design: 4.13822e-5 USD
- Machine shops; at manufacturer: 0.000993172 USD
- Lessors of nonfinancial intangible assets: 0.00984896 USD
- Advertising and public relations: 0.00227602 USD
- Investment advice, portfolio management, and other financial advising services: 8.27643e-5 USD
- Golf courses, marinas, ski resorts, fitness and other rec centers and industries: 4.13822e-5 USD
- Office administration: 8.27643e-5 USD
- Buildings and dwellings services: 0.00190358 USD
- Insurance carriers: 0.00248293 USD
- Motor vehicle steering, suspension components (except spring), and brake systems; at manufacturer: 0.000248293 USD
- Other plastic products; at manufacturer: 0.00107594 USD
- Soap and cleaning compounds; at manufacturer: 0.00177943 USD
- Water transport (boats, ships, ferries): 0.00318643 USD
- Vehicle engines and engine parts; at manufacturer: 0.000248293 USD
- Insurance agencies and brokerages: 0.000869025 USD
- Civic, social, professional, and similar organizations: 8.27643e-5 USD
- Business support: 0.000165529 USD
- Semiconductors; at manufacturer: 0.00662115 USD
- Adhesives; at manufacturer: 0.000124146 USD
- Investigation and security: 8.27643e-5 USD
- Metal hinges, keys, lock, and other hardware; at manufacturer: 0.000124146 USD
- Full-service restaurants: 0.000248293 USD
- Relay and industrial controls; at manufacturer: 0.00107594 USD
- Paper; at manufacturer: 0.000413822 USD
- Securities and commodities brokerage and exchanges: 0.000206911 USD
- Monetary authorities and depository credit intermediation: 0.00144838 USD
- Telecommunications: 0.000786261 USD
- Light gauge metal cans, boxes, and containers; at manufacturer: 0.109332 USD
- Other support services: 4.13822e-5 USD
- Legal services: 0.000496586 USD
- Drinking water and wastewater treatment; at consumer: 0.00124146 USD
- Fresh wheat, corn, rice, and other grains; at farm: 0.0304573 USD
- Air transport: 0.000993172 USD
- Air conditioning, refrigeration, and warm air heating equipment; at manufacturer: 0.00095179 USD
- Other real estate: 0.000331057 USD
- Flours and malts; at manufacturer: 0.0349679 USD
- Abrasive products; at manufacturer: 4.13822e-5 USD
- Metal coatings, engravings, and heat treatments; at manufacturer: 0.00744879 USD
- Data processing and hosting: 0.00057935 USD
- Independent artists, writers, and performers: 8.27643e-5 USD
- Books, newspapers, magazines, and other print media; at manufacturer: 0.00562797 USD
- Truck transport: 0.0184151 USD
- Noncomparable imports: 0.00310366 USD
- Chemicals (except basic chemicals, agrichemicals, polymers, paints, pharmaceuticals,soaps, cleaning compounds); at manufacturer: 0.000910408 USD

## Inputs from nature
- Occupation, industrial area: 0.00036327 m2*a; data quality (4,2,1,1,1)
- Occupation, industrial area, built up: 0.00012109 m2*a; data quality (4,2,1,1,1)
- Water, fresh: 0.0016375 m3; data quality (3,2,1,4,2)
- Water, saline: 8.46194e-5 m3; data quality (4,2,1,4,2)
- Energy, solar: 0.00295901 MJ; data quality (3,1,1,1,1)
- Water, fresh: 0.000595447 m3; data quality (2,2,1,4,2)
- Energy, wind: 2.81235e-5 MJ; data quality (3,1,1,1,1)
- Occupation, urban, discontinuously built: 4.43715e-5 m2*a; data quality (4,2,1,1,1)

## Emissions to nature
- Methane, difluoro-, HFC-32: 8.28133e-8 kg; data quality (4,2,1,4,1)
- 2-methylnaphthalene: 5.3685e-12 kg; data quality (2,2,1,1,5)
- isophorone: 3.77556e-10 kg; data quality (2,2,1,1,5)
- Methane: 5.61413e-7 kg; data quality (4,2,1,4,1)
- Water, saline: 4.28765e-5 m3; data quality (4,2,1,4,2)
- hydrogen fluoride: 4.97575e-7 kg; data quality (2,2,1,1,5)
- p-cresol: 5.99962e-11 kg; data quality (3,2,1,1,5)
- Cobalt: 2.35624e-11 kg; data quality (3,2,1,1,5)
- pyrene: 6.97412e-11 kg; data quality (3,2,1,1,5)
- methyl isobutyl ketone: 1.72668e-11 kg; data quality (4,2,1,1,5)
- Chromium, ion: 1.84615e-9 kg; data quality (2,2,1,1,5)
- benzene: 2.08705e-8 kg; data quality (3,2,1,2,3)
- manganese: 2.47797e-9 kg; data quality (3,2,1,1,5)
- benzo(a)pyrene: 1.5088e-11 kg; data quality (3,2,1,1,5)
- propanal: 4.17857e-9 kg; data quality (3,2,1,3,2)
- Dinitrogen monoxide: 6.01041e-8 kg; data quality (4,2,1,4,1)
- trichloroethylene: 2.49155e-10 kg; data quality (4,2,1,1,5)
- bromoform: 2.53874e-11 kg; data quality (3,2,1,1,5)
- Chromium VI: 2.63164e-10 kg; data quality (3,2,1,1,5)
- nickel: 1.98512e-9 kg; data quality (3,2,1,1,5)
- Hydrocarbons, aromatic: 1.01602e-9 kg; data quality (3,2,1,3,2)
- AMMONIA: 2.66901e-7 kg; data quality (3,1,1,1,5)
- biphenyl: 1.08917e-10 kg; data quality (3,2,1,1,5)
- ozone: 7.20895e-8 kg; data quality (4,1,1,1,5)
- Dimethyl sulfate: 3.1246e-11 kg; data quality (2,2,1,1,5)
- Benzo(a)anthracene: 2.27427e-13 kg; data quality (2,2,1,1,5)
- hexane: 1.92006e-7 kg; data quality (3,2,1,1,5)
- selenium: 1.0544e-10 kg; data quality (2,2,1,1,5)
- benzene, ethyl-: 4.20381e-9 kg; data quality (3,2,1,3,2)
- VOC, volatile organic compounds: 9.06801e-5 kg; data quality (3,2,1,1,5)
- Phosphine: 2.8778e-10 kg; data quality (4,2,1,1,5)
- ethane, 1,2-dibromo-: 6.45333e-12 kg; data quality (2,2,1,1,5)
- 2,2,4-trimethylpentane: 9.09064e-9 kg; data quality (3,2,1,2,4)
- carbon disulfide: 5.32394e-15 kg; data quality (4,2,1,1,5)
- ethene, tetrachloro-: 6.48824e-10 kg; data quality (3,2,1,1,5)
- nitrogen oxides: 6.95926e-5 kg; data quality (2,2,1,1,5)
- methane, monochloro-, r-40: 3.45016e-10 kg; data quality (3,2,1,1,5)
- Chrysene: 1.95778e-12 kg; data quality (2,2,1,2,4)
- methane, dichloro-, hcc-30: 2.1578e-10 kg; data quality (4,2,1,1,5)
- Ethene, chloro-: 4.25447e-11 kg; data quality (3,2,1,1,5)
- phenanthrene: 2.62165e-10 kg; data quality (3,2,1,2,4)
- nitric acid: 6.55359e-11 kg; data quality (3,1,1,1,5)
- ammonia: 4.70964e-6 kg; data quality (3,2,1,1,5)
- cadmium: 3.15437e-10 kg; data quality (3,2,1,1,5)
- Dibenz(a,h)anthracene: 4.18236e-14 kg; data quality (2,2,1,1,5)
- Water, fresh: 0.00189434 m3; data quality (3,2,1,4,2)
- Xylene: 8.1887e-9 kg; data quality (3,2,1,4,2)
- anthracene: 4.59883e-11 kg; data quality (3,2,1,1,5)
- particulates, < 2.5 um: 1.19304e-5 kg; data quality (3,2,1,1,5)
- para-xylene: 6.16441e-11 kg; data quality (3,2,1,4,1)
- benzyl chloride: 4.55048e-10 kg; data quality (2,2,1,1,5)
- styrene: 3.42972e-9 kg; data quality (3,2,1,1,5)
- methanol: 2.13985e-7 kg; data quality (4,2,1,1,5)
- Propane, 1,1,1,3,3,3-hexafluoro-, HCFC-236fa: 1.6437e-9 kg; data quality (4,2,1,4,1)
- PHOSPHORUS: 9.24906e-12 kg; data quality (2,2,1,1,5)
- Indeno(1,2,3-cd)pyrene: 9.71853e-12 kg; data quality (3,2,1,1,5)
- ethane, 1,2-dichloro-: 2.99775e-10 kg; data quality (3,2,1,1,5)
- fluoranthene: 5.62072e-11 kg; data quality (3,2,1,1,5)
- acenaphthylene: 2.07879e-10 kg; data quality (3,2,1,1,5)
- particulates, < 10 um: 2.88456e-6 kg; data quality (3,2,1,1,5)
- fluorene: 6.98269e-11 kg; data quality (3,2,1,2,4)
- beryllium: 1.21816e-10 kg; data quality (2,2,1,1,5)
- Benzo(b)fluoranthene: 4.06224e-13 kg; data quality (3,2,1,3,2)
- Phosphorus: 5.18222e-7 kg; data quality (2,1,1,1,5)
- ammonia: 1.49684e-7 kg; data quality (3,1,1,1,5)
- 3-methylcholanthrene: 2.55867e-14 kg; data quality (2,2,1,1,5)
- carbon monoxide: 3.8193e-5 kg; data quality (3,2,1,1,3)
- Sulfuric acid: 9.7423e-7 kg; data quality (2,1,1,1,5)
- monochloroethane: 1.43183e-15 kg; data quality (3,2,1,1,5)
- carbon tetrachloride: 2.7785e-11 kg; data quality (4,2,1,1,5)
- carbonyl sulfide: 3.86302e-9 kg; data quality (4,2,1,1,5)
- mercury: 3.21366e-10 kg; data quality (2,2,1,1,5)
- methane, bromo-, halon 1001: 2.96016e-8 kg; data quality (3,2,1,1,5)
- Ethane, pentafluoro-, HFC-125: 1.42205e-7 kg; data quality (4,2,1,4,1)
- arsenic: 8.34604e-10 kg; data quality (3,2,1,1,5)
- acenaphthene: 3.19244e-11 kg; data quality (3,2,1,3,3)
- chlorine: 7.19451e-11 kg; data quality (4,2,1,1,5)
- Nitrogen: 9.84162e-7 kg; data quality (3,2,1,1,5)
- formaldehyde: 1.89098e-7 kg; data quality (2,2,1,1,4)
- butadiene: 1.58784e-9 kg; data quality (3,2,1,4,2)
- Carbon dioxide: 0.0285013 kg; data quality (4,2,1,4,1)
- Phthalate, dibutyl-: 3.54678e-11 kg; data quality (3,2,1,1,5)
- 4-nitrophenol: 1.13605e-10 kg; data quality (3,2,1,1,5)
- chloroform: 2.53711e-9 kg; data quality (4,2,1,1,5)
- acetaldehyde: 1.56901e-7 kg; data quality (3,2,1,1,5)
- m-xylene: 1.53891e-9 kg; data quality (3,2,1,4,1)
- Ethane, 1,1,1,2-tetrafluoro-, HFC-134a: 5.35987e-7 kg; data quality (4,2,1,4,1)
- sulfur dioxide: 0.000151361 kg; data quality (2,2,1,1,5)
- acetophenone: 4.27596e-11 kg; data quality (3,2,1,1,5)
- Ethane, 1,1,1-trifluoro-, HFC-143a: 6.08434e-8 kg; data quality (4,2,1,4,1)
- toluene: 2.87938e-8 kg; data quality (3,2,1,2,3)
- acrolein: 1.46281e-9 kg; data quality (3,2,1,3,3)
- lead: 3.6022e-9 kg; data quality (3,2,1,1,5)
- ethylene glycol: 7.77007e-11 kg; data quality (5,2,1,1,5)
- Benzo(k)fluoranthene: 3.60765e-13 kg; data quality (3,2,1,4,2)
- hydrogen sulfide: 1.52619e-9 kg; data quality (3,2,1,1,5)
- cyanide: 1.6274e-9 kg; data quality (3,2,1,1,5)
- benzene, chloro-: 2.33866e-11 kg; data quality (4,2,1,1,5)
- naphthalene: 1.57654e-9 kg; data quality (3,2,1,2,4)
- phenol: 4.6298e-10 kg; data quality (3,2,1,1,5)
- 1,1,1-trichloroethane: 2.72469e-11 kg; data quality (4,2,1,1,5)
- o-Xylene: 1.76572e-9 kg; data quality (3,2,1,2,4)
- Benzo(g,h,i)perylene: 1.03343e-11 kg; data quality (3,2,1,1,5)
- antimony: 5.13262e-12 kg; data quality (3,2,1,1,5)
- hydrogen chloride: 4.20531e-6 kg; data quality (2,2,1,1,5)
- Asbestos: 5.18005e-13 kg; data quality (5,2,1,1,5)
- benz[a]anthracene: 1.48741e-11 kg; data quality (3,2,1,1,5)
- 2-chloro-1-phenylethanone: 4.55671e-12 kg; data quality (2,2,1,1,5)
- o-cresol: 2.98353e-11 kg; data quality (3,2,1,1,5)

## Inventory method
Input-output

## Modelling constants
The reference unit of all processes is 1 USD2013 of the good or service. The technosphere inputs are based on the US BEA detailed input-output tables for 2007. The IO tables are combined to develop a commodity-by-commodity model based on the the industry-technology assumption (see Suh et al., 2010), which assumes all commodities produced by a given industry have the same input structure, but that multiple industries can produce the same commodity. Thus, model technosphere flows represent commodity outputs (and not industry outputs) from other processes in the model. There are no by-products included in these processes. All commodity production is based on US-conditions, despite in reality that some goods and services are produced overseas, as USEEIO v1.1 is a single-region IO model.

## Completeness
The input-output approach assures that all purchased inputs associated with the sectors making these commodities as reported in the US census for 2007 are included. The direct resources extracted including minerals, energy sources, water and land occupied are included. Emissions to air include all critieria air pollutants, greenhouse gases, and hazardous and toxic air pollutants as defined by US EPA. Releases to water include toxics, total nitrogen and total phosphorus, and water discharges. Releases to soil or groundwater include toxics and agriculutural pesticides. Some metal releases to air, water and soil are not included because they could not be speciated. Solid hazardous and non-hazardous wastes generated are not included as an elementary flows although purchases of waste services are included.

## Data treatment
Greenhouse gases are primarily from the US Greenhouse Gas Emission Inventory (USEPA 2016a). Biogenic C uptake is not included (change from version 1.0), as biogenic C emission are not included. Toxic releases to air, water and soil (except pesticides) are from the 2013 Toxic Release Inventory (USEPA 2015a). Criteria air pollutants and hazardous air pollutants are from the 2011 National Emissions Inventory (USEPA 2015b). All estimates are normalized by industry based on sector output in the data year, then converted to 2013 USD using relative sector-specific CPIs (if data year is not 2013). Energy use represent raw renewables or fossil fuel energies and is based on EIA data for 2014. See Table 1 in Yang, Ingwersen et al. 2017 and Supporting Information 1, and the v1.1 data update notes (Ingwersen et al. 2017) for all details on environmental data sources used.Land occupation associated with manufacturing buildings was estimated based on the building floorspace data provided by the U.S. Energy Information Administration in the 2010 Manufacturing Energy Consumption Survey (EIA 2013). Portions of total renewable energy (EIA 2016) based on EIA-923 reports for 2014 (EIA 2017) are included. Nitrogen and Phosphorus releases are modeled in total N and total P equivalents as estimated by the Discharge Monitoring Report Nutrient Loading tool (USEPA 2016b). Self-supplied withdrawals were assigned to industrial sectors based on water use statistics for Canadian industries by NAICS 3-digit sector scaled to US production levels based on gross domestic product by industry (BEA 2015; Statistics Canada 2010), and further disaggregated to the manufacturing sectors based on compensation of employees as provided by the 2007 IO tables (BEA 2015). Water withdrawals associated with public supply were allocated to sectors based on their use of water, sewage, and other services in USD based on the IO tables (BEA 2015). Portions of total renewable energy (EIA 2016) by type are assigned to sectors (hydro, wind, solar, or) based on EIA-923 reports for 2014 (EIA 2017).

## Data collection
2015-2016

## Sampling procedure
US federal government sources, including surveys and US EPA emissions databases are used as the primary sources. From these sources, data for US reporting establishments/facilities are aggregated by the NAICS sector as defined in the BEA detailed 2007 input-output tables. When level of sector aggregation differs, or when direct emissions are not reported but modeled, additional sources are used to make allocations and estimates.

## Review details
In regard to quality assurance and peer-review, each dataset created went through Quality Assurance as defined in a quality assurance project plans at US EPA, CSRA or ERG. The model was assembled with the IO model builder model (USEPA 2016c). Validation functions were used to check that all the model components were properly assembled and harmonized. Bayou Demeke and Santosh Ghimire provided internal peer review of the model methodology and the manuscript underwent standard EPA management review. An editor and two anonymous reviewers at the Journal of Cleaner Production reviewed the model. In regard to data quality evaluation, data quality assessment was performed at the flow and process levels according to the updated US EPA data quality assessment guidelines as defined in US EPA (2016b).

## Intended application
The primary application is for use in the US Environmentally-Extended Input-Ouput model, USEEIO, version 1.1. This model is being used by the US EPA for supporting tools that prioritize goods and services based on potential environmental impacts, resource use or emissions for large regions, including the US and US states, and as a strealined tool for organizations as a starting point to consider sustainable materials management. Model results are designed to provide meso/macro-level decision support.

## Project
USEEIO v1.1 was developed by the US EPA with CSRA and ERG with Wesley W. Ingwersen and David E. Meyer as research leads. Yi Yang was the technical lead on the work for CSRA (contract EP-C-15-012); Troy Hawkins was lead for ERG (contract EP-C-12-021).

## Sources
- Yienger et al. 1995
- USGS 2016
- USEPA 2016c
- USEPA 2016a
- Nickerson et al. 2011
- BEA 2015
- Edelen and Ingwersen 2017
- BLM 2008
- EIA 2015
- Macknick et al. 2011
- EIA 2013
- Kim et el. 2013
- USDA 2009a
- USDA 2016
- USEPA 2016b
- Lovelace 2009
- USEPA 2015a
- Ingwersen et al. DRAFT
- USDA 2014
- EIA 2017
- Ingwersen et al. 2017
- EIA 2016
- Maupin et al. 2014
- USDA 2009b
- USEPA 2015b
- Torcellini et al. 2003
- USDA 2006
- Blackhurst et al. 2010
- Goebes et al. 2003
- USGS 2015
- Statistics Canada 2010
