# Telecommunications

Dataset: openLCA process, unit process
Category: 5171: Wired Telecommunications Carriers
Geography: United States
Time period: 2017-01-01 to 2017-12-31
Data quality: US EPA - Process Pedigree Matrix (1;1)
Exchange data quality scheme: US EPA - Flow Pedigree Matrix
Generated by: US EPA with CSRA and ERG
Owner: US EPA
Published in: Yang, Ingwersen et al. 2017
restrictionsDescription: This model shold be appropriately cited (see Yang, Ingwersen et al. 2017 source or Publication field) when used. Any changes or derivations of this model by the user should be documented. The model itself and any results from use of this model shall not be construed to consitute US EPA opinion or policy.
copyright: false

## General comment
BEA Code & Name is '517110:Wired telecommunications carriers'. Description of the primary industry producing this good or service, adapted from the Census Bureau NAICS 2007 descriptions: This industry comprises establishments primarily engaged in operating and/or providing access to transmission facilities and infrastructure that they own and/or lease for the transmission of voice, data, text, sound, and video using wired telecommunications networks. Transmission facilities may be based on a single technology or a combination of technologies. Establishments in this industry use the wired telecommunications network facilities that they operate to provide a variety of services, such as wired telephony services, including VoIP services; wired (cable) audio and video programming distribution; and wired broadband Internet services. By exception, establishments providing satellite television distribution services using facilities and infrastructure that they operate are included in this industry.

## Technology
The process describes the average US production of this good or service within this NAICS-based grouping defined in the BEA 2007 detailed input-output tables (BEA 2015). Distribution, wholesale and retailing of this good or service, use, and final disposal are not included. Creation of a product system with this process will enable modeling of all upstream (supply-chain) activities.

## Geography
Data represent the 50 US states

## Time period
2017 was the year in which this version of USEEIO was released and is the target date for the model

## Reference product
- Telecommunications: 1 USD

## Inputs from technosphere
All rows: data quality (1,3,1,1,1)
- Office administration: 0.00136048 USD
- Vehicle engines and engine parts; at manufacturer: 7.32407e-5 USD
- Laminated plastic plates and shapes; at manufacturer: 8.11314e-5 USD
- Metal structural products; at manufacturer: 0.000108681 USD
- Wiring devices; at manufacturer: 4.69401e-5 USD
- Primary iron, steel, and ferroalloy products; at manufacturer: 9.65568e-5 USD
- Aluminum; at manufacturer: 8.52137e-5 USD
- Polystyrene foam products; at manufacturer: 0.000101256 USD
- Noncomparable imports: 0.0172028 USD
- Cutlery and handtools; at manufacturer: 6.7733e-6 USD
- Sports: 6.60215e-5 USD
- Power boilers and heat exchangers; at manufacturer: 3.92526e-5 USD
- Wooden windows, door, and flooring; at manufacturer: 0.000329449 USD
- Cardboard containers; at manufacturer: 0.000171659 USD
- Computer terminals and other computer peripheral equipment; at manufacturer: 0.00114195 USD
- Passenger ground transport: 0.000349198 USD
- Light gauge metal cans, boxes, and containers; at manufacturer: 1.37548e-8 USD
- Lessors of nonfinancial intangible assets: 0.00284 USD
- Printed circuit and electronic assembly; at manufacturer: 0.000225365 USD
- Directory, mailing list, and other publishers; at publisher: 3.57637e-6 USD
- Chemicals (except basic chemicals, agrichemicals, polymers, paints, pharmaceuticals,soaps, cleaning compounds); at manufacturer: 9.99074e-5 USD
- Air transport: 0.00106132 USD
- Transmission and power train parts; at manufacturer: 0.000167672 USD
- Dry-cleaning and laundry: 1.18976e-5 USD
- Newspapers; at publisher: 2.81294e-6 USD
- Independent artists, writers, and performers: 0.00716968 USD
- News syndicates, libraries, archives, Internet publishing and all other information services: 3.31919e-5 USD
- Monetary authorities and depository credit intermediation: 0.00369896 USD
- Electricity; at consumer: 0.00295287 USD
- Ready-mix concrete; at manufacturer: 0.000152084 USD
- Truck transport: 0.00101051 USD
- Specialty transformers; at manufacturer: 8.25287e-9 USD
- Air conditioning, refrigeration, and warm air heating equipment; at manufacturer: 6.79135e-5 USD
- Lime and gypsum products; at manufacturer: 0.000135276 USD
- Cable and subscription programming: 0.0450089 USD
- Architectural, engineering, and related services: 0.0114218 USD
- Vehicle rental and leasing: 0.00133526 USD
- State and local government enterprises: 0.000169341 USD
- Relay and industrial controls; at manufacturer: 2.28127e-5 USD
- Hotels and campgrounds: 0.0008261 USD
- Wood kitchen cabinets and countertops; at manufacturer: 0.000109554 USD
- Primary batteries; at manufacturer: 1.01599e-5 USD
- Vehicle electrical and electronic equipment; at manufacturer: 3.48875e-5 USD
- Fluid meters and counting devices; at manufacturer: 3.41283e-5 USD
- Scenic and sightseeing transportation and support activities for transportation: 0.000159726 USD
- All other food and drinking places: 8.3772e-5 USD
- Rubber tires; at manufacturer: 3.41311e-5 USD
- other miscellaneous electrical equipment and components; at manufacturer: 1.76857e-5 USD
- Audio and video equipment; at manufacturer: 1.37548e-8 USD
- Books, newspapers, magazines, and other print media; at manufacturer: 0.000278745 USD
- Other rubber products; at manufacturer: 0.00015394 USD
- Glass and glass products; at manufacturer: 2.50657e-5 USD
- Machine shops; at manufacturer: 0.00111886 USD
- Ink and ink cartridges; at manufacturer: 0.000143584 USD
- Metal windows, doors, and architectural products; at manufacturer: 0.000613458 USD
- Performances: 2.26459e-5 USD
- Vehicle repair: 0.00123836 USD
- Specialized design: 0.00115812 USD
- Movies and film: 0.0491925 USD
- Paper; at manufacturer: 6.29313e-6 USD
- Full-service restaurants: 0.000849959 USD
- Fabricated pipe and pipe fittings; at manufacturer: 5.94894e-5 USD
- Data processing and hosting: 0.00187651 USD
- Accounting, tax preparation, bookkeeping, and payroll: 0.00708959 USD
- Commercial machinery repair: 0.00244092 USD
- Semiconductors; at manufacturer: 0.0114099 USD
- Screws, nuts, and bolts; at manufacturer: 0.000147363 USD
- Electronic equipment repair and maintenance: 0.00109533 USD
- Radio and television: 6.73786e-5 USD
- Valve and fittings (except for plumbing); at manufacturer: 0.00129823 USD
- Other basic inorganic chemicals; at manufacturer: 1.29674e-5 USD
- Carpets and rugs; at manufacturer: 2.75096e-9 USD
- Magazines and journals; at publisher: 0.000131959 USD
- Power tools; at manufacturer: 1.86709e-5 USD
- Plywood and veneer; at manufacturer: 0.000128577 USD
- Computer storage device readers; at manufacturer: 9.90345e-8 USD
- Light bulbs; at manufacturer: 2.80744e-6 USD
- Storage batteries; at manufacturer: 2.47586e-8 USD
- Advertising and public relations: 0.0193537 USD
- Plastic bottles; at manufacturer: 3.57625e-8 USD
- Satellite, telecommunications resellers, and all other telecommunications: 0.00102562 USD
- Software: 0.000263777 USD
- Semiconductor machinery; at manufacturer: 2.60882e-5 USD
- Wireless telecommunications: 0.002166 USD
- Wholesale trade: 0.007673 USD
- Veneer, plywood, and engineered wood; at manufacturer: 3.8273e-5 USD
- All other forging, stamping, and sintering; at manufacturer: 5.39576e-5 USD
- Lids, jars, bottle caps, other metal closures and crowns; at manufacturer: 0.000298942 USD
- Watches, clocks, and other measuring and controlling devices; at manufacturer: 6.19684e-6 USD
- Adhesives; at manufacturer: 9.07816e-8 USD
- Stationery; at manufacturer: 1.92567e-8 USD
- Colleges, universities, junior colleges, and professional schools: 0.00030412 USD
- Unrefined oil and gas; at extraction site: 2.19717e-5 USD
- Business support: 0.00136908 USD
- All other converted paper products; at manufacturer: 2.75096e-9 USD
- Buildings and dwellings services: 0.00105223 USD
- Other engine equipment; at manufacturer: 1.23882e-5 USD
- Copper, nickel, lead, and zinc; at mine: 0.000150017 USD
- Commercial equipment rental: 0.000873007 USD
- Scientific research and development: 7.11585e-5 USD
- Investment advice, portfolio management, and other financial advising services: 0.000103835 USD
- Pet care, photofinishing, parking and other sundry services: 0.000452211 USD
- Metal hinges, keys, lock, and other hardware; at manufacturer: 0.000253994 USD
- Machinery for the paper, textile, food or other industries (except semiconductor machinery); at manufacturer: 2.75096e-9 USD
- Dolls, toys, and games; at manufacturer: 5.79208e-7 USD
- Other retail: 3.40584e-5 USD
- Metal plumbing drains, faucets, valves, and other fittings; at manufacturer: 7.35516e-5 USD
- Civic, social, professional, and similar organizations: 0.000390994 USD
- Computer systems design: 0.00132988 USD
- Synthetic dyes and pigments; at manufacturer: 2.80744e-6 USD
- Management consulting: 0.00527272 USD
- Books; at publisher: 3.3894e-6 USD
- Drinking water and wastewater treatment; at consumer: 0.000736319 USD
- Other concrete products; at manufacturer: 0.000201505 USD
- Internet publishing and broadcasting: 0.000232848 USD
- Waste management and remediation: 0.000368412 USD
- Electronic capacitors, resistors, coils, transformers, connectors and other components (except semiconductors and printed circuit assemblies); at manufacturer: 0.000600667 USD
- Promoters and agents: 0.000900157 USD
- Printing support; at manufacturer: 0.000133436 USD
- Communications equipment; at manufacturer: 0.000244936 USD
- Other real estate: 0.0139145 USD
- Household goods repair: 0.00115099 USD
- General merchandise stores: 6.2106e-6 USD
- Other support services: 2.87377e-5 USD
- Gasoline, fuels, and by-products of petroleum refining; at manufacturer: 0.000409347 USD
- Rubber and plastic belts and hoses; at manufacturer: 3.96586e-6 USD
- Other plastic products; at manufacturer: 0.00129555 USD
- Shelving and lockers; at manufacturer: 2.75096e-9 USD
- Insurance carriers: 0.000436486 USD
- Office machinery; at manufacturer: 0.000278299 USD
- Springs and wires; at manufacturer: 1.59542e-5 USD
- Photography and photocopying equipment; at manufacturer: 5.79208e-7 USD
- Heating equipment other than warm air furnaces; at manufacturer: 1.92941e-5 USD
- Warehousing: 0.000343103 USD
- Marketing research and all other miscellaneous professional, scientific, and technical services: 0.00319402 USD
- Metal coatings, engravings, and heat treatments; at manufacturer: 0.00241031 USD
- Lawn and garden equipment; at manufacturer: 4.54507e-6 USD
- Other vehicle parts; at manufacturer: 3.16685e-5 USD
- Sound recording: 0.00112578 USD
- Other petroleum and coal products; at manufacturer: 3.15842e-5 USD
- Water transport (boats, ships, ferries): 2.95943e-5 USD
- Nondepository credit intermediation and related activities: 0.000356285 USD
- Compressed Gases; at manufacturer: 2.75096e-9 USD
- Plastic pipe, fittings, and sausage casings; at manufacturer: 0.000524981 USD
- Aluminum products; at manufacturer: 1.37548e-8 USD
- Cardboard; at manufacturer: 0.000375446 USD
- Concrete pipe, bricks, and blocks; at manufacturer: 8.88549e-5 USD
- Asphalt pavement; at manufacturer: 4.00712e-6 USD
- Other computer related services, including facilities management: 0.00157932 USD
- Switchgear and switchboards; at manufacturer: 0.000656414 USD
- Communication and energy wire and cable; at manufacturer: 0.00167934 USD
- Urethane and other foam products; at manufacturer: 6.53798e-5 USD
- Industrial process variable instruments; at manufacturer: 4.14075e-5 USD
- Limited-service restaurants: 0.00029075 USD
- Facilities support: 0.000587976 USD
- Plastic bags, films, and sheets; at manufacturer: 4.73129e-5 USD
- Other textiles; at manufacturer: 4.57258e-6 USD
- External hard drives, CDs, other storage media; at manufacturer: 0.000268372 USD
- Soap and cleaning compounds; at manufacturer: 7.35251e-6 USD
- Securities and commodities brokerage and exchanges: 0.000508946 USD
- Paints and coatings; at manufacturer: 0.000130199 USD
- Secondary copper products; at manufacturer: 1.40299e-7 USD
- Custom metal rolls; at manufacturer: 3.27364e-7 USD
- Automatic controls for HVAC and refrigeration equipment; at manufacturer: 5.79208e-7 USD
- Cutting and machine tool accessory, rolling mill, and other metalworking machines; at manufacturer: 2.80744e-6 USD
- Nonresidential building repair and maintanence: 0.0027443 USD
- Asphalt shingles; at manufacturer: 9.2631e-5 USD
- Light fixtures; at manufacturer: 0.000266543 USD
- Welding and Soldering Equipment, Scales and Balances, and other general purpose machinery; at manufacturer: 3.3894e-6 USD
- Office supplies (not paper); at manufacturer: 1.17887e-5 USD
- Food and beverage stores: 5.50192e-9 USD
- Abrasive products; at manufacturer: 1.47298e-5 USD
- Petrochemicals; at manufacturer: 1.19822e-5 USD
- Cut stone and stone products; at manufacturer: 0.000139815 USD
- Lumber and treated lumber; at manufacturer: 6.62156e-5 USD
- Motor vehicle steering, suspension components (except spring), and brake systems; at manufacturer: 3.96861e-6 USD
- Golf courses, marinas, ski resorts, fitness and other rec centers and industries: 0.00016071 USD
- Motors and generators; at manufacturer: 5.62705e-5 USD
- Clay and ceramic products; at manufacturer: 0.00048143 USD
- Air and gas compressors; at manufacturer: 6.92418e-5 USD
- Pipeline transport: 3.3894e-6 USD
- Clothing; at manufacturer: 0.000267523 USD
- Railroad rolling stock; at manufacturer: 5.79208e-7 USD
- Telecommunications: 0.111859 USD
- Wireless communications; at manufacturer: 0.00133659 USD
- Sand, gravel, clay, phosphate, other nonmetallic minerals; at mine: 6.30477e-5 USD
- Coal; at mine: 3.38665e-6 USD
- Sporting and athletic goods; at manufacturer: 2.75096e-9 USD
- Vehicles and parts sales: 3.87647e-5 USD
- Postal service: 0.000359085 USD
- Consumer goods and general rental centers: 0.000444195 USD
- Travel arrangement and reservation: 0.000149625 USD
- Insurance agencies and brokerages: 7.55331e-5 USD
- Small electrical appliances; at manufacturer: 1.86956e-5 USD
- Rail transport: 0.000282956 USD
- Investigation and security: 0.000505953 USD
- Employment services: 0.00574617 USD
- Metal pipe fittings, ball and roller bearings, industrial patterns, metal bath fixtures, other misc. fabricated metals; at manufacturer: 0.000424724 USD
- Other basic organic chemicals; at manufacturer: 0.000700802 USD
- Secondary steel products; at manufacturer: 1.93271e-5 USD
- Legal services: 0.00653997 USD
- Paper bags and coated paper; at manufacturer: 1.72385e-5 USD
- Ball and roller bearings; at manufacturer: 0.00074059 USD
- Couriers and messengers: 3.55945e-5 USD
- Gaskets, seals, musical instruments, fasteners, brooms, brushes, mop and other misc. goods; at manufacturer: 0.000157192 USD
- Environmental and other technical consulting services: 0.00122697 USD
- Company and enterprise management: 0.00127061 USD
- Construction machinery; at manufacturer: 3.96586e-6 USD
- Natural gas; at consumer: 0.000181406 USD
- Speed changers, industrial high-speed drives, and gears; at manufacturer: 3.38665e-6 USD
- Air purification and ventilation equipment; at manufacturer: 5.50192e-9 USD
- Other secondary nonferrous metal products; at manufacturer: 0.000174455 USD
- Telephones; at manufacturer: 0.0121499 USD
- Cement; at manufacturer: 1.54053e-5 USD

## Inputs from nature
- Water, fresh: 0.000421205, 0.000243387 m3 (2 entries, compartments not in this file); data quality (1,2,1,4,2)
- Energy, solar: 6.46244e-6 MJ; data quality (3,1,1,1,1)
- Occupation, urban, discontinuously built: 0.00036918 m2*a; data quality (4,2,1,1,1)

## Emissions to nature
- benz[a]anthracene: 6.48443e-13 kg; data quality (3,2,1,4,2)
- Ethane, 1,1,1,2-tetrafluoro-, HFC-134a: 6.7594e-8 kg; data quality (4,2,1,4,1)
- Cobalt: 2.75473e-13 kg; data quality (3,2,1,1,5)
- lead: 1.90397e-12 kg; data quality (3,2,1,1,5)
- PHOSPHORUS: 5.08807e-12 kg; data quality (2,2,1,1,5)
- arsenic: 2.0574e-12 kg; data quality (3,2,1,3,3)
- fluoranthene: 5.48648e-12 kg; data quality (3,2,1,4,1)
- monochloroethane: 3.25034e-17 kg; data quality (3,2,1,1,5)
- antimony: 3.68216e-13 kg; data quality (3,2,1,1,5)
- propanal: 6.4846e-10 kg; data quality (3,2,1,4,1)
- Phosphorus: 4.75025e-14 kg; data quality (2,1,1,1,5)
- naphthalene: 4.73918e-10 kg; data quality (3,2,1,4,2)
- Chrysene: 6.79456e-13 kg; data quality (3,2,1,3,2)
- Methane: 8.40628e-8 kg; data quality (4,2,1,4,1)
- manganese: 2.07265e-11 kg; data quality (3,2,1,1,5)
- Benzo(g,h,i)perylene: 1.40928e-12 kg; data quality (3,2,1,4,1)
- ethane, 1,1,2-trichloro-: 8.75791e-16 kg; data quality (4,2,1,1,5)
- Ethene, chloro-: 6.24676e-16 kg; data quality (3,2,1,1,5)
- pyrene: 6.45835e-12 kg; data quality (3,2,1,4,1)
- styrene: 1.78044e-10 kg; data quality (3,2,1,4,1)
- 3-methylcholanthrene: 4.63478e-17 kg; data quality (2,2,1,1,5)
- Chromium, ion: 3.10083e-12 kg; data quality (2,2,1,2,4)
- phenanthrene: 2.04916e-11 kg; data quality (3,2,1,3,2)
- selenium: 2.1871e-12 kg; data quality (2,2,1,1,5)
- hexane: 4.77191e-9 kg; data quality (3,2,1,3,2)
- benzene: 1.56858e-8 kg; data quality (3,2,1,3,2)
- 2-methylnaphthalene: 3.52781e-14 kg; data quality (2,2,1,1,5)
- ethene, tetrachloro-: 4.31061e-17 kg; data quality (3,2,1,1,5)
- o-Xylene: 2.19584e-10 kg; data quality (3,2,1,4,1)
- Benzo(a)anthracene: 4.11949e-16 kg; data quality (2,2,1,1,5)
- Propene, 1,3-dichloro-: 8.22396e-17 kg; data quality (3,2,1,1,5)
- Chromium VI: 4.52296e-13 kg; data quality (3,2,1,3,3)
- benzene, ethyl-: 4.56177e-9 kg; data quality (3,2,1,4,1)
- Water, fresh: 0.000562719 m3; data quality (1,2,1,4,2)
- m-xylene: 6.11808e-10 kg; data quality (3,2,1,4,1)
- methanol: 2.36938e-13 kg; data quality (4,2,1,1,5)
- acrolein: 5.67883e-10 kg; data quality (2,2,1,2,3)
- Xylene: 1.4923e-8 kg; data quality (3,2,1,4,1)
- benzo(a)pyrene: 4.90954e-13 kg; data quality (3,2,1,4,1)
- Propane, 1,2-dichloro-: 7.42297e-16 kg; data quality (4,2,1,1,5)
- 2,2,4-trimethylpentane: 6.48774e-9 kg; data quality (3,2,1,4,1)
- methane, dichloro-, hcc-30: 2.99201e-15 kg; data quality (4,2,1,1,5)
- Propane, 1,1,1,3,3,3-hexafluoro-, HCFC-236fa: 2.07289e-10 kg; data quality (4,2,1,4,1)
- carbon tetrachloride: 1.00998e-15 kg; data quality (4,2,1,1,5)
- VOC, volatile organic compounds: 3.612e-7 kg; data quality (3,2,1,1,2)
- chloroform: 7.84311e-16 kg; data quality (4,2,1,1,5)
- ammonia: 1.66384e-9 kg; data quality (3,2,1,3,2)
- phenol: 4.35315e-16 kg; data quality (4,2,1,1,5)
- Ethane, pentafluoro-, HFC-125: 1.79336e-8 kg; data quality (4,2,1,4,1)
- nickel: 9.23702e-12 kg; data quality (3,2,1,2,4)
- Ethane, 1,1,1-trifluoro-, HFC-143a: 7.67304e-9 kg; data quality (4,2,1,4,1)
- Methane, difluoro-, HFC-32: 1.04437e-8 kg; data quality (4,2,1,4,1)
- mercury: 5.14837e-13 kg; data quality (2,2,1,1,5)
- biphenyl: 3.47616e-15 kg; data quality (4,2,1,1,5)
- sulfur dioxide: 5.12139e-8 kg; data quality (2,2,1,1,5)
- fluorene: 1.08593e-11 kg; data quality (3,2,1,3,2)
- Hydrocarbons, aromatic: 1.3258e-10 kg; data quality (3,2,1,4,1)
- Dinitrogen monoxide: 2.5003e-9 kg; data quality (4,2,1,4,1)
- nitrogen oxides: 1.14232e-6 kg; data quality (2,2,1,1,4)
- acenaphthene: 5.07831e-12 kg; data quality (3,2,1,4,1)
- benzene, chloro-: 1.18267e-14 kg; data quality (4,2,1,1,5)
- Indeno(1,2,3-cd)pyrene: 4.35665e-13 kg; data quality (3,2,1,4,1)
- cadmium: 2.33312e-12 kg; data quality (3,2,1,1,5)
- Nitrogen: 5.3541e-12 kg; data quality (4,2,1,1,5)
- acetaldehyde: 5.82093e-9 kg; data quality (3,2,1,2,3)
- 1,1,2,2-tetrachloroethane: 1.7908e-15 kg; data quality (3,2,1,1,5)
- carbon monoxide: 7.1339e-6 kg; data quality (3,2,1,1,1)
- acenaphthylene: 1.86012e-11 kg; data quality (3,2,1,4,1)
- particulates, < 2.5 um: 5.35056e-8 kg; data quality (3,2,1,2,3)
- Benzo(b)fluoranthene: 6.41403e-13 kg; data quality (3,2,1,3,2)
- particulates, < 10 um: 3.1478e-9 kg; data quality (3,2,1,2,3)
- ethane, 1,2-dibromo-: 4.71778e-15 kg; data quality (2,2,1,1,5)
- para-xylene: 1.14503e-11 kg; data quality (3,2,1,4,1)
- Dibenz(a,h)anthracene: 2.29931e-14 kg; data quality (2,2,1,1,4)
- trichloroethylene: 8.35793e-11 kg; data quality (4,2,1,1,5)
- formaldehyde: 1.13986e-8 kg; data quality (3,2,1,3,3)
- Benzo(k)fluoranthene: 5.1746e-13 kg; data quality (3,2,1,4,1)
- Carbon dioxide: 0.00092214 kg; data quality (4,2,1,4,1)
- toluene: 1.7709e-8 kg; data quality (3,2,1,4,1)
- anthracene: 3.70264e-12 kg; data quality (3,2,1,4,1)
- butadiene: 1.89841e-9 kg; data quality (3,2,1,4,1)
- ethane, 1,2-dichloro-: 1.48148e-13 kg; data quality (3,2,1,1,5)
- beryllium: 3.5944e-13 kg; data quality (2,2,1,1,5)
- hydrogen chloride: 4.70489e-10 kg; data quality (2,2,1,1,5)

## Inventory method
Input-output

## Modelling constants
The reference unit of all processes is 1 USD2013 of the good or service. The technosphere inputs are based on the US BEA detailed input-output tables for 2007. The IO tables are combined to develop a commodity-by-commodity model based on the the industry-technology assumption (see Suh et al., 2010), which assumes all commodities produced by a given industry have the same input structure, but that multiple industries can produce the same commodity. Thus, model technosphere flows represent commodity outputs (and not industry outputs) from other processes in the model. There are no by-products included in these processes. All commodity production is based on US-conditions, despite in reality that some goods and services are produced overseas, as USEEIO v1.1 is a single-region IO model.

## Completeness
The input-output approach assures that all purchased inputs associated with the sectors making these commodities as reported in the US census for 2007 are included. The direct resources extracted including minerals, energy sources, water and land occupied are included. Emissions to air include all critieria air pollutants, greenhouse gases, and hazardous and toxic air pollutants as defined by US EPA. Releases to water include toxics, total nitrogen and total phosphorus, and water discharges. Releases to soil or groundwater include toxics and agriculutural pesticides. Some metal releases to air, water and soil are not included because they could not be speciated. Solid hazardous and non-hazardous wastes generated are not included as an elementary flows although purchases of waste services are included.

## Data treatment
Greenhouse gases are primarily from the US Greenhouse Gas Emission Inventory (USEPA 2016a). Biogenic C uptake is not included (change from version 1.0), as biogenic C emission are not included. Toxic releases to air, water and soil (except pesticides) are from the 2013 Toxic Release Inventory (USEPA 2015a). Criteria air pollutants and hazardous air pollutants are from the 2011 National Emissions Inventory (USEPA 2015b). All estimates are normalized by industry based on sector output in the data year, then converted to 2013 USD using relative sector-specific CPIs (if data year is not 2013). Energy use represent raw renewables or fossil fuel energies and is based on EIA data for 2014. See Table 1 in Yang, Ingwersen et al. 2017 and Supporting Information 1, and the v1.1 data update notes (Ingwersen et al. 2017) for all details on environmental data sources used.Land occupation for commercial buildings was estimated based on the building floorspace data provided by the U.S. Energy Information Administration 2012 Commercial Building Energy Consumption Survey (CBECS) (EIA 2015). Total commercial public supply water use is reported by USGS (Maupin et al. 2014). Water use is allocated across commercial sectors based on their use of water, sewage, and other services in USD based on the 2007 Benchmark Use Table before redefinitions (BEA 2015).

## Data collection
2015-2016

## Sampling procedure
US federal government sources, including surveys and US EPA emissions databases are used as the primary sources. From these sources, data for US reporting establishments/facilities are aggregated by the NAICS sector as defined in the BEA detailed 2007 input-output tables. When level of sector aggregation differs, or when direct emissions are not reported but modeled, additional sources are used to make allocations and estimates.

## Review details
In regard to quality assurance and peer-review, each dataset created went through Quality Assurance as defined in a quality assurance project plans at US EPA, CSRA or ERG. The model was assembled with the IO model builder model (USEPA 2016c). Validation functions were used to check that all the model components were properly assembled and harmonized. Bayou Demeke and Santosh Ghimire provided internal peer review of the model methodology and the manuscript underwent standard EPA management review. An editor and two anonymous reviewers at the Journal of Cleaner Production reviewed the model. In regard to data quality evaluation, data quality assessment was performed at the flow and process levels according to the updated US EPA data quality assessment guidelines as defined in US EPA (2016b).

## Intended application
The primary application is for use in the US Environmentally-Extended Input-Ouput model, USEEIO, version 1.1. This model is being used by the US EPA for supporting tools that prioritize goods and services based on potential environmental impacts, resource use or emissions for large regions, including the US and US states, and as a strealined tool for organizations as a starting point to consider sustainable materials management. Model results are designed to provide meso/macro-level decision support.

## Project
USEEIO v1.1 was developed by the US EPA with CSRA and ERG with Wesley W. Ingwersen and David E. Meyer as research leads. Yi Yang was the technical lead on the work for CSRA (contract EP-C-15-012); Troy Hawkins was lead for ERG (contract EP-C-12-021).

## Sources
- USEPA 2016c
- EIA 2016
- EIA 2013
- USDA 2016
- Goebes et al. 2003
- USEPA 2016b
- Lovelace 2009
- BLM 2008
- USDA 2014
- USGS 2016
- Yienger et al. 1995
- Ingwersen et al. 2017
- BEA 2015
- USDA 2009b
- USGS 2015
- USDA 2006
- Torcellini et al. 2003
- Ingwersen et al. DRAFT
- Blackhurst et al. 2010
- USEPA 2015b
- Maupin et al. 2014
- Edelen and Ingwersen 2017
- USEPA 2015a
- Nickerson et al. 2011
- USEPA 2016a
- EIA 2015
- Kim et el. 2013
- Statistics Canada 2010
- USDA 2009a
- Macknick et al. 2011
- EIA 2017
