# Food and beverage stores

Dataset: openLCA process, unit process
Category: 44-45: Retail Trade
Geography: United States
Time period: 2017-01-01 to 2017-12-31
Data quality: US EPA - Process Pedigree Matrix (1;1)
Exchange data quality scheme: US EPA - Flow Pedigree Matrix
Generated by: US EPA with CSRA and ERG
Owner: US EPA
Published in: Yang, Ingwersen et al. 2017
restrictionsDescription: This model shold be appropriately cited (see Yang, Ingwersen et al. 2017 source or Publication field) when used. Any changes or derivations of this model by the user should be documented. The model itself and any results from use of this model shall not be construed to consitute US EPA opinion or policy.
copyright: false

## General comment
BEA Code & Name is '445000:Food and beverage stores'. Description of the primary industry producing this good or service, adapted from the Census Bureau NAICS 2007 descriptions: Industries in the Food and Beverage Stores subsector usually retail food and beverages merchandise from fixed point-of-sale locations. Establishments in this subsector have special equipment (e.g., freezers, refrigerated display cases, refrigerators) for displaying food and beverage goods. They have staff trained in the processing of food products to guarantee the proper storage and sanitary conditions required by regulatory authority.

## Technology
The process describes the average US production of this good or service within this NAICS-based grouping defined in the BEA 2007 detailed input-output tables (BEA 2015). Distribution, wholesale and retailing of this good or service, use, and final disposal are not included. Creation of a product system with this process will enable modeling of all upstream (supply-chain) activities.

## Geography
Data represent the 50 US states

## Time period
2017 was the year in which this version of USEEIO was released and is the target date for the model

## Reference product
- Food and beverage stores: 1 USD

## Inputs from technosphere
All rows: data quality (1,3,1,1,1)
- Facilities support: 0.000349094 USD
- Water transport (boats, ships, ferries): 4.28711e-5 USD
- Valve and fittings (except for plumbing); at manufacturer: 3.06222e-5 USD
- Rubber tires; at manufacturer: 0.000189858 USD
- Audio and video equipment; at manufacturer: 0.000367467 USD
- Paints and coatings; at manufacturer: 0.000140862 USD
- Storage batteries; at manufacturer: 0.000342969 USD
- Other computer related services, including facilities management: 0.000655316 USD
- Vehicle engines and engine parts; at manufacturer: 0.000134738 USD
- Polystyrene foam products; at manufacturer: 0.000814552 USD
- Office supplies (not paper); at manufacturer: 1.83733e-5 USD
- Vehicle rental and leasing: 0.00158011 USD
- Environmental and other technical consulting services: 0.000716561 USD
- Monetary authorities and depository credit intermediation: 0.00505879 USD
- Promoters and agents: 0.000857423 USD
- Gaskets, seals, musical instruments, fasteners, brooms, brushes, mop and other misc. goods; at manufacturer: 0.000685938 USD
- Food and beverage stores: 6.73689e-5 USD
- Other retail: 0.00123101 USD
- Air transport: 0.00038584 USD
- Golf courses, marinas, ski resorts, fitness and other rec centers and industries: 0.000373591 USD
- Other real estate: 0.0809407 USD
- Vehicle repair: 0.00295811 USD
- Chemicals (except basic chemicals, agrichemicals, polymers, paints, pharmaceuticals,soaps, cleaning compounds); at manufacturer: 1.83733e-5 USD
- Pipeline transport: 3.06222e-5 USD
- Commercial machinery repair: 0.00587335 USD
- Sporting and athletic goods; at manufacturer: 4.89956e-5 USD
- Drinking water and wastewater treatment; at consumer: 0.00113915 USD
- Marketing research and all other miscellaneous professional, scientific, and technical services: 0.000924792 USD
- Wireless telecommunications: 0.00115752 USD
- Transmission and power train parts; at manufacturer: 0.0010779 USD
- Computer terminals and other computer peripheral equipment; at manufacturer: 0.00060632 USD
- Company and enterprise management: 0.0114098 USD
- Office administration: 0.000471583 USD
- Jewelry and silverware; at manufacturer: 6.12445e-6 USD
- Photographers: 3.67467e-5 USD
- Other basic organic chemicals; at manufacturer: 3.67467e-5 USD
- Commercial equipment rental: 0.000777805 USD
- Plastic bags, films, and sheets; at manufacturer: 0.00327046 USD
- Electricity; at consumer: 0.0250306 USD
- Other vehicle parts; at manufacturer: 0.00182509 USD
- Investment advice, portfolio management, and other financial advising services: 0.000208231 USD
- Other educational services: 0.000796178 USD
- Directory, mailing list, and other publishers; at publisher: 1.83733e-5 USD
- Communications equipment; at manufacturer: 1.83733e-5 USD
- Electronic equipment repair and maintenance: 0.00257227 USD
- Stationery; at manufacturer: 3.06222e-5 USD
- Adhesives; at manufacturer: 6.12445e-6 USD
- Advertising and public relations: 0.0240936 USD
- Books, newspapers, magazines, and other print media; at manufacturer: 0.000973787 USD
- Material handling equipment; at manufacturer: 0.000122489 USD
- Full-service restaurants: 0.000734934 USD
- Springs and wires; at manufacturer: 4.28711e-5 USD
- Noncomparable imports: 0.00242528 USD
- Magazines and journals; at publisher: 0.000342969 USD
- Business support: 0.00481994 USD
- Industrial process variable instruments; at manufacturer: 9.79912e-5 USD
- Dry-cleaning and laundry: 0.000263351 USD
- Civic, social, professional, and similar organizations: 0.000300098 USD
- Insurance agencies and brokerages: 0.000336845 USD
- Other textiles; at manufacturer: 0.000667565 USD
- Satellite, telecommunications resellers, and all other telecommunications: 0.0002756 USD
- Glass and glass products; at manufacturer: 0.000226605 USD
- Buildings and dwellings services: 0.00486281 USD
- Curtains and linens; at manufacturer: 1.83733e-5 USD
- All other foods; at manufacturer: 0.000134738 USD
- Nondepository credit intermediation and related activities: 0.0096705 USD
- Fluid meters and counting devices; at manufacturer: 7.34934e-5 USD
- All other food and drinking places: 0.000257227 USD
- Motor vehicle steering, suspension components (except spring), and brake systems; at manufacturer: 0.000483831 USD
- Machinery for the paper, textile, food or other industries (except semiconductor machinery); at manufacturer: 6.12445e-6 USD
- Light bulbs; at manufacturer: 6.12445e-6 USD
- Wireless communications; at manufacturer: 0.000122489 USD
- Sugar, candy, and chocolate; at manufacturer: 7.34934e-5 USD
- Vehicles and parts sales: 0.00089417 USD
- Vending, commercial laundry, and other commercial and service industry machinery; at manufacturer: 1.22489e-5 USD
- Other petroleum and coal products; at manufacturer: 0.000153111 USD
- Cardboard containers; at manufacturer: 0.00170872 USD
- Securities and commodities brokerage and exchanges: 0.00139025 USD
- Architectural, engineering, and related services: 0.000783929 USD
- Packaged meat (except poultry); at manufacturer: 1.22489e-5 USD
- Data processing and hosting: 0.00318471 USD
- Employment services: 0.00254165 USD
- Lessors of nonfinancial intangible assets: 0.00395027 USD
- Rail transport: 0.000140862 USD
- Household goods repair: 0.0016291 USD
- Gasoline, fuels, and by-products of petroleum refining; at manufacturer: 0.00422587 USD
- Clay and ceramic products; at manufacturer: 0.000128613 USD
- Fluid milk and butter; at manufacturer: 6.12445e-6 USD
- Independent artists, writers, and performers: 0.000287849 USD
- Machine shops; at manufacturer: 1.22489e-5 USD
- Fruit and vegetable preservation; at manufacturer: 6.12445e-6 USD
- Screws, nuts, and bolts; at manufacturer: 6.73689e-5 USD
- Metal pipe fittings, ball and roller bearings, industrial patterns, metal bath fixtures, other misc. fabricated metals; at manufacturer: 0.000153111 USD
- Accounting, tax preparation, bookkeeping, and payroll: 0.00576311 USD
- Corn products; at manufacturer: 0.000508329 USD
- Investigation and security: 0.00175772 USD
- Natural gas; at consumer: 0.00113302 USD
- Urethane and other foam products; at manufacturer: 0.00089417 USD
- Cutting and machine tool accessory, rolling mill, and other metalworking machines; at manufacturer: 1.83733e-5 USD
- Vehicle electrical and electronic equipment; at manufacturer: 0.000918667 USD
- News syndicates, libraries, archives, Internet publishing and all other information services: 1.83733e-5 USD
- Other plastic products; at manufacturer: 0.00406663 USD
- Warehousing: 0.0343092 USD
- Cardboard; at manufacturer: 0.000306222 USD
- Telecommunications: 0.00225992 USD
- Management consulting: 0.00303773 USD
- Paper; at manufacturer: 0.000140862 USD
- Sports: 6.12445e-6 USD
- Internet publishing and broadcasting: 0.000355218 USD
- Other rubber products; at manufacturer: 6.12445e-6 USD
- Leather; at manufacturer: 6.12445e-6 USD
- Specialized design: 0.00219255 USD
- Wild-caught fish and game; at place of capture: 0.00134738 USD
- Paper bags and coated paper; at manufacturer: 0.00224155 USD
- All other converted paper products; at manufacturer: 0.000116365 USD
- Wiring devices; at manufacturer: 7.34934e-5 USD
- Metal hinges, keys, lock, and other hardware; at manufacturer: 0.000183733 USD
- Couriers and messengers: 0.00267638 USD
- Hotels and campgrounds: 0.000508329 USD
- Soap and cleaning compounds; at manufacturer: 0.000208231 USD
- Travel arrangement and reservation: 0.000140862 USD
- Veneer, plywood, and engineered wood; at manufacturer: 0.00235179 USD
- Legal services: 0.00233341 USD
- Postal service: 0.00276213 USD
- Waste management and remediation: 0.00321534 USD
- Light gauge metal cans, boxes, and containers; at manufacturer: 6.12445e-6 USD
- Nonresidential building repair and maintanence: 0.00347869 USD
- Scenic and sightseeing transportation and support activities for transportation: 0.00198432 USD
- State and local government enterprises: 0.00134125 USD
- Passenger ground transport: 2.44978e-5 USD
- Other concrete products; at manufacturer: 8.57423e-5 USD
- Computer systems design: 0.000845174 USD
- Software: 4.89956e-5 USD
- General merchandise stores: 0.000202107 USD
- Refined vegetable, olive, and seed oils; at manufacturer: 6.12445e-6 USD
- Newspapers; at publisher: 0.000293974 USD
- Light fixtures; at manufacturer: 1.83733e-5 USD
- Relay and industrial controls; at manufacturer: 6.12445e-6 USD
- External hard drives, CDs, other storage media; at manufacturer: 5.512e-5 USD
- Wholesale trade: 0.00664503 USD
- Greenhouse crops, mushrooms, nurseries, and flowers; at farm: 0.00179446 USD
- Insurance carriers: 0.00622856 USD
- Other support services: 0.000643067 USD
- Colleges, universities, junior colleges, and professional schools: 0.00134125 USD
- Unrefined oil and gas; at extraction site: 0.000208231 USD
- Limited-service restaurants: 0.000790054 USD
- Air conditioning, refrigeration, and warm air heating equipment; at manufacturer: 0.000202107 USD
- Dry, condensed, and evaporated dairy; at manufacturer: 1.83733e-5 USD
- Consumer goods and general rental centers: 0.000171485 USD
- Flours and malts; at manufacturer: 6.12445e-6 USD
- Truck transport: 0.01378 USD
- Cutlery and handtools; at manufacturer: 0.000171485 USD
- Sound recording: 0.00109628 USD

## Inputs from nature
- Water, fresh: 0.000523466, 0.000302476 m3 (2 entries, compartments not in this file); data quality (1,2,1,4,2)
- Occupation, urban, discontinuously built: 0.00368157 m2*a; data quality (4,2,1,1,1)

## Emissions to nature
- ethane, 1,2-dichloro-: 1.75464e-13 kg; data quality (3,2,1,1,5)
- mercury: 6.36726e-13 kg; data quality (2,2,1,2,4)
- beryllium: 1.35894e-14 kg; data quality (2,2,1,1,5)
- Methane: 4.71185e-7 kg; data quality (4,2,1,4,1)
- acetaldehyde: 2.04612e-8 kg; data quality (3,2,1,4,1)
- carbon tetrachloride: 2.94633e-14 kg; data quality (4,2,1,1,5)
- nickel: 1.46516e-11 kg; data quality (3,2,1,5,1)
- benzene, ethyl-: 3.15309e-8 kg; data quality (3,2,1,4,1)
- ethane, 1,1,2-trichloro-: 2.42675e-14 kg; data quality (4,2,1,1,5)
- Phosphorus: 5.17366e-10 kg; data quality (3,1,1,1,5)
- o-Xylene: 1.50981e-9 kg; data quality (3,2,1,4,1)
- benz[a]anthracene: 3.52399e-12 kg; data quality (3,2,1,4,1)
- Indeno(1,2,3-cd)pyrene: 2.91222e-12 kg; data quality (3,2,1,4,1)
- Ethane, pentafluoro-, HFC-125: 8.41636e-8 kg; data quality (4,2,1,4,1)
- monochloroethane: 4.86963e-17 kg; data quality (3,2,1,1,5)
- chlorine: 3.72011e-16 kg; data quality (4,2,1,1,5)
- Carbon dioxide: 0.00512318 kg; data quality (4,2,1,4,1)
- fluoranthene: 3.21565e-11 kg; data quality (3,2,1,4,1)
- ammonia: 5.34948e-8 kg; data quality (3,2,1,1,4)
- manganese: 5.99864e-12 kg; data quality (3,2,1,3,3)
- pyrene: 4.02927e-11 kg; data quality (3,2,1,4,1)
- Nitrogen: 1.89927e-9 kg; data quality (2,2,1,1,5)
- formaldehyde: 4.62701e-8 kg; data quality (3,2,1,4,1)
- carbon monoxide: 4.75107e-5 kg; data quality (3,2,1,1,1)
- t-butyl methyl ether: 1.1175e-10 kg; data quality (3,2,1,1,5)
- naphthalene: 2.7565e-9 kg; data quality (3,2,1,4,1)
- anthracene: 2.40131e-11 kg; data quality (3,2,1,4,1)
- butadiene: 1.29496e-8 kg; data quality (3,2,1,4,1)
- Propene, 1,3-dichloro-: 1.43224e-14 kg; data quality (3,2,1,1,5)
- chloroform: 4.96037e-10 kg; data quality (4,2,1,1,5)
- 1,1,2,2-tetrachloroethane: 4.02103e-14 kg; data quality (3,2,1,1,5)
- hydrogen chloride: 1.88144e-10 kg; data quality (2,2,1,1,5)
- para-xylene: 7.87298e-11 kg; data quality (3,2,1,4,1)
- Ethane, 1,1,1,2-tetrafluoro-, HFC-134a: 3.17223e-7 kg; data quality (4,2,1,4,1)
- Benzo(g,h,i)perylene: 9.48927e-12 kg; data quality (3,2,1,4,1)
- fluorene: 5.75552e-11 kg; data quality (3,2,1,4,1)
- lead: 5.70362e-12 kg; data quality (3,2,1,1,5)
- Benzo(k)fluoranthene: 3.5225e-12 kg; data quality (3,2,1,4,1)
- Ethane, 1,1,1-trifluoro-, HFC-143a: 3.60101e-8 kg; data quality (4,2,1,4,1)
- hexane: 2.75249e-8 kg; data quality (3,2,1,4,1)
- biphenyl: 5.52064e-15 kg; data quality (4,2,1,1,5)
- Propane, 1,1,1,3,3,3-hexafluoro-, HCFC-236fa: 9.72823e-10 kg; data quality (4,2,1,4,1)
- Cobalt: 1.32369e-13 kg; data quality (3,2,1,1,5)
- Chrysene: 3.34146e-12 kg; data quality (3,2,1,4,1)
- Dinitrogen monoxide: 1.51545e-8 kg; data quality (4,2,1,4,1)
- Methane, difluoro-, HFC-32: 4.9013e-8 kg; data quality (4,2,1,4,1)
- acenaphthene: 3.09771e-11 kg; data quality (3,2,1,4,1)
- acrolein: 1.64712e-9 kg; data quality (3,2,1,4,1)
- 2,2,4-trimethylpentane: 4.47974e-8 kg; data quality (3,2,1,4,1)
- Ethene, chloro-: 1.23523e-14 kg; data quality (3,2,1,1,5)
- benzene, chloro-: 5.97491e-15 kg; data quality (4,2,1,1,5)
- ethane, 1,2-dibromo-: 7.69044e-12 kg; data quality (2,2,1,1,5)
- styrene: 1.2242e-9 kg; data quality (3,2,1,4,1)
- Xylene: 1.03431e-7 kg; data quality (3,2,1,4,1)
- toluene: 1.23097e-7 kg; data quality (3,2,1,4,1)
- Chromium, ion: 5.82331e-12 kg; data quality (3,2,1,4,2)
- particulates, < 2.5 um: 2.05535e-7 kg; data quality (3,2,1,4,2)
- Chromium VI: 3.01974e-12 kg; data quality (3,2,1,3,3)
- phenanthrene: 1.02738e-10 kg; data quality (3,2,1,4,1)
- Benzo(b)fluoranthene: 3.5853e-12 kg; data quality (3,2,1,4,1)
- phenol: 6.24979e-16 kg; data quality (4,2,1,1,5)
- arsenic: 6.90278e-12 kg; data quality (3,2,1,5,1)
- Dibenz(a,h)anthracene: 3.69315e-14 kg; data quality (3,2,1,3,3)
- VOC, volatile organic compounds: 2.36929e-6 kg; data quality (3,2,1,1,1)
- Hydrocarbons, aromatic: 8.80409e-10 kg; data quality (3,2,1,4,1)
- nitrogen oxides: 2.45731e-6 kg; data quality (3,2,1,1,1)
- Propane, 1,2-dichloro-: 2.07128e-14 kg; data quality (4,2,1,1,5)
- methane, bromo-, halon 1001: 1.88899e-7 kg; data quality (3,2,1,1,5)
- cadmium: 3.15926e-11 kg; data quality (3,2,1,1,5)
- propanal: 4.45866e-9 kg; data quality (3,2,1,4,1)
- methanol: 4.93348e-12 kg; data quality (4,2,1,1,5)
- benzo(a)pyrene: 3.33445e-12 kg; data quality (3,2,1,4,1)
- acenaphthylene: 1.20238e-10 kg; data quality (3,2,1,4,1)
- methane, dichloro-, hcc-30: 6.67967e-14 kg; data quality (4,2,1,1,5)
- sulfur dioxide: 1.00751e-8 kg; data quality (3,2,1,3,3)
- m-xylene: 4.20665e-9 kg; data quality (3,2,1,4,1)
- selenium: 2.17642e-14 kg; data quality (2,2,1,1,5)
- particulates, < 10 um: 2.51995e-8 kg; data quality (3,2,1,2,4)
- benzene: 8.69474e-8 kg; data quality (3,2,1,4,1)
- Water, fresh: 0.000699337 m3; data quality (1,2,1,4,2)
- 2-methylnaphthalene: 3.11074e-14 kg; data quality (2,2,1,1,5)
- ethene, tetrachloro-: 6.45811e-17 kg; data quality (3,2,1,1,5)

## Inventory method
Input-output

## Modelling constants
The reference unit of all processes is 1 USD2013 of the good or service. The technosphere inputs are based on the US BEA detailed input-output tables for 2007. The IO tables are combined to develop a commodity-by-commodity model based on the the industry-technology assumption (see Suh et al., 2010), which assumes all commodities produced by a given industry have the same input structure, but that multiple industries can produce the same commodity. Thus, model technosphere flows represent commodity outputs (and not industry outputs) from other processes in the model. There are no by-products included in these processes. All commodity production is based on US-conditions, despite in reality that some goods and services are produced overseas, as USEEIO v1.1 is a single-region IO model.

## Completeness
The input-output approach assures that all purchased inputs associated with the sectors making these commodities as reported in the US census for 2007 are included. The direct resources extracted including minerals, energy sources, water and land occupied are included. Emissions to air include all critieria air pollutants, greenhouse gases, and hazardous and toxic air pollutants as defined by US EPA. Releases to water include toxics, total nitrogen and total phosphorus, and water discharges. Releases to soil or groundwater include toxics and agriculutural pesticides. Some metal releases to air, water and soil are not included because they could not be speciated. Solid hazardous and non-hazardous wastes generated are not included as an elementary flows although purchases of waste services are included.

## Data treatment
Greenhouse gases are primarily from the US Greenhouse Gas Emission Inventory (USEPA 2016a). Biogenic C uptake is not included (change from version 1.0), as biogenic C emission are not included. Toxic releases to air, water and soil (except pesticides) are from the 2013 Toxic Release Inventory (USEPA 2015a). Criteria air pollutants and hazardous air pollutants are from the 2011 National Emissions Inventory (USEPA 2015b). All estimates are normalized by industry based on sector output in the data year, then converted to 2013 USD using relative sector-specific CPIs (if data year is not 2013). Energy use represent raw renewables or fossil fuel energies and is based on EIA data for 2014. See Table 1 in Yang, Ingwersen et al. 2017 and Supporting Information 1, and the v1.1 data update notes (Ingwersen et al. 2017) for all details on environmental data sources used.Land occupation associated with manufacturing buildings was estimated based on the building floorspace data provided by the U.S. Energy Information Administration in the 2010 Manufacturing Energy Consumption Survey (EIA 2013). Portions of total renewable energy (EIA 2016) based on EIA-923 reports for 2014 (EIA 2017) are included. Nitrogen and Phosphorus releases are modeled in total N and total P equivalents as estimated by the Discharge Monitoring Report Nutrient Loading tool (USEPA 2016b). Self-supplied withdrawals were assigned to industrial sectors based on water use statistics for Canadian industries by NAICS 3-digit sector scaled to US production levels based on gross domestic product by industry (BEA 2015; Statistics Canada 2010), and further disaggregated to the manufacturing sectors based on compensation of employees as provided by the 2007 IO tables (BEA 2015). Water withdrawals associated with public supply were allocated to sectors based on their use of water, sewage, and other services in USD based on the IO tables (BEA 2015). Portions of total renewable energy (EIA 2016) by type are assigned to sectors (hydro, wind, solar, or) based on EIA-923 reports for 2014 (EIA 2017).

## Data collection
2015-2016

## Sampling procedure
US federal government sources, including surveys and US EPA emissions databases are used as the primary sources. From these sources, data for US reporting establishments/facilities are aggregated by the NAICS sector as defined in the BEA detailed 2007 input-output tables. When level of sector aggregation differs, or when direct emissions are not reported but modeled, additional sources are used to make allocations and estimates.

## Review details
In regard to quality assurance and peer-review, each dataset created went through Quality Assurance as defined in a quality assurance project plans at US EPA, CSRA or ERG. The model was assembled with the IO model builder model (USEPA 2016c). Validation functions were used to check that all the model components were properly assembled and harmonized. Bayou Demeke and Santosh Ghimire provided internal peer review of the model methodology and the manuscript underwent standard EPA management review. An editor and two anonymous reviewers at the Journal of Cleaner Production reviewed the model. In regard to data quality evaluation, data quality assessment was performed at the flow and process levels according to the updated US EPA data quality assessment guidelines as defined in US EPA (2016b).

## Intended application
The primary application is for use in the US Environmentally-Extended Input-Ouput model, USEEIO, version 1.1. This model is being used by the US EPA for supporting tools that prioritize goods and services based on potential environmental impacts, resource use or emissions for large regions, including the US and US states, and as a strealined tool for organizations as a starting point to consider sustainable materials management. Model results are designed to provide meso/macro-level decision support.

## Project
USEEIO v1.1 was developed by the US EPA with CSRA and ERG with Wesley W. Ingwersen and David E. Meyer as research leads. Yi Yang was the technical lead on the work for CSRA (contract EP-C-15-012); Troy Hawkins was lead for ERG (contract EP-C-12-021).

## Sources
- Lovelace 2009
- EIA 2016
- BEA 2015
- USGS 2016
- USEPA 2016a
- USEPA 2016b
- Edelen and Ingwersen 2017
- Statistics Canada 2010
- Goebes et al. 2003
- Maupin et al. 2014
- EIA 2013
- USDA 2006
- USEPA 2015b
- Torcellini et al. 2003
- USDA 2009a
- USDA 2016
- USGS 2015
- BLM 2008
- USDA 2009b
- USDA 2014
- Ingwersen et al. 2017
- Ingwersen et al. DRAFT
- EIA 2017
- Macknick et al. 2011
- Nickerson et al. 2011
- Blackhurst et al. 2010
- Kim et el. 2013
- EIA 2015
- USEPA 2016c
- USEPA 2015a
- Yienger et al. 1995
