# Polystyrene foam products; at manufacturer

Dataset: openLCA process, unit process
Category: 3261: Plastics Product Manufacturing
Geography: United States
Time period: 2017-01-01 to 2017-12-31
Data quality: US EPA - Process Pedigree Matrix (1;1)
Exchange data quality scheme: US EPA - Flow Pedigree Matrix
Generated by: US EPA with CSRA and ERG
Owner: US EPA
Published in: Yang, Ingwersen et al. 2017
restrictionsDescription: This model shold be appropriately cited (see Yang, Ingwersen et al. 2017 source or Publication field) when used. Any changes or derivations of this model by the user should be documented. The model itself and any results from use of this model shall not be construed to consitute US EPA opinion or policy.
copyright: false

## General comment
BEA Code & Name is '326140:Polystyrene foam product manufacturing'. Description of the primary industry producing this good or service, adapted from the Census Bureau NAICS 2007 descriptions: This industry comprises establishments primarily engaged in manufacturing polystyrene foam products.

## Technology
The process describes the average US production of this good or service within this NAICS-based grouping defined in the BEA 2007 detailed input-output tables (BEA 2015). Distribution, wholesale and retailing of this good or service, use, and final disposal are not included. Creation of a product system with this process will enable modeling of all upstream (supply-chain) activities.

## Geography
Data represent the 50 US states

## Time period
2017 was the year in which this version of USEEIO was released and is the target date for the model

## Reference product
- Polystyrene foam products; at manufacturer: 1 USD

## Inputs from technosphere
All rows: data quality (1,3,1,1,1)
- Speed changers, industrial high-speed drives, and gears; at manufacturer: 7.92787e-7 USD
- Cutlery and handtools; at manufacturer: 0.000414938 USD
- Nonferrous metal casts; at manufacturer: 0.000130605 USD
- Iron, gold, silver, and other metal ores; at mine: 4.56828e-5 USD
- Dry-cleaning and laundry: 1.72748e-6 USD
- Metal coatings, engravings, and heat treatments; at manufacturer: 0.00647738 USD
- All other food and drinking places: 0.00115792 USD
- Cement; at manufacturer: 2.90895e-5 USD
- Nonresidential building repair and maintanence: 0.00308552 USD
- Air transport: 0.00738827 USD
- Buildings and dwellings services: 0.00449401 USD
- Concrete pipe, bricks, and blocks; at manufacturer: 0.000110973 USD
- Compressed Gases; at manufacturer: 0.00123703 USD
- Relay and industrial controls; at manufacturer: 0.00123966 USD
- Sanitary paper (tissues, napkins, diapers, etc.); at manufacturer: 4.17193e-7 USD
- Transmission and power train parts; at manufacturer: 4.17868e-6 USD
- Colleges, universities, junior colleges, and professional schools: 0.000114549 USD
- Travel arrangement and reservation: 0.000807265 USD
- Air purification and ventilation equipment; at manufacturer: 5.30436e-5 USD
- Insurance carriers: 0.00217831 USD
- Wireless telecommunications: 0.00134545 USD
- Chemicals (except basic chemicals, agrichemicals, polymers, paints, pharmaceuticals,soaps, cleaning compounds); at manufacturer: 0.00342681 USD
- Printed circuit and electronic assembly; at manufacturer: 0.00237537 USD
- Other real estate: 0.00196704 USD
- Semiconductors; at manufacturer: 0.0055755 USD
- Fabricated pipe and pipe fittings; at manufacturer: 1.63014e-5 USD
- Primary batteries; at manufacturer: 1.13255e-7 USD
- Wooden windows, door, and flooring; at manufacturer: 0.000182167 USD
- Electronic equipment repair and maintenance: 0.000639772 USD
- Urethane and other foam products; at manufacturer: 7.99171e-5 USD
- Small electrical appliances; at manufacturer: 3.42099e-5 USD
- Primary iron, steel, and ferroalloy products; at manufacturer: 0.00210618 USD
- Electronic capacitors, resistors, coils, transformers, connectors and other components (except semiconductors and printed circuit assemblies); at manufacturer: 0.00097077 USD
- Other petroleum and coal products; at manufacturer: 0.00171055 USD
- Securities and commodities brokerage and exchanges: 0.000365939 USD
- Other plastic products; at manufacturer: 0.00275679 USD
- Machinery for the paper, textile, food or other industries (except semiconductor machinery); at manufacturer: 4.9233e-5 USD
- Switchgear and switchboards; at manufacturer: 8.8445e-5 USD
- Household goods repair: 0.000387154 USD
- Aluminum; at manufacturer: 1.83936e-5 USD
- Surgical appliance and supplies; at manufacturer: 2.60505e-6 USD
- All other forging, stamping, and sintering; at manufacturer: 6.17542e-5 USD
- Metal hinges, keys, lock, and other hardware; at manufacturer: 6.79204e-5 USD
- Sand, gravel, clay, phosphate, other nonmetallic minerals; at mine: 1.58483e-5 USD
- State and local government enterprises: 0.000582172 USD
- Scientific research and development: 0.000240356 USD
- Synthetic rubber and artificial and synthetic fibers; at manufacturer: 0.0812736 USD
- Cardboard; at manufacturer: 0.00379214 USD
- Hotels and campgrounds: 0.0132933 USD
- Sports: 0.000239154 USD
- Plastic bottles; at manufacturer: 1.21893e-5 USD
- Vehicle rental and leasing: 0.00107355 USD
- Cardboard containers; at manufacturer: 0.0317262 USD
- Copper, nickel, lead, and zinc; at mine: 5.40214e-5 USD
- Other basic organic chemicals; at manufacturer: 0.0151378 USD
- Advertising and public relations: 0.00254645 USD
- Investment advice, portfolio management, and other financial advising services: 3.69231e-5 USD
- Petrochemicals; at manufacturer: 0.0111183 USD
- Other nonmetallic mineral products; at manufacturer: 1.0193e-6 USD
- Ink and ink cartridges; at manufacturer: 7.37304e-5 USD
- Custom metal rolls; at manufacturer: 1.6651e-5 USD
- Mineral wool; at manufacturer: 2.60487e-6 USD
- Communication and energy wire and cable; at manufacturer: 0.000244836 USD
- Facilities support: 0.00015642 USD
- Other support services: 0.000208925 USD
- Vehicle metal stamping; at manufacturer: 2.10845e-5 USD
- Ophthalmic goods; at manufacturer: 1.94999e-5 USD
- Passenger ground transport: 0.00177824 USD
- Specialized design: 0.000719761 USD
- Other rubber products; at manufacturer: 0.000143479 USD
- Paper bags and coated paper; at manufacturer: 0.000259023 USD
- Monetary authorities and depository credit intermediation: 0.00178285 USD
- Gasoline, fuels, and by-products of petroleum refining; at manufacturer: 0.0088532 USD
- Synthetic dyes and pigments; at manufacturer: 0.000710934 USD
- Other transportation equipment; at manufacturer: 2.16114e-6 USD
- Secondary copper products; at manufacturer: 0.000241441 USD
- Paper; at manufacturer: 0.00743744 USD
- Hydraulic pumps, motors, cylinders and actuators; at manufacturer: 6.91712e-5 USD
- Limited-service restaurants: 0.00124089 USD
- Material handling equipment; at manufacturer: 0.00056806 USD
- Specialty transformers; at manufacturer: 1.44269e-6 USD
- Water transport (boats, ships, ferries): 0.000269731 USD
- Food and beverage stores: 5.25942e-6 USD
- Computer terminals and other computer peripheral equipment; at manufacturer: 0.000240829 USD
- Wireless communications; at manufacturer: 9.84814e-7 USD
- Fluid meters and counting devices; at manufacturer: 0.000105336 USD
- Power boilers and heat exchangers; at manufacturer: 1.44076e-6 USD
- Fertilizers; at manufacturer: 0.000168554 USD
- Fiber, yarn, and thread; at manufacturer: 3.15571e-6 USD
- Aluminum products; at manufacturer: 0.0010447 USD
- Golf courses, marinas, ski resorts, fitness and other rec centers and industries: 0.000943293 USD
- Independent artists, writers, and performers: 2.80539e-5 USD
- Metal cutting and forming machine tools; at manufacturer: 5.92239e-5 USD
- Plastic bags, films, and sheets; at manufacturer: 0.0194605 USD
- Plastics and rubber industry machinery; at manufacturer: 0.000156857 USD
- Motors and generators; at manufacturer: 0.00022836 USD
- Wholesale trade: 0.0339209 USD
- Polystyrene foam products; at manufacturer: 0.000927523 USD
- Data processing and hosting: 0.00582362 USD
- Software: 6.10185e-6 USD
- Ball and roller bearings; at manufacturer: 1.8927e-5 USD
- Management consulting: 0.00226026 USD
- Valve and fittings (except for plumbing); at manufacturer: 0.000151486 USD
- Machine shops; at manufacturer: 0.00517727 USD
- Books, newspapers, magazines, and other print media; at manufacturer: 2.3647e-6 USD
- Legal services: 0.000716727 USD
- Finished and coated fabric; at manufacturer: 0.00781898 USD
- Ready-mix concrete; at manufacturer: 3.94371e-6 USD
- Other computer related services, including facilities management: 4.72727e-5 USD
- Scenic and sightseeing transportation and support activities for transportation: 0.000279348 USD
- Corn products; at manufacturer: 9.63527e-5 USD
- Other secondary nonferrous metal products; at manufacturer: 0.000213058 USD
- Ground or treated minerals and earth; at manufacturer: 4.57361e-6 USD
- Electricity; at consumer: 0.0136173 USD
- Paints and coatings; at manufacturer: 5.2675e-5 USD
- Custom computer programming: 4.66204e-6 USD
- Metal plumbing drains, faucets, valves, and other fittings; at manufacturer: 7.7598e-5 USD
- Civic, social, professional, and similar organizations: 0.000393437 USD
- Nondepository credit intermediation and related activities: 0.002268 USD
- Commercial equipment rental: 0.00053788 USD
- Promoters and agents: 7.38516e-6 USD
- Investigation and security: 0.00248919 USD
- Vehicle repair: 0.00115631 USD
- Primary copper; at manufacturer: 5.30525e-5 USD
- Wood kitchen cabinets and countertops; at manufacturer: 0.000156522 USD
- Full-service restaurants: 0.00103888 USD
- Employment services: 0.00263353 USD
- Welding and Soldering Equipment, Scales and Balances, and other general purpose machinery; at manufacturer: 1.42745e-5 USD
- Communications equipment; at manufacturer: 1.02484e-6 USD
- Consumer goods and general rental centers: 0.000130237 USD
- Wiring devices; at manufacturer: 1.98254e-5 USD
- Refined vegetable, olive, and seed oils; at manufacturer: 5.72476e-7 USD
- Fabric; at manufacturer: 0.000113192 USD
- Accounting, tax preparation, bookkeeping, and payroll: 0.00108042 USD
- Architectural, engineering, and related services: 0.00297678 USD
- Vehicle engines and engine parts; at manufacturer: 1.46599e-6 USD
- Abrasive products; at manufacturer: 0.000450793 USD
- Lids, jars, bottle caps, other metal closures and crowns; at manufacturer: 0.000238263 USD
- Other concrete products; at manufacturer: 0.000163195 USD
- Cast iron and steel; at manufacturer: 0.000112139 USD
- Company and enterprise management: 0.0212626 USD
- Heavy gauge metal tanks; at manufacturer: 1.44076e-6 USD
- Vending, commercial laundry, and other commercial and service industry machinery; at manufacturer: 1.00673e-5 USD
- Vehicle electrical and electronic equipment; at manufacturer: 0.000146486 USD
- Clay and ceramic products; at manufacturer: 7.14486e-5 USD
- Adhesives; at manufacturer: 0.00097168 USD
- Lime and gypsum products; at manufacturer: 5.05923e-5 USD
- Pipeline transport: 0.000135585 USD
- Other engine equipment; at manufacturer: 3.73742e-6 USD
- Air conditioning, refrigeration, and warm air heating equipment; at manufacturer: 0.000969366 USD
- Environmental and other technical consulting services: 0.000589254 USD
- Other retail: 0.00031279 USD
- Plywood and veneer; at manufacturer: 0.000257469 USD
- Jewelry and silverware; at manufacturer: 0.000229098 USD
- Magazines and journals; at publisher: 0.000119287 USD
- Other vehicle parts; at manufacturer: 0.000237878 USD
- Wood pulp; at manufacturer: 9.04671e-5 USD
- Telecommunications: 0.00174333 USD
- Laminated plastic plates and shapes; at manufacturer: 0.00121228 USD
- Plastic pipe, fittings, and sausage casings; at manufacturer: 0.00254826 USD
- Vehicle seating and interior trim (upholstery); at manufacturer: 4.82048e-5 USD
- Cutting and machine tool accessory, rolling mill, and other metalworking machines; at manufacturer: 0.000978931 USD
- Business support: 0.00533321 USD
- Rail transport: 0.00719773 USD
- Metal windows, doors, and architectural products; at manufacturer: 0.00058782 USD
- Marketing research and all other miscellaneous professional, scientific, and technical services: 0.00143346 USD
- Computer systems design: 0.000343329 USD
- Industrial process furnaces and ovens; at manufacturer: 1.87298e-5 USD
- Clothing; at manufacturer: 7.55858e-8 USD
- Office supplies (not paper); at manufacturer: 6.07651e-7 USD
- Soap and cleaning compounds; at manufacturer: 0.000239891 USD
- Heating equipment other than warm air furnaces; at manufacturer: 7.65565e-5 USD
- Gaskets, seals, musical instruments, fasteners, brooms, brushes, mop and other misc. goods; at manufacturer: 0.000204451 USD
- Commercial machinery repair: 0.00230802 USD
- Plastics; at manufacturer: 0.236497 USD
- Other basic inorganic chemicals; at manufacturer: 0.0154557 USD
- Air and gas compressors; at manufacturer: 7.03957e-5 USD
- Metal structural products; at manufacturer: 8.70453e-5 USD
- Vehicles and parts sales: 4.3882e-5 USD
- Secondary steel products; at manufacturer: 0.000200086 USD
- Couriers and messengers: 0.000114549 USD
- Other primary nonferrous metals; at manufacturer: 0.000221542 USD
- Office administration: 0.000590362 USD
- Rubber and plastic belts and hoses; at manufacturer: 7.05139e-5 USD
- Motor vehicle steering, suspension components (except spring), and brake systems; at manufacturer: 2.08785e-6 USD
- Other textiles; at manufacturer: 2.82293e-6 USD
- Performances: 0.00091924 USD
- Veneer, plywood, and engineered wood; at manufacturer: 0.000104613 USD
- Light bulbs; at manufacturer: 2.66278e-5 USD
- Satellite, telecommunications resellers, and all other telecommunications: 0.000130942 USD
- Asphalt pavement; at manufacturer: 2.92573e-5 USD
- Coal; at mine: 0.00145018 USD
- Rubber tires; at manufacturer: 1.90457e-7 USD
- Insurance agencies and brokerages: 0.000721939 USD
- General merchandise stores: 1.27309e-5 USD
- Special tools, dies, jigs, and fixtures; at manufacturer: 1.25158e-6 USD
- Springs and wires; at manufacturer: 4.11e-6 USD
- Drinking water and wastewater treatment; at consumer: 0.00046169 USD
- Industrial molds; at manufacturer: 9.02027e-5 USD
- Vegetable oils and by-products; at manufacturer: 5.25891e-6 USD
- Truck transport: 0.0106955 USD
- Carbon and graphite products; at manufacturer: 6.1941e-5 USD
- Noncomparable imports: 0.000419111 USD
- Leather; at manufacturer: 2.48677e-5 USD
- Screws, nuts, and bolts; at manufacturer: 0.00186891 USD
- Glass and glass products; at manufacturer: 0.00126405 USD
- Lumber and treated lumber; at manufacturer: 7.94549e-5 USD
- Metal pipe fittings, ball and roller bearings, industrial patterns, metal bath fixtures, other misc. fabricated metals; at manufacturer: 0.000560355 USD
- other miscellaneous electrical equipment and components; at manufacturer: 1.47232e-6 USD
- Lessors of nonfinancial intangible assets: 0.00136145 USD
- Industrial process variable instruments; at manufacturer: 0.000206239 USD
- Mechanical power transmission equipment; at manufacturer: 9.13378e-5 USD
- Natural gas; at consumer: 0.0142307 USD
- Light gauge metal cans, boxes, and containers; at manufacturer: 2.33052e-5 USD
- Postal service: 2.73002e-6 USD
- Warehousing: 0.00202925 USD
- Waste management and remediation: 0.00135794 USD
- All other converted paper products; at manufacturer: 1.10374e-5 USD
- Light fixtures; at manufacturer: 4.32044e-5 USD
- Unrefined oil and gas; at extraction site: 0.00025463 USD

## Inputs from nature
- Energy, biomass: 0.0204765 MJ; data quality (3,1,1,1,1)
- Energy, hydraulic potential: 6.86379e-6 MJ; data quality (3,1,1,1,1)
- Water, fresh: 0.000908312 m3; data quality (3,2,1,4,2)
- Water, fresh: 0.000309461 m3; data quality (2,2,1,4,2)
- Occupation, urban, discontinuously built: 0.000116484 m2*a; data quality (4,2,1,1,1)
- Occupation, industrial area: 0.00102809 m2*a; data quality (4,2,1,1,1)
- Energy, wind: 7.80084e-5 MJ; data quality (3,1,1,1,1)
- Occupation, industrial area, built up: 0.000342697 m2*a; data quality (4,2,1,1,1)
- Water, saline: 5.19631e-5 m3; data quality (4,2,1,4,2)

## Emissions to nature
- acenaphthene: 8.64135e-11 kg; data quality (3,2,1,4,1)
- copper: 8.67155e-10, 1.69931e-10 kg (2 entries, compartments not in this file); data quality (4,1,1,1,5)
- toluene, 2,4-dinitro-: 1.22893e-14 kg; data quality (5,2,1,1,4)
- nickel: 2.06346e-9 kg; data quality (3,2,1,1,4)
- acetaldehyde: 5.28325e-10 kg; data quality (3,1,1,1,4)
- 2-methylnaphthalene: 6.66235e-12 kg; data quality (2,2,1,1,4)
- Thiram: 1.97629e-11 kg; data quality (4,1,1,1,4)
- styrene: 3.47409e-9 kg; data quality (3,1,1,1,5)
- particulates, < 2.5 um: 1.50506e-5 kg; data quality (3,2,1,1,4)
- NITROUS ACID: 3.14176e-10, 1.98869e-8 kg (2 entries, compartments not in this file); data quality (5,1,1,1,4)
- 4-nitrophenol: 4.69476e-14 kg; data quality (2,2,1,1,4)
- 1,1,2,2-tetrachloroethane: 8.12113e-11 kg; data quality (3,2,1,1,4)
- SEC-BUTYL ALCOHOL: 2.31823e-13, 1.15911e-12 kg (2 entries, compartments not in this file); data quality (5,1,1,1,4)
- Cobalt: 1.53341e-9 kg; data quality (3,2,1,1,5)
- VOC, volatile organic compounds: 0.00109674 kg; data quality (3,2,1,1,4)
- Propene: 3.45737e-7 kg; data quality (3,1,1,1,4)
- 2-ethoxyethyl acetate: 1.58017e-9 kg; data quality (3,2,1,1,5)
- arsenic: 4.68925e-12, 3.74916e-11 kg (2 entries, compartments not in this file); data quality (2,1,1,1,4)
- Ethane, 2-chloro-1,1,1,2-tetrafluoro-, HCFC-124: 7.0706e-11 kg; data quality (4,1,1,1,4)
- methane, monochloro-, r-40: 1.76203e-8 kg; data quality (3,2,1,1,4)
- ETHENE: 9.19171e-7, 1.15911e-12 kg (2 entries, compartments not in this file); data quality (3,1,1,1,4)
- Acrylic acid: 3.24552e-12 kg; data quality (4,1,1,1,4)
- Acetophenone: 1.35848e-10 kg; data quality (4,1,1,1,4)
- Methane, bromo-, Halon 1001: 9.96839e-12 kg; data quality (5,1,1,1,4)
- Propane, 1,1,1,3,3,3-hexafluoro-, HCFC-236fa: 2.58039e-9 kg; data quality (4,2,1,4,1)
- 1,1-DICHLOROETHYLENE: 2.31823e-15 kg; data quality (4,1,1,1,4)
- MOLYBDENUM(VI): 1.20571e-10, 1.52069e-10 kg (2 entries, compartments not in this file); data quality (3,1,1,1,4)
- 4,4'-DIAMINODIPHENYL ETHER: 7.28689e-10 kg; data quality (5,1,1,1,4)
- vinyl acetate: 2.62828e-6 kg; data quality (4,2,1,1,4)
- biphenyl: 6.08045e-9 kg; data quality (4,2,1,1,4)
- ethylene oxide: 6.21456e-10 kg; data quality (3,2,1,1,4)
- Ethene, trichloro-: 9.68612e-13 kg; data quality (5,1,1,1,5)
- Propane, 1,2-dichloro-: 2.27144e-11 kg; data quality (4,2,1,1,4)
- Methane, dichloro-, HCC-30: 6.98714e-11, 2.08285e-10 kg (2 entries, compartments not in this file); data quality (5,1,1,1,4)
- methanol: 5.79877e-9, 7.30394e-9 kg (2 entries, compartments not in this file); data quality (3,1,1,1,4)
- Triethyl amine: 3.58286e-8 kg; data quality (4,2,1,1,4)
- phosgene: 8.52086e-11 kg; data quality (5,2,1,1,4)
- 1,4-dichlorobenzene: 1.15911e-12 kg; data quality (2,1,1,1,4)
- 4-Methyl-2-pentanone: 7.69652e-11 kg; data quality (4,1,1,1,4)
- isobutyraldehyde: 4.44474e-9, 1.15911e-12 kg (2 entries, compartments not in this file); data quality (2,1,1,1,4)
- Cumene hydroperoxide: 2.80284e-9, 1.0432e-11 kg (2 entries, compartments not in this file); data quality (2,1,1,1,4)
- sulfur dioxide: 9.85906e-6 kg; data quality (2,2,1,1,4)
- trichloroethylene: 1.20709e-7 kg; data quality (4,2,1,1,5)
- Epichlorohydrin: 4.63646e-13 kg; data quality (2,1,1,1,4)
- aniline: 7.15138e-11 kg; data quality (4,2,1,1,5)
- 1,2-DICHLOROBENZENE: 6.05058e-9, 5.79557e-11 kg (2 entries, compartments not in this file); data quality (5,1,1,1,4)
- Titanium: 3.38773e-11 kg; data quality (5,2,1,1,4)
- hexane: 4.47407e-6 kg; data quality (3,2,1,1,4)
- cadmium: 7.19397e-10 kg; data quality (3,2,1,1,4)
- propanal: 1.22382e-8 kg; data quality (3,2,1,4,1)
- m-cresol: 2.25375e-11 kg; data quality (4,2,1,1,4)
- HCFC-142b: 1.37726e-9, 1.32835e-10 kg (2 entries, compartments not in this file); data quality (2,1,1,1,4)
- benzo(a)pyrene: 1.1993e-11 kg; data quality (2,2,1,1,5)
- Cadmium: 9.32235e-13 kg; data quality (3,1,1,1,4)
- MALEIC ANHYDRIDE: 9.27292e-12, 1.15911e-12 kg (2 entries, compartments not in this file); data quality (4,1,1,1,4)
- Ethane, 1,1,2-trichloro-1,2,2-trifluoro-, CFC-113: 2.4105e-9 kg; data quality (4,1,1,1,4)
- SEC-BUTYL ALCOHOL: 5.12367e-9 kg; data quality (5,1,1,1,5)
- Decabromodiphenyl oxide: 4.73371e-11 kg; data quality (4,1,1,1,5)
- Xylene: 7.8588e-11, 8.13328e-11 kg (2 entries, compartments not in this file); data quality (4,1,1,1,4)
- methane, tetrachloro-, R-10: 1.52459e-10 kg; data quality (3,1,1,1,5)
- Sulfuric acid: 1.03827e-7 kg; data quality (2,1,1,1,4)
- 4,4'-METHYLENEDIANILINE: 1.24565e-9 kg; data quality (4,2,1,1,4)
- Methyl acrylate: 3.01602e-12, 3.12037e-9 kg (2 entries, compartments not in this file); data quality (3,1,1,1,4)
- Water, saline: 2.63296e-5 m3; data quality (4,2,1,4,2)
- n-nitrosodimethylamine: 1.09365e-13 kg; data quality (5,2,1,1,4)
- formic acid: 2.19056e-9 kg; data quality (3,1,1,1,4)
- Methane, dichlorodifluoro-, CFC-12: 2.96733e-11, 1.02651e-9 kg (2 entries, compartments not in this file); data quality (4,1,1,1,4)
- ALUMINUM OXIDE: 2.20843e-11, 4.84306e-11 kg (2 entries, compartments not in this file); data quality (5,1,1,1,5)
- Benzo(b)fluoranthene: 1.04404e-11 kg; data quality (2,2,1,1,4)
- Cresol: 5.028e-11 kg; data quality (4,2,1,1,4)
- Dinitrogen monoxide: 2.2367e-7 kg; data quality (4,2,1,4,1)
- Carboxin: 5.96944e-12 kg; data quality (5,1,1,1,4)
- Cumene: 6.95469e-13 kg; data quality (3,1,1,1,4)
- cyanide: 2.3481e-8 kg; data quality (3,2,1,1,4)
- Diglycidyl resorcinol ether, technical grade: 4.63646e-13 kg; data quality (5,1,1,1,4)
- 4,4'-METHYLENEBIS(2-CHLOROANALINE): 7.43877e-11 kg; data quality (1,1,1,1,4)
- carbon monoxide: 0.000112321 kg; data quality (3,2,1,1,2)
- hexachloro-1,3-butadiene: 5.46825e-15 kg; data quality (4,2,1,1,4)
- PYRIDINE: 2.53985e-9 kg; data quality (4,1,1,1,4)
- phenol: 4.08971e-10 kg; data quality (3,1,1,1,4)
- benzene: 5.79557e-12 kg; data quality (3,1,1,1,4)
- ETHYL ACRYLATE: 1.22403e-12 kg; data quality (3,1,1,1,4)
- Ethane, 1,1,1-trifluoro-, HFC-143a: 9.55159e-8 kg; data quality (4,2,1,4,1)
- hydrogen sulfide: 2.67081e-7 kg; data quality (3,1,1,1,5)
- Ethene, chloro-: 7.74119e-8 kg; data quality (3,2,1,1,4)
- Dimethylamine: 4.24236e-11, 2.92097e-11 kg (2 entries, compartments not in this file); data quality (3,1,1,1,4)
- dicyclopentadiene: 1.15911e-12, 1.077e-8 kg (2 entries, compartments not in this file); data quality (4,1,1,1,4)
- Chromium, ion: 1.62221e-9 kg; data quality (2,2,1,1,4)
- 1,2,4-trimethylbenzene: 9.32162e-9 kg; data quality (5,1,1,1,4)
- AMMONIA: 1.22585e-7 kg; data quality (3,1,1,1,4)
- epichlorohydrin: 2.99061e-9 kg; data quality (3,2,1,1,4)
- acrylic acid: 5.29534e-9 kg; data quality (4,2,1,1,4)
- HYDROCHLORIC ACID: 4.20226e-9 kg; data quality (2,1,1,1,4)
- Cresol, o-: 6.95469e-15 kg; data quality (2,1,1,1,4)
- Ethylene glycol: 1.52076e-10 kg; data quality (5,1,1,1,4)
- Chromium VI: 3.54539e-10 kg; data quality (3,2,1,1,4)
- Ethylene glycol monoethyl ether: 3.59326e-11, 6.25922e-10, 3.85264e-8 kg (3 entries, compartments not in this file); data quality (5,1,1,1,4)
- Chrysene: 2.09123e-11 kg; data quality (2,2,1,1,4)
- DIETHANOLAMINE: 1.23979e-10 kg; data quality (4,1,1,1,4)
- Acrylonitrile: 2.31823e-13, 9.07355e-12 kg (2 entries, compartments not in this file); data quality (3,1,1,1,4)
- Nitrogen: 5.54997e-7 kg; data quality (3,2,1,1,5)
- nickel: 9.2527e-10 kg; data quality (4,1,1,1,5)
- ethane, 1,2-dibromo-: 3.89817e-11 kg; data quality (2,2,1,1,4)
- toluene: 1.01033e-10, 2.33569e-9 kg (2 entries, compartments not in this file); data quality (5,1,1,1,4)
- Benzo(g,h,i)perylene: 3.89809e-10 kg; data quality (3,2,1,1,4)
- methane, bromo-, halon 1001: 1.6606e-8 kg; data quality (3,2,1,1,4)
- n-nitrosomorpholine: 9.69371e-14 kg; data quality (4,2,1,1,4)
- BUTYL ISOCYANATE: 3.82285e-9 kg; data quality (5,2,1,1,5)
- Butyraldehyde: 2.46522e-8, 3.29189e-11 kg (2 entries, compartments not in this file); data quality (4,1,1,1,4)
- acetophenone: 7.20232e-8 kg; data quality (4,2,1,1,4)
- hexachloroethane: 5.86355e-11 kg; data quality (4,2,1,1,4)
- benzene: 5.74937e-8 kg; data quality (3,2,1,3,2)
- Propene, 1,3-dichloro-: 1.20319e-11 kg; data quality (3,2,1,1,4)
- TRICHLOROACETIC ACID: 1.66913e-12 kg; data quality (5,1,1,1,4)
- Benzene, chloro-: 2.08641e-12 kg; data quality (3,1,1,1,4)
- ethyl acrylate: 6.02783e-9 kg; data quality (4,2,1,1,4)
- Ethene, chloro-: 5.03056e-12 kg; data quality (4,1,1,1,4)
- Triethylene glycol: 6.50733e-10 kg; data quality (5,2,1,1,5)
- p-phenylenediamine: 1.04406e-8 kg; data quality (5,2,1,1,4)
- Dimethyl sulfate: 7.47956e-12 kg; data quality (2,2,1,1,4)
- pentachlorophenol: 2.17665e-14 kg; data quality (3,2,1,1,4)
- 1,1,1-trichloroethane: 1.45205e-8 kg; data quality (4,2,1,1,5)
- ethane, 1,2-dichloro-: 2.52338e-8 kg; data quality (3,2,1,1,4)
- carbon tetrachloride: 1.61648e-9 kg; data quality (4,2,1,1,4)
- fluorene: 1.8454e-10 kg; data quality (2,2,1,2,3)
- chlorine: 4.55761e-8 kg; data quality (4,2,1,1,4)
- 2,4-dimethylphenol: 1.15911e-10 kg; data quality (4,1,1,1,4)
- chlorine: 9.50438e-11 kg; data quality (2,1,1,1,4)
- 1-Methyl-2-pyrrolidinone: 1.79527e-9, 2.31823e-13, 1.72419e-8 kg (3 entries, compartments not in this file); data quality (5,1,1,1,4)
- manganese: 4.02631e-9 kg; data quality (3,2,1,1,5)
- chromium: 5.21689e-12 kg; data quality (4,1,1,1,4)
- naphthalene: 7.93267e-9 kg; data quality (3,2,1,2,4)
- Formaldehyde: 1.07566e-11 kg; data quality (2,1,1,1,4)
- hydroquinone: 1.32016e-9 kg; data quality (3,2,1,1,4)
- Phosphorus: 4.44772e-7 kg; data quality (3,1,1,1,2)
- Propanal: 9.96839e-12 kg; data quality (2,1,1,1,4)
- Methane, monochloro-, R-40: 3.47734e-12 kg; data quality (3,1,1,1,4)
- lead: 2.62041e-9 kg; data quality (3,2,1,1,4)
- TERT-BUTYL ALCOHOL: 4.70832e-10, 8.54629e-9 kg (2 entries, compartments not in this file); data quality (4,1,1,1,4)
- 1,4-dichlorobenzene: 1.13413e-8 kg; data quality (2,2,1,1,4)
- benz[a]anthracene: 1.12232e-10 kg; data quality (2,2,1,1,4)
- methylene diphenyl diisocyanate: 4.18568e-8 kg; data quality (4,2,1,1,4)
- ethene, tetrachloro-: 2.60706e-8 kg; data quality (3,2,1,1,4)
- 1,3-PHENYLENEDIAMINE: 5.92248e-10 kg; data quality (4,1,1,1,4)
- NITROGEN TRIFLUORIDE: 5.91149e-11 kg; data quality (3,1,1,1,4)
- Styrene: 1.1052e-10 kg; data quality (3,1,1,1,5)
- o-toluidine: 3.59326e-11 kg; data quality (3,1,1,1,4)
- nitrogen oxides: 5.91924e-5 kg; data quality (2,2,1,1,3)
- BUTYL ACRYLATE: 1.43469e-8, 2.86997e-12 kg (2 entries, compartments not in this file); data quality (4,1,1,1,4)
- 2-METHOXYETHANOL: 9.24113e-11 kg; data quality (4,2,1,1,5)
- NITRIC ACID: 1.48136e-11 kg; data quality (3,1,1,1,5)
- 1,2-BUTYLENE OXIDE: 2.76564e-8 kg; data quality (4,2,1,1,4)
- diethanolamine: 3.51242e-8 kg; data quality (3,2,1,1,4)
- ethane, 1,1,2-trichloro-: 1.34833e-9 kg; data quality (4,2,1,1,4)
- 3,3'-dimethylbenzidine: 1.98413e-14 kg; data quality (1,2,1,1,5)
- acetonitrile: 4.8724e-11 kg; data quality (3,2,1,1,4)
- Sodium formate: 9.68612e-13, 1.16233e-12 kg (2 entries, compartments not in this file); data quality (3,1,1,1,5)
- Nickel, ion: 1.14503e-11 kg; data quality (3,2,1,1,5)
- silver: 9.68612e-13 kg; data quality (4,1,1,1,5)
- Butanol: 1.43198e-9 kg; data quality (5,1,1,1,4)
- 2-nitropropane: 2.28732e-10 kg; data quality (3,2,1,1,4)
- Benzene, ethyl-: 8.22902e-11, 3.12961e-11 kg (2 entries, compartments not in this file); data quality (4,1,1,1,4)
- Ethane, 1,2-dichloro-: 1.36776e-11 kg; data quality (4,1,1,1,4)
- 2,4/2,6-toluenediisocyanate (mixture): 3.88126e-10 kg; data quality (4,1,1,1,4)
- 1,3-PROPANEDIOL, 2,2-BIS(BRME)-: 3.29189e-11 kg; data quality (2,1,1,1,4)
- 3-methylcholanthrene: 4.80958e-14 kg; data quality (2,2,1,1,4)
- Acrolein: 1.15911e-12, 6.95469e-13 kg (2 entries, compartments not in this file); data quality (2,1,1,1,4)
- Pentachloroethane: 1.9122e-10 kg; data quality (3,1,1,1,4)
- catechol: 1.54105e-10 kg; data quality (5,2,1,1,4)
- Methane, difluoro-, HFC-32: 1.30006e-7 kg; data quality (4,2,1,4,1)
- Cobalt: 3.03257e-12 kg; data quality (4,1,1,1,4)
- isophorone: 2.91551e-9 kg; data quality (2,2,1,1,5)
- mercury: 7.34813e-11 kg; data quality (2,2,1,1,4)
- Phthalate, dioctyl-: 8.32244e-11 kg; data quality (4,1,1,1,4)
- 2,4/2,6-toluenediisocyanate (mixture): 1.23979e-10 kg; data quality (1,1,1,1,4)
- copper: 8.21905e-10 kg; data quality (4,1,1,1,4)
- Hexane: 1.4883e-12 kg; data quality (4,1,1,1,4)
- Methyl methacrylate: 1.19806e-11 kg; data quality (3,1,1,1,4)
- 2,3,4'-TRICHLOROBIPHENYL: 1.10997e-15 kg; data quality (2,2,1,1,4)
- ALLYL ALCOHOL: 1.7648e-9, 1.02141e-9 kg (2 entries, compartments not in this file); data quality (4,1,1,1,4)
- Xylene: 1.37189e-6 kg; data quality (4,2,1,1,4)
- Aluminum: 9.5276e-10 kg; data quality (4,1,1,1,5)
- Bisphenol A: 1.74363e-10 kg; data quality (4,1,1,1,4)
- methane, chlorodifluoro-, hcfc-22: 4.80027e-8 kg; data quality (4,1,1,1,4)
- dibenzofuran: 5.30811e-11 kg; data quality (4,2,1,1,4)
- maleic anhydride: 6.84939e-9 kg; data quality (2,2,1,1,4)
- Benzo(a)anthracene: 7.68508e-14 kg; data quality (2,2,1,1,4)
- hydrogen fluoride: 2.281e-8 kg; data quality (2,2,1,1,4)
- 2,4-dinitrophenol: 7.68224e-14 kg; data quality (5,2,1,1,4)
- Phthalate, dimethyl-: 1.64544e-8 kg; data quality (4,2,1,1,5)
- OXIRANEMETHANOL: 7.41834e-12 kg; data quality (5,1,1,1,4)
- phthalate, dioctyl-: 8.19894e-10 kg; data quality (3,2,1,1,4)
- Indeno(1,2,3-cd)pyrene: 8.92361e-13 kg; data quality (3,2,1,3,2)
- Naphthalene: 2.31823e-13 kg; data quality (4,1,1,1,4)
- bromine: 8.56906e-8 kg; data quality (5,1,1,1,4)
- formaldehyde: 2.04238e-9 kg; data quality (2,1,1,1,4)
- ACRYLAMIDE: 6.02174e-11 kg; data quality (4,2,1,1,4)
- Ethane, 1,1,1-trichloro-, HCFC-140: 2.31823e-12 kg; data quality (3,1,1,1,4)
- monochloroethane: 3.99163e-9 kg; data quality (3,2,1,1,4)
- cumene: 8.143e-8 kg; data quality (4,2,1,1,4)
- pyrene: 1.54336e-11 kg; data quality (3,2,1,3,2)
- Triethyl amine: 9.82929e-11 kg; data quality (5,1,1,1,4)
- o-cresol: 1.26391e-9 kg; data quality (4,2,1,1,4)
- Ethene, tetrachloro-: 1.66913e-11 kg; data quality (3,1,1,1,4)
- Carbon dioxide: 0.0901945 kg; data quality (4,2,1,4,1)
- Methane: 1.91314e-6 kg; data quality (4,2,1,4,1)
- carbonyl sulfide: 9.99187e-9 kg; data quality (4,2,1,1,4)
- propylene oxide: 4.94554e-10 kg; data quality (3,2,1,1,5)
- phthalic anhydride: 6.36277e-9 kg; data quality (2,2,1,1,4)
- benzene, chloro-: 2.32626e-8 kg; data quality (4,2,1,1,4)
- Phthalate, dibutyl-: 5.08236e-10 kg; data quality (3,2,1,1,4)
- PHTHALIC ANHYDRIDE: 3.70917e-12 kg; data quality (3,1,1,1,4)
- ALLYL CHLORIDE: 2.3588e-10 kg; data quality (3,2,1,1,4)
- PICRIC ACID: 6.95469e-12 kg; data quality (5,1,1,1,4)
- mercury: 2.32478e-12 kg; data quality (3,1,1,1,5)
- 1,4-dioxane: 4.19878e-9 kg; data quality (4,1,1,1,4)
- CYANAMIDE: 2.62711e-13 kg; data quality (2,1,1,1,4)
- phenanthrene: 2.26491e-10 kg; data quality (3,2,1,4,1)
- Formic acid: 5.79557e-11, 4.13023e-8 kg (2 entries, compartments not in this file); data quality (3,1,1,1,4)
- Urethane: 2.31823e-12 kg; data quality (4,1,1,1,4)
- lead: 8.51982e-12, 6.95191e-13 kg (2 entries, compartments not in this file); data quality (3,1,1,1,4)
- ammonia: 9.05813e-7 kg; data quality (3,2,1,1,4)
- 2,2,4-trimethylpentane: 3.96737e-7 kg; data quality (3,2,1,1,4)
- Decabromodiphenyl oxide: 2.31823e-15 kg; data quality (4,1,1,1,4)
- Cresol, p-: 2.31823e-15 kg; data quality (3,1,1,1,4)
- butadiene: 5.5066e-8 kg; data quality (2,2,1,1,4)
- isoprene: 1.54093e-9 kg; data quality (3,1,1,1,4)
- 4,4'-METHYLENEBIS(2-CHLOROANALINE): 3.62773e-12 kg; data quality (4,1,1,1,4)
- acrylonitrile: 2.71129e-8 kg; data quality (4,2,1,1,4)
- nickel: 1.15587e-10 kg; data quality (4,1,1,1,4)
- Zinc: 5.39131e-10 kg; data quality (5,1,1,1,4)
- para-xylene: 7.70848e-8 kg; data quality (3,2,1,1,4)
- tertiary-Butyl Acetate: 3.45598e-7 kg; data quality (3,2,1,1,4)
- HYDROQUINONE: 6.16649e-10 kg; data quality (2,1,1,1,4)
- Methyl iodide: 7.14922e-12 kg; data quality (4,2,1,1,4)
- Phenol: 8.81617e-11 kg; data quality (3,1,1,1,5)
- o-Xylene: 8.01246e-8 kg; data quality (3,2,1,1,4)
- formaldehyde: 2.63e-7 kg; data quality (3,2,1,3,2)
- antimony: 6.2471e-11, 7.12452e-12 kg (2 entries, compartments not in this file); data quality (2,1,1,1,4)
- Chloroacetic acid: 1.05549e-10 kg; data quality (3,1,1,1,4)
- beryllium: 1.17283e-11 kg; data quality (2,2,1,1,4)
- Methyl iodide: 9.27292e-13 kg; data quality (2,1,1,1,4)
- O-ANISIDINE: 5.81876e-11 kg; data quality (2,1,1,1,4)
- benzyl chloride: 6.02116e-10 kg; data quality (2,2,1,1,5)
- BENZ(A)ACRIDINE: 1.68935e-15 kg; data quality (2,2,1,1,4)
- ACETONE CYANOHYDRIN: 3.94099e-11 kg; data quality (3,1,1,1,4)
- carbon disulfide: 1.79053e-6 kg; data quality (4,2,1,1,5)
- toluene-2,4-diisocyante: 3.02042e-7 kg; data quality (3,2,1,1,4)
- Ethane, 1,1,1,2-tetrafluoro-, HFC-134a: 8.43087e-7 kg; data quality (4,2,1,4,1)
- Aniline: 5.72603e-11 kg; data quality (3,1,1,1,4)
- Cyclohexanol: 7.02887e-10 kg; data quality (4,1,1,1,4)
- Butadiene: 1.15911e-12 kg; data quality (3,1,1,1,4)
- Ethane, 1,1-dichloro-1-fluoro-, HCFC-141b: 3.07861e-10 kg; data quality (2,1,1,1,4)
- 4,4'-isopropylidenediphenol: 3.04056e-9 kg; data quality (4,1,1,1,4)
- 1,2,4-trichlorobenzene: 3.6691e-12 kg; data quality (3,2,1,1,4)
- PHOSPHORUS: 4.5096e-11 kg; data quality (2,2,1,1,4)
- Benzo(b,j,k)fluoranthene: 8.09301e-17 kg; data quality (5,2,1,1,4)
- silver: 5.08113e-11 kg; data quality (4,1,1,1,4)
- Ethylene oxide: 4.63646e-13 kg; data quality (4,1,1,1,4)
- hydrogen chloride: 3.24635e-7 kg; data quality (2,2,1,1,4)
- ACRYLAMIDE: 3.47734e-12 kg; data quality (4,1,1,1,4)
- manganese: 3.22232e-11, 1.04762e-12 kg (2 entries, compartments not in this file); data quality (4,1,1,1,5)
- Cresol: 5.79557e-11 kg; data quality (2,1,1,1,4)
- acetamide: 9.96839e-12 kg; data quality (4,1,1,1,4)
- Dimethipin: 4.85999e-11 kg; data quality (5,1,1,1,4)
- Sulfur hexafluoride: 1.45785e-9 kg; data quality (4,2,1,4,1)
- Carbon disulfide: 1.19734e-10 kg; data quality (4,1,1,1,5)
- cyclohexane: 1.35844e-7 kg; data quality (4,1,1,1,4)
- HYDROFLUORIC ACID: 6.25922e-12 kg; data quality (3,1,1,1,4)
- 2,2-BIS(4-HYDROXY-3,5-DIBROMOPHENYL)PROPANE: 1.62276e-12, 6.51319e-11 kg (2 entries, compartments not in this file); data quality (5,1,1,1,4)
- Benzo(k)fluoranthene: 1.46703e-11 kg; data quality (2,2,1,1,5)
- Propylene oxide: 5.79557e-11 kg; data quality (3,1,1,1,4)
- N,N-DIMETHYLANILINE: 5.31866e-10 kg; data quality (5,2,1,1,5)
- acrolein: 8.07286e-9 kg; data quality (2,2,1,2,3)
- butanol: 5.21979e-8 kg; data quality (5,1,1,1,4)
- PCB-1: 9.38855e-17 kg; data quality (2,2,1,1,4)
- Nitrobenzene: 5.22017e-14 kg; data quality (4,2,1,1,4)
- N-Methylolacrylamide: 3.24552e-12, 2.11814e-9 kg (2 entries, compartments not in this file); data quality (5,1,1,1,4)
- Tetrafluoroethylene (TFE): 3.1335e-8 kg; data quality (4,1,1,1,4)
- Vinyl acetate: 2.66596e-10, 2.4666e-12 kg (2 entries, compartments not in this file); data quality (4,1,1,1,4)
- Benzene, 1,2,4-trimethyl-: 2.8746e-13 kg; data quality (5,1,1,1,4)
- CFC-114: 2.31823e-11 kg; data quality (5,1,1,1,4)
- 1,1-DICHLOROETHYLENE: 2.2755e-9 kg; data quality (3,2,1,1,4)
- Ethane, pentafluoro-, HFC-125: 2.23242e-7 kg; data quality (4,2,1,4,1)
- hexachlorobenzene: 3.96448e-13 kg; data quality (3,2,1,1,4)
- p-cresol: 1.94857e-11 kg; data quality (4,2,1,1,4)
- naphthalene: 7.18883e-12 kg; data quality (4,1,1,1,4)
- AZIRIDINE: 2.21215e-11 kg; data quality (4,2,1,1,4)
- particulates, < 10 um: 2.21717e-6 kg; data quality (3,2,1,1,4)
- Chloroform: 7.41834e-12 kg; data quality (3,1,1,1,4)
- 1,2-DICHLOROETHYLENE: 2.36657e-10 kg; data quality (5,1,1,1,4)
- Water, fresh: 0.00103862 m3; data quality (3,2,1,4,2)
- toluene-2,4-diisocyante: 1.28939e-11 kg; data quality (2,1,1,1,4)
- toluene: 3.84103e-6 kg; data quality (3,2,1,1,4)
- Diethylene glycol butyl ether: 3.03595e-9 kg; data quality (4,2,1,1,5)
- Biphenyl: 1.15911e-12 kg; data quality (3,1,1,1,4)
- Methane, tetrachloro-, R-10: 1.42988e-11 kg; data quality (3,1,1,1,4)
- 2,4,5,2',5'-PENTACHLOROBIPHENYL: 1.88532e-15 kg; data quality (2,2,1,1,4)
- chromium: 6.82477e-10, 1.29253e-10 kg (2 entries, compartments not in this file); data quality (4,1,1,1,5)
- Phenol, 2,4-dimethyl-: 1.15911e-12 kg; data quality (4,1,1,1,4)
- Hydrazine, methyl-: 7.46567e-12 kg; data quality (2,2,1,1,4)
- nitric acid: 2.41825e-9 kg; data quality (3,1,1,1,4)
- 1,4-BENZOQUINONE: 4.97113e-14 kg; data quality (3,2,1,1,4)
- arsenic: 5.46744e-10 kg; data quality (3,2,1,1,4)
- Asbestos: 1.91972e-12 kg; data quality (5,2,1,1,4)
- M-CRESOL: 2.31823e-15 kg; data quality (3,1,1,1,4)
- methane, dichloro-, hcc-30: 9.08808e-6 kg; data quality (4,2,1,1,4)
- chloroform: 6.77565e-9 kg; data quality (4,2,1,1,4)
- acetaldehyde: 1.5751e-7 kg; data quality (3,2,1,2,3)
- Dibenz(a,h)anthracene: 1.22737e-13 kg; data quality (2,2,1,1,4)
- anthracene: 9.06437e-12 kg; data quality (3,2,1,3,2)
- CHLORONAPHTHALENE: 1.02436e-15 kg; data quality (1,2,1,1,4)
- Acetaldehyde: 1.75026e-10 kg; data quality (3,1,1,1,4)
- methyl methacrylate: 4.56708e-7 kg; data quality (4,2,1,1,4)
- 1,4-dioxane: 5.30516e-9 kg; data quality (4,2,1,1,4)
- t-butyl methyl ether: 1.73166e-11 kg; data quality (3,2,1,1,5)
- styrene: 1.4162e-5 kg; data quality (4,2,1,1,4)
- antimony: 5.59623e-10 kg; data quality (3,2,1,1,4)
- 2-chloro-1-phenylethanone: 3.03579e-13 kg; data quality (2,2,1,1,4)
- bis(2-chloroethyl)ether: 1.01908e-14 kg; data quality (3,2,1,1,4)
- CHLOROPRENE: 3.78473e-10 kg; data quality (2,2,1,1,4)
- methanol: 4.22163e-7 kg; data quality (4,2,1,1,4)
- ethylbenzene: 3.09601e-8 kg; data quality (4,1,1,1,4)
- m-xylene: 1.78456e-7 kg; data quality (3,2,1,1,4)
- P-PHENYLENEDIAMINE: 5.79557e-11 kg; data quality (5,1,1,1,4)
- cobalt: 5.14942e-12 kg; data quality (4,1,1,1,4)
- benzene, ethyl-: 5.01253e-7 kg; data quality (4,2,1,1,4)
- biphenyl: 4.5945e-11 kg; data quality (3,1,1,1,4)
- phenol: 1.60067e-7 kg; data quality (4,2,1,1,4)
- dimethyl formamide: 5.68303e-9 kg; data quality (4,2,1,1,4)
- Hydrazine: 1.49756e-11 kg; data quality (4,2,1,1,4)
- fluoranthene: 3.00747e-11 kg; data quality (3,2,1,3,2)
- ethylene glycol: 7.88251e-8 kg; data quality (5,2,1,1,4)
- diisocyanates: 2.54262e-7 kg; data quality (4,1,1,1,5)
- bromoform: 1.95946e-12 kg; data quality (3,2,1,1,4)
- selenium: 1.1396e-10 kg; data quality (2,2,1,1,4)
- 2,4/2,6-toluenediisocyanate (mixture): 7.80986e-9 kg; data quality (3,1,1,1,4)
- Hydrocarbons, aromatic: 3.34094e-9 kg; data quality (3,2,1,4,1)
- methyl isobutyl ketone: 1.25487e-6 kg; data quality (4,2,1,1,4)
- acenaphthylene: 9.62002e-11 kg; data quality (3,2,1,4,1)
- ethylene glycol: 4.21776e-8 kg; data quality (5,1,1,1,4)
- ammonia: 2.87513e-8 kg; data quality (3,1,1,1,4)

## Inventory method
Input-output

## Modelling constants
The reference unit of all processes is 1 USD2013 of the good or service. The technosphere inputs are based on the US BEA detailed input-output tables for 2007. The IO tables are combined to develop a commodity-by-commodity model based on the the industry-technology assumption (see Suh et al., 2010), which assumes all commodities produced by a given industry have the same input structure, but that multiple industries can produce the same commodity. Thus, model technosphere flows represent commodity outputs (and not industry outputs) from other processes in the model. There are no by-products included in these processes. All commodity production is based on US-conditions, despite in reality that some goods and services are produced overseas, as USEEIO v1.1 is a single-region IO model.

## Completeness
The input-output approach assures that all purchased inputs associated with the sectors making these commodities as reported in the US census for 2007 are included. The direct resources extracted including minerals, energy sources, water and land occupied are included. Emissions to air include all critieria air pollutants, greenhouse gases, and hazardous and toxic air pollutants as defined by US EPA. Releases to water include toxics, total nitrogen and total phosphorus, and water discharges. Releases to soil or groundwater include toxics and agriculutural pesticides. Some metal releases to air, water and soil are not included because they could not be speciated. Solid hazardous and non-hazardous wastes generated are not included as an elementary flows although purchases of waste services are included.

## Data treatment
Greenhouse gases are primarily from the US Greenhouse Gas Emission Inventory (USEPA 2016a). Biogenic C uptake is not included (change from version 1.0), as biogenic C emission are not included. Toxic releases to air, water and soil (except pesticides) are from the 2013 Toxic Release Inventory (USEPA 2015a). Criteria air pollutants and hazardous air pollutants are from the 2011 National Emissions Inventory (USEPA 2015b). All estimates are normalized by industry based on sector output in the data year, then converted to 2013 USD using relative sector-specific CPIs (if data year is not 2013). Energy use represent raw renewables or fossil fuel energies and is based on EIA data for 2014. See Table 1 in Yang, Ingwersen et al. 2017 and Supporting Information 1, and the v1.1 data update notes (Ingwersen et al. 2017) for all details on environmental data sources used.Land occupation associated with manufacturing buildings was estimated based on the building floorspace data provided by the U.S. Energy Information Administration in the 2010 Manufacturing Energy Consumption Survey (EIA 2013). Portions of total renewable energy (EIA 2016) based on EIA-923 reports for 2014 (EIA 2017) are included. Nitrogen and Phosphorus releases are modeled in total N and total P equivalents as estimated by the Discharge Monitoring Report Nutrient Loading tool (USEPA 2016b). Self-supplied withdrawals were assigned to industrial sectors based on water use statistics for Canadian industries by NAICS 3-digit sector scaled to US production levels based on gross domestic product by industry (BEA 2015; Statistics Canada 2010), and further disaggregated to the manufacturing sectors based on compensation of employees as provided by the 2007 IO tables (BEA 2015). Water withdrawals associated with public supply were allocated to sectors based on their use of water, sewage, and other services in USD based on the IO tables (BEA 2015). Portions of total renewable energy (EIA 2016) by type are assigned to sectors (hydro, wind, solar, or) based on EIA-923 reports for 2014 (EIA 2017).

## Data collection
2015-2016

## Sampling procedure
US federal government sources, including surveys and US EPA emissions databases are used as the primary sources. From these sources, data for US reporting establishments/facilities are aggregated by the NAICS sector as defined in the BEA detailed 2007 input-output tables. When level of sector aggregation differs, or when direct emissions are not reported but modeled, additional sources are used to make allocations and estimates.

## Review details
In regard to quality assurance and peer-review, each dataset created went through Quality Assurance as defined in a quality assurance project plans at US EPA, CSRA or ERG. The model was assembled with the IO model builder model (USEPA 2016c). Validation functions were used to check that all the model components were properly assembled and harmonized. Bayou Demeke and Santosh Ghimire provided internal peer review of the model methodology and the manuscript underwent standard EPA management review. An editor and two anonymous reviewers at the Journal of Cleaner Production reviewed the model. In regard to data quality evaluation, data quality assessment was performed at the flow and process levels according to the updated US EPA data quality assessment guidelines as defined in US EPA (2016b).

## Intended application
The primary application is for use in the US Environmentally-Extended Input-Ouput model, USEEIO, version 1.1. This model is being used by the US EPA for supporting tools that prioritize goods and services based on potential environmental impacts, resource use or emissions for large regions, including the US and US states, and as a strealined tool for organizations as a starting point to consider sustainable materials management. Model results are designed to provide meso/macro-level decision support.

## Project
USEEIO v1.1 was developed by the US EPA with CSRA and ERG with Wesley W. Ingwersen and David E. Meyer as research leads. Yi Yang was the technical lead on the work for CSRA (contract EP-C-15-012); Troy Hawkins was lead for ERG (contract EP-C-12-021).

## Sources
- USGS 2015
- USGS 2016
- Torcellini et al. 2003
- Blackhurst et al. 2010
- USEPA 2015a
- Yienger et al. 1995
- USDA 2006
- BLM 2008
- USEPA 2016c
- USEPA 2016b
- USDA 2009a
- Macknick et al. 2011
- EIA 2016
- Ingwersen et al. DRAFT
- EIA 2017
- USDA 2016
- Nickerson et al. 2011
- EIA 2013
- BEA 2015
- Edelen and Ingwersen 2017
- USEPA 2015b
- USDA 2014
- Ingwersen et al. 2017
- Statistics Canada 2010
- USDA 2009b
- Kim et el. 2013
- USEPA 2016a
- Maupin et al. 2014
- Goebes et al. 2003
- Lovelace 2009
- EIA 2015
