# Residential mental retardation, mental health, substance abuse and other facilities

Dataset: openLCA process, unit process
Category: 62: Health Care and Social Assistance
Geography: United States
Time period: 2017-01-01 to 2017-12-31
Data quality: US EPA - Process Pedigree Matrix (1;1)
Exchange data quality scheme: US EPA - Flow Pedigree Matrix
Generated by: US EPA with CSRA and ERG
Owner: US EPA
Published in: Yang, Ingwersen et al. 2017
restrictionsDescription: This model shold be appropriately cited (see Yang, Ingwersen et al. 2017 source or Publication field) when used. Any changes or derivations of this model by the user should be documented. The model itself and any results from use of this model shall not be construed to consitute US EPA opinion or policy.
copyright: false

## General comment
BEA Code & Name is '623B00:Residential mental retardation, mental health, substance abuse and other facilities'. Description of the primary industry producing this good or service, adapted from the Census Bureau NAICS 2007 descriptions: The Health Care and Social Assistance sector comprises establishments providing health care and social assistance for individuals. The sector includes both health care and social assistance because it is sometimes difficult to distinguish between the boundaries of these two activities. The industries in this sector are arranged on a continuum starting with those establishments providing medical care exclusively, continuing with those providing health care and social assistance, and finally finishing with those providing only social assistance. The services provided by establishments in this sector are delivered by trained professionals. All industries in the sector share this commonality of process, namely, labor inputs of health practitioners or social workers with the requisite expertise. Many of the industries in the sector are defined based on the educational degree held by the practitioners included in the industry. Excluded from this sector are aerobic classes in Subsector 713, Amusement, Gambling and Recreation Industries and nonmedical diet and weight reducing centers in Subsector 812, Personal and Laundry Services. Although these can be viewed as health services, these services are not typically delivered by health practitioners. Related NAICS codes are: 6232, 6239

## Technology
The process describes the average US production of this good or service within this NAICS-based grouping defined in the BEA 2007 detailed input-output tables (BEA 2015). Distribution, wholesale and retailing of this good or service, use, and final disposal are not included. Creation of a product system with this process will enable modeling of all upstream (supply-chain) activities.

## Geography
Data represent the 50 US states

## Time period
2017 was the year in which this version of USEEIO was released and is the target date for the model

## Reference product
- Residential mental retardation, mental health, substance abuse and other facilities: 1 USD

## Inputs from technosphere
All rows: data quality (1,3,1,1,1)
- Vehicle electrical and electronic equipment; at manufacturer: 5.83835e-5 USD
- Fertilizers; at manufacturer: 2.90593e-5 USD
- Office supplies (not paper); at manufacturer: 4.84967e-8 USD
- Sports: 5.79732e-5 USD
- Specialized design: 0.000115969 USD
- All other foods; at manufacturer: 0.0002899 USD
- Light bulbs; at manufacturer: 3.73051e-8 USD
- Limited-service restaurants: 0.000554907 USD
- Other plastic products; at manufacturer: 0.00191955 USD
- Nonferrous metal casts; at manufacturer: 1.34298e-7 USD
- General merchandise stores: 2.90668e-5 USD
- Other vehicle parts; at manufacturer: 0.0002899 USD
- Office administration: 0.00151832 USD
- Analytical laboratory instruments; at manufacturer: 5.22272e-8 USD
- Fabric; at manufacturer: 6.34187e-8 USD
- Switchgear and switchboards; at manufacturer: 2.23831e-8 USD
- News syndicates, libraries, archives, Internet publishing and all other information services: 2.90556e-5 USD
- Vaccines and other biological medical products; at manufacturer: 0.000492714 USD
- State and local government enterprises: 0.000812673 USD
- Springs and wires; at manufacturer: 1.86526e-8 USD
- Cookies, crackers, pastas, and tortillas; at manufacturer: 0.000318742 USD
- Gasoline, fuels, and by-products of petroleum refining; at manufacturer: 0.00488018 USD
- Abrasive products; at manufacturer: 3.73051e-9 USD
- Cheese; at manufacturer: 6.04614e-5 USD
- Company and enterprise management: 0.0109113 USD
- Relay and industrial controls; at manufacturer: 2.90892e-5 USD
- Telephones; at manufacturer: 5.59577e-8 USD
- Plastic pipe, fittings, and sausage casings; at manufacturer: 0.000260803 USD
- Environmental and other technical consulting services: 0.0010789 USD
- Cutlery and handtools; at manufacturer: 1.79065e-7 USD
- Hospitals: 1.20496e-6 USD
- Plastic bottles; at manufacturer: 1.11915e-8 USD
- Surgical appliance and supplies; at manufacturer: 0.00198792 USD
- Unrefined oil and gas; at extraction site: 0.000348395 USD
- Electricity; at consumer: 0.00638929 USD
- Books, newspapers, magazines, and other print media; at manufacturer: 0.000671353 USD
- Veneer, plywood, and engineered wood; at manufacturer: 2.91899e-5 USD
- Poultry farms: 3.73051e-9 USD
- Natural gas; at consumer: 0.00243881 USD
- Animal farms and aquaculture ponds (except cattle and poultry): 1.86526e-8 USD
- Corn products; at manufacturer: 2.90146e-5 USD
- Facilities support: 0.000727748 USD
- Soft drinks, bottled water, and ice; at manufacturer: 0.00107287 USD
- Fruit and vegetable preservation; at manufacturer: 0.00121843 USD
- Flours and malts; at manufacturer: 5.80068e-5 USD
- Cardboard containers; at manufacturer: 5.03619e-7 USD
- Ambulances: 3.56749e-5 USD
- Nondepository credit intermediation and related activities: 0.00214635 USD
- Transmission and power train parts; at manufacturer: 2.91228e-5 USD
- Electronic capacitors, resistors, coils, transformers, connectors and other components (except semiconductors and printed circuit assemblies); at manufacturer: 2.90481e-5 USD
- Frozen food; at manufacturer: 0.000493024 USD
- Compressed Gases; at manufacturer: 3.18721e-5 USD
- Shelving and lockers; at manufacturer: 1.11915e-8 USD
- Jewelry and silverware; at manufacturer: 3.73051e-9 USD
- Other basic organic chemicals; at manufacturer: 0.000149232 USD
- Investigation and security: 0.000871679 USD
- Glass and glass products; at manufacturer: 0.000552508 USD
- Postal service: 0.00400306 USD
- Packaged poultry; at manufacturer: 0.00365304 USD
- Seafood; at manufacturer: 0.00304578 USD
- Electronic equipment repair and maintenance: 0.00116589 USD
- Breakfast cereals; at manufacturer: 5.79508e-5 USD
- Vending, commercial laundry, and other commercial and service industry machinery; at manufacturer: 1.4922e-8 USD
- Wiring devices; at manufacturer: 1.11915e-8 USD
- Metal hinges, keys, lock, and other hardware; at manufacturer: 4.47661e-8 USD
- Civic, social, professional, and similar organizations: 0.000522467 USD
- Scientific research and development: 5.14811e-7 USD
- Fresh vegetables, melons, and potatoes; at farm: 5.80926e-5 USD
- Semiconductors; at manufacturer: 1.90256e-7 USD
- Promoters and agents: 5.80776e-5 USD
- Pipeline transport: 2.90668e-5 USD
- Cement; at manufacturer: 7.46102e-9 USD
- Communication and energy wire and cable; at manufacturer: 2.98441e-8 USD
- Printed circuit and electronic assembly; at manufacturer: 3.73051e-9 USD
- Wild-caught fish and game; at place of capture: 0.00113049 USD
- Synthetic rubber and artificial and synthetic fibers; at manufacturer: 2.201e-7 USD
- Architectural, engineering, and related services: 0.000465293 USD
- Institutional furniture; at manufacturer: 1.4922e-8 USD
- Metal windows, doors, and architectural products; at manufacturer: 1.56682e-7 USD
- Blood sugar, pregnancy, and other diagnostic test kits; at manufacturer: 3.04783e-5 USD
- Employment services: 0.00666818 USD
- All other food and drinking places: 0.000608713 USD
- Drinking water and wastewater treatment; at consumer: 0.000754793 USD
- Lessors of nonfinancial intangible assets: 2.96935e-5 USD
- Lime and gypsum products; at manufacturer: 5.59577e-8 USD
- Coffee and tea; at manufacturer: 1.86526e-6 USD
- Primary batteries; at manufacturer: 1.11915e-8 USD
- Movies and film: 2.89997e-5 USD
- Ice cream and frozen desserts; at manufacturer: 0.00336413 USD
- Cutting and machine tool accessory, rolling mill, and other metalworking machines; at manufacturer: 3.73051e-9 USD
- Petrochemicals; at manufacturer: 5.8294e-5 USD
- Vehicle repair: 0.00107952 USD
- Metal pipe fittings, ball and roller bearings, industrial patterns, metal bath fixtures, other misc. fabricated metals; at manufacturer: 8.7316e-5 USD
- Consumer goods and general rental centers: 0.000232814 USD
- Noncomparable imports: 0.000318709 USD
- Metal plumbing drains, faucets, valves, and other fittings; at manufacturer: 2.61136e-8 USD
- Food and beverage stores: 2.61136e-8 USD
- Computer systems design: 0.000992192 USD
- Packaged meat (except poultry); at manufacturer: 0.0123513 USD
- Lumber and treated lumber; at manufacturer: 8.20713e-8 USD
- Seasonings and dressings; at manufacturer: 0.000348302 USD
- Sporting and athletic goods; at manufacturer: 5.79471e-5 USD
- Polystyrene foam products; at manufacturer: 0.000174017 USD
- Screws, nuts, and bolts; at manufacturer: 1.11915e-8 USD
- Coal; at mine: 5.81e-5 USD
- Passenger ground transport: 0.000233739 USD
- Hotels and campgrounds: 0.000521874 USD
- Secondary steel products; at manufacturer: 7.46102e-9 USD
- Commercial equipment rental: 0.00192161 USD
- Truck transport: 0.00206178 USD
- Rail transport: 0.000174442 USD
- Accounting, tax preparation, bookkeeping, and payroll: 0.00751686 USD
- Insurance carriers: 0.0107778 USD
- Software: 8.79987e-5 USD
- Colleges, universities, junior colleges, and professional schools: 2.57405e-7 USD
- Water transport (boats, ships, ferries): 5.82492e-5 USD
- Motor vehicle steering, suspension components (except spring), and brake systems; at manufacturer: 0.000202867 USD
- Curtains and linens; at manufacturer: 0.0105484 USD
- Rubber and plastic belts and hoses; at manufacturer: 1.11915e-8 USD
- Pharmaceutical products (pills, powders, solutions, etc.); at manufacturer: 0.00289044 USD
- Heating equipment other than warm air furnaces; at manufacturer: 1.4922e-8 USD
- Snack foods; at manufacturer: 5.79583e-5 USD
- Rubber tires; at manufacturer: 7.46102e-9 USD
- Other nonmetallic mineral products; at manufacturer: 1.11915e-8 USD
- Other basic inorganic chemicals; at manufacturer: 5.94318e-5 USD
- Waste management and remediation: 0.00267026 USD
- Laminated plastic plates and shapes; at manufacturer: 2.91563e-5 USD
- Couriers and messengers: 0.00295849 USD
- Nonresidential building repair and maintanence: 0.00292871 USD
- Paints and coatings; at manufacturer: 8.69616e-5 USD
- Wood kitchen cabinets and countertops; at manufacturer: 2.90258e-5 USD
- Paper bags and coated paper; at manufacturer: 5.84022e-5 USD
- Air transport: 0.00116019 USD
- Storage batteries; at manufacturer: 5.22272e-8 USD
- Urethane and other foam products; at manufacturer: 0.000608851 USD
- Plywood and veneer; at manufacturer: 1.19376e-7 USD
- Computer storage device readers; at manufacturer: 5.96882e-8 USD
- Metal coatings, engravings, and heat treatments; at manufacturer: 1.4922e-8 USD
- Machine shops; at manufacturer: 3.35746e-8 USD
- Valve and fittings (except for plumbing); at manufacturer: 3.73051e-9 USD
- Metal structural products; at manufacturer: 1.00724e-7 USD
- Paper; at manufacturer: 8.73944e-5 USD
- Scenic and sightseeing transportation and support activities for transportation: 0.00214635 USD
- Other retail: 0.000290388 USD
- Other real estate: 0.111989 USD
- Advertising and public relations: 0.00418482 USD
- Fluid milk and butter; at manufacturer: 0.000116331 USD
- Legal services: 0.00486718 USD
- Bread and other baked goods; at manufacturer: 0.000927198 USD
- Securities and commodities brokerage and exchanges: 0.00188723 USD
- Performances: 2.90295e-5 USD
- Chemicals (except basic chemicals, agrichemicals, polymers, paints, pharmaceuticals,soaps, cleaning compounds); at manufacturer: 8.74354e-5 USD
- Insurance agencies and brokerages: 0.000145043 USD
- Lids, jars, bottle caps, other metal closures and crowns; at manufacturer: 5.84358e-5 USD
- Leather; at manufacturer: 7.46102e-9 USD
- Wireless telecommunications: 0.00220479 USD
- Investment advice, portfolio management, and other financial advising services: 0.000671496 USD
- Surgical and medical instruments; at manufacturer: 0.000191162 USD
- Golf courses, marinas, ski resorts, fitness and other rec centers and industries: 0.000173908 USD
- Other computer related services, including facilities management: 0.000904909 USD
- Dry-cleaning and laundry: 0.00235512 USD
- Vehicle rental and leasing: 0.00197953 USD
- Marketing research and all other miscellaneous professional, scientific, and technical services: 0.000582795 USD
- Medical laboratories: 3.56264e-6 USD
- Magazines and journals; at publisher: 8.72228e-5 USD
- Buildings and dwellings services: 0.00539867 USD
- Directory, mailing list, and other publishers; at publisher: 2.90519e-5 USD
- Primary iron, steel, and ferroalloy products; at manufacturer: 0.000231811 USD
- Secondary copper products; at manufacturer: 3.73051e-9 USD
- Fluid meters and counting devices; at manufacturer: 0.000695481 USD
- Copper, nickel, lead, and zinc; at mine: 0.000347705 USD
- Satellite, telecommunications resellers, and all other telecommunications: 0.000580359 USD
- Asphalt pavement; at manufacturer: 3.35746e-8 USD
- Independent artists, writers, and performers: 0.00101513 USD
- Dry, condensed, and evaporated dairy; at manufacturer: 8.69579e-5 USD
- Cardboard; at manufacturer: 0.000232035 USD
- Industrial process variable instruments; at manufacturer: 7.46102e-8 USD
- Synthetic dyes and pigments; at manufacturer: 2.83519e-7 USD
- Soap and cleaning compounds; at manufacturer: 0.000464114 USD
- Travel arrangement and reservation: 1.63769e-6 USD
- Adhesives; at manufacturer: 2.61136e-8 USD
- Warehousing: 0.00113136 USD
- Commercial machinery repair: 0.00218804 USD
- Stationery; at manufacturer: 2.91302e-5 USD
- Telecommunications: 0.00554348 USD
- Monetary authorities and depository credit intermediation: 0.0084361 USD
- Dolls, toys, and games; at manufacturer: 0.00049255 USD
- Air conditioning, refrigeration, and warm air heating equipment; at manufacturer: 0.000985802 USD
- Finished and coated fabric; at manufacturer: 3.73051e-9 USD
- Other textiles; at manufacturer: 1.79065e-7 USD
- Pumps and pumping equipment; at manufacturer: 2.98441e-8 USD
- Fresh wheat, corn, rice, and other grains; at farm: 1.11915e-8 USD
- Concrete pipe, bricks, and blocks; at manufacturer: 1.11915e-8 USD
- Plastic bags, films, and sheets; at manufacturer: 3.73051e-8 USD
- Internet publishing and broadcasting: 0.000145267 USD
- Welding and Soldering Equipment, Scales and Balances, and other general purpose machinery; at manufacturer: 2.23831e-8 USD
- Flavored drink concentrates; at manufacturer: 4.10356e-8 USD
- Watches, clocks, and other measuring and controlling devices; at manufacturer: 3.35746e-8 USD
- Vehicle engines and engine parts; at manufacturer: 3.35746e-8 USD
- Clothing; at manufacturer: 4.47661e-8 USD
- Full-service restaurants: 0.000969821 USD
- Other rubber products; at manufacturer: 0.000725655 USD
- Air and gas compressors; at manufacturer: 2.23831e-8 USD
- Gaskets, seals, musical instruments, fasteners, brooms, brushes, mop and other misc. goods; at manufacturer: 0.000290067 USD
- External hard drives, CDs, other storage media; at manufacturer: 2.91377e-5 USD
- Pesticides; at manufacturer: 7.46102e-9 USD
- Books; at publisher: 1.4922e-8 USD
- Pet care, photofinishing, parking and other sundry services: 3.73051e-8 USD
- Ready-mix concrete; at manufacturer: 2.23831e-8 USD
- Wholesale trade: 0.00809952 USD
- Household goods repair: 0.000699349 USD
- Sugar, candy, and chocolate; at manufacturer: 2.90407e-5 USD
- Data processing and hosting: 0.000787333 USD
- Light fixtures; at manufacturer: 0.000116603 USD
- Other concrete products; at manufacturer: 5.8018e-5 USD
- Sanitary paper (tissues, napkins, diapers, etc.); at manufacturer: 0.00447374 USD
- Other engine equipment; at manufacturer: 3.73051e-9 USD
- Refined vegetable, olive, and seed oils; at manufacturer: 3.73051e-9 USD
- Other support services: 2.91726e-6 USD
- Wooden windows, door, and flooring; at manufacturer: 4.84967e-8 USD
- Veterinarians: 3.23062e-6 USD
- Business support: 0.000990286 USD
- Other petroleum and coal products; at manufacturer: 0.000318765 USD
- Management consulting: 0.0046668 USD
- Clay and ceramic products; at manufacturer: 0.00029044 USD

## Inputs from nature
- Water, fresh: 0.000221523, 0.000383367 m3 (2 entries, compartments not in this file); data quality (1,2,1,4,2)
- Energy, solar: 4.09483e-9 MJ; data quality (3,1,1,1,1)
- Occupation, urban, discontinuously built: 0.00154766 m2*a; data quality (4,2,1,1,1)

## Emissions to nature
- styrene: 1.5392e-9 kg; data quality (3,2,1,4,1)
- Chromium, ion: 1.22626e-9 kg; data quality (2,2,1,1,5)
- methane, bromo-, halon 1001: 1.78428e-14 kg; data quality (3,2,1,1,5)
- benz[a]anthracene: 4.44778e-12 kg; data quality (3,2,1,4,1)
- particulates, < 2.5 um: 5.39397e-7 kg; data quality (3,2,1,2,3)
- propylene oxide: 1.37335e-13 kg; data quality (3,2,1,1,5)
- 2-methylnaphthalene: 1.71259e-13 kg; data quality (2,2,1,1,5)
- Ethane, 1,1,1-trifluoro-, HFC-143a: 8.04385e-8 kg; data quality (4,2,1,4,1)
- 2,4,5,2',5'-PENTACHLOROBIPHENYL: 1.27851e-19 kg; data quality (2,2,1,1,5)
- acenaphthylene: 1.5101e-10 kg; data quality (3,2,1,4,1)
- 2,2,4-trimethylpentane: 5.60842e-8 kg; data quality (3,2,1,4,1)
- PHOSPHORUS: 1.03383e-12 kg; data quality (2,2,1,1,5)
- 1,4-dichlorobenzene: 3.6158e-16 kg; data quality (2,2,1,1,5)
- ethylene glycol: 3.72809e-10 kg; data quality (5,2,1,1,5)
- bromoform: 1.97343e-15 kg; data quality (3,2,1,1,5)
- pyrene: 5.05527e-11 kg; data quality (3,2,1,4,1)
- benzene: 1.00731e-7 kg; data quality (3,2,1,4,1)
- selenium: 8.38388e-11 kg; data quality (2,2,1,1,5)
- nitrogen oxides: 5.46864e-6 kg; data quality (3,2,1,1,3)
- Xylene: 1.28698e-7 kg; data quality (3,2,1,4,1)
- beryllium: 2.12406e-11 kg; data quality (2,2,1,1,5)
- 4-nitrophenol: 3.06657e-18 kg; data quality (2,2,1,1,5)
- carbon tetrachloride: 3.75582e-14 kg; data quality (4,2,1,1,5)
- methyl isobutyl ketone: 7.02632e-10 kg; data quality (4,2,1,1,5)
- Triethyl amine: 1.3027e-15 kg; data quality (4,2,1,1,5)
- benzene, ethyl-: 3.94239e-8 kg; data quality (3,2,1,4,1)
- mercury: 1.01467e-11 kg; data quality (2,2,1,1,5)
- Benzo(k)fluoranthene: 4.42975e-12 kg; data quality (3,2,1,4,1)
- acetaldehyde: 2.56947e-8 kg; data quality (3,2,1,4,1)
- ethylene oxide: 7.52558e-11 kg; data quality (3,2,1,1,5)
- Propane, 1,2-dichloro-: 4.13585e-14 kg; data quality (4,2,1,1,5)
- cyanide: 1.12765e-13 kg; data quality (3,2,1,1,5)
- Diethylene glycol butyl ether: 2.91237e-14 kg; data quality (3,2,1,1,5)
- pentachlorophenol: 1.42203e-18 kg; data quality (3,2,1,1,5)
- ammonia: 3.556e-8 kg; data quality (3,2,1,2,4)
- Cobalt: 7.82795e-13 kg; data quality (3,2,1,1,5)
- lead: 6.56144e-10 kg; data quality (3,2,1,1,5)
- acrolein: 2.06116e-9 kg; data quality (3,2,1,4,1)
- antimony: 7.41647e-15 kg; data quality (3,2,1,1,5)
- anthracene: 3.01426e-11 kg; data quality (3,2,1,4,1)
- 1,1,1-trichloroethane: 6.48219e-14 kg; data quality (4,2,1,1,5)
- Hydrocarbons, aromatic: 1.11411e-9 kg; data quality (3,2,1,4,1)
- arsenic: 3.7684e-11 kg; data quality (3,2,1,2,4)
- Dimethyl sulfate: 2.15913e-15 kg; data quality (2,2,1,1,5)
- hexane: 4.51727e-8 kg; data quality (3,2,1,3,2)
- hydrogen fluoride: 7.84778e-10 kg; data quality (2,2,1,1,5)
- cadmium: 1.22667e-11 kg; data quality (3,2,1,1,5)
- cumene: 1.2806e-15 kg; data quality (4,2,1,1,5)
- m-xylene: 5.28886e-9 kg; data quality (3,2,1,4,1)
- Hydrazine: 2.60541e-16 kg; data quality (4,2,1,1,5)
- 1,1,2,2-tetrachloroethane: 3.00921e-14 kg; data quality (3,2,1,1,5)
- Indeno(1,2,3-cd)pyrene: 3.65249e-12 kg; data quality (3,2,1,4,1)
- acetonitrile: 2.60541e-15 kg; data quality (3,2,1,1,5)
- PCB-1: 6.13313e-21 kg; data quality (2,2,1,1,5)
- ethene, tetrachloro-: 4.58646e-15 kg; data quality (3,2,1,1,5)
- carbon monoxide: 6.05374e-5 kg; data quality (3,2,1,1,1)
- isophorone: 2.60895e-14 kg; data quality (2,2,1,1,5)
- toluene: 1.54272e-7 kg; data quality (3,2,1,4,1)
- ethane, 1,2-dichloro-: 6.54908e-14 kg; data quality (3,2,1,1,5)
- naphthalene: 1.23831e-8 kg; data quality (3,2,1,2,4)
- butadiene: 1.62777e-8 kg; data quality (3,2,1,4,1)
- t-butyl methyl ether: 2.10007e-13 kg; data quality (3,2,1,1,5)
- 2,3,4'-TRICHLOROBIPHENYL: 7.24825e-20 kg; data quality (2,2,1,1,5)
- benzene, chloro-: 2.99592e-14 kg; data quality (4,2,1,1,5)
- Carbon dioxide: 0.0105727 kg; data quality (4,2,1,4,1)
- methyl methacrylate: 2.20234e-15 kg; data quality (4,2,1,1,5)
- ethane, 1,2-dibromo-: 4.53149e-14 kg; data quality (2,2,1,1,5)
- monochloroethane: 3.08995e-15 kg; data quality (3,2,1,1,5)
- Ethene, chloro-: 2.61806e-14 kg; data quality (3,2,1,1,5)
- polychlorinated biphenyls: 6.53957e-18 kg; data quality (3,2,1,1,5)
- trichloroethylene: 4.74487e-15 kg; data quality (4,2,1,1,5)
- para-xylene: 9.8984e-11 kg; data quality (3,2,1,4,1)
- fluoranthene: 4.02751e-11 kg; data quality (3,2,1,4,1)
- Ethane, pentafluoro-, HFC-125: 1.88003e-7 kg; data quality (4,2,1,4,1)
- benzyl chloride: 3.14873e-14 kg; data quality (2,2,1,1,5)
- Methane: 9.58024e-7 kg; data quality (4,2,1,4,1)
- Dinitrogen monoxide: 2.63605e-8 kg; data quality (4,2,1,4,1)
- manganese: 2.53053e-10 kg; data quality (3,2,1,1,5)
- fluorene: 7.16068e-11 kg; data quality (3,2,1,4,1)
- VOC, volatile organic compounds: 2.74045e-6 kg; data quality (3,2,1,1,1)
- Hydrazine, methyl-: 7.64693e-15 kg; data quality (2,2,1,1,5)
- Methane, difluoro-, HFC-32: 1.09484e-7 kg; data quality (4,2,1,4,1)
- benzo(a)pyrene: 4.19372e-12 kg; data quality (3,2,1,4,1)
- toluene, 2,4-dinitro-: 1.25949e-17 kg; data quality (5,2,1,1,5)
- formaldehyde: 5.55439e-8 kg; data quality (3,2,1,4,1)
- chloroform: 6.06598e-13 kg; data quality (4,2,1,1,5)
- Nitrogen: 2.64356e-8 kg; data quality (2,2,1,1,5)
- Propene, 1,3-dichloro-: 1.87308e-14 kg; data quality (3,2,1,1,5)
- 2-chloro-1-phenylethanone: 3.14873e-16 kg; data quality (2,2,1,1,5)
- o-Xylene: 1.89823e-9 kg; data quality (3,2,1,4,1)
- biphenyl: 1.72079e-9 kg; data quality (4,2,1,1,5)
- Benzo(b)fluoranthene: 4.50972e-12 kg; data quality (3,2,1,4,1)
- methanol: 7.01596e-12 kg; data quality (4,2,1,1,5)
- acenaphthene: 3.88992e-11 kg; data quality (3,2,1,4,1)
- ACRYLAMIDE: 1.82379e-15 kg; data quality (4,2,1,1,5)
- 2,4-dinitrophenol: 5.01802e-18 kg; data quality (5,2,1,1,5)
- methane, monochloro-, r-40: 4.41583e-14 kg; data quality (3,2,1,1,5)
- dibenzofuran: 2.60541e-18 kg; data quality (4,2,1,1,5)
- acetophenone: 6.74818e-16 kg; data quality (4,2,1,1,5)
- Phosphorus: 2.02096e-8 kg; data quality (2,1,1,1,5)
- Asbestos: 7.16064e-15 kg; data quality (5,2,1,1,5)
- particulates, < 10 um: 1.27449e-7 kg; data quality (3,2,1,1,5)
- Ethane, 1,1,1,2-tetrafluoro-, HFC-134a: 7.08605e-7 kg; data quality (4,2,1,4,1)
- nickel: 2.23645e-9 kg; data quality (3,2,1,1,5)
- Chrysene: 4.1981e-12 kg; data quality (3,2,1,4,1)
- phenol: 5.38101e-14 kg; data quality (4,2,1,1,5)
- Benzo(a)anthracene: 1.0871e-14 kg; data quality (2,2,1,1,5)
- Propane, 1,1,1,3,3,3-hexafluoro-, HCFC-236fa: 2.17307e-9 kg; data quality (4,2,1,4,1)
- CHLORONAPHTHALENE: 1.72561e-19 kg; data quality (1,2,1,1,5)
- hydrogen chloride: 1.05353e-7 kg; data quality (2,2,1,1,5)
- 3-methylcholanthrene: 1.2316e-15 kg; data quality (2,2,1,1,5)
- Chromium VI: 1.67072e-10 kg; data quality (3,2,1,1,5)
- Benzo(g,h,i)perylene: 1.19198e-11 kg; data quality (3,2,1,4,1)
- phthalate, dioctyl-: 3.28499e-15 kg; data quality (3,2,1,1,5)
- vinyl acetate: 3.41862e-16 kg; data quality (4,2,1,1,5)
- phenanthrene: 5.95379e-10 kg; data quality (3,2,1,2,4)
- sulfur dioxide: 3.25943e-6 kg; data quality (2,2,1,1,5)
- chlorine: 2.87234e-12 kg; data quality (4,2,1,1,5)
- propanal: 5.60574e-9 kg; data quality (3,2,1,4,1)
- Dibenz(a,h)anthracene: 3.66253e-14 kg; data quality (3,2,1,4,2)
- ethane, 1,1,2-trichloro-: 2.61204e-14 kg; data quality (4,2,1,1,5)
- 1,1-DICHLOROETHYLENE: 5.31779e-16 kg; data quality (3,2,1,1,5)
- Water, fresh: 0.000512169 m3; data quality (1,2,1,4,2)
- methane, dichloro-, hcc-30: 2.65208e-13 kg; data quality (4,2,1,1,5)
- carbon disulfide: 5.84765e-15 kg; data quality (4,2,1,1,5)

## Inventory method
Input-output

## Modelling constants
The reference unit of all processes is 1 USD2013 of the good or service. The technosphere inputs are based on the US BEA detailed input-output tables for 2007. The IO tables are combined to develop a commodity-by-commodity model based on the the industry-technology assumption (see Suh et al., 2010), which assumes all commodities produced by a given industry have the same input structure, but that multiple industries can produce the same commodity. Thus, model technosphere flows represent commodity outputs (and not industry outputs) from other processes in the model. There are no by-products included in these processes. All commodity production is based on US-conditions, despite in reality that some goods and services are produced overseas, as USEEIO v1.1 is a single-region IO model.

## Completeness
The input-output approach assures that all purchased inputs associated with the sectors making these commodities as reported in the US census for 2007 are included. The direct resources extracted including minerals, energy sources, water and land occupied are included. Emissions to air include all critieria air pollutants, greenhouse gases, and hazardous and toxic air pollutants as defined by US EPA. Releases to water include toxics, total nitrogen and total phosphorus, and water discharges. Releases to soil or groundwater include toxics and agriculutural pesticides. Some metal releases to air, water and soil are not included because they could not be speciated. Solid hazardous and non-hazardous wastes generated are not included as an elementary flows although purchases of waste services are included.

## Data treatment
Greenhouse gases are primarily from the US Greenhouse Gas Emission Inventory (USEPA 2016a). Biogenic C uptake is not included (change from version 1.0), as biogenic C emission are not included. Toxic releases to air, water and soil (except pesticides) are from the 2013 Toxic Release Inventory (USEPA 2015a). Criteria air pollutants and hazardous air pollutants are from the 2011 National Emissions Inventory (USEPA 2015b). All estimates are normalized by industry based on sector output in the data year, then converted to 2013 USD using relative sector-specific CPIs (if data year is not 2013). Energy use represent raw renewables or fossil fuel energies and is based on EIA data for 2014. See Table 1 in Yang, Ingwersen et al. 2017 and Supporting Information 1, and the v1.1 data update notes (Ingwersen et al. 2017) for all details on environmental data sources used.Land occupation for commercial buildings was estimated based on the building floorspace data provided by the U.S. Energy Information Administration 2012 Commercial Building Energy Consumption Survey (CBECS) (EIA 2015). Total commercial public supply water use is reported by USGS (Maupin et al. 2014). Water use is allocated across commercial sectors based on their use of water, sewage, and other services in USD based on the 2007 Benchmark Use Table before redefinitions (BEA 2015).

## Data collection
2015-2016

## Sampling procedure
US federal government sources, including surveys and US EPA emissions databases are used as the primary sources. From these sources, data for US reporting establishments/facilities are aggregated by the NAICS sector as defined in the BEA detailed 2007 input-output tables. When level of sector aggregation differs, or when direct emissions are not reported but modeled, additional sources are used to make allocations and estimates.

## Review details
In regard to quality assurance and peer-review, each dataset created went through Quality Assurance as defined in a quality assurance project plans at US EPA, CSRA or ERG. The model was assembled with the IO model builder model (USEPA 2016c). Validation functions were used to check that all the model components were properly assembled and harmonized. Bayou Demeke and Santosh Ghimire provided internal peer review of the model methodology and the manuscript underwent standard EPA management review. An editor and two anonymous reviewers at the Journal of Cleaner Production reviewed the model. In regard to data quality evaluation, data quality assessment was performed at the flow and process levels according to the updated US EPA data quality assessment guidelines as defined in US EPA (2016b).

## Intended application
The primary application is for use in the US Environmentally-Extended Input-Ouput model, USEEIO, version 1.1. This model is being used by the US EPA for supporting tools that prioritize goods and services based on potential environmental impacts, resource use or emissions for large regions, including the US and US states, and as a strealined tool for organizations as a starting point to consider sustainable materials management. Model results are designed to provide meso/macro-level decision support.

## Project
USEEIO v1.1 was developed by the US EPA with CSRA and ERG with Wesley W. Ingwersen and David E. Meyer as research leads. Yi Yang was the technical lead on the work for CSRA (contract EP-C-15-012); Troy Hawkins was lead for ERG (contract EP-C-12-021).

## Sources
- Lovelace 2009
- USDA 2016
- Torcellini et al. 2003
- EIA 2015
- Macknick et al. 2011
- BLM 2008
- Ingwersen et al. DRAFT
- Yienger et al. 1995
- USDA 2006
- EIA 2016
- USGS 2015
- USEPA 2016b
- Kim et el. 2013
- Goebes et al. 2003
- USDA 2009b
- EIA 2013
- USEPA 2015a
- Blackhurst et al. 2010
- USDA 2014
- USEPA 2016c
- Statistics Canada 2010
- BEA 2015
- Edelen and Ingwersen 2017
- Nickerson et al. 2011
- EIA 2017
- USEPA 2015b
- USEPA 2016a
- USGS 2016
- USDA 2009a
- Maupin et al. 2014
- Ingwersen et al. 2017
