# Other primary nonferrous metals; at manufacturer

Dataset: openLCA process, unit process
Category: 3314: Nonferrous Metal (except Aluminum) Production and Processing
Geography: United States
Time period: 2017-01-01 to 2017-12-31
Data quality: US EPA - Process Pedigree Matrix (1;1)
Exchange data quality scheme: US EPA - Flow Pedigree Matrix
Generated by: US EPA with CSRA and ERG
Owner: US EPA
Published in: Yang, Ingwersen et al. 2017
restrictionsDescription: This model shold be appropriately cited (see Yang, Ingwersen et al. 2017 source or Publication field) when used. Any changes or derivations of this model by the user should be documented. The model itself and any results from use of this model shall not be construed to consitute US EPA opinion or policy.
copyright: false

## General comment
BEA Code & Name is '331419:Primary smelting and refining of nonferrous metal (except copper and aluminum)'. Description of the primary industry producing this good or service, adapted from the Census Bureau NAICS 2007 descriptions: This U.S. industry comprises establishments primarily engaged in (1) making (i.e., the primary production) nonferrous metals by smelting ore and/or (2) the primary refining of nonferrous metals by electrolytic methods or other processes.

## Technology
The process describes the average US production of this good or service within this NAICS-based grouping defined in the BEA 2007 detailed input-output tables (BEA 2015). Distribution, wholesale and retailing of this good or service, use, and final disposal are not included. Creation of a product system with this process will enable modeling of all upstream (supply-chain) activities.

## Geography
Data represent the 50 US states

## Time period
2017 was the year in which this version of USEEIO was released and is the target date for the model

## Reference product
- Other primary nonferrous metals; at manufacturer: 1 USD

## Inputs from technosphere
All rows: data quality (1,3,1,1,1)
- Welding and Soldering Equipment, Scales and Balances, and other general purpose machinery; at manufacturer: 0.000114604 USD
- Metal cutting and forming machine tools; at manufacturer: 3.96296e-6 USD
- Computer systems design: 0.000377772 USD
- Machinery for the paper, textile, food or other industries (except semiconductor machinery); at manufacturer: 8.88815e-5 USD
- Wooden windows, door, and flooring; at manufacturer: 0.000215684 USD
- Cardboard containers; at manufacturer: 0.00485864 USD
- Business support: 0.00113958 USD
- Employment services: 0.000735717 USD
- Industrial molds; at manufacturer: 1.49508e-6 USD
- Iron, gold, silver, and other metal ores; at mine: 0.143871 USD
- Lessors of nonfinancial intangible assets: 0.00134426 USD
- Motor vehicle steering, suspension components (except spring), and brake systems; at manufacturer: 2.39773e-5 USD
- Wiring devices; at manufacturer: 2.70202e-7 USD
- Wholesale trade: 0.0481609 USD
- Other real estate: 0.000430736 USD
- Other primary nonferrous metals; at manufacturer: 0.151582 USD
- Other vehicle parts; at manufacturer: 0.000561586 USD
- Sand, gravel, clay, phosphate, other nonmetallic minerals; at mine: 0.000248424 USD
- Consumer goods and general rental centers: 2.6273e-5 USD
- Coal; at mine: 0.00397472 USD
- Nonferrous metal casts; at manufacturer: 4.66911e-6 USD
- Other computer related services, including facilities management: 0.000101005 USD
- Scenic and sightseeing transportation and support activities for transportation: 0.000120721 USD
- Gaskets, seals, musical instruments, fasteners, brooms, brushes, mop and other misc. goods; at manufacturer: 0.000216211 USD
- Commercial machinery repair: 0.00166098 USD
- Civic, social, professional, and similar organizations: 5.38448e-5 USD
- Nondepository credit intermediation and related activities: 0.0015024 USD
- Lids, jars, bottle caps, other metal closures and crowns; at manufacturer: 9.44901e-7 USD
- Metal coatings, engravings, and heat treatments; at manufacturer: 0.00338191 USD
- Passenger ground transport: 7.77599e-5 USD
- Investment advice, portfolio management, and other financial advising services: 0.000181333 USD
- Performances: 1.42118e-7 USD
- Dry-cleaning and laundry: 2.6239e-5 USD
- Abrasive products; at manufacturer: 0.000410443 USD
- other miscellaneous electrical equipment and components; at manufacturer: 5.44908e-6 USD
- Other plastic products; at manufacturer: 0.000761516 USD
- Semiconductors; at manufacturer: 0.00236705 USD
- Unrefined oil and gas; at extraction site: 5.41611e-5 USD
- Golf courses, marinas, ski resorts, fitness and other rec centers and industries: 2.68923e-5 USD
- Light gauge metal cans, boxes, and containers; at manufacturer: 1.22803e-5 USD
- All other food and drinking places: 2.41093e-5 USD
- Custom computer programming: 1.57618e-6 USD
- Carbon and graphite products; at manufacturer: 1.93093e-5 USD
- Waste management and remediation: 0.000991592 USD
- General merchandise stores: 2.48084e-7 USD
- Rubber tires; at manufacturer: 2.4271e-7 USD
- Primary copper; at manufacturer: 0.0226473 USD
- Fertilizers; at manufacturer: 8.20908e-6 USD
- Glass and glass products; at manufacturer: 1.86859e-6 USD
- Synthetic dyes and pigments; at manufacturer: 7.77713e-5 USD
- Copper, nickel, lead, and zinc; at mine: 0.0858613 USD
- Compressed Gases; at manufacturer: 0.00016465 USD
- Scientific research and development: 2.44691e-5 USD
- Heavy gauge metal tanks; at manufacturer: 3.53461e-6 USD
- Commercial equipment rental: 0.000320123 USD
- Adhesives; at manufacturer: 8.44015e-5 USD
- Pipeline transport: 1.48931e-5 USD
- Books, newspapers, magazines, and other print media; at manufacturer: 1.35101e-7 USD
- State and local government enterprises: 0.000435497 USD
- Custom metal rolls; at manufacturer: 3.57872e-6 USD
- Vehicle electrical and electronic equipment; at manufacturer: 7.28131e-7 USD
- Other secondary nonferrous metal products; at manufacturer: 0.0390749 USD
- Truck transport: 0.0343056 USD
- Air and gas compressors; at manufacturer: 1.58717e-6 USD
- Management consulting: 0.0011003 USD
- Primary iron, steel, and ferroalloy products; at manufacturer: 0.0106373 USD
- Telecommunications: 0.000782752 USD
- Other basic inorganic chemicals; at manufacturer: 0.000614212 USD
- Paper bags and coated paper; at manufacturer: 9.59019e-5 USD
- Buildings and dwellings services: 0.00277047 USD
- Electricity; at consumer: 0.0115508 USD
- Cast iron and steel; at manufacturer: 1.94692e-5 USD
- Other petroleum and coal products; at manufacturer: 6.70169e-5 USD
- Software: 2.43324e-5 USD
- Specialized design: 0.00177285 USD
- Paints and coatings; at manufacturer: 1.75085e-5 USD
- Cutlery and handtools; at manufacturer: 0.000216418 USD
- Cardboard; at manufacturer: 0.00408175 USD
- Chemicals (except basic chemicals, agrichemicals, polymers, paints, pharmaceuticals,soaps, cleaning compounds); at manufacturer: 0.000780802 USD
- Other basic organic chemicals; at manufacturer: 0.00150185 USD
- Plastic bags, films, and sheets; at manufacturer: 0.00180786 USD
- Printed circuit and electronic assembly; at manufacturer: 0.00173359 USD
- Lime and gypsum products; at manufacturer: 2.18824e-5 USD
- Magazines and journals; at publisher: 2.38144e-5 USD
- Hydraulic pumps, motors, cylinders and actuators; at manufacturer: 5.89941e-6 USD
- Valve and fittings (except for plumbing); at manufacturer: 7.14002e-5 USD
- Satellite, telecommunications resellers, and all other telecommunications: 2.62805e-5 USD
- Special tools, dies, jigs, and fixtures; at manufacturer: 9.47524e-6 USD
- Machine shops; at manufacturer: 0.00861463 USD
- Advertising and public relations: 0.000792751 USD
- Independent artists, writers, and performers: 7.46746e-5 USD
- Paper; at manufacturer: 8.8266e-6 USD
- Vehicle engines and engine parts; at manufacturer: 4.73537e-5 USD
- Securities and commodities brokerage and exchanges: 0.00454122 USD
- Postal service: 2.7817e-6 USD
- Facilities support: 0.000565973 USD
- Sports: 2.41093e-5 USD
- Aluminum; at manufacturer: 0.000895838 USD
- Hotels and campgrounds: 0.000213328 USD
- Other nonmetallic mineral products; at manufacturer: 9.70348e-8 USD
- Rail transport: 0.00414213 USD
- Petrochemicals; at manufacturer: 8.71804e-5 USD
- Gasoline, fuels, and by-products of petroleum refining; at manufacturer: 0.00379089 USD
- Ground or treated minerals and earth; at manufacturer: 2.53087e-5 USD
- Fabric; at manufacturer: 2.17963e-5 USD
- Other retail: 8.87152e-5 USD
- Monetary authorities and depository credit intermediation: 0.00154786 USD
- Data processing and hosting: 0.000778861 USD
- Screws, nuts, and bolts; at manufacturer: 0.00059749 USD
- Vending, commercial laundry, and other commercial and service industry machinery; at manufacturer: 2.46969e-5 USD
- Plastic pipe, fittings, and sausage casings; at manufacturer: 1.92552e-6 USD
- Air conditioning, refrigeration, and warm air heating equipment; at manufacturer: 4.11945e-5 USD
- Company and enterprise management: 0.0084488 USD
- Natural gas; at consumer: 0.00894065 USD
- Ophthalmic goods; at manufacturer: 4.85421e-8 USD
- Metal structural products; at manufacturer: 3.35154e-6 USD
- Mineral wool; at manufacturer: 3.20239e-7 USD
- Vehicle rental and leasing: 0.0005142 USD
- Wireless telecommunications: 0.000233769 USD
- Drinking water and wastewater treatment; at consumer: 0.000401609 USD
- Electronic capacitors, resistors, coils, transformers, connectors and other components (except semiconductors and printed circuit assemblies); at manufacturer: 0.000529018 USD
- Investigation and security: 0.000749928 USD
- Food and beverage stores: 9.35758e-8 USD
- Promoters and agents: 2.39672e-5 USD
- Relay and industrial controls; at manufacturer: 0.000952166 USD
- Noncomparable imports: 0.00285668 USD
- Environmental and other technical consulting services: 0.000249839 USD
- Fresh soybeans, canola, flaxseeds, and other oilseeds; at farm: 1.58717e-6 USD
- Veneer, plywood, and engineered wood; at manufacturer: 0.00454154 USD
- Electronic equipment repair and maintenance: 0.000351724 USD
- Metal windows, doors, and architectural products; at manufacturer: 0.000576649 USD
- Air transport: 0.000693241 USD
- Plastics; at manufacturer: 0.00146777 USD
- Nonresidential building repair and maintanence: 0.00220758 USD
- Office administration: 0.00012581 USD
- Other rubber products; at manufacturer: 1.62121e-6 USD
- Household goods repair: 0.000301738 USD
- Accounting, tax preparation, bookkeeping, and payroll: 0.0006387 USD
- Light fixtures; at manufacturer: 1.75645e-6 USD
- Transmission and power train parts; at manufacturer: 4.82604e-5 USD
- Aluminum products; at manufacturer: 0.00102294 USD
- Industrial process variable instruments; at manufacturer: 9.00674e-7 USD
- Water transport (boats, ships, ferries): 0.00546774 USD
- Vehicles and parts sales: 0.000120112 USD
- Other concrete products; at manufacturer: 3.88139e-8 USD
- Cutting and machine tool accessory, rolling mill, and other metalworking machines; at manufacturer: 0.000412271 USD
- Power boilers and heat exchangers; at manufacturer: 1.46448e-5 USD
- Metal pipe fittings, ball and roller bearings, industrial patterns, metal bath fixtures, other misc. fabricated metals; at manufacturer: 0.00179542 USD
- Synthetic rubber and artificial and synthetic fibers; at manufacturer: 3.9101e-5 USD
- Motors and generators; at manufacturer: 4.18813e-6 USD
- Clay and ceramic products; at manufacturer: 0.000276876 USD
- Insurance agencies and brokerages: 0.00030691 USD
- Speed changers, industrial high-speed drives, and gears; at manufacturer: 8.4213e-6 USD
- Surgical appliance and supplies; at manufacturer: 0.000118745 USD
- All other forging, stamping, and sintering; at manufacturer: 2.98501e-6 USD
- Material handling equipment; at manufacturer: 0.000205872 USD
- Vehicle repair: 0.000847578 USD
- Limited-service restaurants: 0.0005417 USD
- Secondary steel products; at manufacturer: 0.000734899 USD
- Full-service restaurants: 0.000308358 USD
- Computer terminals and other computer peripheral equipment; at manufacturer: 2.48629e-5 USD
- Warehousing: 0.000478547 USD
- Secondary copper products; at manufacturer: 0.00619479 USD
- Other support services: 0.000526672 USD
- Springs and wires; at manufacturer: 3.40122e-5 USD
- Marketing research and all other miscellaneous professional, scientific, and technical services: 0.00111871 USD
- Pumps and pumping equipment; at manufacturer: 5.44387e-6 USD
- Ball and roller bearings; at manufacturer: 4.03648e-6 USD
- Communication and energy wire and cable; at manufacturer: 0.00996192 USD
- Packaged meat (except poultry); at manufacturer: 1.94168e-7 USD
- Architectural, engineering, and related services: 0.00300455 USD
- Insurance carriers: 0.000950144 USD
- Laminated plastic plates and shapes; at manufacturer: 3.5094e-7 USD
- Legal services: 0.00117006 USD
- Specialty transformers; at manufacturer: 2.25168e-7 USD

## Inputs from nature
- Occupation, industrial area, built up: 0.000153758 m2*a; data quality (4,2,1,1,1)
- Occupation, industrial area: 0.000461275 m2*a; data quality (4,2,1,1,1)
- Water, saline: 0.000539134 m3; data quality (4,2,1,4,2)
- Water, fresh: 0.00684024, 0.00171775 m3 (2 entries, compartments not in this file); data quality (4,2,1,4,2)
- Occupation, urban, discontinuously built: 5.74802e-5 m2*a; data quality (4,2,1,1,1)

## Emissions to nature
- Benzene, pentachloro-: 6.66059e-12, 2.76808e-13 kg (2 entries, compartments not in this file); data quality (5,1,1,1,4)
- manganese: 7.71895e-14 kg; data quality (4,1,1,1,5)
- Benzoyl chloride: 1.18977e-11 kg; data quality (2,1,1,1,4)
- p-Cresidine: 1.79672e-10, 9.52323e-12 kg (2 entries, compartments not in this file); data quality (5,1,1,1,4)
- 1,4-dichlorobenzene: 1.03242e-12 kg; data quality (2,2,1,1,4)
- isophorone: 5.51065e-10 kg; data quality (2,2,1,1,5)
- Cobalt: 5.85125e-9 kg; data quality (3,2,1,1,4)
- Nitrogen: 1.32767e-5 kg; data quality (2,2,1,1,5)
- polychlorinated biphenyls: 4.98177e-11 kg; data quality (3,2,1,1,3)
- manganese: 1.10466e-7 kg; data quality (3,2,1,1,4)
- arsenic: 1.88673e-9, 1.50834e-8 kg (2 entries, compartments not in this file); data quality (2,1,1,1,4)
- dimethyl formamide: 6.31992e-11 kg; data quality (4,2,1,1,5)
- ALUMINUM OXIDE: 2.8741e-11 kg; data quality (5,1,1,1,4)
- nitric acid: 3.41123e-10, 8.98956e-7 kg (2 entries, compartments not in this file); data quality (3,1,1,1,4)
- Methyl acrylate: 1.5999e-11 kg; data quality (3,1,1,1,4)
- hydroquinone: 1.44086e-14 kg; data quality (3,2,1,1,3)
- Methyl iodide: 3.09543e-9 kg; data quality (4,2,1,1,4)
- m-cresol: 8.25843e-9 kg; data quality (4,2,1,1,4)
- chromium: 9.75465e-10, 1.32203e-9, 6.12657e-8 kg (3 entries, compartments not in this file); data quality (4,1,1,1,4)
- Hydrazine, methyl-: 1.52293e-10 kg; data quality (2,2,1,1,5)
- toluene, 2,4-dinitro-: 2.26415e-13 kg; data quality (5,2,1,1,5)
- carbonyl sulfide: 5.934e-6 kg; data quality (4,2,1,1,3)
- ethylbenzene: 1.03228e-9 kg; data quality (4,1,1,1,2)
- MOLYBDENUM(VI): 6.04869e-8, 3.97202e-11 kg (2 entries, compartments not in this file); data quality (3,1,1,1,4)
- naphthalene: 5.58639e-8 kg; data quality (3,2,1,1,4)
- naphthalene: 4.33537e-13 kg; data quality (4,1,1,1,4)
- Phthalate, dimethyl-: 3.70537e-10 kg; data quality (4,1,1,1,2)
- bis(2-chloroethyl)ether: 1.18607e-13 kg; data quality (3,2,1,1,3)
- hydrogen chloride: 8.06731e-6 kg; data quality (2,2,1,1,5)
- cumene: 5.42051e-9 kg; data quality (4,2,1,1,4)
- acetonitrile: 1.02998e-11 kg; data quality (3,2,1,1,4)
- cadmium: 2.43725e-8 kg; data quality (3,2,1,1,4)
- NITROUS ACID: 2.57328e-8, 1.12889e-7 kg (2 entries, compartments not in this file); data quality (5,1,1,1,4)
- Benzo(a)anthracene: 9.45752e-14 kg; data quality (2,2,1,1,4)
- 1,1,1-trichloroethane: 6.99515e-9 kg; data quality (3,2,1,1,4)
- toluene-2,4-diisocyante: 2.58029e-13 kg; data quality (3,2,1,1,4)
- acrolein: 1.14869e-8 kg; data quality (2,2,1,1,4)
- 1,1,2,2-tetrachloroethane: 5.22762e-10 kg; data quality (3,2,1,1,4)
- o-cresol: 1.92619e-11 kg; data quality (3,1,1,1,3)
- 2-methylnaphthalene: 1.6215e-10 kg; data quality (2,2,1,1,4)
- Benzene, 1,2,4-trimethyl-: 1.03223e-13 kg; data quality (5,1,1,1,4)
- 1,1-DICHLOROETHYLENE: 2.42864e-16 kg; data quality (3,2,1,1,5)
- Phenol, 2,4-dimethyl-: 2.56474e-14 kg; data quality (4,1,1,1,3)
- Phosphorus: 1.0771e-6 kg; data quality (3,1,1,1,5)
- acrylonitrile: 4.67375e-10 kg; data quality (4,2,1,1,4)
- manganese: 5.01444e-8 kg; data quality (4,1,1,1,4)
- mercury: 9.17011e-12 kg; data quality (3,1,1,1,5)
- Zinc: 2.16404e-7 kg; data quality (5,1,1,1,4)
- Phthalate, dibutyl-: 4.80422e-10 kg; data quality (4,2,1,1,5)
- sulfur dioxide: 0.000532458 kg; data quality (2,2,1,1,5)
- pentachlorophenol: 7.08886e-19 kg; data quality (3,2,1,1,4)
- Epichlorohydrin: 3.04743e-11 kg; data quality (2,1,1,1,4)
- 2,2,4-trimethylpentane: 3.24277e-8 kg; data quality (3,2,1,1,4)
- 1,2,4-trichlorobenzene: 1.5376e-10 kg; data quality (4,2,1,1,3)
- DIETHANOLAMINE: 1.48775e-9 kg; data quality (4,1,1,1,4)
- propylene oxide: 2.04918e-10 kg; data quality (3,2,1,1,3)
- 3,3'-Dichlorobenzidine: 2.04708e-13 kg; data quality (3,2,1,1,3)
- Ethane, pentafluoro-, HFC-125: 7.40693e-9 kg; data quality (4,2,1,4,1)
- monochloroethane: 4.89509e-8 kg; data quality (3,2,1,1,4)
- benzene: 8.25784e-13 kg; data quality (3,1,1,1,4)
- p-phenylenediamine: 1.19303e-17 kg; data quality (5,2,1,1,3)
- methane, chlorodifluoro-, hcfc-22: 2.09735e-8 kg; data quality (4,1,1,1,5)
- Titanium: 8.91338e-9 kg; data quality (5,2,1,1,3)
- acenaphthene: 3.55284e-11 kg; data quality (3,2,1,4,1)
- benzene, chloro-: 5.19867e-9 kg; data quality (4,2,1,1,4)
- benzo(a)pyrene: 1.19482e-10 kg; data quality (2,2,1,1,4)
- ammonia: 2.12737e-5 kg; data quality (3,2,1,1,5)
- para-xylene: 5.16443e-10 kg; data quality (3,2,1,1,4)
- Triethyl amine: 3.39256e-10 kg; data quality (4,2,1,1,4)
- PYRIDINE: 2.3411e-11 kg; data quality (4,1,1,1,4)
- o-toluidine: 5.56741e-15 kg; data quality (4,2,1,1,3)
- Carbon dioxide: 0.205567 kg; data quality (3,2,1,4,1)
- Cobalt: 1.22004e-9 kg; data quality (4,1,1,1,4)
- phthalate, dioctyl-: 4.77015e-8 kg; data quality (3,2,1,1,4)
- Cadmium: 3.75051e-10 kg; data quality (3,1,1,1,4)
- cyclohexane: 3.30138e-11 kg; data quality (4,1,1,1,4)
- 2-ethoxyethyl acetate: 5.95572e-12 kg; data quality (5,2,1,1,4)
- MOLYBDENUM(VI): 1.34993e-7 kg; data quality (3,1,1,1,5)
- Dimethyl sulfate: 4.31165e-11 kg; data quality (2,2,1,1,5)
- m-xylene: 1.16759e-8 kg; data quality (3,2,1,2,3)
- toluene: 3.80914e-7 kg; data quality (4,2,1,1,4)
- 1-Methyl-2-pyrrolidinone: 7.0789e-10, 2.30826e-13 kg (2 entries, compartments not in this file); data quality (5,1,1,1,3)
- cyanide: 8.12671e-9 kg; data quality (3,2,1,1,4)
- HYDROFLUORIC ACID: 1.03223e-13 kg; data quality (3,1,1,1,4)
- antimony: 4.47885e-8 kg; data quality (3,2,1,1,5)
- Ethene, chloro-: 1.97256e-10 kg; data quality (3,2,1,1,4)
- selenium: 6.63294e-8 kg; data quality (2,2,1,1,5)
- 4,4'-METHYLENEDIANILINE: 6.9837e-13 kg; data quality (3,1,1,1,4)
- benzene: 3.49841e-7 kg; data quality (3,2,1,1,4)
- formaldehyde: 9.84252e-8 kg; data quality (3,2,1,3,3)
- 1,3-PHENYLENEDIAMINE: 1.15205e-11 kg; data quality (4,1,1,1,4)
- ethyl acrylate: 4.69043e-11 kg; data quality (3,2,1,1,3)
- 4-CHLOROANILINE: 1.5872e-10, 1.65069e-10 kg (2 entries, compartments not in this file); data quality (2,1,1,1,4)
- vanadium: 1.44512e-13 kg; data quality (5,1,1,1,4)
- ammonia: 1.1336e-7 kg; data quality (3,1,1,1,4)
- carbon monoxide: 0.000975608 kg; data quality (2,2,1,1,4)
- lead: 7.22113e-7 kg; data quality (3,2,1,1,4)
- 2,4-dinitrophenol: 2.03118e-15 kg; data quality (5,2,1,1,4)
- bromoform: 3.52166e-11 kg; data quality (3,2,1,1,5)
- Dimethylamine: 1.5872e-10, 3.17441e-10 kg (2 entries, compartments not in this file); data quality (3,1,1,1,4)
- nitrogen oxides: 7.21608e-5 kg; data quality (2,2,1,1,4)
- aniline: 3.55335e-10 kg; data quality (4,2,1,1,3)
- Diethylene glycol butyl ether: 1.56569e-10 kg; data quality (4,2,1,1,3)
- methyl methacrylate: 7.54704e-11 kg; data quality (3,2,1,1,3)
- BENZ(A)ACRIDINE: 6.79649e-13 kg; data quality (2,2,1,1,4)
- Chloroacetic acid: 2.37214e-13 kg; data quality (3,2,1,1,3)
- Ethane, 1,1,1,2-tetrafluoro-, HFC-134a: 1.49653e-6 kg; data quality (4,2,1,4,1)
- Propene, 1,3-dichloro-: 1.24324e-9 kg; data quality (3,2,1,1,4)
- Dimethoxy methane: 4.26111e-12 kg; data quality (2,2,1,1,5)
- TERT-BUTYL ALCOHOL: 6.79632e-12 kg; data quality (4,1,1,1,4)
- Water, saline: 0.000273178 m3; data quality (4,2,1,4,2)
- copper: 1.8228e-8, 1.42244e-7, 6.49443e-12 kg (3 entries, compartments not in this file); data quality (4,1,1,1,4)
- ethane, 1,2-dibromo-: 1.89814e-10 kg; data quality (2,2,1,1,4)
- HYDROFLUORIC ACID: 9.62804e-13 kg; data quality (3,1,1,1,5)
- hexachlorobenzene: 1.5888e-11 kg; data quality (3,2,1,1,3)
- PHTHALIC ANHYDRIDE: 1.5872e-10 kg; data quality (3,1,1,1,4)
- Dinitrogen monoxide: 1.74211e-7 kg; data quality (4,2,1,4,1)
- propanal: 4.75147e-9 kg; data quality (3,2,1,4,1)
- OCTACHLORONAPHTHALENE: 3.49185e-16, 2.23478e-13 kg (2 entries, compartments not in this file); data quality (5,1,1,1,4)
- 2,4-dimethylphenol: 7.32618e-11 kg; data quality (4,1,1,1,3)
- silver: 1.66681e-8 kg; data quality (4,1,1,1,4)
- acrylic acid: 2.20868e-9 kg; data quality (4,2,1,1,3)
- methyl isobutyl ketone: 3.40352e-7 kg; data quality (4,2,1,1,5)
- methanol: 4.60289e-9 kg; data quality (3,1,1,1,4)
- Nickel, ion: 2.07305e-11 kg; data quality (3,2,1,1,4)
- Ethylene glycol monoethyl ether: 1.64542e-8 kg; data quality (5,1,1,1,3)
- phenol: 2.58205e-10 kg; data quality (3,1,1,1,4)
- Benzo(b)fluoranthene: 6.44017e-12 kg; data quality (2,2,1,1,4)
- 4-nitrophenol: 1.26794e-13 kg; data quality (2,2,1,1,4)
- dibenzofuran: 1.84337e-8 kg; data quality (4,2,1,1,4)
- Ethylene glycol monoethyl ether: 1.58735e-10 kg; data quality (5,1,1,1,4)
- cobalt: 2.07478e-9 kg; data quality (4,1,1,1,4)
- antimony: 2.51329e-8, 2.86856e-9 kg (2 entries, compartments not in this file); data quality (2,1,1,1,4)
- hexane: 2.02305e-7 kg; data quality (3,2,1,1,4)
- Hydrazine: 1.72571e-9 kg; data quality (4,2,1,1,4)
- benzene, ethyl-: 3.62726e-8 kg; data quality (4,2,1,1,3)
- Water, fresh: 0.00746391 m3; data quality (4,2,1,4,2)
- formaldehyde: 1.5872e-10 kg; data quality (2,1,1,1,4)
- nickel: 1.53621e-7 kg; data quality (3,2,1,1,4)
- VOC, volatile organic compounds: 3.54289e-5 kg; data quality (3,2,1,1,4)
- vinyl acetate: 3.53775e-11 kg; data quality (4,2,1,1,4)
- Propane, 1,2-dichloro-: 2.03807e-12 kg; data quality (4,2,1,1,4)
- 1,2-DICHLOROBENZENE: 5.04667e-9 kg; data quality (5,1,1,1,4)
- ethylene glycol: 7.20845e-9 kg; data quality (5,2,1,1,4)
- 2-chloro-1-phenylethanone: 8.68018e-12 kg; data quality (2,2,1,1,5)
- phenol: 2.09702e-7 kg; data quality (4,2,1,1,4)
- nickel: 2.35316e-8, 2.33485e-8 kg (2 entries, compartments not in this file); data quality (4,1,1,1,4)
- Chromium VI: 2.266e-9 kg; data quality (3,2,1,1,4)
- PHOSPHORUS: 1.30408e-8 kg; data quality (2,2,1,1,4)
- chloroform: 2.93215e-9 kg; data quality (4,2,1,1,3)
- anthracene: 2.3059e-11 kg; data quality (3,2,1,2,3)
- o-Xylene: 1.22657e-8 kg; data quality (3,2,1,1,3)
- methane, monochloro-, r-40: 1.95518e-7 kg; data quality (3,2,1,1,4)
- Aluminum: 5.67815e-6 kg; data quality (4,1,1,1,5)
- Decabromodiphenyl oxide: 7.02738e-12 kg; data quality (4,1,1,1,3)
- diethanolamine: 5.50583e-11 kg; data quality (3,2,1,1,3)
- Xylene: 1.17771e-13 kg; data quality (4,1,1,1,4)
- pyrene: 5.87149e-11 kg; data quality (2,2,1,1,4)
- Cresol: 8.02336e-10 kg; data quality (2,1,1,1,5)
- ethane, 1,1,2-trichloro-: 5.72819e-16 kg; data quality (4,2,1,1,4)
- ACRYLAMIDE: 1.77392e-10, 1.20628e-11 kg (2 entries, compartments not in this file); data quality (4,1,1,1,4)
- 1,4-dioxane: 2.26022e-10 kg; data quality (4,2,1,1,3)
- Sulfuric acid: 9.66289e-7 kg; data quality (2,1,1,1,5)
- CYANAMIDE: 1.06212e-10 kg; data quality (2,1,1,1,4)
- 1,2-BUTYLENE OXIDE: 1.16148e-11 kg; data quality (4,2,1,1,4)
- Sodium formate: 1.61055e-11, 3.81122e-11 kg (2 entries, compartments not in this file); data quality (3,1,1,1,4)
- lead: 2.88027e-9, 1.45032e-10 kg (2 entries, compartments not in this file); data quality (3,1,1,1,4)
- tertiary-Butyl Acetate: 1.95803e-9 kg; data quality (3,2,1,1,5)
- carbon disulfide: 5.63687e-7 kg; data quality (4,2,1,1,4)
- diisocyanates: 1.13767e-11 kg; data quality (4,1,1,1,5)
- fluorene: 6.36936e-11 kg; data quality (3,2,1,3,2)
- toluene: 1.58735e-10 kg; data quality (5,1,1,1,4)
- Propane, 1,1,1,3,3,3-hexafluoro-, HCFC-236fa: 8.56145e-11 kg; data quality (4,2,1,4,1)
- epichlorohydrin: 7.38383e-12 kg; data quality (3,2,1,1,3)
- Aniline: 3.17441e-10 kg; data quality (3,1,1,1,4)
- [1,1'-BIPHENYL]-4,4'-DIAMINE, 3,3'-DIMETHOXY-, DIHYDROCHLORIDE: 1.07422e-11 kg; data quality (5,1,1,1,4)
- trichloroethylene: 3.32635e-7 kg; data quality (4,2,1,1,4)
- hydrogen fluoride: 4.46989e-7 kg; data quality (2,2,1,1,4)
- Hydrocarbons, aromatic: 1.86935e-9 kg; data quality (3,2,1,3,2)
- Xylene: 1.32716e-7 kg; data quality (4,2,1,1,4)
- acenaphthylene: 6.76941e-11 kg; data quality (3,2,1,3,2)
- Indeno(1,2,3-cd)pyrene: 3.92313e-13 kg; data quality (3,2,1,3,2)
- Sulfuric acid: 3.86154e-14 kg; data quality (2,1,1,1,4)
- 3,3'-DICHLOROBENZIDINE DIHYDROCHLORIDE: 8.88834e-13 kg; data quality (5,1,1,1,4)
- phenanthrene: 6.43504e-10 kg; data quality (3,2,1,1,4)
- Chrysene: 1.97951e-11 kg; data quality (2,2,1,1,4)
- QUINOLINE: 6.26604e-11 kg; data quality (3,2,1,1,3)
- butanol: 1.06758e-8 kg; data quality (5,1,1,1,4)
- 4-Methyl-2-pentanone: 1.15536e-10 kg; data quality (4,1,1,1,5)
- arsenic: 1.23237e-7 kg; data quality (3,2,1,1,4)
- BUTYL ISOCYANATE: 2.06813e-12 kg; data quality (4,2,1,1,5)
- phosgene: 6.80376e-8 kg; data quality (4,1,1,1,5)
- C.I. DIRECT BLUE 218: 2.06083e-11 kg; data quality (5,1,1,1,4)
- Sulfur hexafluoride: 1.28955e-6 kg; data quality (4,2,1,4,1)
- beryllium: 4.02664e-13 kg; data quality (5,1,1,1,3)
- carbon tetrachloride: 2.47321e-9 kg; data quality (4,2,1,1,3)
- Hexane: 1.03223e-13 kg; data quality (4,1,1,1,4)
- chlorine: 2.65859e-5 kg; data quality (4,2,1,1,5)
- p-cresol: 7.28165e-9 kg; data quality (4,2,1,1,4)
- 3-methylcholanthrene: 1.98057e-14 kg; data quality (2,2,1,1,5)
- barium: 5.16115e-12, 1.06212e-11 kg (2 entries, compartments not in this file); data quality (4,1,1,1,4)
- 1,2,4-trimethylbenzene: 7.85782e-9 kg; data quality (5,1,1,1,2)
- methane, bromo-, halon 1001: 8.42153e-9 kg; data quality (3,2,1,1,3)
- acetaldehyde: 4.57615e-8 kg; data quality (3,2,1,2,3)
- HYDROGEN SULFIDE: 3.67061e-11 kg; data quality (3,1,1,1,4)
- Benzo(k)fluoranthene: 4.28809e-12 kg; data quality (2,2,1,1,4)
- ethane, 1,2-dichloro-: 5.10325e-11 kg; data quality (3,2,1,1,4)
- Nitrobenzene: 1.43277e-10 kg; data quality (4,2,1,1,3)
- SEC-BUTYL ALCOHOL: 8.91933e-10 kg; data quality (5,1,1,1,5)
- phthalic anhydride: 2.56101e-8 kg; data quality (2,2,1,1,3)
- Cyclohexanol: 8.2049e-13 kg; data quality (4,1,1,1,4)
- ethene, tetrachloro-: 8.83025e-9 kg; data quality (3,2,1,1,4)
- Chrysene, 5-methyl-: 1.77898e-14 kg; data quality (2,2,1,1,5)
- Methane: 2.99922e-6 kg; data quality (3,2,1,3,1)
- mercury: 3.93885e-9 kg; data quality (2,2,1,1,4)
- benz[a]anthracene: 2.45149e-11 kg; data quality (2,2,1,1,4)
- hexachloroethane: 1.04374e-12 kg; data quality (4,2,1,1,3)
- Propene: 5.20601e-9 kg; data quality (3,1,1,1,4)
- formic acid: 6.40591e-11 kg; data quality (3,1,1,1,5)
- ETHENE: 4.05975e-9 kg; data quality (3,1,1,1,4)
- butadiene: 3.65073e-8 kg; data quality (2,2,1,1,4)
- Chromium, ion: 4.40973e-8 kg; data quality (2,2,1,1,4)
- chlorine: 1.32977e-9 kg; data quality (2,1,1,1,4)
- Dibenz(a,h)anthracene: 3.36763e-13 kg; data quality (2,2,1,1,4)
- methylene diphenyl diisocyanate: 1.66468e-11 kg; data quality (4,2,1,1,5)
- Ethene, trichloro-: 3.16647e-15 kg; data quality (5,1,1,1,4)
- Cresol: 2.20077e-9 kg; data quality (4,2,1,1,5)
- particulates, < 10 um: 1.26115e-5 kg; data quality (3,2,1,1,4)
- benzyl chloride: 6.29462e-10 kg; data quality (2,2,1,1,5)
- fluoranthene: 6.19614e-11 kg; data quality (2,2,1,2,4)
- mercury: 5.04388e-14 kg; data quality (3,1,1,1,4)
- Benzene, hexachloro-: 3.78115e-13 kg; data quality (4,1,1,1,4)
- methanol: 2.64259e-7 kg; data quality (4,2,1,1,4)
- maleic anhydride: 4.06451e-8 kg; data quality (2,2,1,1,3)
- AMMONIA: 7.92901e-11 kg; data quality (3,1,1,1,4)
- ethylene glycol: 2.7194e-12 kg; data quality (5,1,1,1,4)
- biphenyl: 2.27357e-8 kg; data quality (4,2,1,1,4)
- particulates, < 2.5 um: 5.4192e-5 kg; data quality (3,2,1,1,4)
- Aluminum: 1.96115e-7 kg; data quality (4,1,1,1,2)
- t-butyl methyl ether: 4.15326e-10 kg; data quality (4,1,1,1,4)
- beryllium: 1.80535e-10 kg; data quality (2,2,1,1,4)
- Methane, difluoro-, HFC-32: 4.31345e-9 kg; data quality (4,2,1,4,1)
- ethylene oxide: 2.83218e-11 kg; data quality (3,2,1,1,3)
- Ethane, 1,1,1-trifluoro-, HFC-143a: 3.16912e-9 kg; data quality (4,2,1,4,1)
- CHLORONAPHTHALENE: 1.02411e-19 kg; data quality (1,2,1,1,4)
- Polychlorinated biphenyls: 7.73286e-14 kg; data quality (3,1,1,1,4)
- hydrogen sulfide: 1.26536e-8 kg; data quality (3,2,1,1,3)
- styrene: 9.92174e-8 kg; data quality (4,2,1,1,4)
- acetophenone: 2.82571e-7 kg; data quality (4,2,1,1,4)
- HYDROCHLORIC ACID: 2.59957e-10 kg; data quality (2,1,1,1,5)
- Benzo(g,h,i)perylene: 1.28678e-8 kg; data quality (3,2,1,1,4)
- methane, dichloro-, hcc-30: 7.36121e-9 kg; data quality (4,2,1,1,4)

## Inventory method
Input-output

## Modelling constants
The reference unit of all processes is 1 USD2013 of the good or service. The technosphere inputs are based on the US BEA detailed input-output tables for 2007. The IO tables are combined to develop a commodity-by-commodity model based on the the industry-technology assumption (see Suh et al., 2010), which assumes all commodities produced by a given industry have the same input structure, but that multiple industries can produce the same commodity. Thus, model technosphere flows represent commodity outputs (and not industry outputs) from other processes in the model. There are no by-products included in these processes. All commodity production is based on US-conditions, despite in reality that some goods and services are produced overseas, as USEEIO v1.1 is a single-region IO model.

## Completeness
The input-output approach assures that all purchased inputs associated with the sectors making these commodities as reported in the US census for 2007 are included. The direct resources extracted including minerals, energy sources, water and land occupied are included. Emissions to air include all critieria air pollutants, greenhouse gases, and hazardous and toxic air pollutants as defined by US EPA. Releases to water include toxics, total nitrogen and total phosphorus, and water discharges. Releases to soil or groundwater include toxics and agriculutural pesticides. Some metal releases to air, water and soil are not included because they could not be speciated. Solid hazardous and non-hazardous wastes generated are not included as an elementary flows although purchases of waste services are included.

## Data treatment
Greenhouse gases are primarily from the US Greenhouse Gas Emission Inventory (USEPA 2016a). Biogenic C uptake is not included (change from version 1.0), as biogenic C emission are not included. Toxic releases to air, water and soil (except pesticides) are from the 2013 Toxic Release Inventory (USEPA 2015a). Criteria air pollutants and hazardous air pollutants are from the 2011 National Emissions Inventory (USEPA 2015b). All estimates are normalized by industry based on sector output in the data year, then converted to 2013 USD using relative sector-specific CPIs (if data year is not 2013). Energy use represent raw renewables or fossil fuel energies and is based on EIA data for 2014. See Table 1 in Yang, Ingwersen et al. 2017 and Supporting Information 1, and the v1.1 data update notes (Ingwersen et al. 2017) for all details on environmental data sources used.Land occupation associated with manufacturing buildings was estimated based on the building floorspace data provided by the U.S. Energy Information Administration in the 2010 Manufacturing Energy Consumption Survey (EIA 2013). Portions of total renewable energy (EIA 2016) based on EIA-923 reports for 2014 (EIA 2017) are included. Nitrogen and Phosphorus releases are modeled in total N and total P equivalents as estimated by the Discharge Monitoring Report Nutrient Loading tool (USEPA 2016b). Self-supplied withdrawals were assigned to industrial sectors based on water use statistics for Canadian industries by NAICS 3-digit sector scaled to US production levels based on gross domestic product by industry (BEA 2015; Statistics Canada 2010), and further disaggregated to the manufacturing sectors based on compensation of employees as provided by the 2007 IO tables (BEA 2015). Water withdrawals associated with public supply were allocated to sectors based on their use of water, sewage, and other services in USD based on the IO tables (BEA 2015). Portions of total renewable energy (EIA 2016) by type are assigned to sectors (hydro, wind, solar, or) based on EIA-923 reports for 2014 (EIA 2017).

## Data collection
2015-2016

## Sampling procedure
US federal government sources, including surveys and US EPA emissions databases are used as the primary sources. From these sources, data for US reporting establishments/facilities are aggregated by the NAICS sector as defined in the BEA detailed 2007 input-output tables. When level of sector aggregation differs, or when direct emissions are not reported but modeled, additional sources are used to make allocations and estimates.

## Review details
In regard to quality assurance and peer-review, each dataset created went through Quality Assurance as defined in a quality assurance project plans at US EPA, CSRA or ERG. The model was assembled with the IO model builder model (USEPA 2016c). Validation functions were used to check that all the model components were properly assembled and harmonized. Bayou Demeke and Santosh Ghimire provided internal peer review of the model methodology and the manuscript underwent standard EPA management review. An editor and two anonymous reviewers at the Journal of Cleaner Production reviewed the model. In regard to data quality evaluation, data quality assessment was performed at the flow and process levels according to the updated US EPA data quality assessment guidelines as defined in US EPA (2016b).

## Intended application
The primary application is for use in the US Environmentally-Extended Input-Ouput model, USEEIO, version 1.1. This model is being used by the US EPA for supporting tools that prioritize goods and services based on potential environmental impacts, resource use or emissions for large regions, including the US and US states, and as a strealined tool for organizations as a starting point to consider sustainable materials management. Model results are designed to provide meso/macro-level decision support.

## Project
USEEIO v1.1 was developed by the US EPA with CSRA and ERG with Wesley W. Ingwersen and David E. Meyer as research leads. Yi Yang was the technical lead on the work for CSRA (contract EP-C-15-012); Troy Hawkins was lead for ERG (contract EP-C-12-021).

## Sources
- USDA 2014
- USEPA 2015b
- Statistics Canada 2010
- USDA 2006
- Nickerson et al. 2011
- Kim et el. 2013
- BLM 2008
- USGS 2016
- Maupin et al. 2014
- USGS 2015
- Blackhurst et al. 2010
- Lovelace 2009
- USEPA 2015a
- EIA 2016
- Edelen and Ingwersen 2017
- USEPA 2016a
- Torcellini et al. 2003
- EIA 2017
- BEA 2015
- USDA 2009a
- Goebes et al. 2003
- Ingwersen et al. DRAFT
- USDA 2009b
- USEPA 2016b
- EIA 2015
- Macknick et al. 2011
- EIA 2013
- Yienger et al. 1995
- Ingwersen et al. 2017
- USEPA 2016c
- USDA 2016
