# Housing

Dataset: openLCA process, unit process
Category: 53: Real Estate and Rental and Leasing
Geography: United States
Time period: 2017-01-01 to 2017-12-31
Data quality: US EPA - Process Pedigree Matrix (1;1)
Exchange data quality scheme: US EPA - Flow Pedigree Matrix
Generated by: US EPA with CSRA and ERG
Owner: US EPA
Published in: Yang, Ingwersen et al. 2017
restrictionsDescription: This model shold be appropriately cited (see Yang, Ingwersen et al. 2017 source or Publication field) when used. Any changes or derivations of this model by the user should be documented. The model itself and any results from use of this model shall not be construed to consitute US EPA opinion or policy.
copyright: false

## General comment
BEA Code & Name is '5310HS:Housing'. Description of the primary industry producing this good or service, adapted from the Census Bureau NAICS 2007 descriptions: The Real Estate and Rental and Leasing sector comprises establishments primarily engaged in renting, leasing, or otherwise allowing the use of tangible or intangible assets, and establishments providing related services. The major portion of this sector comprises establishments that rent, lease, or otherwise allow the use of their own assets by others. The assets may be tangible, as is the case of real estate and equipment, or intangible, as is the case with patents and trademarks. This sector also includes establishments primarily engaged in managing real estate for others, selling, renting and/or buying real estate for others, and appraising real estate. These activities are closely related to this sectors main activity, and it was felt that from a production basis they would best be included here. In addition, a substantial proportion of property management is self-performed by lessors. The main components of this sector are the real estate lessors industries (including equity real estate investment trusts (REITs)); equipment lessors industries (including motor vehicles, computers, and consumer goods); and lessors of nonfinancial intangible assets (except copyrighted works). Excluded from this sector are establishments primarily engaged in renting or leasing equipment with operators. Establishments renting or leasing equipment with operators are classified in various subsectors of NAICS depending on the nature of the services provided (e.g., transportation, construction, agriculture). These activities are excluded from this sector because the client is paying for the expertise and knowledge of the equipment operator, in addition to the rental of the equipment. In many cases, such as the rental of heavy construction equipment, the operator is essential to operate the equipment. Related NAICS codes are: 531

## Technology
The process describes the average US production of this good or service within this NAICS-based grouping defined in the BEA 2007 detailed input-output tables (BEA 2015). Distribution, wholesale and retailing of this good or service, use, and final disposal are not included. Creation of a product system with this process will enable modeling of all upstream (supply-chain) activities.

## Geography
Data represent the 50 US states

## Time period
2017 was the year in which this version of USEEIO was released and is the target date for the model

## Reference product
- Housing: 1 USD

## Inputs from technosphere
All rows: data quality (1,3,1,1,1)
- Facilities support: 6.13652e-6 USD
- Ice cream and frozen desserts; at manufacturer: 5.53781e-7 USD
- Water transport (boats, ships, ferries): 3.33254e-6 USD
- Postal service: 6.23188e-5 USD
- Transmission and power train parts; at manufacturer: 8.4913e-7 USD
- Fluid milk and butter; at manufacturer: 2.80582e-6 USD
- Clothing; at manufacturer: 7.38374e-8 USD
- Hotels and campgrounds: 7.98614e-6 USD
- Clay and ceramic products; at manufacturer: 8.1886e-6 USD
- Coal; at mine: 7.75293e-7 USD
- Dolls, toys, and games; at manufacturer: 3.69187e-8 USD
- Abrasive products; at manufacturer: 3.69187e-8 USD
- Curtains and linens; at manufacturer: 1.96408e-5 USD
- Cutlery and handtools; at manufacturer: 3.76387e-6 USD
- Fresh fruits and tree nuts; at farm: 3.69187e-8 USD
- Company and enterprise management: 0.000151291 USD
- Soft drinks, bottled water, and ice; at manufacturer: 5.27938e-6 USD
- Warehousing: 3.87647e-6 USD
- Sports: 4.79943e-7 USD
- Vehicle rental and leasing: 1.4066e-5 USD
- Audio and video equipment; at manufacturer: 3.69187e-8 USD
- All other food and drinking places: 5.48243e-5 USD
- Passenger ground transport: 3.962e-6 USD
- Other plastic products; at manufacturer: 2.41129e-5 USD
- Motor vehicle steering, suspension components (except spring), and brake systems; at manufacturer: 4.79943e-7 USD
- Bread and other baked goods; at manufacturer: 1.38445e-5 USD
- Golf courses, marinas, ski resorts, fitness and other rec centers and industries: 7.45758e-6 USD
- Books; at publisher: 7.38374e-8 USD
- Other rubber products; at manufacturer: 4.06106e-7 USD
- Wiring devices; at manufacturer: 1.16067e-5 USD
- Plywood and veneer; at manufacturer: 3.86559e-5 USD
- Other basic inorganic chemicals; at manufacturer: 2.70492e-6 USD
- Heavy gauge metal tanks; at manufacturer: 2.10253e-6 USD
- Flours and malts; at manufacturer: 4.06106e-7 USD
- Screws, nuts, and bolts; at manufacturer: 7.86987e-7 USD
- Nondepository credit intermediation and related activities: 0.0296758 USD
- Coffee and tea; at manufacturer: 3.65495e-6 USD
- Cookies, crackers, pastas, and tortillas; at manufacturer: 1.51367e-6 USD
- Snack foods; at manufacturer: 9.96805e-7 USD
- Vehicle engines and engine parts; at manufacturer: 1.84594e-7 USD
- Nonferrous metal casts; at manufacturer: 3.69187e-8 USD
- Machine shops; at manufacturer: 2.74184e-6 USD
- Securities and commodities brokerage and exchanges: 1.04111e-5 USD
- Refined vegetable, olive, and seed oils; at manufacturer: 7.38374e-8 USD
- Glass and glass products; at manufacturer: 2.47355e-6 USD
- Wireless telecommunications: 9.30352e-6 USD
- General merchandise stores: 0.000206613 USD
- Environmental and other technical consulting services: 8.97125e-6 USD
- Other concrete products; at manufacturer: 2.21512e-7 USD
- Polystyrene foam products; at manufacturer: 1.4263e-6 USD
- Other basic organic chemicals; at manufacturer: 1.72165e-6 USD
- Tobacco, cotton, sugarcane, peanuts, sugar beets, herbs and spices, and other crops; at farm: 1.35246e-6 USD
- Truck transport: 0.000155214 USD
- Cement; at manufacturer: 1.35246e-6 USD
- Plastic bags, films, and sheets; at manufacturer: 2.2502e-6 USD
- Metal windows, doors, and architectural products; at manufacturer: 3.92466e-5 USD
- Insurance agencies and brokerages: 7.01456e-7 USD
- Office administration: 7.23607e-6 USD
- Commercial machinery repair: 1.55797e-5 USD
- Other textiles; at manufacturer: 2.87782e-6 USD
- Paints and coatings; at manufacturer: 5.16862e-7 USD
- Communications equipment; at manufacturer: 3.69187e-8 USD
- Wild-caught fish and game; at place of capture: 7.30991e-6 USD
- Electronic equipment repair and maintenance: 7.64217e-6 USD
- Promoters and agents: 5.90699e-7 USD
- Ground or treated minerals and earth; at manufacturer: 6.7623e-7 USD
- Employment services: 2.71667e-5 USD
- Corn products; at manufacturer: 7.38374e-8 USD
- Advertising and public relations: 0.000248774 USD
- Frozen food; at manufacturer: 7.01456e-7 USD
- Telecommunications: 2.77007e-5 USD
- Vehicle electrical and electronic equipment; at manufacturer: 1.47675e-7 USD
- Performances: 4.94711e-6 USD
- Air conditioning, refrigeration, and warm air heating equipment; at manufacturer: 1.45583e-5 USD
- Consumer goods and general rental centers: 1.55059e-6 USD
- Power boilers and heat exchangers; at manufacturer: 7.13149e-7 USD
- Wooden windows, door, and flooring; at manufacturer: 0.000105 USD
- Dry-cleaning and laundry: 1.48782e-5 USD
- Satellite, telecommunications resellers, and all other telecommunications: 2.73198e-6 USD
- Packaged poultry; at manufacturer: 3.9503e-6 USD
- Fabricated pipe and pipe fittings; at manufacturer: 4.77053e-6 USD
- Vehicle repair: 7.78985e-6 USD
- Management consulting: 3.77678e-5 USD
- Seasonings and dressings; at manufacturer: 6.53461e-6 USD
- Business support: 1.71968e-5 USD
- Rubber tires; at manufacturer: 3.32268e-7 USD
- Other computer related services, including facilities management: 1.3332e-5 USD
- Laminated plastic plates and shapes; at manufacturer: 1.84594e-7 USD
- Fresh vegetables, melons, and potatoes; at farm: 3.32268e-7 USD
- Sporting and athletic goods; at manufacturer: 1.47675e-7 USD
- Monetary authorities and depository credit intermediation: 0.00225707 USD
- Major home appliances (except ovens, stoves, refrigerators and laundry machines); at manufacturer: 3.45499e-6 USD
- Other retail: 0.00173437 USD
- Lumber and treated lumber; at manufacturer: 2.80208e-5 USD
- Sound recording: 1.73149e-5 USD
- Automatic controls for HVAC and refrigeration equipment; at manufacturer: 2.06561e-6 USD
- Metal hinges, keys, lock, and other hardware; at manufacturer: 5.55752e-6 USD
- Waste management and remediation: 4.58943e-5 USD
- Office supplies (not paper); at manufacturer: 9.63578e-6 USD
- Photographers: 7.38374e-8 USD
- Pumps and pumping equipment; at manufacturer: 6.7623e-6 USD
- Legal services: 0.000208472 USD
- Insurance carriers: 0.00406664 USD
- Couriers and messengers: 2.25204e-6 USD
- Fresh wheat, corn, rice, and other grains; at farm: 2.21512e-7 USD
- Movies and film: 9.59887e-7 USD
- Storage batteries; at manufacturer: 3.69187e-7 USD
- Communication and energy wire and cable; at manufacturer: 1.46322e-6 USD
- Cheese; at manufacturer: 8.4913e-7 USD
- Wineries and wine; at manufacturer: 1.62442e-6 USD
- Dimensional stone; at mine: 1.48771e-5 USD
- Specialty transformers; at manufacturer: 3.69187e-8 USD
- Accounting, tax preparation, bookkeeping, and payroll: 3.57029e-5 USD
- Switchgear and switchboards; at manufacturer: 1.38938e-6 USD
- Architectural, engineering, and related services: 0.000111196 USD
- Urethane and other foam products; at manufacturer: 4.45179e-6 USD
- Unrefined oil and gas; at extraction site: 4.98403e-6 USD
- Pesticides; at manufacturer: 1.4263e-6 USD
- Plastic bottles; at manufacturer: 1.10756e-7 USD
- Magazines and journals; at publisher: 3.24885e-6 USD
- Nonresidential building repair and maintanence: 4.98348e-5 USD
- Dry, condensed, and evaporated dairy; at manufacturer: 1.36599e-6 USD
- Soap and cleaning compounds; at manufacturer: 8.24089e-6 USD
- Cardboard; at manufacturer: 2.63292e-6 USD
- Rail transport: 7.07119e-6 USD
- Asphalt shingles; at manufacturer: 2.36681e-5 USD
- Independent artists, writers, and performers: 2.03053e-6 USD
- Metal structural products; at manufacturer: 6.27067e-6 USD
- Sanitary paper (tissues, napkins, diapers, etc.); at manufacturer: 3.69187e-8 USD
- Breakfast cereals; at manufacturer: 3.69187e-8 USD
- Sand, gravel, clay, phosphate, other nonmetallic minerals; at mine: 1.35246e-6 USD
- Other vehicle parts; at manufacturer: 9.59887e-7 USD
- Sugar, candy, and chocolate; at manufacturer: 1.5875e-6 USD
- Springs and wires; at manufacturer: 4.73361e-6 USD
- Computer terminals and other computer peripheral equipment; at manufacturer: 4.74898e-6 USD
- External hard drives, CDs, other storage media; at manufacturer: 1.84594e-5 USD
- Civic, social, professional, and similar organizations: 5.50583e-5 USD
- Drinking water and wastewater treatment; at consumer: 1.25524e-5 USD
- Valve and fittings (except for plumbing); at manufacturer: 8.97743e-7 USD
- Household goods repair: 4.94711e-6 USD
- Investigation and security: 5.9673e-6 USD
- Leather; at manufacturer: 7.38374e-8 USD
- Flavored drink concentrates; at manufacturer: 5.1317e-6 USD
- Secondary steel products; at manufacturer: 1.4263e-6 USD
- Pipeline transport: 4.43025e-7 USD
- Copper, nickel, lead, and zinc; at mine: 1.36599e-6 USD
- All other foods; at manufacturer: 2.9535e-7 USD
- Investment advice, portfolio management, and other financial advising services: 2.81752e-6 USD
- Books, newspapers, magazines, and other print media; at manufacturer: 3.6808e-5 USD
- State and local government enterprises: 1.48413e-5 USD
- Software: 7.01456e-7 USD
- Ready-mix concrete; at manufacturer: 1.21721e-5 USD
- Commercial equipment rental: 6.82996e-6 USD
- Other support services: 4.87327e-6 USD
- Buildings and dwellings services: 0.000379353 USD
- Natural gas; at consumer: 3.41129e-5 USD
- Paper; at manufacturer: 3.03958e-5 USD
- Packaged meat (except poultry); at manufacturer: 2.09329e-5 USD
- Carpets and rugs; at manufacturer: 1.35246e-6 USD
- Motors and generators; at manufacturer: 7.38374e-8 USD
- Marketing research and all other miscellaneous professional, scientific, and technical services: 3.1867e-6 USD
- Full-service restaurants: 7.76462e-6 USD
- Specialized design: 1.70995e-6 USD
- All other converted paper products; at manufacturer: 3.69187e-8 USD
- Wholesale trade: 0.000461334 USD
- Data processing and hosting: 6.23926e-6 USD
- News syndicates, libraries, archives, Internet publishing and all other information services: 2.21512e-7 USD
- Limited-service restaurants: 1.04849e-5 USD
- Stationery; at manufacturer: 2.55847e-5 USD
- Cardboard containers; at manufacturer: 1.79549e-6 USD
- Lime and gypsum products; at manufacturer: 6.12299e-6 USD
- Lessors of nonfinancial intangible assets: 2.55964e-5 USD
- Metal coatings, engravings, and heat treatments; at manufacturer: 3.41807e-6 USD
- Primary iron, steel, and ferroalloy products; at manufacturer: 5.90699e-7 USD
- Adhesives; at manufacturer: 1.4263e-6 USD
- Machinery for the paper, textile, food or other industries (except semiconductor machinery); at manufacturer: 7.38374e-8 USD
- Seafood; at manufacturer: 5.7224e-6 USD
- Directory, mailing list, and other publishers; at publisher: 1.10756e-7 USD
- Residential building repair and maintanence: 0.04271 USD
- Plastic pipe, fittings, and sausage casings; at manufacturer: 7.73388e-6 USD
- Fruit and vegetable preservation; at manufacturer: 4.7256e-6 USD
- Small electrical appliances; at manufacturer: 3.69187e-8 USD
- Wireless communications; at manufacturer: 1.84594e-7 USD
- Other real estate: 0.00146601 USD
- Gaskets, seals, musical instruments, fasteners, brooms, brushes, mop and other misc. goods; at manufacturer: 1.94316e-6 USD
- Mineral wool; at manufacturer: 8.791e-6 USD
- Distilleries and spirits; at manufacturer: 1.1814e-6 USD
- Poultry farms: 5.90699e-7 USD
- Light bulbs; at manufacturer: 2.21512e-7 USD
- Metal plumbing drains, faucets, valves, and other fittings; at manufacturer: 8.97559e-6 USD
- Other petroleum and coal products; at manufacturer: 4.25735e-6 USD
- Newspapers; at publisher: 2.21512e-7 USD
- Air transport: 1.17131e-5 USD
- Veneer, plywood, and engineered wood; at manufacturer: 1.94039e-5 USD
- Lawn and garden equipment; at manufacturer: 1.35246e-5 USD
- Travel arrangement and reservation: 1.25524e-5 USD
- Gasoline, fuels, and by-products of petroleum refining; at manufacturer: 5.94139e-5 USD
- Vegetable oils and by-products; at manufacturer: 1.47675e-7 USD
- Scenic and sightseeing transportation and support activities for transportation: 2.51047e-6 USD
- Vehicles and parts sales: 1.31068e-5 USD
- Food and beverage stores: 0.000107449 USD
- Breweries and beer; at manufacturer: 1.80902e-6 USD
- Wood kitchen cabinets and countertops; at manufacturer: 0.00324534 USD
- Animal farms and aquaculture ponds (except cattle and poultry): 1.10756e-7 USD
- Paper bags and coated paper; at manufacturer: 2.91289e-5 USD
- Fertilizers; at manufacturer: 8.18239e-5 USD
- Noncomparable imports: 0.000545149 USD
- Secondary copper products; at manufacturer: 7.13149e-7 USD
- Amusement parks and arcades: 5.94391e-6 USD
- Electricity; at consumer: 0.000120798 USD
- Concrete pipe, bricks, and blocks; at manufacturer: 2.77876e-6 USD
- Computer systems design: 1.61243e-5 USD
- Metal pipe fittings, ball and roller bearings, industrial patterns, metal bath fixtures, other misc. fabricated metals; at manufacturer: 2.88803e-5 USD
- Greenhouse crops, mushrooms, nurseries, and flowers; at farm: 7.13149e-7 USD
- Light fixtures; at manufacturer: 9.05494e-6 USD
- Heating equipment other than warm air furnaces; at manufacturer: 2.8526e-6 USD
- Internet publishing and broadcasting: 3.83955e-6 USD
- Chemicals (except basic chemicals, agrichemicals, polymers, paints, pharmaceuticals,soaps, cleaning compounds); at manufacturer: 1.45152e-6 USD
- Pet care, photofinishing, parking and other sundry services: 3.17501e-6 USD
- Asphalt pavement; at manufacturer: 4.80745e-6 USD

## Inputs from nature
- Water, fresh: 5.78849e-6, 3.34479e-6 m3 (2 entries, compartments not in this file); data quality (1,2,1,4,2)
- Occupation, urban, discontinuously built: 2.51208e-5 m2*a; data quality (4,2,1,1,1)

## Emissions to nature
- Cobalt: 5.79162e-12 kg; data quality (3,2,1,1,5)
- toluene: 1.69552e-8 kg; data quality (3,2,1,4,1)
- chloroform: 3.38799e-14 kg; data quality (4,2,1,1,5)
- PHOSPHORUS: 4.44682e-12 kg; data quality (2,2,1,1,5)
- particulates, < 10 um: 6.20026e-9 kg; data quality (3,2,1,2,4)
- Chromium, ion: 4.44528e-12 kg; data quality (2,2,1,2,4)
- 1,1-DICHLOROETHYLENE: 1.80807e-13 kg; data quality (3,2,1,1,5)
- mercury: 7.6713e-13 kg; data quality (2,2,1,1,5)
- Ethane, pentafluoro-, HFC-125: 5.95086e-9 kg; data quality (4,2,1,4,1)
- butadiene: 1.76096e-9 kg; data quality (3,2,1,4,1)
- Xylene: 1.40657e-8 kg; data quality (3,2,1,4,1)
- manganese: 4.70169e-12 kg; data quality (3,2,1,1,5)
- m-xylene: 5.71391e-10 kg; data quality (3,2,1,4,1)
- Dinitrogen monoxide: 1.13574e-9 kg; data quality (4,2,1,4,1)
- benz[a]anthracene: 7.73392e-13 kg; data quality (3,2,1,3,3)
- Ethane, 1,1,1,2-tetrafluoro-, HFC-134a: 2.24295e-8 kg; data quality (4,2,1,4,1)
- Benzo(a)anthracene: 8.4742e-15 kg; data quality (2,2,1,1,5)
- Water, fresh: 7.73328e-6 m3; data quality (1,2,1,4,2)
- ethane, 1,2-dibromo-: 3.03586e-14 kg; data quality (2,2,1,1,5)
- benzo(a)pyrene: 5.00792e-13 kg; data quality (3,2,1,4,1)
- Dibenz(a,h)anthracene: 3.50133e-15 kg; data quality (3,2,1,4,2)
- lead: 4.31643e-12 kg; data quality (3,2,1,1,5)
- acenaphthene: 4.30363e-12 kg; data quality (3,2,1,4,1)
- nickel: 8.78805e-11 kg; data quality (3,2,1,1,5)
- antimony: 4.93595e-12 kg; data quality (3,2,1,1,5)
- anthracene: 3.30461e-12 kg; data quality (3,2,1,4,1)
- VOC, volatile organic compounds: 3.33363e-7 kg; data quality (3,2,1,1,2)
- hydrogen fluoride: 1.24601e-11 kg; data quality (2,2,1,1,5)
- Chrysene: 8.51627e-13 kg; data quality (3,2,1,3,3)
- carbon monoxide: 6.73189e-6 kg; data quality (3,2,1,1,1)
- acetaldehyde: 2.83857e-9 kg; data quality (3,2,1,4,1)
- Carbon dioxide: 0.000220015 kg; data quality (4,2,1,4,1)
- Nitrogen: 6.15382e-6 kg; data quality (2,2,1,1,5)
- hydrogen chloride: 1.45901e-10 kg; data quality (2,2,1,1,5)
- 2,2,4-trimethylpentane: 6.05914e-9 kg; data quality (3,2,1,4,1)
- sulfur dioxide: 1.09795e-7 kg; data quality (2,2,1,1,5)
- selenium: 1.3452e-12 kg; data quality (2,2,1,1,5)
- Propane, 1,1,1,3,3,3-hexafluoro-, HCFC-236fa: 6.87842e-11 kg; data quality (4,2,1,4,1)
- benzene: 1.11343e-8 kg; data quality (3,2,1,4,1)
- formaldehyde: 7.39148e-9 kg; data quality (3,2,1,3,2)
- Ethene, chloro-: 4.39866e-12 kg; data quality (3,2,1,1,5)
- Benzo(g,h,i)perylene: 1.29048e-12 kg; data quality (3,2,1,4,1)
- monochloroethane: 7.41908e-13 kg; data quality (3,2,1,1,5)
- Ethane, 1,1,1-trifluoro-, HFC-143a: 2.54613e-9 kg; data quality (4,2,1,4,1)
- acenaphthylene: 1.64866e-11 kg; data quality (3,2,1,4,1)
- 1,1,2,2-tetrachloroethane: 7.45323e-15 kg; data quality (3,2,1,1,5)
- Benzo(k)fluoranthene: 4.78341e-13 kg; data quality (3,2,1,4,1)
- benzene, ethyl-: 4.30495e-9 kg; data quality (3,2,1,4,1)
- methane, monochloro-, r-40: 2.49914e-15 kg; data quality (3,2,1,1,5)
- bromoform: 2.02708e-16 kg; data quality (3,2,1,1,5)
- ammonia: 2.74056e-8 kg; data quality (3,2,1,1,5)
- Chromium VI: 4.74756e-13 kg; data quality (3,2,1,3,3)
- Methane, difluoro-, HFC-32: 3.4655e-9 kg; data quality (4,2,1,4,1)
- propylene oxide: 3.71977e-11 kg; data quality (3,2,1,1,5)
- 1,1,1-trichloroethane: 6.21651e-13 kg; data quality (4,2,1,1,5)
- ethene, tetrachloro-: 2.2245e-10 kg; data quality (3,2,1,1,5)
- naphthalene: 4.44492e-10 kg; data quality (3,2,1,3,2)
- o-Xylene: 2.05099e-10 kg; data quality (3,2,1,4,1)
- nitrogen oxides: 9.22566e-7 kg; data quality (2,2,1,1,4)
- Propane, 1,2-dichloro-: 9.3682e-15 kg; data quality (4,2,1,1,5)
- cumene: 7.08088e-15 kg; data quality (4,2,1,1,5)
- ethane, 1,2-dichloro-: 3.99721e-13 kg; data quality (3,2,1,1,5)
- benzene, chloro-: 2.0569e-16 kg; data quality (4,2,1,1,5)
- Phosphorus: 2.27149e-6 kg; data quality (2,1,1,1,1)
- phenanthrene: 1.50473e-11 kg; data quality (3,2,1,4,1)
- propanal: 6.05622e-10 kg; data quality (3,2,1,4,1)
- chlorine: 6.67148e-14 kg; data quality (4,2,1,1,5)
- cadmium: 3.01609e-12 kg; data quality (3,2,1,1,5)
- styrene: 1.66738e-10 kg; data quality (3,2,1,4,1)
- para-xylene: 1.06939e-11 kg; data quality (3,2,1,4,1)
- 2-methylnaphthalene: 5.10872e-14 kg; data quality (2,2,1,1,5)
- methanol: 8.09734e-13 kg; data quality (4,2,1,1,5)
- fluorene: 8.31654e-12 kg; data quality (3,2,1,4,1)
- methane, bromo-, halon 1001: 2.05484e-15 kg; data quality (3,2,1,1,5)
- trichloroethylene: 6.89939e-12 kg; data quality (4,2,1,1,5)
- 3-methylcholanthrene: 9.53349e-16 kg; data quality (2,2,1,1,5)
- beryllium: 1.02229e-13 kg; data quality (2,2,1,1,5)
- arsenic: 2.41744e-12 kg; data quality (3,2,1,2,4)
- carbon tetrachloride: 3.13796e-14 kg; data quality (4,2,1,1,5)
- Hydrocarbons, aromatic: 1.20939e-10 kg; data quality (3,2,1,4,1)
- hexane: 6.06203e-9 kg; data quality (3,2,1,3,3)
- acrolein: 2.34409e-10 kg; data quality (3,2,1,4,1)
- fluoranthene: 5.97406e-12 kg; data quality (3,2,1,3,2)
- Indeno(1,2,3-cd)pyrene: 3.97349e-13 kg; data quality (3,2,1,4,1)
- methane, dichloro-, hcc-30: 1.13624e-11 kg; data quality (4,2,1,1,5)
- ethane, 1,1,2-trichloro-: 2.40301e-16 kg; data quality (4,2,1,1,5)
- Methane: 2.1171e-8 kg; data quality (4,2,1,4,1)
- pyrene: 5.59667e-12 kg; data quality (3,2,1,4,1)
- Benzo(b)fluoranthene: 5.11744e-13 kg; data quality (3,2,1,4,1)
- particulates, < 2.5 um: 6.54786e-8 kg; data quality (3,2,1,2,4)

## Inventory method
Input-output

## Modelling constants
The reference unit of all processes is 1 USD2013 of the good or service. The technosphere inputs are based on the US BEA detailed input-output tables for 2007. The IO tables are combined to develop a commodity-by-commodity model based on the the industry-technology assumption (see Suh et al., 2010), which assumes all commodities produced by a given industry have the same input structure, but that multiple industries can produce the same commodity. Thus, model technosphere flows represent commodity outputs (and not industry outputs) from other processes in the model. There are no by-products included in these processes. All commodity production is based on US-conditions, despite in reality that some goods and services are produced overseas, as USEEIO v1.1 is a single-region IO model.

## Completeness
The input-output approach assures that all purchased inputs associated with the sectors making these commodities as reported in the US census for 2007 are included. The direct resources extracted including minerals, energy sources, water and land occupied are included. Emissions to air include all critieria air pollutants, greenhouse gases, and hazardous and toxic air pollutants as defined by US EPA. Releases to water include toxics, total nitrogen and total phosphorus, and water discharges. Releases to soil or groundwater include toxics and agriculutural pesticides. Some metal releases to air, water and soil are not included because they could not be speciated. Solid hazardous and non-hazardous wastes generated are not included as an elementary flows although purchases of waste services are included.

## Data treatment
Greenhouse gases are primarily from the US Greenhouse Gas Emission Inventory (USEPA 2016a). Biogenic C uptake is not included (change from version 1.0), as biogenic C emission are not included. Toxic releases to air, water and soil (except pesticides) are from the 2013 Toxic Release Inventory (USEPA 2015a). Criteria air pollutants and hazardous air pollutants are from the 2011 National Emissions Inventory (USEPA 2015b). All estimates are normalized by industry based on sector output in the data year, then converted to 2013 USD using relative sector-specific CPIs (if data year is not 2013). Energy use represent raw renewables or fossil fuel energies and is based on EIA data for 2014. See Table 1 in Yang, Ingwersen et al. 2017 and Supporting Information 1, and the v1.1 data update notes (Ingwersen et al. 2017) for all details on environmental data sources used.Land occupation for commercial buildings was estimated based on the building floorspace data provided by the U.S. Energy Information Administration 2012 Commercial Building Energy Consumption Survey (CBECS) (EIA 2015). Total commercial public supply water use is reported by USGS (Maupin et al. 2014). Water use is allocated across commercial sectors based on their use of water, sewage, and other services in USD based on the 2007 Benchmark Use Table before redefinitions (BEA 2015).

## Data collection
2015-2016

## Sampling procedure
US federal government sources, including surveys and US EPA emissions databases are used as the primary sources. From these sources, data for US reporting establishments/facilities are aggregated by the NAICS sector as defined in the BEA detailed 2007 input-output tables. When level of sector aggregation differs, or when direct emissions are not reported but modeled, additional sources are used to make allocations and estimates.

## Review details
In regard to quality assurance and peer-review, each dataset created went through Quality Assurance as defined in a quality assurance project plans at US EPA, CSRA or ERG. The model was assembled with the IO model builder model (USEPA 2016c). Validation functions were used to check that all the model components were properly assembled and harmonized. Bayou Demeke and Santosh Ghimire provided internal peer review of the model methodology and the manuscript underwent standard EPA management review. An editor and two anonymous reviewers at the Journal of Cleaner Production reviewed the model. In regard to data quality evaluation, data quality assessment was performed at the flow and process levels according to the updated US EPA data quality assessment guidelines as defined in US EPA (2016b).

## Intended application
The primary application is for use in the US Environmentally-Extended Input-Ouput model, USEEIO, version 1.1. This model is being used by the US EPA for supporting tools that prioritize goods and services based on potential environmental impacts, resource use or emissions for large regions, including the US and US states, and as a strealined tool for organizations as a starting point to consider sustainable materials management. Model results are designed to provide meso/macro-level decision support.

## Project
USEEIO v1.1 was developed by the US EPA with CSRA and ERG with Wesley W. Ingwersen and David E. Meyer as research leads. Yi Yang was the technical lead on the work for CSRA (contract EP-C-15-012); Troy Hawkins was lead for ERG (contract EP-C-12-021).

## Sources
- BEA 2015
- Ingwersen et al. DRAFT
- USGS 2015
- Nickerson et al. 2011
- USEPA 2016b
- Maupin et al. 2014
- EIA 2013
- EIA 2016
- USEPA 2016c
- Edelen and Ingwersen 2017
- USDA 2009a
- USEPA 2015a
- Blackhurst et al. 2010
- USEPA 2016a
- USEPA 2015b
- Kim et el. 2013
- Ingwersen et al. 2017
- Goebes et al. 2003
- Yienger et al. 1995
- Lovelace 2009
- Statistics Canada 2010
- Torcellini et al. 2003
- USDA 2009b
- USDA 2014
- EIA 2015
- BLM 2008
- USGS 2016
- USDA 2016
- Macknick et al. 2011
- EIA 2017
- USDA 2006
