# Seasonings and dressings; at manufacturer

Dataset: openLCA process, unit process
Category: 3119: Other Food Manufacturing
Geography: United States
Time period: 2017-01-01 to 2017-12-31
Data quality: US EPA - Process Pedigree Matrix (1;1)
Exchange data quality scheme: US EPA - Flow Pedigree Matrix
Generated by: US EPA with CSRA and ERG
Owner: US EPA
Published in: Yang, Ingwersen et al. 2017
restrictionsDescription: This model shold be appropriately cited (see Yang, Ingwersen et al. 2017 source or Publication field) when used. Any changes or derivations of this model by the user should be documented. The model itself and any results from use of this model shall not be construed to consitute US EPA opinion or policy.
copyright: false

## General comment
BEA Code & Name is '311940:Seasoning and dressing manufacturing'. Description of the primary industry producing this good or service, adapted from the Census Bureau NAICS 2007 descriptions: This industry comprises establishments primarily engaged in one or more of the following: (1) manufacturing dressings and sauces, such as mayonnaise, salad dressing, vinegar, mustard, horseradish, soy sauce, tarter sauce, Worcestershire sauce, and other prepared sauces (except tomato-based and gravies); (2) manufacturing spices, table salt, seasoning, and flavoring extracts (except coffee and meat), and natural food colorings; and (3) manufacturing dry mix food preparations, such as salad dressing mixes, gravy and sauce mixes, frosting mixes, and other dry mix preparations.

## Technology
The process describes the average US production of this good or service within this NAICS-based grouping defined in the BEA 2007 detailed input-output tables (BEA 2015). Distribution, wholesale and retailing of this good or service, use, and final disposal are not included. Creation of a product system with this process will enable modeling of all upstream (supply-chain) activities.

## Geography
Data represent the 50 US states

## Time period
2017 was the year in which this version of USEEIO was released and is the target date for the model

## Reference product
- Seasonings and dressings; at manufacturer: 1 USD

## Inputs from technosphere
All rows: data quality (1,3,1,1,1)
- Pumps and pumping equipment; at manufacturer: 1.95511e-5 USD
- Food and beverage stores: 7.72377e-6 USD
- Fresh soybeans, canola, flaxseeds, and other oilseeds; at farm: 0.00346142 USD
- Chemicals (except basic chemicals, agrichemicals, polymers, paints, pharmaceuticals,soaps, cleaning compounds); at manufacturer: 0.0106606 USD
- Welding and Soldering Equipment, Scales and Balances, and other general purpose machinery; at manufacturer: 1.48359e-5 USD
- Plastic pipe, fittings, and sausage casings; at manufacturer: 6.0489e-6 USD
- Aluminum; at manufacturer: 1.31215e-7 USD
- Investigation and security: 0.000290755 USD
- Other real estate: 0.000451797 USD
- Flavored drink concentrates; at manufacturer: 0.0135297 USD
- Cattle ranches and feedlots: 0.00708966 USD
- Pipeline transport: 1.23362e-5 USD
- Snack foods; at manufacturer: 8.36377e-5 USD
- Poultry farms: 0.0164384 USD
- Air conditioning, refrigeration, and warm air heating equipment; at manufacturer: 0.000672508 USD
- All other converted paper products; at manufacturer: 0.00295816 USD
- Other computer related services, including facilities management: 0.000286552 USD
- Home furniture - Cabinets and non-wood, nonupholstered; at manufacturer: 1.31215e-7 USD
- Magazines and journals; at publisher: 1.60082e-6 USD
- Plastics; at manufacturer: 0.000896586 USD
- Light bulbs; at manufacturer: 1.14721e-5 USD
- Adhesives; at manufacturer: 0.000111433 USD
- Commercial machinery repair: 0.00165252 USD
- Noncomparable imports: 0.00352322 USD
- Vehicle rental and leasing: 0.0010714 USD
- Machinery for the paper, textile, food or other industries (except semiconductor machinery); at manufacturer: 2.15128e-5 USD
- Rail transport: 0.00410855 USD
- Satellite, telecommunications resellers, and all other telecommunications: 7.3731e-5 USD
- Laminated plastic plates and shapes; at manufacturer: 2.51234e-6 USD
- Insurance carriers: 0.00161184 USD
- Golf courses, marinas, ski resorts, fitness and other rec centers and industries: 0.000140591 USD
- Insurance agencies and brokerages: 0.000523885 USD
- Metal windows, doors, and architectural products; at manufacturer: 4.60566e-5 USD
- Flours and malts; at manufacturer: 0.00737606 USD
- Wiring devices; at manufacturer: 2.46841e-5 USD
- Sports: 6.91888e-5 USD
- Limited-service restaurants: 0.0012625 USD
- Seasonings and dressings; at manufacturer: 0.0115041 USD
- Architectural, engineering, and related services: 0.00739537 USD
- Abrasive products; at manufacturer: 6.09403e-6 USD
- Medicinal and botanical ingredients; at manufacturer: 0.00015199 USD
- Communication and energy wire and cable; at manufacturer: 4.72376e-5 USD
- Wholesale trade: 0.0654223 USD
- Wooden windows, door, and flooring; at manufacturer: 4.46314e-8 USD
- Air and gas compressors; at manufacturer: 1.13065e-5 USD
- Unrefined oil and gas; at extraction site: 3.58176e-5 USD
- Civic, social, professional, and similar organizations: 0.000428906 USD
- Glass and glass products; at manufacturer: 0.0136851 USD
- Primary iron, steel, and ferroalloy products; at manufacturer: 5.56577e-5 USD
- Waste management and remediation: 0.00228934 USD
- Environmental and other technical consulting services: 0.00020751 USD
- Corn products; at manufacturer: 0.00931013 USD
- Rubber tires; at manufacturer: 1.5787e-5 USD
- Data processing and hosting: 0.00200615 USD
- Other vehicle parts; at manufacturer: 0.00330954 USD
- Seafood; at manufacturer: 0.000225433 USD
- Water transport (boats, ships, ferries): 0.00190185 USD
- Sugar, candy, and chocolate; at manufacturer: 0.00966421 USD
- Sanitary paper (tissues, napkins, diapers, etc.); at manufacturer: 4.1061e-7 USD
- Dimensional stone; at mine: 3.10928e-5 USD
- Bread and other baked goods; at manufacturer: 1.29431e-6 USD
- Other basic organic chemicals; at manufacturer: 0.0023189 USD
- Gasoline, fuels, and by-products of petroleum refining; at manufacturer: 0.00176667 USD
- Special tools, dies, jigs, and fixtures; at manufacturer: 1.31215e-7 USD
- Securities and commodities brokerage and exchanges: 0.000259113 USD
- Fluid meters and counting devices; at manufacturer: 4.46314e-8 USD
- Postal service: 2.62431e-6 USD
- Material handling equipment; at manufacturer: 0.00062378 USD
- Pharmaceutical products (pills, powders, solutions, etc.); at manufacturer: 4.04528e-5 USD
- Cutting and machine tool accessory, rolling mill, and other metalworking machines; at manufacturer: 8.17048e-5 USD
- Dry-cleaning and laundry: 8.92628e-8 USD
- Synthetic rubber and artificial and synthetic fibers; at manufacturer: 5.33902e-5 USD
- Power boilers and heat exchangers; at manufacturer: 2.60081e-5 USD
- Other textiles; at manufacturer: 6.31447e-6 USD
- Printed circuit and electronic assembly; at manufacturer: 3.65051e-5 USD
- Animal farms and aquaculture ponds (except cattle and poultry): 0.00464099 USD
- Household goods repair: 0.000287943 USD
- Soap and cleaning compounds; at manufacturer: 0.000163813 USD
- Other basic inorganic chemicals; at manufacturer: 0.000513419 USD
- Cardboard containers; at manufacturer: 0.0197967 USD
- Surgical appliance and supplies; at manufacturer: 6.42283e-6 USD
- Cookies, crackers, pastas, and tortillas; at manufacturer: 0.000148198 USD
- Air transport: 0.00219214 USD
- Vaccines and other biological medical products; at manufacturer: 0.000172642 USD
- Wireless telecommunications: 0.000495885 USD
- Travel arrangement and reservation: 2.25473e-5 USD
- Fabric; at manufacturer: 1.36464e-5 USD
- Scenic and sightseeing transportation and support activities for transportation: 2.83328e-5 USD
- Other rubber products; at manufacturer: 5.79377e-6 USD
- Specialized design: 0.000616117 USD
- Other secondary nonferrous metal products; at manufacturer: 5.24862e-7 USD
- Veneer, plywood, and engineered wood; at manufacturer: 1.32704e-5 USD
- Newspapers; at publisher: 3.14069e-7 USD
- Cutlery and handtools; at manufacturer: 9.2766e-6 USD
- Fresh fruits and tree nuts; at farm: 0.0237437 USD
- Frozen food; at manufacturer: 0.00386904 USD
- Ball and roller bearings; at manufacturer: 1.75744e-6 USD
- Dairies: 0.00241017 USD
- Electronic capacitors, resistors, coils, transformers, connectors and other components (except semiconductors and printed circuit assemblies); at manufacturer: 0.000773967 USD
- Advertising and public relations: 0.00839713 USD
- Fresh wheat, corn, rice, and other grains; at farm: 0.00167302 USD
- Toiletries; at manufacturer: 5.26315e-6 USD
- Paints and coatings; at manufacturer: 1.42396e-6 USD
- Synthetic dyes and pigments; at manufacturer: 0.000109372 USD
- Other support services: 0.000367153 USD
- Ground or treated minerals and earth; at manufacturer: 3.14069e-5 USD
- Plastic bottles; at manufacturer: 0.0550948 USD
- Other plastic products; at manufacturer: 0.0239679 USD
- Gaskets, seals, musical instruments, fasteners, brooms, brushes, mop and other misc. goods; at manufacturer: 2.49195e-5 USD
- Investment advice, portfolio management, and other financial advising services: 0.000276248 USD
- Metal pipe fittings, ball and roller bearings, industrial patterns, metal bath fixtures, other misc. fabricated metals; at manufacturer: 0.00596592 USD
- Monetary authorities and depository credit intermediation: 0.00504759 USD
- Plastic bags, films, and sheets; at manufacturer: 0.00916306 USD
- Fertilizers; at manufacturer: 7.79456e-5 USD
- Software: 4.70313e-6 USD
- Communications equipment; at manufacturer: 8.78029e-9 USD
- Dry, condensed, and evaporated dairy; at manufacturer: 0.00578226 USD
- Warehousing: 0.000681374 USD
- Natural gas; at consumer: 0.00489102 USD
- Aluminum products; at manufacturer: 3.28039e-6 USD
- Motor vehicle steering, suspension components (except spring), and brake systems; at manufacturer: 6.60978e-5 USD
- Petrochemicals; at manufacturer: 0.000622853 USD
- All other forging, stamping, and sintering; at manufacturer: 1.04972e-6 USD
- Urethane and other foam products; at manufacturer: 7.32282e-6 USD
- Fruit and vegetable preservation; at manufacturer: 0.0253203 USD
- Company and enterprise management: 0.0309965 USD
- Vehicle electrical and electronic equipment; at manufacturer: 6.281e-6 USD
- Paper bags and coated paper; at manufacturer: 0.0236691 USD
- Cheese; at manufacturer: 8.42185e-5 USD
- Vehicle engines and engine parts; at manufacturer: 6.55318e-5 USD
- Hotels and campgrounds: 0.000631356 USD
- Vegetable oils and by-products; at manufacturer: 0.0288951 USD
- Facilities support: 7.81312e-5 USD
- Employment services: 0.000368225 USD
- Sand, gravel, clay, phosphate, other nonmetallic minerals; at mine: 5.95063e-6 USD
- Motors and generators; at manufacturer: 3.67403e-5 USD
- Performances: 2.29044e-6 USD
- Heavy gauge metal tanks; at manufacturer: 2.21842e-5 USD
- Industrial process variable instruments; at manufacturer: 1.0349e-6 USD
- Truck transport: 0.0223163 USD
- Metal structural products; at manufacturer: 2.59637e-6 USD
- Commercial equipment rental: 0.000594154 USD
- other miscellaneous electrical equipment and components; at manufacturer: 3.16155e-5 USD
- Buildings and dwellings services: 0.00333606 USD
- Distilleries and spirits; at manufacturer: 1.9485e-5 USD
- Packaged poultry; at manufacturer: 0.000522308 USD
- Full-service restaurants: 0.000706636 USD
- Springs and wires; at manufacturer: 1.31215e-7 USD
- Office administration: 0.00014274 USD
- Transmission and power train parts; at manufacturer: 0.000316177 USD
- Consumer goods and general rental centers: 7.93113e-5 USD
- Compressed Gases; at manufacturer: 5.75366e-5 USD
- Polystyrene foam products; at manufacturer: 4.71114e-5 USD
- Semiconductors; at manufacturer: 5.54051e-5 USD
- Air purification and ventilation equipment; at manufacturer: 2.29008e-5 USD
- Accounting, tax preparation, bookkeeping, and payroll: 0.0016245 USD
- Analytical laboratory instruments; at manufacturer: 3.86712e-8 USD
- Coal; at mine: 0.000897177 USD
- Refined vegetable, olive, and seed oils; at manufacturer: 0.0454056 USD
- Speed changers, industrial high-speed drives, and gears; at manufacturer: 8.00414e-6 USD
- Management consulting: 0.00102932 USD
- Custom metal rolls; at manufacturer: 6.74362e-6 USD
- Paper; at manufacturer: 0.000260634 USD
- Custom computer programming: 1.68564e-5 USD
- Other retail: 0.000110511 USD
- Packaging machinery; at manufacturer: 3.98313e-7 USD
- Wireless communications; at manufacturer: 2.36558e-6 USD
- Vehicles and parts sales: 4.30582e-5 USD
- Vending, commercial laundry, and other commercial and service industry machinery; at manufacturer: 3.06248e-5 USD
- General merchandise stores: 1.48693e-5 USD
- Business support: 0.000776522 USD
- Other petroleum and coal products; at manufacturer: 0.00177272 USD
- Scientific research and development: 7.42371e-5 USD
- Vehicle repair: 0.00085845 USD
- Office supplies (not paper); at manufacturer: 4.46314e-8 USD
- Other animal food; at manufacturer: 3.82246e-5 USD
- State and local government enterprises: 0.000888059 USD
- Computer terminals and other computer peripheral equipment; at manufacturer: 0.000210925 USD
- Screws, nuts, and bolts; at manufacturer: 2.08353e-5 USD
- Hydraulic pumps, motors, cylinders and actuators; at manufacturer: 4.05456e-5 USD
- Nondepository credit intermediation and related activities: 0.0017724 USD
- Leather; at manufacturer: 1.22924e-7 USD
- Electricity; at consumer: 0.00483155 USD
- Passenger ground transport: 0.000345536 USD
- Machine shops; at manufacturer: 0.000869226 USD
- Telecommunications: 0.00150578 USD
- Lids, jars, bottle caps, other metal closures and crowns; at manufacturer: 7.01911e-5 USD
- Lessors of nonfinancial intangible assets: 0.00300745 USD
- Books, newspapers, magazines, and other print media; at manufacturer: 0.000223768 USD
- Fresh vegetables, melons, and potatoes; at farm: 0.00811089 USD
- Greenhouse crops, mushrooms, nurseries, and flowers; at farm: 0.000598102 USD
- Iron, gold, silver, and other metal ores; at mine: 9.108e-6 USD
- Metal hinges, keys, lock, and other hardware; at manufacturer: 7.78643e-7 USD
- All other food and drinking places: 6.54001e-5 USD
- Electronic equipment repair and maintenance: 0.000364554 USD
- Promoters and agents: 6.78591e-5 USD
- Computer systems design: 0.000709019 USD
- Specialty transformers; at manufacturer: 6.00667e-6 USD
- Optical instruments and lenses; at manufacturer: 2.82662e-6 USD
- Drinking water and wastewater treatment; at consumer: 0.000817993 USD
- Tobacco, cotton, sugarcane, peanuts, sugar beets, herbs and spices, and other crops; at farm: 0.0852862 USD
- Blood sugar, pregnancy, and other diagnostic test kits; at manufacturer: 1.03049e-6 USD
- Cardboard; at manufacturer: 0.00246466 USD
- Valve and fittings (except for plumbing); at manufacturer: 0.000104599 USD
- All other foods; at manufacturer: 0.00312287 USD
- Packaged meat (except poultry); at manufacturer: 0.0154132 USD
- Cast iron and steel; at manufacturer: 6.29834e-6 USD
- Nonresidential building repair and maintanence: 0.00229438 USD
- Wild-caught fish and game; at place of capture: 0.0022021 USD
- Timber and raw forest products; at forest: 0.00131035 USD
- Rubber and plastic belts and hoses; at manufacturer: 2.823e-7 USD
- Legal services: 0.00158218 USD
- Coffee and tea; at manufacturer: 0.00054029 USD
- Fluid milk and butter; at manufacturer: 0.0224434 USD
- Independent artists, writers, and performers: 0.000208842 USD
- Nonferrous metal casts; at manufacturer: 7.86444e-6 USD
- Marketing research and all other miscellaneous professional, scientific, and technical services: 0.00406336 USD
- Fabricated pipe and pipe fittings; at manufacturer: 4.06768e-6 USD
- Metal coatings, engravings, and heat treatments; at manufacturer: 5.69879e-5 USD
- Relay and industrial controls; at manufacturer: 0.00121494 USD
- Light gauge metal cans, boxes, and containers; at manufacturer: 0.0106829 USD

## Inputs from nature
- Energy, wind: 9.51431e-5 MJ; data quality (3,1,1,1,1)
- Occupation, industrial area, built up: 8.0215e-5 m2*a; data quality (4,2,1,1,1)
- Occupation, urban, discontinuously built: 7.23549e-5 m2*a; data quality (4,2,1,1,1)
- Energy, biomass: 0.0071192 MJ; data quality (3,1,1,1,1)
- Water, saline: 0.000148307 m3; data quality (4,2,1,4,2)
- Water, fresh: 0.000662573, 0.00221053 m3 (2 entries, compartments not in this file); data quality (3,2,1,4,2)
- Energy, solar: 0.000184878 MJ; data quality (3,1,1,1,1)
- Occupation, industrial area: 0.000240645 m2*a; data quality (4,2,1,1,1)

## Emissions to nature
- AZIRIDINE: 1.08847e-11 kg; data quality (4,2,1,1,4)
- ammonia: 1.03401e-5 kg; data quality (3,2,1,1,5)
- Triethyl amine: 5.22009e-12 kg; data quality (5,1,1,1,5)
- lead: 1.17574e-8 kg; data quality (3,2,1,1,5)
- Cobalt: 7.53107e-10 kg; data quality (3,2,1,1,4)
- BUTYL ACRYLATE: 2.93293e-10, 6.73271e-10 kg (2 entries, compartments not in this file); data quality (4,1,1,1,4)
- methane, chlorodifluoro-, hcfc-22: 1.41706e-9 kg; data quality (4,1,1,1,5)
- mercury: 1.20588e-9 kg; data quality (2,2,1,1,5)
- acetophenone: 4.42601e-11 kg; data quality (3,2,1,1,5)
- SEC-BUTYL ALCOHOL: 9.51407e-11 kg; data quality (5,1,1,1,4)
- ALLYL ALCOHOL: 6.69283e-10 kg; data quality (4,1,1,1,4)
- NITRATE: 1.97793e-9 kg; data quality (5,1,1,1,5)
- Cresol: 3.91822e-10 kg; data quality (4,2,1,1,5)
- POTASSIUM BROMATE: 1.56134e-10 kg; data quality (5,1,1,1,5)
- 4-nitroaniline: 5.18369e-12 kg; data quality (5,1,1,1,4)
- 2-METHYLPYRIDINE: 2.036e-14 kg; data quality (3,1,1,1,4)
- ETHENE: 1.26907e-9 kg; data quality (3,1,1,1,4)
- Propane, 1,1,1,3,3,3-hexafluoro-, HCFC-236fa: 1.45146e-9 kg; data quality (4,2,1,4,1)
- phthalate, dioctyl-: 1.4634e-9 kg; data quality (3,2,1,1,4)
- antimony: 1.0185e-9, 6.24541e-13 kg (2 entries, compartments not in this file); data quality (2,1,1,1,4)
- dimethyl formamide: 2.99118e-10 kg; data quality (4,2,1,1,4)
- ethene, tetrachloro-: 4.05344e-9 kg; data quality (3,2,1,1,4)
- Nitrobenzene: 4.72371e-11 kg; data quality (4,2,1,1,4)
- 1,1,2,2-tetrachloroethane: 1.25559e-11 kg; data quality (3,2,1,1,4)
- pentachlorophenol: 1.3092e-13 kg; data quality (3,2,1,1,5)
- naphthalene: 5.86879e-8 kg; data quality (3,2,1,1,5)
- acenaphthylene: 2.08179e-10 kg; data quality (3,2,1,1,5)
- Decabromodiphenyl oxide: 1.39897e-12, 3.88027e-11 kg (2 entries, compartments not in this file); data quality (4,1,1,1,4)
- 2,4-Diaminotoluene: 2.44841e-11 kg; data quality (2,2,1,1,4)
- HCFC-225ca: 6.86995e-12 kg; data quality (5,1,1,1,4)
- Acetonitrile: 1.28531e-10 kg; data quality (3,1,1,1,4)
- Phosphine: 4.12411e-9 kg; data quality (4,2,1,1,5)
- para-xylene: 3.11452e-10 kg; data quality (3,2,1,1,5)
- diethanolamine: 4.12997e-10 kg; data quality (3,2,1,1,4)
- diisocyanates: 4.4642e-11 kg; data quality (4,1,1,1,4)
- 3-methylcholanthrene: 8.53817e-14 kg; data quality (2,2,1,1,5)
- ACETONE CYANOHYDRIN: 7.14475e-10 kg; data quality (3,1,1,1,4)
- ammonia: 6.74582e-8 kg; data quality (3,1,1,1,5)
- copper: 1.26157e-11, 3.76756e-11 kg (2 entries, compartments not in this file); data quality (4,1,1,1,4)
- 4,4'-METHYLENEBIS(2-CHLOROANALINE): 1.66987e-10 kg; data quality (5,2,1,1,4)
- Xylene: 3.65599e-12, 9.11963e-10 kg (2 entries, compartments not in this file); data quality (4,1,1,1,4)
- dimethyl formamide: 1.14478e-11, 2.63556e-11 kg (2 entries, compartments not in this file); data quality (4,1,1,1,4)
- PCB-1: 1.93576e-19 kg; data quality (2,2,1,1,4)
- 2,2-BIS(4-HYDROXY-3,5-DIBROMOPHENYL)PROPANE: 1.55885e-12 kg; data quality (5,1,1,1,4)
- Tetracycline hydrochloride: 1.28898e-12 kg; data quality (5,1,1,1,5)
- antimony: 8.2146e-10 kg; data quality (3,2,1,1,4)
- AMMONIA: 5.14695e-8 kg; data quality (3,1,1,1,5)
- PHOSPHORUS: 3.64398e-9 kg; data quality (2,2,1,1,5)
- toluene-2,4-diisocyante: 1.5259e-10 kg; data quality (3,2,1,1,5)
- ALUMINUM OXIDE: 1.77619e-10 kg; data quality (5,1,1,1,4)
- 2-PHENYLPHENOL: 1.62381e-11, 1.83615e-11 kg (2 entries, compartments not in this file); data quality (3,1,1,1,4)
- tertiary-Butyl Acetate: 9.79488e-10 kg; data quality (3,2,1,1,5)
- 4,4'-isopropylidenediphenol: 4.55915e-11 kg; data quality (4,1,1,1,4)
- CHLOROMETHYL METHYL ETHER: 1.14226e-15 kg; data quality (5,2,1,1,5)
- carbon tetrachloride: 4.24485e-10 kg; data quality (4,2,1,1,4)
- carbon monoxide: 7.07754e-5 kg; data quality (2,2,1,1,5)
- ethylene glycol: 1.01032e-10 kg; data quality (5,1,1,1,4)
- methanol: 6.71605e-7 kg; data quality (4,2,1,1,5)
- Hydrazine: 4.28931e-12 kg; data quality (4,2,1,1,4)
- 2-methylnaphthalene: 6.7121e-12 kg; data quality (2,2,1,1,5)
- formic acid: 2.72386e-9 kg; data quality (3,1,1,1,4)
- chlorine: 1.28389e-9 kg; data quality (2,1,1,1,4)
- 1,1,1-trichloroethane: 9.81127e-9 kg; data quality (4,2,1,1,5)
- Propane, 1,2-dichloro-: 8.29657e-11 kg; data quality (4,2,1,1,5)
- 2,4-dimethylphenol: 8.70735e-12 kg; data quality (4,1,1,1,4)
- nitrogen oxides: 6.38789e-5 kg; data quality (2,2,1,1,5)
- SULFURYL FLUORIDE: 2.04315e-8 kg; data quality (4,1,1,1,5)
- PERACETIC ACID: 4.31108e-10 kg; data quality (4,1,1,1,5)
- acetaldehyde: 1.93745e-7 kg; data quality (3,2,1,1,5)
- ethane, 1,1,2-trichloro-: 3.33265e-11 kg; data quality (4,2,1,1,4)
- Nitrilotriacetic acid: 2.56062e-12 kg; data quality (5,1,1,1,4)
- VOC, volatile organic compounds: 3.26522e-5 kg; data quality (3,2,1,1,5)
- isophorone: 7.67061e-11 kg; data quality (2,2,1,1,5)
- 2,6-Dinitrotoluene: 1.99853e-10 kg; data quality (5,1,1,1,4)
- Benzo(b)fluoranthene: 2.31932e-12 kg; data quality (2,2,1,1,4)
- 2-nitropropane: 1.23657e-12 kg; data quality (5,2,1,1,4)
- Phthalate, dimethyl-: 6.67775e-11 kg; data quality (4,1,1,1,4)
- Ethene, chloro-: 2.41232e-9 kg; data quality (3,2,1,1,4)
- formaldehyde: 1.08254e-11 kg; data quality (2,1,1,1,5)
- Methane, trichlorofluoro-, CFC-11: 5.77633e-12 kg; data quality (2,1,1,1,5)
- sulfur dioxide: 0.000343346 kg; data quality (2,2,1,1,5)
- ethyl acrylate: 6.4498e-10 kg; data quality (4,2,1,1,4)
- 2-PHENOXYETHANOL: 2.82928e-10 kg; data quality (5,2,1,1,4)
- MALEIC ANHYDRIDE: 1.93445e-10 kg; data quality (4,1,1,1,4)
- Bisphenol A: 1.24908e-13 kg; data quality (4,1,1,1,4)
- Dimethylamine: 1.02111e-9 kg; data quality (3,1,1,1,4)
- Phenol, 2,4-dimethyl-: 7.43204e-13 kg; data quality (4,1,1,1,4)
- 1-Methyl-2-pyrrolidinone: 1.34981e-9 kg; data quality (5,1,1,1,4)
- toluene: 1.84265e-7 kg; data quality (3,2,1,1,5)
- 2,2,4-trimethylpentane: 6.19221e-8 kg; data quality (3,2,1,1,5)
- styrene: 9.23399e-8 kg; data quality (4,2,1,1,4)
- Propene, 1,3-dichloro-: 5.18404e-14 kg; data quality (3,2,1,1,4)
- CATECHOL: 1.4989e-12 kg; data quality (2,1,1,1,4)
- Cumene hydroperoxide: 2.49815e-10 kg; data quality (3,1,1,1,5)
- monochloroethane: 1.62245e-10 kg; data quality (3,2,1,1,4)
- epichlorohydrin: 2.53383e-9 kg; data quality (3,2,1,1,4)
- NICOTINE: 1.33711e-12 kg; data quality (2,1,1,1,5)
- toluene: 3.23971e-12, 7.56951e-10 kg (2 entries, compartments not in this file); data quality (5,1,1,1,4)
- Ethylene glycol monoethyl ether: 4.23147e-11 kg; data quality (3,2,1,1,4)
- catechol: 1.65129e-10 kg; data quality (2,1,1,1,4)
- Phenol: 4.32682e-10 kg; data quality (3,1,1,1,4)
- 1,4-BENZOQUINONE: 1.15001e-12 kg; data quality (3,2,1,1,4)
- bromine: 1.1449e-12 kg; data quality (5,1,1,1,5)
- Benzoyl chloride: 1.44943e-13 kg; data quality (2,1,1,1,5)
- CHLORINE: 1.24908e-13 kg; data quality (2,1,1,1,4)
- m-xylene: 1.67174e-9 kg; data quality (3,2,1,2,3)
- t-Butyl methyl ether: 1.67002e-10 kg; data quality (4,1,1,1,4)
- TERT-BUTYL ALCOHOL: 5.24614e-12, 9.39753e-10 kg (2 entries, compartments not in this file); data quality (4,1,1,1,4)
- Cumene: 1.97893e-13 kg; data quality (3,1,1,1,5)
- CHLORONAPHTHALENE: 6.80025e-18 kg; data quality (1,2,1,1,4)
- BENZOIC TRICHLORIDE (BENZOTRICHLORIDE): 3.21509e-12 kg; data quality (3,2,1,1,4)
- Diethylene glycol butyl ether: 6.39561e-10 kg; data quality (3,2,1,1,5)
- Water, saline: 7.51466e-5 m3; data quality (4,2,1,4,2)
- phenanthrene: 2.83215e-10 kg; data quality (3,2,1,1,5)
- METHACRYLONITRILE: 1.24908e-13 kg; data quality (5,1,1,1,4)
- trichloroethylene: 5.98818e-9 kg; data quality (4,2,1,1,4)
- particulates, < 2.5 um: 2.44369e-5 kg; data quality (3,2,1,1,5)
- ethane, 1,2-dichloro-: 2.17305e-9 kg; data quality (3,2,1,1,4)
- NITRIC ACID: 9.07564e-9 kg; data quality (3,1,1,1,5)
- Butanol: 8.59368e-11, 3.51073e-12 kg (2 entries, compartments not in this file); data quality (5,1,1,1,4)
- DIPHENYLAMINE: 5.20867e-12 kg; data quality (1,1,1,1,4)
- p-phenylenediamine: 3.42694e-13 kg; data quality (5,2,1,1,5)
- mercury: 5.53216e-13, 1.28655e-13 kg (2 entries, compartments not in this file); data quality (3,1,1,1,4)
- phenol: 9.62262e-8 kg; data quality (4,2,1,1,4)
- Ethylene glycol monoethyl ether: 1.00871e-9, 8.98464e-10 kg (2 entries, compartments not in this file); data quality (5,1,1,1,4)
- 4-Methyl-2-pentanone: 3.1227e-11 kg; data quality (4,1,1,1,4)
- propargyl alcohol: 3.881e-11, 1.18739e-11 kg (2 entries, compartments not in this file); data quality (4,1,1,1,4)
- ethane, 1,2-dibromo-: 7.69647e-13 kg; data quality (2,2,1,1,4)
- Sulfuric acid: 6.27142e-7 kg; data quality (2,1,1,1,5)
- methanol: 5.8585e-10 kg; data quality (3,1,1,1,4)
- Ethane, pentafluoro-, HFC-125: 1.25573e-7 kg; data quality (4,2,1,4,1)
- biphenyl: 2.71664e-10 kg; data quality (4,2,1,1,5)
- Methane: 5.75819e-7 kg; data quality (4,2,1,4,1)
- bis(2-chloroethyl)ether: 1.19355e-10 kg; data quality (3,2,1,1,5)
- propylene oxide: 2.53513e-8 kg; data quality (3,1,1,1,5)
- lead: 1.71399e-11 kg; data quality (3,1,1,1,4)
- Chrysene: 1.08045e-11 kg; data quality (2,2,1,1,5)
- 2,3,4'-TRICHLOROBIPHENYL: 2.28688e-18 kg; data quality (2,2,1,1,4)
- Methyl acrylate: 1.37875e-9, 3.74725e-13 kg (2 entries, compartments not in this file); data quality (3,1,1,1,4)
- maleic anhydride: 1.61759e-8 kg; data quality (2,2,1,1,4)
- 2-chloro-1-phenylethanone: 9.16089e-13 kg; data quality (2,2,1,1,5)
- Methane, dichloro-, HCC-30: 1.69e-11 kg; data quality (5,1,1,1,4)
- Benzo(g,h,i)perylene: 3.65717e-9 kg; data quality (3,2,1,1,5)
- PHTHALIC ANHYDRIDE: 6.24541e-13 kg; data quality (3,1,1,1,4)
- benzyl chloride: 2.83835e-10 kg; data quality (2,2,1,1,4)
- Phthalate, dibutyl-: 4.83503e-11 kg; data quality (3,2,1,1,5)
- Triethyl amine: 7.71932e-11 kg; data quality (5,1,1,1,4)
- manganese: 1.29904e-10 kg; data quality (4,1,1,1,4)
- ozone: 3.42849e-12 kg; data quality (4,1,1,1,4)
- benzene, chloro-: 1.88843e-10 kg; data quality (4,2,1,1,4)
- Acetonitrile: 3.71183e-12 kg; data quality (3,1,1,1,5)
- Permethrin: 2.06098e-11 kg; data quality (2,1,1,1,4)
- hydrogen fluoride: 4.33136e-7 kg; data quality (2,2,1,1,5)
- ALLYL CHLORIDE: 5.73152e-10 kg; data quality (3,2,1,1,4)
- Chloroform: 3.26472e-11, 4.04628e-11 kg (2 entries, compartments not in this file); data quality (3,1,1,1,4)
- hydrogen sulfide: 2.31073e-9 kg; data quality (3,2,1,1,5)
- butanol: 1.18588e-9 kg; data quality (5,1,1,1,4)
- Methane, monochloro-, R-40: 6.24541e-13 kg; data quality (3,1,1,1,4)
- 1,2,4-trimethylbenzene: 1.58738e-9, 5.57936e-10 kg (2 entries, compartments not in this file); data quality (5,1,1,1,4)
- cyclohexane: 2.436e-9 kg; data quality (4,1,1,1,4)
- hexachlorobenzene: 4.20435e-18 kg; data quality (3,2,1,1,4)
- 2,4-D: 5.98531e-21 kg; data quality (3,2,1,1,5)
- Sodium formate: 1.43644e-11, 3.44747e-12 kg (2 entries, compartments not in this file); data quality (3,1,1,1,4)
- Methane, tetrachloro-, R-10: 4.29684e-11, 3.1227e-13 kg (2 entries, compartments not in this file); data quality (3,1,1,1,4)
- toluene, 2,4-dinitro-: 5.44129e-10 kg; data quality (5,2,1,1,4)
- methane, dichloro-, hcc-30: 7.06828e-8 kg; data quality (4,2,1,1,4)
- Dinitrogen monoxide: 6.7253e-8 kg; data quality (4,2,1,4,1)
- DIETHANOLAMINE: 3.92888e-11, 3.84342e-10 kg (2 entries, compartments not in this file); data quality (4,1,1,1,4)
- cyanide: 3.8707e-10 kg; data quality (3,2,1,1,5)
- benzene: 3.86584e-8 kg; data quality (3,2,1,2,4)
- Methyl iodide: 8.04203e-13 kg; data quality (4,2,1,1,5)
- Phthalate, dioctyl-: 8.62671e-11, 6.24541e-13 kg (2 entries, compartments not in this file); data quality (4,1,1,1,4)
- silver: 6.86995e-14 kg; data quality (4,1,1,1,4)
- ETHYLENETHIOUREA: 1.6363e-11 kg; data quality (2,1,1,1,4)
- Aluminum: 1.22528e-10 kg; data quality (4,1,1,1,4)
- CHLOROPRENE: 7.41943e-13 kg; data quality (2,2,1,1,4)
- Captan: 4.09468e-14 kg; data quality (5,2,1,1,4)
- o-Xylene: 1.74791e-9 kg; data quality (3,2,1,2,4)
- Asbestos: 5.20551e-14 kg; data quality (5,2,1,1,5)
- N,N-DIMETHYLANILINE: 3.74725e-13 kg; data quality (3,1,1,1,4)
- 2-Mercaptobenzothiazole: 1.44394e-10 kg; data quality (3,1,1,1,4)
- arsenic: 1.31812e-8 kg; data quality (3,2,1,1,5)
- acetaldehyde: 4.29691e-12 kg; data quality (3,1,1,1,5)
- beryllium: 2.34485e-10 kg; data quality (2,2,1,1,5)
- 1,2-DICHLOROETHYLENE: 2.22337e-12 kg; data quality (5,1,1,1,4)
- phosgene: 3.70972e-13 kg; data quality (5,2,1,1,4)
- pyrene: 7.51056e-11 kg; data quality (3,2,1,1,5)
- Water, fresh: 0.0024748 m3; data quality (3,2,1,4,2)
- formaldehyde: 1.13214e-7 kg; data quality (2,2,1,1,4)
- t-butyl methyl ether: 3.76739e-10 kg; data quality (3,2,1,1,4)
- Chrysene, 5-methyl-: 1.99452e-15 kg; data quality (2,2,1,1,5)
- particulates, < 10 um: 1.75639e-5 kg; data quality (3,2,1,1,5)
- M-CRESOL: 5.14622e-12 kg; data quality (3,1,1,1,4)
- phenol: 3.054e-12 kg; data quality (3,1,1,1,4)
- acetonitrile: 7.86084e-9 kg; data quality (3,2,1,1,4)
- O-ANISIDINE: 1.23657e-13 kg; data quality (5,2,1,1,4)
- benz[a]anthracene: 1.79705e-11 kg; data quality (3,2,1,1,5)
- Benzene, ethyl-: 2.30977e-10, 1.24908e-13 kg (2 entries, compartments not in this file); data quality (4,1,1,1,4)
- MOLYBDENUM(VI): 8.59118e-11 kg; data quality (3,1,1,1,4)
- Phthalate, dimethyl-: 2.34949e-12 kg; data quality (4,2,1,1,4)
- butadiene: 2.41064e-9 kg; data quality (2,2,1,2,3)
- Formic acid: 1.02312e-10 kg; data quality (3,1,1,1,4)
- NITROUS ACID: 2.76379e-8, 7.07093e-10 kg (2 entries, compartments not in this file); data quality (5,1,1,1,4)
- manganese: 1.44654e-8 kg; data quality (3,2,1,1,5)
- Bis(2-chloroethyl)ether: 1.24908e-13 kg; data quality (2,1,1,1,4)
- acrylonitrile: 8.59015e-10 kg; data quality (4,2,1,1,4)
- ethylene oxide: 2.35377e-9 kg; data quality (4,1,1,1,5)
- dibenzofuran: 3.50987e-9 kg; data quality (4,2,1,1,5)
- chloroform: 1.73184e-9 kg; data quality (4,2,1,1,5)
- acetamide: 1.24908e-13 kg; data quality (4,1,1,1,4)
- phthalic anhydride: 1.01404e-8 kg; data quality (2,2,1,1,4)
- methylene diphenyl diisocyanate: 1.32674e-10 kg; data quality (4,2,1,1,5)
- propanal: 3.78731e-9 kg; data quality (3,2,1,2,3)
- Benzo(k)fluoranthene: 1.50631e-12 kg; data quality (2,2,1,1,4)
- HYDROGEN SULFIDE: 7.83501e-10, 5.68388e-9 kg (2 entries, compartments not in this file); data quality (3,1,1,1,5)
- Thiram: 5.54592e-11 kg; data quality (4,1,1,1,4)
- acrolein: 6.77964e-9 kg; data quality (2,2,1,1,5)
- ACRYLAMIDE: 2.24835e-12 kg; data quality (4,1,1,1,4)
- vinyl acetate: 2.27386e-9 kg; data quality (4,2,1,1,4)
- Chloroacetic acid: 4.71152e-10 kg; data quality (3,2,1,1,4)
- 2,4-dinitrophenol: 3.00242e-10 kg; data quality (5,1,1,1,4)
- 4-nitrophenol: 1.12048e-10 kg; data quality (3,2,1,1,5)
- 1,2-BUTYLENE OXIDE: 1.38631e-12 kg; data quality (4,2,1,1,4)
- cumene: 3.62315e-10 kg; data quality (4,2,1,1,4)
- Propane, 1,2-dichloro-: 4.47171e-13 kg; data quality (5,1,1,1,4)
- Acrylic acid: 1.71967e-10 kg; data quality (4,1,1,1,4)
- Triethyl amine: 4.75481e-10 kg; data quality (4,2,1,1,5)
- Propene: 6.3111e-9 kg; data quality (3,1,1,1,4)
- PYRIDINE: 2.4517e-11, 2.76047e-11 kg (2 entries, compartments not in this file); data quality (4,1,1,1,4)
- hexane: 2.20355e-6 kg; data quality (3,2,1,1,5)
- Styrene: 1.24908e-13 kg; data quality (3,1,1,1,4)
- Aniline: 4.74973e-12 kg; data quality (3,1,1,1,4)
- nitric acid: 2.16543e-8 kg; data quality (3,1,1,1,4)
- THIOUREA: 3.13395e-14 kg; data quality (3,1,1,1,4)
- HYDROQUINONE: 3.11158e-11 kg; data quality (2,1,1,1,4)
- Naphthalene: 8.52623e-10 kg; data quality (4,1,1,1,4)
- Zinc: 1.59715e-12 kg; data quality (5,1,1,1,4)
- 2,4,5,2',5'-PENTACHLOROBIPHENYL: 4.03443e-18 kg; data quality (2,2,1,1,4)
- DMTT (DAZOMET): 6.99486e-12 kg; data quality (4,1,1,1,4)
- HCFC-225cb: 9.80529e-12 kg; data quality (2,1,1,1,4)
- Hexane: 2.51912e-12 kg; data quality (4,1,1,1,5)
- Dimethyl sulfate: 2.09179e-10 kg; data quality (2,2,1,1,4)
- barium: 5.06591e-10 kg; data quality (4,1,1,1,5)
- Ethane, 1,1,1,2-tetrafluoro-, HFC-134a: 4.733e-7 kg; data quality (4,2,1,4,1)
- 1,4-dichlorobenzene: 1.93142e-11 kg; data quality (2,2,1,1,4)
- Ethylene glycol: 1.0279e-9 kg; data quality (5,1,1,1,4)
- ACRYLAMIDE: 2.43482e-9 kg; data quality (4,2,1,1,4)
- 2-METHOXYETHANOL: 1.30508e-9 kg; data quality (4,2,1,1,4)
- fluorene: 8.0953e-11 kg; data quality (3,2,1,1,4)
- methyl methacrylate: 2.49463e-9 kg; data quality (4,2,1,1,4)
- 1,1-DICHLOROETHYLENE: 4.25541e-13 kg; data quality (3,2,1,1,4)
- Vinyl acetate: 2.19785e-10 kg; data quality (4,1,1,1,4)
- Phosphorus: 2.29629e-6 kg; data quality (2,1,1,1,5)
- PHENOTHRIN: 1.99652e-13 kg; data quality (5,1,1,1,4)
- chlorine: 1.76922e-8 kg; data quality (4,2,1,1,4)
- acrylic acid: 8.35613e-9 kg; data quality (4,2,1,1,4)
- QUINOLINE: 2.56507e-11 kg; data quality (2,1,1,1,4)
- Dichlorvos: 8.35558e-11 kg; data quality (3,2,1,1,5)
- Methane, dibromo-: 1.27334e-10 kg; data quality (5,1,1,1,4)
- nickel: 4.5162e-9 kg; data quality (3,2,1,1,5)
- ethylbenzene: 1.39668e-9 kg; data quality (4,1,1,1,4)
- methane, monochloro-, r-40: 4.55435e-9 kg; data quality (3,2,1,1,4)
- Dibenz(a,h)anthracene: 1.03281e-12 kg; data quality (2,2,1,1,4)
- cadmium: 1.09098e-9 kg; data quality (3,2,1,1,5)
- carbonyl sulfide: 8.61653e-11 kg; data quality (4,2,1,1,5)
- Methane, dichloro-, HCC-30: 6.17105e-13 kg; data quality (5,1,1,1,5)
- methane, bromo-, halon 1001: 9.96598e-9 kg; data quality (3,2,1,1,5)
- Nitrogen: 2.06363e-5 kg; data quality (2,2,1,1,5)
- chromium: 4.26155e-12 kg; data quality (4,1,1,1,5)
- Epichlorohydrin: 2.58525e-10 kg; data quality (2,1,1,1,4)
- aniline: 2.58472e-7 kg; data quality (4,2,1,1,5)
- 2-ethoxyethyl acetate: 4.7478e-13 kg; data quality (5,2,1,1,4)
- Methane, dichlorodifluoro-, CFC-12: 1.2617e-11 kg; data quality (4,1,1,1,5)
- o-cresol: 2.99387e-11 kg; data quality (3,2,1,1,5)
- PERACETIC ACID: 2.07187e-10, 1.77876e-13 kg (2 entries, compartments not in this file); data quality (4,1,1,1,4)
- chromium: 7.36958e-14 kg; data quality (4,1,1,1,4)
- Cyanide: 5.8833e-13 kg; data quality (3,1,1,1,5)
- Hydrazine, methyl-: 2.23714e-11 kg; data quality (2,2,1,1,5)
- methanol: 2.10095e-8 kg; data quality (3,1,1,1,5)
- lead: 5.4526e-9 kg; data quality (3,1,1,1,5)
- Formaldehyde: 6.8489e-11 kg; data quality (2,1,1,1,4)
- hydroquinone: 1.41704e-11 kg; data quality (3,2,1,1,4)
- polychlorinated biphenyls: 4.73484e-13 kg; data quality (3,2,1,1,4)
- Ethane, 1,1,1-trifluoro-, HFC-143a: 5.37274e-8 kg; data quality (4,2,1,4,1)
- Xylene: 5.56128e-8 kg; data quality (4,2,1,1,5)
- hydrogen chloride: 1.36344e-5 kg; data quality (2,2,1,1,5)
- Indeno(1,2,3-cd)pyrene: 1.08534e-11 kg; data quality (3,2,1,1,5)
- p-cresol: 5.97668e-11 kg; data quality (3,2,1,1,5)
- HYDROCHLORIC ACID: 6.77502e-10 kg; data quality (2,1,1,1,4)
- NITROGLYCERIN: 2.74647e-9 kg; data quality (5,1,1,1,4)
- fluoranthene: 2.46634e-10 kg; data quality (2,2,1,1,5)
- carbon disulfide: 8.04998e-9 kg; data quality (4,2,1,1,4)
- Benzo(a)anthracene: 4.11974e-13 kg; data quality (2,2,1,1,5)
- ethylene glycol: 1.68937e-8 kg; data quality (5,2,1,1,4)
- anthracene: 6.93268e-11 kg; data quality (3,2,1,1,5)
- Chromium, ion: 1.90093e-8 kg; data quality (2,2,1,1,5)
- Methane, difluoro-, HFC-32: 7.31277e-8 kg; data quality (4,2,1,4,1)
- bromoform: 1.341e-11 kg; data quality (3,2,1,1,5)
- Methyl acrylate: 5.8833e-14 kg; data quality (3,1,1,1,5)
- benzene, ethyl-: 5.73611e-9 kg; data quality (4,2,1,2,3)
- Chromium VI: 2.65786e-9 kg; data quality (3,2,1,1,5)
- Benzyl chloride: 1.17955e-9 kg; data quality (3,1,1,1,4)
- 1,4-dioxane: 1.64124e-9 kg; data quality (4,2,1,1,4)
- QUINOLINE: 1.97852e-11 kg; data quality (3,2,1,1,4)
- methyl isobutyl ketone: 1.10961e-8 kg; data quality (4,2,1,1,5)
- Carbon dioxide: 0.024887 kg; data quality (4,2,1,4,1)
- acenaphthene: 7.69469e-11 kg; data quality (3,2,1,1,4)
- nickel: 7.49449e-13 kg; data quality (4,1,1,1,4)
- m-cresol: 1.70705e-12 kg; data quality (4,2,1,1,4)
- selenium: 9.46056e-9 kg; data quality (2,2,1,1,5)
- Ethene, tetrachloro-: 3.1227e-11 kg; data quality (3,1,1,1,4)
- PHENYTOIN: 9.09238e-12 kg; data quality (5,1,1,1,5)
- CFC-114: 5.30032e-12 kg; data quality (5,1,1,1,5)
- BUTYL ISOCYANATE: 1.38587e-12 kg; data quality (4,2,1,1,4)
- Hydrocarbons, aromatic: 9.03867e-10 kg; data quality (4,2,1,3,3)
- benzo(a)pyrene: 3.05193e-10 kg; data quality (2,2,1,1,5)
- Benzene, 1,2,4-trimethyl-: 3.0153e-12 kg; data quality (5,1,1,1,5)
- 2,4,6-trichlorophenol: 2.6254e-17 kg; data quality (2,2,1,1,4)

## Inventory method
Input-output

## Modelling constants
The reference unit of all processes is 1 USD2013 of the good or service. The technosphere inputs are based on the US BEA detailed input-output tables for 2007. The IO tables are combined to develop a commodity-by-commodity model based on the the industry-technology assumption (see Suh et al., 2010), which assumes all commodities produced by a given industry have the same input structure, but that multiple industries can produce the same commodity. Thus, model technosphere flows represent commodity outputs (and not industry outputs) from other processes in the model. There are no by-products included in these processes. All commodity production is based on US-conditions, despite in reality that some goods and services are produced overseas, as USEEIO v1.1 is a single-region IO model.

## Completeness
The input-output approach assures that all purchased inputs associated with the sectors making these commodities as reported in the US census for 2007 are included. The direct resources extracted including minerals, energy sources, water and land occupied are included. Emissions to air include all critieria air pollutants, greenhouse gases, and hazardous and toxic air pollutants as defined by US EPA. Releases to water include toxics, total nitrogen and total phosphorus, and water discharges. Releases to soil or groundwater include toxics and agriculutural pesticides. Some metal releases to air, water and soil are not included because they could not be speciated. Solid hazardous and non-hazardous wastes generated are not included as an elementary flows although purchases of waste services are included.

## Data treatment
Greenhouse gases are primarily from the US Greenhouse Gas Emission Inventory (USEPA 2016a). Biogenic C uptake is not included (change from version 1.0), as biogenic C emission are not included. Toxic releases to air, water and soil (except pesticides) are from the 2013 Toxic Release Inventory (USEPA 2015a). Criteria air pollutants and hazardous air pollutants are from the 2011 National Emissions Inventory (USEPA 2015b). All estimates are normalized by industry based on sector output in the data year, then converted to 2013 USD using relative sector-specific CPIs (if data year is not 2013). Energy use represent raw renewables or fossil fuel energies and is based on EIA data for 2014. See Table 1 in Yang, Ingwersen et al. 2017 and Supporting Information 1, and the v1.1 data update notes (Ingwersen et al. 2017) for all details on environmental data sources used.Land occupation associated with manufacturing buildings was estimated based on the building floorspace data provided by the U.S. Energy Information Administration in the 2010 Manufacturing Energy Consumption Survey (EIA 2013). Portions of total renewable energy (EIA 2016) based on EIA-923 reports for 2014 (EIA 2017) are included. Nitrogen and Phosphorus releases are modeled in total N and total P equivalents as estimated by the Discharge Monitoring Report Nutrient Loading tool (USEPA 2016b). Self-supplied withdrawals were assigned to industrial sectors based on water use statistics for Canadian industries by NAICS 3-digit sector scaled to US production levels based on gross domestic product by industry (BEA 2015; Statistics Canada 2010), and further disaggregated to the manufacturing sectors based on compensation of employees as provided by the 2007 IO tables (BEA 2015). Water withdrawals associated with public supply were allocated to sectors based on their use of water, sewage, and other services in USD based on the IO tables (BEA 2015). Portions of total renewable energy (EIA 2016) by type are assigned to sectors (hydro, wind, solar, or) based on EIA-923 reports for 2014 (EIA 2017).

## Data collection
2015-2016

## Sampling procedure
US federal government sources, including surveys and US EPA emissions databases are used as the primary sources. From these sources, data for US reporting establishments/facilities are aggregated by the NAICS sector as defined in the BEA detailed 2007 input-output tables. When level of sector aggregation differs, or when direct emissions are not reported but modeled, additional sources are used to make allocations and estimates.

## Review details
In regard to quality assurance and peer-review, each dataset created went through Quality Assurance as defined in a quality assurance project plans at US EPA, CSRA or ERG. The model was assembled with the IO model builder model (USEPA 2016c). Validation functions were used to check that all the model components were properly assembled and harmonized. Bayou Demeke and Santosh Ghimire provided internal peer review of the model methodology and the manuscript underwent standard EPA management review. An editor and two anonymous reviewers at the Journal of Cleaner Production reviewed the model. In regard to data quality evaluation, data quality assessment was performed at the flow and process levels according to the updated US EPA data quality assessment guidelines as defined in US EPA (2016b).

## Intended application
The primary application is for use in the US Environmentally-Extended Input-Ouput model, USEEIO, version 1.1. This model is being used by the US EPA for supporting tools that prioritize goods and services based on potential environmental impacts, resource use or emissions for large regions, including the US and US states, and as a strealined tool for organizations as a starting point to consider sustainable materials management. Model results are designed to provide meso/macro-level decision support.

## Project
USEEIO v1.1 was developed by the US EPA with CSRA and ERG with Wesley W. Ingwersen and David E. Meyer as research leads. Yi Yang was the technical lead on the work for CSRA (contract EP-C-15-012); Troy Hawkins was lead for ERG (contract EP-C-12-021).

## Sources
- USDA 2014
- USGS 2015
- Lovelace 2009
- Statistics Canada 2010
- USDA 2006
- EIA 2013
- Ingwersen et al. 2017
- Torcellini et al. 2003
- USEPA 2015b
- Edelen and Ingwersen 2017
- BEA 2015
- Kim et el. 2013
- USEPA 2015a
- Blackhurst et al. 2010
- Macknick et al. 2011
- Goebes et al. 2003
- USDA 2016
- Maupin et al. 2014
- USEPA 2016a
- USGS 2016
- USDA 2009b
- BLM 2008
- Yienger et al. 1995
- USDA 2009a
- USEPA 2016b
- Ingwersen et al. DRAFT
- EIA 2016
- USEPA 2016c
- Nickerson et al. 2011
- EIA 2015
- EIA 2017
