# Vacuum infusion, rigid composites part, at plant

Dataset: openLCA process, unit process
Category: 31-33: Manufacturing/3261: Plastics Product Manufacturing
Geography: United States
Time period: 2010-12-31 to 2011-12-31
Allocation method: no allocation
Generated by: Franklin Associates
Published in: ACMA (2012). LCI of Polymer Composites
restrictionsDescription: All information can be accessed by everybody.
copyright: false

## General comment
An average of 0.01 kg of rigid composite part scrap is produced for every kilogram of vacuum infused parts produced; this scrap is sold for recycling. The packaging inputs in this data set represent the average reported per kilogram of output across a range of products produced at manufacturing facilities. Possible differences in the mass balance include ancillary materials (e.g. rags), incoming packaging, and trash from workers that are thrown out but not accounted for as inputs in the LCI. Complete inventory data and metadata are shown in full in the final report, Life Cycle Inventory of Polymer Composites. The report is not publicly available. This report has been extensively reviewed within Franklin Associates by Rebe Feraldi, Anne Marie Molen, and Melissa Huff and has undergone partial critical review by ACMA members. Important note: although most of the data in the US LCI database has undergone some sort of review, the database as a whole has not yet undergone a formal validation process. Please email comments to lci@nrel.gov.

## Technology
Fabrication of rigid composite parts by vacuum infusion.

## Geography
US

## Reference product
- Vacuum infusion, rigid composites part, at plant [US]: 1 kg; provider Electricity, at Grid, US, 2010

## By-products
- Composite scrap, from composites vacuum infusion, at plant [US]: 0.01 kg

## Inputs from technosphere
All rows: lognormal geomSd 1
- Polyethylene terephthalate, PET, virgin resin, at plant, kg: 0.016 kg
- Ethylbenzene styrene, EB, at plant [RNA]: 0.0027 kg
- Continuous strand mat, glass fiber based, at plant: 0.25 kg
- Limestone, at mine [RNA]: 0.0028 kg
- E-glass, at plant [US]: 0.007 kg
- Filler, synthetic, at plant: 0.0029 kg
- Natural gas, combusted in industrial boiler [RNA]: 0.036 m3
- Gelcoat, UPR & styrene-based, at plant: 0.041 kg
- Disposal, solid waste, unspecified, to municipal incineration: 0.001 kg
- Electricity, at grid [RNA]: 0.284 kWh; provider Electricity, at Grid, US, 2010
- Polystyrene, exapnded, EPS, virgin resin; batch suspension polymerization; industry average, at plant [RNA]: 0.23 kg
- Unsaturated polyester, UPR, resin, at plant [US]: 0.21 kg
- Balsa wood, at plant: 0.23 kg
- Disposal, solid waste, unspecified, to sanitary landfill: 0.013 kg
- Disposal, solid waste, unspecified, to waste-to-energy: 0.0027 kg
- Liquefied petroleum gas, combusted in industrial boiler [RNA]: 0.0035 l
- Transport, combination truck, diesel powered [RNA]: 1.065 t*km

## Emissions to nature
- Styrene [emission, air]: 0.0054 kg; lognormal geomSd 1
- Volatile organic compounds [emission, air]: 0.0027 kg; lognormal geomSd 1
- Particulate matter, ≤ 10μm [emission, air]: 2.6e-5 kg; lognormal geomSd 1

## Allocation factors
- causal, Composite scrap, from composites vacuum infusion, at plant, for Limestone, at mine: 0
- causal, Composite scrap, from composites vacuum infusion, at plant, for Disposal, solid waste, unspecified, to waste-to-energy: 0
- causal, Composite scrap, from composites vacuum infusion, at plant, for Continuous strand mat, glass fiber based, at plant: 0
- causal, Vacuum infusion, rigid composites part, at plant, for Unsaturated polyester, UPR, resin, at plant: 1
- causal, Vacuum infusion, rigid composites part, at plant, for Disposal, solid waste, unspecified, to waste-to-energy: 1
- causal, Composite scrap, from composites vacuum infusion, at plant, for Styrene: 0
- causal, Vacuum infusion, rigid composites part, at plant, for Electricity, at grid: 0
- causal, Vacuum infusion, rigid composites part, at plant, for Gelcoat, UPR & styrene-based, at plant: 1
- causal, Composite scrap, from composites vacuum infusion, at plant, for Polystyrene, exapnded, EPS, virgin resin; batch suspension polymerization; industry average, at plant: 0
- causal, Composite scrap, from composites vacuum infusion, at plant, for Electricity, at grid: 0
- causal, Composite scrap, from composites vacuum infusion, at plant, for Electricity, at grid: 0
- causal, Vacuum infusion, rigid composites part, at plant, for Continuous strand mat, glass fiber based, at plant: 1
- causal, Composite scrap, from composites vacuum infusion, at plant, for Natural gas, combusted in industrial boiler: 0
- causal, Composite scrap, from composites vacuum infusion, at plant, for Balsa wood, at plant: 0
- economic, Composite scrap, from composites vacuum infusion, at plant: 0
- physical, Composite scrap, from composites vacuum infusion, at plant: 0
- causal, Composite scrap, from composites vacuum infusion, at plant, for E-glass, at plant: 0
- causal, Vacuum infusion, rigid composites part, at plant, for Styrene: 1
- causal, Composite scrap, from composites vacuum infusion, at plant, for Filler, synthetic, at plant: 0
- causal, Vacuum infusion, rigid composites part, at plant, for Disposal, solid waste, unspecified, to municipal incineration: 1
- causal, Vacuum infusion, rigid composites part, at plant, for Limestone, at mine: 1
- causal, Vacuum infusion, rigid composites part, at plant, for Electricity, at grid: 1
- causal, Vacuum infusion, rigid composites part, at plant, for Filler, synthetic, at plant: 1
- causal, Vacuum infusion, rigid composites part, at plant, for Particulate matter, ≤ 10μm: 1
- causal, Composite scrap, from composites vacuum infusion, at plant, for Polyethylene terephthalate, PET, virgin resin, at plant, kg: 0
- causal, Composite scrap, from composites vacuum infusion, at plant, for Gelcoat, UPR & styrene-based, at plant: 0
- causal, Composite scrap, from composites vacuum infusion, at plant, for Liquefied petroleum gas, combusted in industrial boiler: 0
- causal, Vacuum infusion, rigid composites part, at plant, for Volatile organic compounds: 1
- causal, Vacuum infusion, rigid composites part, at plant, for E-glass, at plant: 1
- causal, Composite scrap, from composites vacuum infusion, at plant, for Ethylbenzene styrene, EB, at plant: 0
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
## Sampling procedure
Data are from primary sources. The composites fabricators who provided data for this module verified that the characteristics of their plants are representative of North American composites fabrication facilities producing vacuum infused composite parts. The representativeness of the composites fabrication processes are unknown, but estimated to be less than 10% of the US production volume.

## Sources
- ACMA (2012). LCI of Polymer Composites
