# Solid strip and plank flooring, hardwood, E

Dataset: openLCA process, unit process
Category: 31-33: Manufacturing/3219: Other Wood Product Manufacturing
Geography: United States
Time period: 2005-12-31 to 2005-12-31
Allocation method: physical allocation
Generated by: Maureen Puetmann
Published in: Steven S. Hubbard
restrictionsDescription: All information can be accessed by everybody.
copyright: false

## General comment
Important note: although most of the data in the US LCI database has
undergone some sort of review, the database as a whole has not yet
undergone a formal validation process.
Please email comments to lci@nrel.gov.

## Technology
Average technology.

## Geography
Eastern USA, including the following states: MN, IA, MO, WI, IL, NJ, OH, IN, MI, WV, PA, MD, DW, NJ, NY, ME, VT, NH, RI, MA, CT, VA, KY, AR, LA, MS, AL, FL,GA, NC, SC, TN, and TX

## Reference product
- Solid strip and plank flooring; hardwood [US]: 1 m3
  Moisture content = 8%. 1m3 of finished strip/planked flooring represents on average 31.5m2 to 104 m2 of flooring at 31.7 and 9.65 mm thickness, respectively.

## By-products
- Wood fuel; hardwood; from flooring production [US]: 762.75 kg
  Weight reported on an ovendry basis. Moisture content (ovendry basis) = 8%. Wood residue includes: dry sawdust, dry planer shavings, dry trimmings, dry edgings, and dry wood flour

## Inputs from technosphere
- Cold rolled sheet, steel, at plant: 0.15 kg
  Steel strapping used in packaging.
- Transport, combination truck, diesel powered [RNA]: 433.93 t*km
  Transportation of hardwood lumber over 283 km. at 8% moisture content
- Diesel, combusted in industrial equipment [RNA]: 0.276 l
  Includes both fuel oil and diesel for onsite transportation.
- Sawn lumber; hardwood; rough; kiln dried; at kiln [US]: 2.16 m3
  Based on density of 657 kg/m3/ (volume at 8% moisture content). Mismatch with lumber from input process, which has a density = 627 kg/m3 (volume at 9.6% moisture content).
- Gasoline, combusted in equipment [RNA]: 0.0244 l
  Used for onsite transportation.
- Natural gas, combusted in industrial boiler [RNA]: 0.89 m3
- Wood fuel, hardwood,gen at flooring prod plant, combusted in industrial boiler, E [RNA]: 29.17 kg
  Combustion of wood fuel produced onsite.
- Electricity, at grid [RNA]: 13.472 kWh; provider Electricity, Eastern US, 2014
- Disposal, fly ash, to unspecified landfill: 1.33 kg
- Natural gas, combusted in industrial equipment, 1.357 m3/kg, 52.13 MJ/kg [RNA]: 0.0885 l; provider Natural gas, combusted in industrial equipment
  Proxy for propane. Used for onsite transportation.

## Inputs from nature
- Water [resource, water, subterranean]: 6.22 kg

## Emissions to nature
- Particulate matter, ≤ 10μm [emission, air]: 0.00777 kg
- Particulate matter [emission, air]: 0.0106 kg
- Water [emission, water]: 0.01286 kg
  Water discharged to surface water and sewer.

## Allocation factors
- causal, Solid strip and plank flooring; hardwood, for Gasoline, combusted in equipment: 0.475322
- causal, Solid strip and plank flooring; hardwood, for Particulate matter, ≤ 10μm: 0.475322
- causal, Wood fuel; hardwood; from flooring production, for Cold rolled sheet, steel, at plant: 0.524678
- physical, Wood fuel; hardwood; from flooring production: 0.524678
- causal, Wood fuel; hardwood; from flooring production, for Particulate matter, ≤ 10μm: 0.524678
- causal, Wood fuel; hardwood; from flooring production, for Transport, combination truck, diesel powered: 0.524678
- causal, Wood fuel; hardwood; from flooring production, for Particulate matter: 0.524678
- causal, Wood fuel; hardwood; from flooring production, for Water: 0.524678
- causal, Wood fuel; hardwood; from flooring production, for Disposal, fly ash, to unspecified landfill: 0.524678
- causal, Solid strip and plank flooring; hardwood, for Water: 0.475322
- causal, Solid strip and plank flooring; hardwood, for Diesel, combusted in industrial equipment: 0.475322
- causal, Wood fuel; hardwood; from flooring production, for Electricity, at grid: 0.524678
- economic, Solid strip and plank flooring; hardwood: 0.475322
- causal, Wood fuel; hardwood; from flooring production, for Gasoline, combusted in equipment: 0.524678
- causal, Solid strip and plank flooring; hardwood, for Cold rolled sheet, steel, at plant: 0.475322
- causal, Solid strip and plank flooring; hardwood, for Sawn lumber; hardwood; rough; kiln dried; at kiln: 0.475322
- causal, Wood fuel; hardwood; from flooring production, for Natural gas, combusted in industrial boiler: 0.524678
- causal, Solid strip and plank flooring; hardwood, for Disposal, fly ash, to unspecified landfill: 0.475322
- causal, Solid strip and plank flooring; hardwood, for Natural gas, combusted in industrial boiler: 0.475322
- causal, Wood fuel; hardwood; from flooring production, for Sawn lumber; hardwood; rough; kiln dried; at kiln: 0.524678
- causal, Solid strip and plank flooring; hardwood, for Water: 0.475322
- causal, Wood fuel; hardwood; from flooring production, for Diesel, combusted in industrial equipment: 0.524678
- causal, Solid strip and plank flooring; hardwood, for Particulate matter: 0.475322
- causal, Solid strip and plank flooring; hardwood, for Transport, combination truck, diesel powered: 0.475322
- economic, Wood fuel; hardwood; from flooring production: 0.524678
- causal, Solid strip and plank flooring; hardwood, for Wood fuel, hardwood,gen at flooring prod plant, combusted in industrial boiler, E: 0.475322
- causal, Solid strip and plank flooring; hardwood, for Natural gas, combusted in industrial equipment, 1.357 m3/kg, 52.13 MJ/kg: 0.475322
- causal, Wood fuel; hardwood; from flooring production, for Natural gas, combusted in industrial equipment, 1.357 m3/kg, 52.13 MJ/kg: 0.524678
- causal, Wood fuel; hardwood; from flooring production, for Water: 0.524678
- causal, Wood fuel; hardwood; from flooring production, for Wood fuel, hardwood,gen at flooring prod plant, combusted in industrial boiler, E: 0.524678
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
## Sampling procedure
Surveys

## Intended application
Only mass allocation factors are available for the multi-functional processes (disregard economic allocation factor values-they are mass allocation factors).

## Sources
- Maureen Puettmann
- Steven S. Hubbard
