# Diesel, combusted in industrial boiler, at pulp and paper mill (EXCL.)

Dataset: openLCA process, unit process
Category: 31-33: Manufacturing/3221: Pulp, Paper, and Paperboard Mills
Geography: Northern America
Time period: 1997-12-31 to 2000-12-31
Allocation method: no allocation
Generated by: Caroline Gaudreault
Reviewer: Martha Stevenson
Published in: Franklin Associates (2003) Distillate Fuel Oil Industrial Combustion
restrictionsDescription: All information can be accessed by everybody.
copyright: false

## General comment
This process was built to be used within the processes named "Fuels burned at bleached kraft market pulp mill", "Fuels burned at uncoated freesheet paper mill", "Fuels burned at coated freesheet paper mill", "Fuels burned at uncoated mechanical paper mill", "Fuels burned at coated mechanical paper mill" and "Fuels burned at bag and sack paper mill". It was built from the process named "Diesel, combusted in industrial boiler" v1.6 available in the US LCI database. Transport and waste processes were removed. The following emissions to air were excluded (excl.): Sulfur oxidesand Nitrogen oxides. These processes and emissions are reported in pulp and paper mill process chain in which this process is integrated.
Important note: although most of the data in the US LCI database has
undergone some sort of review, the database as a whole has not yet
undergone a formal validation process.
Please email comments to lci@nrel.gov.

## Technology
Diesel combustion in average industrial boiler.

## Geography
United States

## Reference product
- Diesel, combusted in industrial boiler, at pulp and paper mill (EXCL.) [RNA]: 1 l

## Inputs from technosphere
- Diesel, at refinery: 1 l; provider Petroleum refining, at refinery

## Emissions to nature
- Copper(I) [emission, water]: 3.5562e-8 kg
- 2,3,7,8-Tetrachlorodibenzo-p-dioxin [emission, air]: 1.662e-12 kg
- Methane [emission, air]: 6.1048e-6 kg
- Beryllium [emission, air]: 4.986e-8 kg
- Cadmium [emission, air]: 4.986e-8 kg
- Lead [emission, air]: 1.4958e-7 kg
- Carbon monoxide [emission, air]: 0.00060031 kg
- Chloride [emission, water]: 7.1124e-9 kg
- Mercury [emission, air]: 4.986e-8 kg
- Iron [emission, water]: 3.5562e-8 kg
- Arsenic [emission, air]: 6.648e-8 kg
- Copper [emission, air]: 9.972e-8 kg
- Radionuclides [emission, air]: 0.10827 kBq
- Hydrochloric acid [emission, air]: 8.3807e-5 kg
- Suspended solids, inorganic [emission, water]: 1.0669e-6 kg
- Methylene chloride [emission, air]: 5.3599e-7 kg
- Nitrous oxide [emission, air]: 1.3227e-5 kg
- Manganese [emission, air]: 9.972e-8 kg
- Particulate matter, > 2.5μm and ≤ 10μm [emission, air]: 0.00011972 kg
- Volatile organic compounds [emission, air]: 2.408e-5 kg
- Zinc [emission, air]: 6.648e-8 kg
- Tetrachloroethylene [emission, air]: 9.141e-9 kg
- Chromium [emission, air]: 4.986e-8 kg
- Selenium [emission, air]: 2.493e-7 kg
- Nickel [emission, air]: 4.986e-8 kg
- Phenols [emission, air]: 4.0386e-7 kg
- PAH/POM, unspecified [emission, air, indoor]: 5.3343e-7 kg
- Carbon dioxide [emission, air]: 2.727 kg

## Sources
- U.S. EPA
- AF&PA (2010). Printing & Writing Papers LCA
- Center for Transportation Research, Argo
- Franklin Associates (2003) Distillate Fuel Oil Industrial Combustion
- U.S. EPA Office of Solid Waste
- EIA
- U.S. EPA
- U.S. EPA
- U.S. EPA
