# Bark, hardwood, average, at forest road, NE-NC

Dataset: openLCA process, unit process
Category: 11: Agriculture, Forestry, Fishing and Hunting/1133: Logging
Geography: United States
Time period: 2002-12-31 to 2002-12-31
Allocation method: no allocation
Generated by: Maureen Puetmann
Published in: Elaine Oneil
restrictionsDescription: All information can be accessed by everybody.
copyright: true

## General comment
Important note: although most of the data in the US LCI database has
undergone some sort of review, the database as a whole has not yet
undergone a formal validation process.
Please email comments to lci@nrel.gov.

## Technology
Average technology. Some data extrapolated from similar processes.

## Geography
Northeast/North Central (NE/NC) region of the US : Connecticut, Delaware, Illinois, Indiana, Iowa, Maine, Maryland, Massachusetts, Michigan, Minnesota, Missouri, New Hampshire, New Jersey, New York, Ohio, Pennsylvania, Rhode Island, Vermont, West Virginia, and Wisconsin.

## Reference product
- Bark; hardwood; average; at forest road [US]: 1 kg

## Inputs from technosphere
- Bark; hardwood; average; Med Intensity Management [US]: 0.253566 kg
- Bark; hardwood; average; High Intensity Management [US]: 0.134898 kg
- Bark; hardwood; average; Low Intensity Management [US]: 0.611536 kg

## Sampling procedure
Average is calculated based on harvested areas and the specific yield for each type of management intensity.

## Sources
- Maureen Puettmann
- Elaine Oneil
