# Corn, whole plant, at field

Dataset: openLCA process, unit process
Category: 11: Agriculture, Forestry, Fishing and Hunting/1111: Oilseed and Grain Farming
Geography: Northern America
Time period: 1997-12-31 to 2000-12-31
Allocation method: no allocation
Generated by: Olivier Muller
Published in: USDA/National Agricultural Statistics Se
restrictionsDescription: All information can be accessed by everybody.
copyright: false

## General comment
Agricultural Crop Production, Harvested acres represent 91% of the planted acres (1998-2000 US average).
1 bu (corn) = 56 lbs.
The impacts of producing 1 kg of seed are assumed equal to those of producing 1kg of grain.
For water, only consumptive use is taken into account (i.e. 60.7% of the total water consumption).
Important note: although most of the data in the US LCI database has
undergone some sort of review, the database as a whole has not yet
undergone a formal validation process.
Please email comments to lci@nrel.gov.

## Technology
US average

## Geography
USA

## Reference product
- Corn, at field [RNA]: 1 kg
  Planted surface (1), Production (1), Seed consumption (2)

## By-products
- Corn stover, at field [RNA]: 1 kg
  Residue to Crop Ratio (4), C N content of residues (4). Initially considered an output to nature. Changed to an unvalued coproduct by Pascal Lesage (12/07)

## Inputs from technosphere
- Potash Fertilizer (K2O), at plant: 0.00718 kg
  Fertilizers NPK (8)
- Phosphorous fertilizer, production mix, at plant [RNA]: 0.00584 kg
  Fertilizers NPK (8)
- Quicklime, at plant [RNA]: 0.0305 kg
  Fertilizers Ca (9)
- Diesel, combusted in industrial equipment [RNA]: 0.00686 l
  Farm Tractor. Energy consumption (7)
- Transport, train, diesel powered [RNA]: 0.044 t*km
  Transportation of fertilizers (400km)
- Transport, single unit truck, diesel powered [RNA]: 0.0165 t*km
  Transportation of fertilizers (200 km).
- Liquefied petroleum gas, combusted in industrial boiler [RNA]: 0.00487 l
  Energy consumption (7). Was initially reported as MJ. Converted using following factors: 50.3 MJ/kg, 1.85L/kg
- Electricity, at grid [RNA]: 0.0122 kWh; provider Electricity, at Grid, US, 2010
  Energy consumption (7)
- Nitrogen fertilizer, production mix, at plant [RNA]: 0.0169 kg
  Fertilizers NPK (8). Manure - N, P brought to the field (9,3), Manure - composition N P (10),
- Natural gas, combusted in industrial boiler [RNA]: 0.00305 m3
  Energy consumption (7). Initially reported as MJ. Converted using the following factor: 38.0 MJ/m3.
- Gasoline, combusted in equipment [RNA]: 0.00188 l
  Farm tractor. Energy consumption (7).
- Agrochemicals, at plant: 0.000288 kg
  Pesticides - consumption (8)

## Inputs from nature
- Water [resource, water, subterranean]: 27800 kg
  Water consumption - consumptive use for irrigation (5), Water consumption - area irrigated and depth of irrigation water applied and ratio surface/ground water (3),
- Carbon dioxide [resource, air]: 1.49 kg
  Carbon fixation through plant growth
- Land use [resource, ground, human-dominated, agricultural]: 0.427, 0.468, 0.287 m2*a (3 entries)
  Planted surface (1), Tillage practices (3)
- Water [resource, water, fresh water body, river]: 4800 kg
  (same comment as for Water)

## Emissions to nature
- Suspended solids, inorganic [emission, water]: 0.822 kg
  Erosion (6)
- Carbofuran [emission, air, troposphere, rural]: 3.12e-7 kg
  Pesticides - consumption (8), Pesticides - application method (11), Pesticides - air emission factors (12), Pesticides - vapor pressure (13)
- Ammonia [emission, air, troposphere, rural]: 0.0011 kg
  N2O and NH3 and NOx air emissions (4)
- Atrazine [emission, air, troposphere, rural]: 4.08e-5 kg
  (same comment as for Carbofuran)
- Paraquat [emission, water]: 1.44e-8 kg
  Pesticides - consumption (8), Pesticides - application method (11), Runoff of pesticide (14)
- Phosphorus compounds [emission, water]: 3.8e-5 kg
  Runoff/leaching of fertilizers (15)
- Cyanazine [emission, water]: 1.54e-8 kg
  (same comment as for Paraquat)
- S-Ethyl dipropylthiocarbamate [emission, air, troposphere, rural]: 3.43e-6 kg
  (same comment as for Carbofuran)
- Methyl parathion [emission, water]: 1.09e-8 kg
  (same comment as for Paraquat)
- Methyl parathion [emission, air, troposphere, rural]: 2.53e-7 kg
  (same comment as for Carbofuran)
- Alachlor [emission, air, troposphere, rural]: 2.06e-6 kg
  (same comment as for Carbofuran)
- Alachlor [emission, water]: 8.84e-8 kg
  (same comment as for Paraquat)
- Metolachlor [emission, water]: 7.1e-7 kg
  (same comment as for Paraquat)
- Pendimethalin [emission, water]: 7.38e-8 kg
  (same comment as for Paraquat)
- Dicamba [emission, air, troposphere, rural]: 2.12e-6 kg
  (same comment as for Carbofuran)
- Permethrin [emission, air, troposphere, rural]: 1.55e-7 kg
  (same comment as for Carbofuran)
- Paraquat [emission, air, troposphere, rural]: 3.35e-7 kg
  (same comment as for Carbofuran)
- Nitrogen oxides [emission, air, troposphere, rural]: 0.00297 kg
  N2O and NH3 and NOx air emissions (4)
- Simazine [emission, water]: 4.66e-8 kg
  (same comment as for Paraquat)
- Particulate matter [emission, air, troposphere, rural]: 3.45e-7 kg
  Particulate emissions (16)
- Terbufos [emission, water]: 7e-8 kg
  (same comment as for Paraquat)
- MCPA [emission, air, troposphere, rural]: 2.82e-8 kg
  (same comment as for Carbofuran)
- Acetochlor [emission, water]: 8.98e-7 kg
  (same comment as for Paraquat)
- Bentazon [emission, water]: 7.14e-9 kg
  (same comment as for Paraquat)
- Glyphosate [emission, water]: 1.93e-7 kg
  (same comment as for Paraquat)
- MCPA [emission, water]: 1.21e-9 kg
  (same comment as for Paraquat)
- Cyanazine [emission, air, troposphere, rural]: 3.6e-7 kg
  (same comment as for Carbofuran)
- Phorate [emission, air, troposphere, rural]: 7.94e-8 kg
  (same comment as for Carbofuran)
- 2,4-D [emission, air, troposphere, rural]: 1.51e-6 kg
  (same comment as for Carbofuran)
- Bromoxynil [emission, water]: 9.45e-9 kg
  (same comment as for Paraquat)
- Atrazine [emission, water]: 1.75e-6 kg
  (same comment as for Paraquat)
- Terbufos [emission, air, troposphere, rural]: 2.71e-6 kg
  (same comment as for Carbofuran)
- Bentazon [emission, air, troposphere, rural]: 1.67e-7 kg
  (same comment as for Carbofuran)
- Pendimethalin [emission, air, troposphere, rural]: 1.72e-6 kg
  (same comment as for Carbofuran)
- 2,4-D [emission, water]: 6.48e-8 kg
  (same comment as for Paraquat)
- Bromoxynil [emission, air, troposphere, rural]: 3.65e-7 kg
  (same comment as for Carbofuran)
- Diuron [emission, water]: 1.49e-9 kg
  (same comment as for Paraquat)
- Metribuzin [emission, water]: 3.29e-9 kg
  (same comment as for Paraquat)
- Carbofuran [emission, water]: 1.34e-8 kg
  (same comment as for Paraquat)
- Hydrocarbons [emission, air, troposphere, rural]: 0.000173 kg
  (same comment as for Carbofuran)
- Chlorpyrifos [emission, air, troposphere, rural]: 2.4e-6 kg
  (same comment as for Carbofuran)
- Metribuzin [emission, air, troposphere, rural]: 7.67e-8 kg
  (same comment as for Carbofuran)
- Disulfoton [emission, water]: 5.3e-9 kg
  (same comment as for Paraquat)
- Simazine [emission, air, troposphere, rural]: 1.09e-6 kg
  (same comment as for Carbofuran)
- Dimethenamid [emission, water]: 2.15e-7 kg
  (same comment as for Paraquat)
- Acetochlor [emission, air, troposphere, rural]: 2.1e-5 kg
  (same comment as for Carbofuran)
- Phorate [emission, water]: 2.05e-9 kg
  (same comment as for Paraquat)
- Nitrogen [emission, water]: 0.0021 kg
  Runoff/leaching of fertilizers (15)
- Permethrin [emission, water]: 6.63e-9 kg
  (same comment as for Paraquat)
- Dicamba [emission, water]: 9.09e-8 kg
  (same comment as for Paraquat)
- Nitrous oxide [emission, air, troposphere, rural]: 0.000526 kg
  N2O and NH3 and NOx air emissions (4)
- Dimethenamid [emission, air, troposphere, rural]: 5.01e-6 kg
  (same comment as for Carbofuran)
- S-Ethyl dipropylthiocarbamate [emission, water]: 8.87e-8 kg
  (same comment as for Paraquat)
- Metolachlor [emission, air, troposphere, rural]: 1.66e-5 kg
  (same comment as for Carbofuran)
- Chlorpyrifos [emission, water]: 1.03e-7 kg
  (same comment as for Paraquat)
- Glyphosate [emission, air, troposphere, rural]: 4.51e-6 kg
  (same comment as for Carbofuran)

## Allocation factors
- causal, Corn, at field, for Disulfoton: 1
- causal, Corn, at field, for Atrazine: 1
- causal, Corn stover, at field, for Diuron: 0
- causal, Corn, at field, for Simazine: 1
- causal, Corn stover, at field, for Acetochlor: 0
- causal, Corn stover, at field, for Chlorpyrifos: 0
- causal, Corn, at field, for Pendimethalin: 1
- causal, Corn, at field, for S-Ethyl dipropylthiocarbamate: 1
- causal, Corn, at field, for Land use: 1
- causal, Corn, at field, for Dicamba: 1
- causal, Corn, at field, for Dimethenamid: 1
- causal, Corn, at field, for Nitrogen: 1
- causal, Corn, at field, for Methyl parathion: 1
- causal, Corn, at field, for Carbofuran: 1
- causal, Corn stover, at field, for Dicamba: 0
- causal, Corn stover, at field, for Land use: 0
- causal, Corn, at field, for Simazine: 1
- causal, Corn, at field, for Acetochlor: 1
- causal, Corn stover, at field, for 2,4-D: 0
- causal, Corn stover, at field, for Permethrin: 0
- causal, Corn stover, at field, for Paraquat: 0
- causal, Corn, at field, for Suspended solids, inorganic: 1
- causal, Corn stover, at field, for Ammonia: 0
- causal, Corn, at field, for Natural gas, combusted in industrial boiler: 1
- causal, Corn stover, at field, for Terbufos: 0
- economic, Corn, at field: 1
- causal, Corn stover, at field, for Acetochlor: 0
- causal, Corn, at field, for Pendimethalin: 1
- causal, Corn stover, at field, for Glyphosate: 0
- causal, Corn stover, at field, for Phorate: 0
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
## Sources
- U.S. EPA
- USDA/ERS
- U.S. EPA
- USDA/ERS
- USDA/NCRS
- USGS
- U.S. EPA
- USDA/National Agricultural Statistics Se
- USDA/ERS
- USDA/ERS
- Conservation Technology Information Cent
- USGS
- USDA/NCRS
- U.S. EPA
- USDA/NRI
- USDA/ERS
