# Ethylene oxide, at plant

Dataset: openLCA process, unit process
Category: 31-33: Manufacturing/3251: Basic Chemical Manufacturing
Geography: Northern America
Time period: 1989-12-31 to 2004-12-31
Allocation method: no allocation
Generated by: Franklin Associates
Published in: THE PLASTICS DIVISION OF THE AMERICAN C
restrictionsDescription: All information can be accessed by everybody.
copyright: false

## General comment
The average energy and emissions data collected between 1990 and 1992 were reviewed by an ethylene oxide producer and deemed acceptable for ethylene oxide production in 2005. However, updated raw material data were provided in 2005. Complete inventory data and metadata are available in full in the final report and appendices, Cradle-to-Gate Life Cycle Inventory of Nine Plastic Resins and Four Polyurethane Precursors. This report has been extensively reviewed within Franklin Associates and has undergone partial critical review by ACC Plastics Division members and is available at: www.americanchemistry.com. Quantities may vary slightly between the reference to main source and and this module due to rounding. Important note: although most of the data in the US LCI database has undergone some sort of review, the database as a whole has not yet undergone a formal validation process. Please email comments to lci@nrel.gov.

## Technology
Direct oxidation of ethylene using air or oxygen

## Geography
US and Europe

## Reference product
- Ethylene oxide, at plant [RNA]: 1 kg

## Inputs from technosphere
- Oxygen, liquid, at plant [RNA]: 0.88 kg
- Transport, pipeline, natural gas [RNA]: 0.00141592 t*km
- Transport, pipeline, unspecified petroleum products [RNA]: 0.152147 t*km
- Disposal, solid waste, unspecified, to sanitary landfill: 0.0168 kg
- Natural gas, combusted in industrial boiler [RNA]: 0.101007 m3
- Electricity, at grid [RNA]: 0.223104 kWh; provider Electricity, at Grid, US, 2010
- Ethylene, at plant, kg: 0.788 kg; provider Ethylene, materials production, organic compound, at plant, kg

## Inputs from nature
- Water [resource, water]: 0.75709 kg
  Consumptive use includes: water incorporated into the product, water evaporated during the process, and/or water used and released to a body other than that from which it was drawn.

## Emissions to nature
- Acetaldehyde [emission, water]: 0.0001 kg
- Aldehydes, C5 [emission, air]: 0.00028 kg
- Organic compounds [emission, air]: 0.000682 kg
- Methane [emission, air]: 0.00305 kg
- Sulfur oxides [emission, air]: 3e-7 kg
- Fluoride [emission, water]: 2e-7 kg
- Chemical Oxygen Demand [emission, water]: 0.00282 kg
- Biological Oxygen Demand [emission, water]: 0.00223 kg
- Chromium [emission, water]: 2.5e-5 kg
- Ammonia [emission, water]: 5e-8 kg
- Volatile organic compounds [emission, air]: 0.01813 kg
- Carbon dioxide [emission, air]: 0.5905 kg
- Ethylene oxide [emission, air]: 9.54e-5 kg
- Carbon monoxide [emission, air]: 3e-7 kg
- Nitrogen oxides [emission, air]: 1.4e-6 kg
- Zinc [emission, water]: 1e-5 kg

## Sampling procedure
Data are from primary sources.

## Sources
- THE PLASTICS DIVISION OF THE AMERICAN C
