# Fertilizer, winter wheat straw, 2022

Dataset: openLCA process, unit process
Category: 11: Agriculture, Forestry, Fishing and Hunting/1151: Support Activities for Crop Production
Geography: Northern America
Time period: 2009-12-31 to 2100-12-30
Allocation method: no allocation
Generated by: Daniel Inman
Published in: Hsu, D.
restrictionsDescription: All information can be accessed by everybody.
copyright: false

## General comment
Fertilizer input for on hectare of average US winter wheat projected for the year 2022. Considers only the amount of fertilizers attributable to straw removal. Transportation from the factory to the regional storehouse is included. Transport from the storehouse to the outlet and farm is not included.

## Technology
Modern technology

## Geography
North America

## Time period
2010 and after

## Reference product
- Fertilizer, winter wheat straw [RNA]: 10000 m2; = 1.0*10000

## Inputs from technosphere
- Phosphorous fertilizer, production mix, at plant [RNA]: 0.668 kg
  Additon of N lost with straw removal. Assuming straw is 0.2% P. ISU 1688. Proxy: Triple superphosphate, as P2O5, at regional storehouse/RER with US electricity U
- Ammonia, steam reforming, liquid, at plant: 2.69 kg
  Additon of N lost with straw removal. Assuming straw is 0.5% N.Phyllis database. proxy: Ammonia, liquid, at regional storehouse/RER with US electricity U
- Nitrogen fertilizer, production mix, at plant [RNA]: 2.2 kg
  Additon of N lost with straw removal. Assuming straw is 0.5% N.Phyllis database. proxy: Urea, as N, at regional storehouse/RER with US electricity U
- Potassium chloride, as K2O, at regional storehouse: 12.2 kg
  Additon of N lost with straw removal. Assuming straw is 1.25% K.ISU 1688
- Transport, combination truck, diesel powered [RNA]: 1.05 t*km
  transport to field of K2O

## Emissions to nature
- Ammonia [emission, air]: 0.522 kg
- Nitrous oxide [emission, air]: 0.0691 kg

## Sources
- Klein, C. D
- ECN, Phyllis
- Hsu, D.
- Sawyer, J. E.
- Hoeft, R. L.
- NASS
