# Transport, single unit truck, short-haul, diesel powered, Southwest

Dataset: openLCA process, unit process
Category: 48-49: Transportation and Warehousing/4841: General Freight Trucking
Geography: Northern America
Time period: 2009-12-31 to 2009-12-31
Allocation method: no allocation
Generated by: Nathan Hardesty
Published in: U.S. Environmental Protection Agency (EP
restrictionsDescription: All information can be accessed by everybody.
copyright: false

## General comment
This dataset represents the Southwest U.S. (AZ, CO, NM, UT (Reference 11)) average airborne emissions for operating a diesel powered, single unit truck in a short-haul manner (trips less than 200 miles [322 km]). The inventory includes all vehicle operation processes, including off-network and refueling activities.
The refinery-to-pump transportation and distribution data are calculated from Argonne National Laboratory's GREET 1.8d.1 model.
The vehicle operation data are calculated from EPA's MOVES2010a model, using the assumptions described in the corresponding detailed spreadsheet. Emissions factors in MOVES2010a are largely based on EPA's Mobile Source Observation Database, which in turn includes data from a variety of vehicle studies (References 7-9).
MOVES2010a acknowledges sources of uncertainty in the model structure, the population and acitivty data, and other model parameters. As of July 2011, the uncertainty calculation function of the model has not been activated.

## Technology
Combustion of diesel in a single unit, short-haul truck.

## Geography
US

## Reference product
- Transport, single unit truck, short-haul, diesel powered [RNA]: 1 t*km

## Inputs from technosphere
- Diesel, at refinery: 0.0996302 l; provider Petroleum refining, at refinery
- Transport, barge, average fuel mix [RNA]: 0.0310642 t*km
- Transport, ocean freighter, average fuel mix [RNA]: 0.219562 t*km
- Transport, train, diesel powered [RNA]: 0.0599335 t*km
- Transport, pipeline, unspecified petroleum products [RNA]: 0.323724 t*km
- Transport, combination truck, average fuel mix [RNA]: 0.0321166 t*km

## Emissions to nature
- Particulate matter, ≤ 2.5μm [emission, air]: 7.19192e-5 kg
  PM2.5 from organic carbon, elemental carbon, and sulfate particulates.
- Volatile organic compounds [emission, air]: 0.00015649 kg
- Nitrogen dioxide [emission, air]: 0.000149689 kg
- Particulate matter, ≤ 10μm [emission, air]: 3.12106e-6 kg
  PM10 from tirewear.
- Hydrocarbons [emission, air]: 0.000151657 kg
- Methane [emission, air]: 7.8841e-6 kg
- Nitrous oxide [emission, air]: 7.4891e-7 kg
- Particulate matter, ≤ 10μm [emission, air]: 7.41404e-5 kg
  PM10 from organic carbon, elemental carbon, and sulfate particulates.
- Particulate matter, ≤ 10μm [emission, air]: 1.53839e-5 kg
  PM10 from brakewear.
- Carbon dioxide [emission, air]: 0.261553 kg
- Sulfur dioxide [emission, air]: 4.27198e-6 kg
- Ammonia [emission, air]: 5.84676e-6 kg
- Nitrogen oxides [emission, air]: 0.00131492, 0.0014646 kg (2 entries)
- Particulate matter, ≤ 2.5μm [emission, air]: 7.48454e-7 kg
  PM2.5 from tirewear.
- Carbon monoxide [emission, air]: 0.000660686 kg
- Particulate matter, ≤ 2.5μm [emission, air]: 4.0272e-6 kg
  PM2.5 from brakewear.

## Sources
- Wang, M.
- Assessment and Standards Division, Offic
- EPA
- National Climatic Data Center, National
- Transportation Characteristics Branch, U
- Assessment and Standards Division, Offic
- Alam & Rajamanickam (2007). Development of TPEF
- U.S. Environmental Protection Agency (EP
- Eastern Research Group
- National Institute of Standards and Tech
- U.S. Alternative Fuels and Advanced Vehi
