# Transport, school bus, diesel powered, West North Central

Dataset: openLCA process, unit process
Category: 48-49: Transportation and Warehousing/4854: School and Employee Bus Transportation
Geography: Northern America
Time period: 2009-12-31 to 2009-12-31
Allocation method: no allocation
Generated by: Nathan Hardesty
Published in: U.S. Environmental Protection Agency (EP
restrictionsDescription: All information can be accessed by everybody.
copyright: false

## General comment
This dataset represents the West North Central U.S. (MT, NE, ND, SD, WY (Reference 10)) average airborne emissions for operating a diesel powered school bus. The inventory includes all vehicle operation processes, including off-network and refueling activities.
The refinery-to-pump transportation and distribution data are calculated from Argonne National Laboratory's GREET 1.8d.1 model.
The vehicle operation data are calculated from EPA's MOVES2010a model, using the assumptions described in the corresponding detailed spreadsheet. Emissions factors in MOVES2010a are largely based on EPA's Mobile Source Observation Database, which in turn includes data from a variety of vehicle studies (References 6-8).
MOVES2010a acknowledges sources of uncertainty in the model structure, the population and acitivty data, and other model parameters. As of July 2011, the uncertainty calculation function of the model has not been activated.

## Technology
Combustion of diesel in a school bus.

## Geography
US

## Reference product
- Transport, school bus, diesel powered [RNA]: 1 p*km

## Inputs from technosphere
- Diesel, at refinery: 0.00413381 l; provider Petroleum refining, at refinery
- Transport, ocean freighter, average fuel mix [RNA]: 0.00910996 t*km
- Transport, combination truck, average fuel mix [RNA]: 0.00133257 t*km
- Transport, barge, average fuel mix [RNA]: 0.0012889 t*km
- Transport, pipeline, unspecified petroleum products [RNA]: 0.0134318 t*km
- Transport, train, diesel powered [RNA]: 0.00248673 t*km

## Emissions to nature
- Particulate matter, ≤ 10μm [emission, air]: 5.88367e-7 kg
  PM10 from brakewear.
- Volatile organic compounds [emission, air]: 8.71088e-6 kg
- Carbon dioxide [emission, air]: 0.010851 kg
- Particulate matter, ≤ 10μm [emission, air]: 4.84067e-6 kg
  PM10 from organic carbon, elemental carbon, and sulfate particulates.
- Sulfur dioxide [emission, air]: 1.83089e-7 kg
- Particulate matter, ≤ 2.5μm [emission, air]: 4.3594e-8 kg
  PM2.5 from tirewear.
- Particulate matter, ≤ 2.5μm [emission, air]: 4.69563e-6 kg
  PM2.5 from organic carbon, elemental carbon, and sulfate particulates.
- Hydrocarbons [emission, air]: 8.4424e-6 kg
- Nitrous oxide [emission, air]: 4.4011e-8 kg
- Ammonia [emission, air]: 2.07772e-7 kg
- Nitrogen oxides [emission, air]: 9.56761e-5, 8.786e-5 kg (2 entries)
- Methane [emission, air]: 5.34752e-7 kg
- Nitrogen dioxide [emission, air]: 7.81617e-6 kg
- Carbon monoxide [emission, air]: 5.42185e-5 kg
- Particulate matter, ≤ 10μm [emission, air]: 1.81788e-7 kg
  PM10 from tirewear.
- Particulate matter, ≤ 2.5μm [emission, air]: 1.54022e-7 kg
  PM2.5 from brakewear.

## Sources
- Wang, M.
- Assessment and Standards Division, Offic
- EPA
- National Climatic Data Center, National
- American School Bus Council (2008). National School Bus Fuel Data
- Assessment and Standards Division, Offic
- U.S. Environmental Protection Agency (EP
- Eastern Research Group
- National Institute of Standards and Tech
- U.S. Alternative Fuels and Advanced Vehi
