# Sulfuric acid, at plant

Dataset: openLCA process, unit process
Category: 31-33: Manufacturing/3251: Basic Chemical Manufacturing
Geography: Northern America
Time period: 1991-12-31 to 2007-12-31
Allocation method: no allocation
Generated by: Franklin Associates
Published in: THE PLASTICS DIVISION OF THE AMERICAN C
restrictionsDescription: All information can be accessed by everybody.
copyright: false

## General comment
During sulfuric acid production, the burning of sulfur produces heat, which in turn is used to generate steam. This steam is usually used in adjacent processing plants and supplies energy to the sulfuric acid plant. The exported steam is given a credit and shown as recovered energy. Complete inventory data and metadata are available in full in the final report and appendices, Cradle-to-Gate Life Cycle Inventory of Nine Plastic Resins and Four Polyurethane Precursors. This report has been extensively reviewed within Franklin Associates and has undergone partial critical review by ACC Plastics Division members and is available at: www.americanchemistry.com. Quantities may vary slightly between the reference to main source and and this module due to rounding. Important note: although most of the data in the US LCI database has undergone some sort of review, the database as a whole has not yet undergone a formal validation process. Please email comments to lci@nrel.gov.

## Technology
Contact process via stepwise oxidation of sulfur followed by reaction with a sulfuric acid solution

## Geography
North America (US and Canada)

## Reference product
- Sulfuric acid, at plant [RNA]: 1 kg

## By-products
- Recovered energy [RNA]: 1.97707 MJ
  Credit for steam or heat co-product sold externally.

## Inputs from technosphere
- Transport, pipeline, natural gas [RNA]: 0.141238 t*km
- Transport, combination truck, diesel powered [RNA]: 0.0256989 t*km
- Electricity, at grid [RNA]: 0.0661376 kWh; provider Electricity, at Grid, US, 2010
- Sulfur, at plant [RNA]: 0.33 kg
- Disposal, solid waste, unspecified, to sanitary landfill: 0.0005 kg
- Transport, pipeline, unspecified petroleum products [RNA]: 0.215574 t*km
- Transport, ocean freighter, diesel powered [US]: 0.161521 t*km
  Values for ocean freighter transport are calculated based on average fuel consumption rates as determined from a personal communication with Rich Sonnenschein, U.S. Department of Transportation, Maritime Administration in February 2004: 10% of ocean freighters use diesel fuel, 90% use residual fuel, and a freighter that consumes residual fuel consumes 1.9 gallons per 1,000 ton-miles
- Transport, ocean freighter, residual fuel oil powered [US]: 1.45369 t*km
  (same comment as for Transport, ocean freighter, diesel powered)
- Transport, train, diesel powered [RNA]: 0.00141238 t*km

## Emissions to nature
- Nitrogen oxides [emission, air]: 5e-5 kg
- Sulfur oxides [emission, air]: 0.00259 kg
- Hydrogen ion [emission, water]: 0.0003 kg
- Biological Oxygen Demand [emission, water]: 0.0001 kg
- Suspended solids, inorganic [emission, water]: 0.0003 kg
- Particulate matter [emission, air]: 0.001 kg

## Allocation factors
- causal, Recovered energy, for Transport, train, diesel powered: 0
- causal, Sulfuric acid, at plant, for Sulfur, at plant: 1
- causal, Recovered energy, for Transport, pipeline, natural gas: 0
- causal, Sulfuric acid, at plant, for Particulate matter: 1
- causal, Sulfuric acid, at plant, for Transport, pipeline, natural gas: 1
- causal, Sulfuric acid, at plant, for Hydrogen ion: 1
- causal, Recovered energy, for Sulfur, at plant: 0
- physical, Recovered energy: 0
- causal, Recovered energy, for Transport, combination truck, diesel powered: 0
- causal, Recovered energy, for Hydrogen ion: 0
- causal, Recovered energy, for Suspended solids, inorganic: 0
- economic, Recovered energy: 0
- physical, Sulfuric acid, at plant: 1
- causal, Sulfuric acid, at plant, for Transport, train, diesel powered: 1
- causal, Sulfuric acid, at plant, for Transport, ocean freighter, diesel powered: 1
- causal, Sulfuric acid, at plant, for Transport, pipeline, unspecified petroleum products: 1
- causal, Sulfuric acid, at plant, for Sulfur oxides: 1
- causal, Recovered energy, for Transport, ocean freighter, diesel powered: 0
- causal, Recovered energy, for Disposal, solid waste, unspecified, to sanitary landfill: 0
- causal, Recovered energy, for Nitrogen oxides: 0
- causal, Recovered energy, for Transport, ocean freighter, residual fuel oil powered: 0
- causal, Recovered energy, for Electricity, at grid: 0
- causal, Sulfuric acid, at plant, for Nitrogen oxides: 1
- economic, Sulfuric acid, at plant: 1
- causal, Recovered energy, for Transport, pipeline, unspecified petroleum products: 0
- causal, Sulfuric acid, at plant, for Disposal, solid waste, unspecified, to sanitary landfill: 1
- causal, Recovered energy, for Particulate matter: 0
- causal, Sulfuric acid, at plant, for Suspended solids, inorganic: 1
- causal, Sulfuric acid, at plant, for Transport, ocean freighter, residual fuel oil powered: 1
- causal, Sulfuric acid, at plant, for Transport, combination truck, diesel powered: 1
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
## Sampling procedure
Data are from secondary sources.

## Sources
- THE PLASTICS DIVISION OF THE AMERICAN C
