# Transport, single unit truck, short-haul, gasoline powered, West North Central

Dataset: openLCA process, unit process
Category: 48-49: Transportation and Warehousing/4841: General Freight Trucking
Geography: Northern America
Time period: 2009-12-31 to 2009-12-31
Allocation method: no allocation
Generated by: Nathan Hardesty
Published in: U.S. Environmental Protection Agency (EP
restrictionsDescription: All information can be accessed by everybody.
copyright: false

## General comment
This dataset represents the West North Central U.S. (MT, NE, ND, SD, WY (Reference 11)) average airborne emissions for operating a gasoline powered, single unit truck in a short-haul manner (trips less than 200 miles [322 km]). The inventory includes all vehicle operation processes, including off-network and refueling activities.
The refinery-to-pump transportation and distribution data are calculated from Argonne National Laboratory's GREET 1.8d.1 model.
The vehicle operation data are calculated from EPA's MOVES2010a model, using the assumptions described in the corresponding detailed spreadsheet. Emissions factors in MOVES2010a are largely based on EPA's Mobile Source Observation Database, which in turn includes data from a variety of vehicle studies (References 7-9).
MOVES2010a acknowledges sources of uncertainty in the model structure, the population and acitivty data, and other model parameters. As of July 2011, the uncertainty calculation function of the model has not been activated.

## Technology
Combustion of gasoline in a single unit, short-haul truck.

## Geography
US

## Reference product
- Transport, single unit truck, short-haul, gasoline powered [RNA]: 1 t*km

## Inputs from technosphere
- Transport, train, diesel powered [RNA]: 0.0553706 t*km
- Transport, ocean freighter, average fuel mix [RNA]: 0.253558 t*km
- Gasoline, at refinery: 0.101845 l; provider Petroleum refining, at refinery
- Transport, combination truck, average fuel mix [RNA]: 0.029657 t*km
- Transport, barge, average fuel mix [RNA]: 0.019214 t*km
- Transport, pipeline, unspecified petroleum products [RNA]: 0.291103 t*km

## Emissions to nature
- Volatile organic compounds [emission, air]: 0.000435609 kg
- Nitrogen oxides [emission, air]: 0.000960657, 0.00104346 kg (2 entries)
- Nitrous oxide [emission, air]: 1.34889e-5 kg
- Hydrocarbons [emission, air]: 0.000420998 kg
- Particulate matter, ≤ 10μm [emission, air]: 2.36894e-6 kg
  PM10 from tirewear.
- Particulate matter, ≤ 2.5μm [emission, air]: 9.73623e-6 kg
  PM2.5 from organic carbon, elemental carbon, and sulfate particulates.
- Carbon dioxide [emission, air]: 0.236794 kg
- Carbon monoxide [emission, air]: 0.010181 kg
- Nitrogen dioxide [emission, air]: 8.28013e-5 kg
- Particulate matter, ≤ 2.5μm [emission, air]: 5.68092e-7 kg
  PM2.5 from tirewear.
- Ammonia [emission, air]: 9.47726e-6 kg
- Particulate matter, ≤ 10μm [emission, air]: 1.05735e-5 kg
  PM10 from organic carbon, elemental carbon, and sulfate particulates.
- Sulfur dioxide [emission, air]: 4.62294e-6 kg
- Methane [emission, air]: 3.82311e-5 kg
- Particulate matter, ≤ 10μm [emission, air]: 1.03147e-5 kg
  PM10 from brakewear.
- Particulate matter, ≤ 2.5μm [emission, air]: 2.70018e-6 kg
  PM2.5 from brakewear.

## Sources
- Wang, M.
- Assessment and Standards Division, Offic
- EPA
- National Climatic Data Center, National
- Transportation Characteristics Branch, U
- Assessment and Standards Division, Offic
- Alam & Rajamanickam (2007). Development of TPEF
- U.S. Environmental Protection Agency (EP
- Eastern Research Group
- National Institute of Standards and Tech
- U.S. Alternative Fuels and Advanced Vehi
