# Palm kernel oil, processed, at plant

Dataset: openLCA process, unit process
Category: 31-33: Manufacturing/3112: Grain and Oilseed Milling
Geography: Northern America
Time period: 1988-12-31 to 1988-12-31
Allocation method: no allocation
Generated by: Franklin Associates
Published in: THE PLASTICS DIVISION OF THE AMERICAN C
restrictionsDescription: All information can be accessed by everybody.
copyright: false

## General comment
Complete inventory data and metadata are available in full in the final report and appendices, Cradle-to-Gate Life Cycle Inventory of Nine Plastic Resins and Four Polyurethane Precursors. This report has been extensively reviewed within Franklin Associates and has undergone partial critical review by ACC Plastics Division members and is available at: www.americanchemistry.com. Quantities may vary slightly between the reference to main source and and this module due to rounding. Important note: although most of the data in the US LCI database has undergone some sort of review, the database as a whole has not yet undergone a formal validation process. Please email comments to lci@nrel.gov.

## Technology
Refining, bleaching, and deodorizing of palm kernel oil

## Geography
North America (US and Canada)

## Reference product
- Palm kernel oil, processed, at plant [RNA]: 1 kg

## Inputs from technosphere
- Transport, ocean freighter, residual fuel oil powered [US]: 4.44 t*km
  Values for ocean freighter transport are calculated based on average fuel consumption rates as determined from a personal communication with Rich Sonnenschein, U.S. Department of Transportation, Maritime Administration in February 2004: 10% of ocean freighters use diesel fuel, 90% use residual fuel, and a freighter that consumes residual fuel consumes 1.9 gallons per 1,000 ton-miles
- Crude palm kernel oil, at plant [RNA]: 1.02 kg
- Electricity, at grid [RNA]: 0.00948 kWh; provider Electricity, at Grid, US, 2010
- Diesel, combusted in industrial equipment [RNA]: 0.0267 l
  Includes diesel fuel and distillate oil amounts.
- Transport, ocean freighter, diesel powered [US]: 0.493 t*km
  (same comment as for Transport, ocean freighter, residual fuel oil powered)
- Disposal, solid waste, unspecified, to sanitary landfill: 0.0209 kg
- Transport, single unit truck, diesel powered [RNA]: 0.0203 t*km

## Emissions to nature
- Carbon monoxide [emission, air]: 7e-6 kg
- Neem oil [emission, water, fresh water body]: 5.7e-5 kg
- Suspended solids, inorganic [emission, water]: 0.00054 kg
- Chemical Oxygen Demand [emission, water]: 0.00087 kg
- Total dissolved solids [emission, water]: 0.001 kg
- Volatile organic compounds [emission, air]: 2e-6 kg
- Biological Oxygen Demand [emission, water]: 0.00044 kg

## Sampling procedure
Data are from secondary sources.

## Sources
- THE PLASTICS DIVISION OF THE AMERICAN C
