# Steel, cold-formed studs and track, at plant

Dataset: openLCA process, unit process
Category: 31-33: Manufacturing/3312: Steel Product Manufacturing from Purchased Steel
Geography: Northern America
Time period: 2011-12-31 to 2016-12-31
Allocation method: no allocation
Generated by: PE INTERNATIONAL AG
Reviewer: PE INTERNATIONAL AG
Published in: Steel Framing Alliance (SFA)
restrictionsDescription: All information can be accessed by everybody.
copyright: true

## General comment
The gate-to-gate data set covers all relevant input and output flows of the represented gate to gate unit process. The inventory is mainly based on industry data and is completed, where necessary, by secondary data. Dummy flows indicate inputs and outputs without corresponding USLCI process data for upstream production of materials or downstream treatment of waste (as of 2014).

Updated October 2018 to reflect corrected waste flows.

## Technology
Cold-formed steel studs produced via slitting and roll forming steel sheet. The gate-to-gate process includes on-site propane combustion emissions. Inbound and outbound transportation of raw materials and finished product is not included.

## Geography
The data set represents gate-to-gate production in North America (specifically US and Canada) of Steel Framing Alliance (SFA) members.

## Time period
annual average

## Reference product
- Steel, cold-formed studs and track, at plant [RNA]: 1 kg

## By-products
- Steel scrap; zinc-coated, from cold-forming; at plant: 0.0284 kg

## Inputs from technosphere
- Galvanized steel sheet, at plant: 1.03 kg; lognormal geomSd 1
- Pallet, for packaging: 0.0206 kg; lognormal geomSd 1
- Propane, combusted in equipment: 0.00131307 kg; lognormal geomSd 1
- Disposal, solid waste, unspecified, to unspecified landfill: 5.47e-5 kg
- Plastic band, for packaging: 0.000204 kg; lognormal geomSd 1
- Lubricant feedstock, at refinery: 9.22e-5 kg; lognormal geomSd 1
- Steel band, for packaging: 0.00202 kg; lognormal geomSd 1
- Disposal, wood waste, to residual material landfill: 0.000309 kg
- Electricity, at grid [RNA]: 0.194049 MJ; lognormal geomSd 1; provider Electricity, at Grid, US, 2010

## Emissions to nature
- Carbon dioxide [emission, air]: 0.00356 kg; lognormal geomSd 1

## Allocation factors
- causal, Steel scrap; zinc-coated, from cold-forming; at plant, for Pallet, for packaging: 0
- causal, Steel scrap; zinc-coated, from cold-forming; at plant, for Disposal, wood waste, to residual material landfill: 0
- causal, Steel, cold-formed studs and track, at plant, for Steel band, for packaging: 1
- physical, Steel scrap; zinc-coated, from cold-forming; at plant: 0
- causal, Steel, cold-formed studs and track, at plant, for Steel scrap; zinc-coated, from cold-forming; at plant: 1
- causal, Steel, cold-formed studs and track, at plant, for Steel scrap; zinc-coated, from cold-forming; at plant: 0
- causal, Steel scrap; zinc-coated, from cold-forming; at plant, for Steel band, for packaging: 0
- causal, Steel, cold-formed studs and track, at plant, for Lubricant feedstock, at refinery: 1
- causal, Steel scrap; zinc-coated, from cold-forming; at plant, for Plastic band, for packaging: 0
- causal, Steel, cold-formed studs and track, at plant, for Plastic band, for packaging: 0
- causal, Steel, cold-formed studs and track, at plant, for Electricity, at grid: 1
- causal, Steel scrap; zinc-coated, from cold-forming; at plant, for Disposal, solid waste, unspecified, to unspecified landfill: 0
- causal, Steel scrap; zinc-coated, from cold-forming; at plant, for Lubricant feedstock, at refinery: 0
- causal, Steel scrap; zinc-coated, from cold-forming; at plant, for Steel scrap; zinc-coated, from cold-forming; at plant: 0
- causal, Steel, cold-formed studs and track, at plant, for Galvanized steel sheet, at plant: 1
- causal, Steel, cold-formed studs and track, at plant, for Pallet, for packaging: 1
- economic, Steel, cold-formed studs and track, at plant: 1
- causal, Steel scrap; zinc-coated, from cold-forming; at plant, for Propane, combusted in equipment: 0
- causal, Steel scrap; zinc-coated, from cold-forming; at plant, for Electricity, at grid: 0
- causal, Steel, cold-formed studs and track, at plant, for Propane, combusted in equipment: 1
- causal, Steel, cold-formed studs and track, at plant, for Disposal, wood waste, to residual material landfill: 1
- causal, Steel, cold-formed studs and track, at plant, for Plastic band, for packaging: 1
- physical, Steel, cold-formed studs and track, at plant: 1
- causal, Steel scrap; zinc-coated, from cold-forming; at plant, for Steel scrap; zinc-coated, from cold-forming; at plant: 0
- causal, Steel scrap; zinc-coated, from cold-forming; at plant, for Galvanized steel sheet, at plant: 0
- causal, Steel, cold-formed studs and track, at plant, for Disposal, solid waste, unspecified, to unspecified landfill: 1
- causal, Steel scrap; zinc-coated, from cold-forming; at plant, for Plastic band, for packaging: 0
- economic, Steel scrap; zinc-coated, from cold-forming; at plant: 0
- causal, Steel, cold-formed studs and track, at plant, for Carbon dioxide: 0
- causal, Steel scrap; zinc-coated, from cold-forming; at plant, for Carbon dioxide: 0

## Review details
The LCI method applied is in compliance with ISO 14040 and 14044. The documentation includes all relevant information in view of the data quality and scope of the application of the respective LCI result / data set. The dataset represents the state-of-the-art in view of the referenced functional unit.

## Sources
- Steel Framing Alliance (SFA)
