# Recycled postconsumer polyethylene teraphthalate, PET, pellet

Dataset: openLCA process, unit process
Category: 31-33: Manufacturing/3259: Other Chemical Product and Preparation Manufacturing
Geography: United States
Time period: 2007-12-27 to 2009-12-27
Allocation method: no allocation
Data quality: US EPA - Process Pedigree Matrix (4;1)
Generated by: Franklin Associates
Owner: ACC, APR, NAPCOR, & PETRA
Reviewer: Beverly Sauer
Published in: Franklin Associates (2011) LCI HDPE & PET Recycled Resin
restrictionsDescription: These U.S. LCI Database Project data ("Data") are provided by the National Renewable Energy Laboratory ("NREL"), operated by the Alliance for Sustainable Energy, LLC ("Alliance") for the US Department of Energy ("DOE") under Contract No. DE-AC36-08GO28308. The United States Government (the "Government") retains and the user acknowledges that the Government retains a non-exclusive, paid-up, irrevocable, worldwide license to publish or reproduce the published form of these data, or allow others to do so, for Government purposes.
Access to and use of these Data shall impose the following obligations on the user, as set forth in this Agreement. The user is granted the right, without any fee or cost, to use, copy, modify, alter, enhance and distribute these Data for any purpose whatsoever, provided that this entire notice appears in all copies of the Data. Any modification, alteration or enhancement of these data shall be identified and documented by the user. Further, the user agrees to credit the DOE/NREL/Alliance in any publication that results from the use of these Data. The names DOE/NREL/Alliance, however, may not be used in any advertising or publicity to endorse or promote any products or commercial entities unless specific written permission is obtained from DOE/NREL/Alliance. The user also understands that DOE/NREL/Alliance is not obligated to provide the user with any support, consulting, training or assistance of any kind with regard to the use of these Data or to provide the user with any updates, revisions or new versions of these Data.
YOU AGREE TO INDEMNIFY THE GOVERNMENT AND DOE/NREL/ALLIANCE, AND ITS SUBSIDIARIES, AFFILIATES, OFFICERS, AGENTS, AND EMPLOYEES AGAINST ANY CLAIM OR DEMAND, INCLUDING REASONABLE ATTORNEYS' FEES, RELATED TO YOUR USE OF THESE DATA. THESE DATA ARE PROVIDED BY DOE/NREL/ALLIANCE "AS IS" AND ANY EXPRESS OR IMPLIED WARRANTIES, INCLUDING BUT NOT LIMITED TO, THE IMPLIED WARRANTIES OF MERCHANTABILITY AND FITNESS FOR A PARTICULAR PURPOSE ARE DISCLAIMED. IN NO EVENT SHALL THE GOVERNMENT OR DOE/NREL/ALLIANCE BE LIABLE FOR ANY SPECIAL, INDIRECT OR CONSEQUENTIAL DAMAGES OR ANY DAMAGES WHATSOEVER, INCLUDING BUT NOT LIMITED TO CLAIMS ASSOCIATED WITH THE LOSS OF DATA OR PROFITS, WHICH MAY RESULT FROM AN ACTION IN CONTRACT, NEGLIGENCE OR OTHER TORTIOUS CLAIM THAT ARISES OUT OF OR IN CONNECTION WITH THE ACCESS, USE OR PERFORMANCE OF THESE DATA.
copyright: false

## General comment
Important note: although most of the data in the US LCI database has
undergone some sort of review, the database as a whole has not yet
undergone a formal validation process.
Please email comments to lci@nrel.gov.

## Technology
Energy required to convert PET flake to resin pellets based on reclaimer surveys. NOTE: This unit process is for pelletizing ONLY. Steps for debaling, grinding, washing, drying, and granulating PET into flake are included in another linked unit process. The PET recycling data do not include solid stating to convert the resin to a bottle-ready state. If the recycled resin data are being used in a life cycle inventory for the production of bottles, the practitioner constructing the model may need to add energy for solid stating of the recycled PET resin.

## Geography
United States

## Time period
Data compiled 2010 from most recent sources

## Reference product
- Recycled postconsumer polyethylene teraphthalate, PET, pellet [US]: 1 kg
  Depending on the practitioner's choice of methodology, some share of the virgin material burdens for initially producing the plastic may be allocated to the recycled resin.

## Inputs from technosphere
- Electricity, at grid [RNA]: 0.481 kWh; provider Electricity, at Grid, US, 2010
- Recycled postconsumer polyethylene teraphthalate, PET, flake [US]: 1 kg

## Inventory method
Attributional; data sets for the three recycling unit processes (collection, sorting/separation, reclaimer operations) were linked to cover the full sequence of processing steps required to produce recycled resins  gate-to-gate results; for cradle-to-gate LCI of recycled resin, the practitioner needs to make decision about virgin resin burdens associated with the postconsumer products that are feedstocks to recycling. Recycling occurs in the context of a product made from resin; use and end-of-life management of the material will depend on the product in which it is used

## Modelling constants
Some recycled PET is sold in the form of resin pellets. The additional energy required to convert 1,000 pounds of recycled PET flake to resin pellets is 218 kWh, based on primary data from the reclaimer surveys. No further details can be provided about the data in order to comply with confidentiality agreements with data providers.

## Completeness
TREATMENT OF MISSING ENVIRONMENTAL DATA
Elementary flows are cut-off at less than 1% based on environmental relevance.

TREATMENT OF MISSING TECHNOSPHERE DATA
Intermediate flows are cut-off at less than 1% based on environmental relevance. Capital equipment is not included in this unit process.

MASS BALANCE

## Data selection
Most of the reporting facilities receive postconsumer PET as individual resin bales. The bales must be broken down and the material sorted to remove foreign material. The sorted materials may or may not go through a pre-washing stage before they are granulated to flake. Some amount of reclaimed resin is received at the facility already in flake form. This flake may be clean or dirty, but all reclaimed flake is washed to market specifications as part of the reclaimer processing operations. This is most often achieved with a caustic wash, but different reclaimers reported using a variety of washing chemicals including surfactants, defoamers, and wetting agents. Clean postconsumer PET is commonly sold in flake form, or it can be pelletized. This unit process includes pelletizing ONLY. Steps for debaling, grinding, washing, drying, and granulating into flake are included in another linked unit process. Some reclaimers extrude the postconsumer PET directly into a staple fiber product. Depending on the level of processing, the postconsumer PET resin may be used for food-grade or non-food applications.

## Data treatment
For each facility, operating data normalized to basis of 1000 lb output, then individual reclaimer data sets were aggregated, weighting each data set according to the facility’s contribution to the total output of postconsumer recycled HDPE or PET ; Other assumtions and calculations described in Modeling Constants & Sampling Procedure.

## Sampling procedure
BOUNDARY CONDITIONS
This unit process includes pelletizing ONLY. Steps for debaling, grinding, washing, drying, and granulating PET into flake are included in another linked unit process. The PET recycling data do not include solid stating to convert the resin to a bottle-ready state. If the recycled resin data are being used in a life cycle inventory for the production of bottles, the practitioner constructing the model may need to add energy for solid stating of the recycled PET resin.

DATA COLLECTION
Data collection forms for HDPE and PET reclaimers were developed for this project by ERG. Completed forms were received from 4 PET facilities and 6 HDPE facilities. The data sets were used to compile a weighted average for each resin based on each facility’s recycled resin output as a percentage of the total output of that recycled resin for all reporting facilities. As with the MRF data sets, only the weighted average data sets can be shown in order to protect the confidentiality of individual facility data sets. Assumptions and calculations are described in Modeling Constants and the supporting documentation.

UNCERTAINTY ESTIMATION
No uncertainty estimations were included.

## Review details
The LCI study was conducted by Franklin Associates, Ltd. and sponsored jointly by NAPCOR, the American Chemistry Council (ACC), the Association of Postconsumer Plastic Recyclers (APR), and the PET Resin Association (PETRA). Using life cycle inventory (LCI) methodology, the study determines and quantifies the energy requirements, solid wastes, and atmospheric and waterborne emissions for the processes required to collect postconsumer PET and HDPE packaging, sort and separate the material, and reprocess it into clean recycled resin. The data has had a partial critical review by internal parties.

## Intended application
"Accounting, with system-external interactions" - The intended application is a purely descriptive accounting / documentation of the analysed system including existing interactions with other systems in the LCI model.

## Project
LIFE CYCLE INVENTORY OF 100% POSTCONSUMER HDPE AND PET RECYCLED RESIN FROM POSTCONSUMER CONTAINERS AND PACKAGING PREPARED FOR THE PLASTICS DIVISION OF THE AMERICAN CHEMISTRY COUNCIL, INC. THE ASSOCIATION OF POSTCONSUMER PLASTIC RECYCLERS (APR), THE NATIONAL ASSOCIATION FOR PET CONTAINER RESOURCES (NAPCOR), AND THE PET RESIN ASSOCIATION (PETRA) BY FRANKLIN ASSOCIATES, A DIVISION OF ERG PRAIRIE VILLAGE, KANSAS JANUARY 19, 2011.

## Sources
- Franklin Associates (2011) LCI HDPE & PET Recycled Resin
