# Electricity, at eGrid, RFCW, 2008

Dataset: openLCA process, unit process
Category: 22: Utilities/2211: Electric Power Generation, Transmission and Distribution
Geography: Northern America
Time period: 2007-12-31 to 2007-12-31
Allocation method: no allocation
Generated by: Alberta Carpenter
Published in: Chris Goemans, Athena Institute
restrictionsDescription: All information can be accessed by everybody.
copyright: false

## General comment
The methodology used to put together the grid information is outlined in reference 1.

## Technology
Typical

## Geography
RFC West electricity grid to include Indiana, Ohio, West Virginia, and portions of Illinois, Michigan, Minnesota, Kentucky, West Virginia, Maryland and Pennsylvania.

## Reference product
- Electricity, at grid [RNA]: 1 kWh

## Inputs from technosphere
- Electricity, hydropower, at power plant, unspecified: 0.00621682 kWh
  Hydroelectric WAT – Water (Conventional, Pumped Storage)
- Electricity, tire derived fuel, at power plant: 8.28124e-5 kWh
  Solid Renewable Fuels (Biomass) TDF - tires, tire derived fuel
- Electricity, biomass, solid, biogenic MSW, at power plant: 0.00035228 kWh
  Solid Renewable Fuels (Biomass) MSB – Municipal Solid Waste – Biogenic Component
- Electricity, bituminous coal, at power plant [RNA]: 0.00875087 kWh
  Bituminous Coal WC
- Electricity, diesel, at power plant [RNA]: 1.84818e-7 kWh
  Petroleum (DFO) JF - jet fuel
- Electricity, at wind power plant, unspecified: 0.00197005 kWh
  Wind
- Electricity, MSW, non-biogenic, at power plant: 0.000276793 kWh
  Other Fuels MSN – Other (Batteries, Chemicals, Coke Breeze, Hydrogen, Pitch, Sulfur, Tar Coal, and miscellaneous technologies)
- Electricity, biomass, gas, landfill, at power plant: 0.00211112 kWh
  Gaseous Renewable Fuels (Biomass) LFG - landfill gas
- Electricity, biomass, gas, unspecified, at power plant: 5.5854e-7 kWh
  Gaseous Renewable Fuels (Biomass) OBG – Other Biomass Gases (Digester Gas, Methane, and other biomass gases)
- Electricity, biomass, at power plant [RNA]: 0.000812436 kWh
  Solid Renewable Fuels (Biomass) WDS – Wood/Wood Waste Solids (Paper Pellets, Railroad Ties, Utility Poles, Wood Chips, and other wood solids)
- Electricity, biomass,liquid, unspecified, at power plant: 0.00151163 kWh
  Liquid Renewable Fuels (Biomass) BLQ - black liquor
- Electricity, biomass, liquid, sludge, at power plant: 2.72271e-5 kWh
  Liquid Renewable Fuels (Biomass) SLW - sludge waste
- Electricity, other fuels, unspecified, at power plant: 2.63035e-5 kWh
  Other Fuels OTH – Other (Batteries, Chemicals, Coke Breeze, Hydrogen, Pitch, Sulfur, Tar Coal, and miscellaneous technologies)
- Electricity, other gases, unspecified, at power plant: 0.00150498 kWh
  Other Gases OG – Other Gas (Butane, Coal Processes, Coke-Oven, Refinery, and other processes)
- Electricity, bituminous coal, at power plant [RNA]: 0.000222889 kWh
  Bituminous Coal SC - Coal Synfuel. Coal-based solid fuel that has been processed by a coal synfuel plant, and coal-based fuels such as briquettes, pellets, or extrusions, which are formed from fresh or recycled coal and binding materials.
- Electricity, other fuels, unspecified, at power plant: 0.000572299 kWh
  Other Fuels WH – Waste heat not directly attributed to a fuel source. Note that WH should only be reported where the fuel source for the waste heat is undetermined, and for combined cycle steam turbines that are not supplementary fired
- Electricity, nuclear, at power plant [RNA]: 0.182418 kWh
  Nuclear Fission – NUC Nuclear (Uranium, Plutonium, Thorium)
- Electricity, diesel, at power plant [RNA]: 0.00139717 kWh
  Petroleum (DFO) – Distillate Fuel Oil (includes all Diesel and No. 1, No. 2, and No. 4 Fuel Oils)
- Electricity, other gases, unspecified, at power plant: 1.72296e-7 kWh
  Other Gases PG - propane
- Electricity, residual fuel oil, at power plant [RNA]: 2.4011e-5 kWh
  Petroleum (RFO) – Residual Fuel Oil (includes No. 5 and No. 6 Fuel Oils and Bunker C Fuel Oil)
- Electricity, other gases, unspecified, at power plant: 0.00394835 kWh
  Other Gases BFG - blast furnace gas
- Electricity, natural gas, at power plant [RNA]: 0.0241086 kWh
  Natural Gas
- Electricity, bituminous coal, at power plant [RNA]: 0.174704 kWh
  Subbituminous Coal
- Electricity, biomass,solid, unspecified, at power plant: 1.61378e-5 kWh
  Solid Renewable Fuels (Biomass) OBS – Other Biomass Solid (Animal Manure and Waste, Solid By-products, and other solid biomass not specified)
- Electricity, petroleum coke, at power plant: 0.00197549 kWh
  Petroleum (Other Fossil) PC - petroleum coke
- Electricity, petroleum, waste oil, at power plant: 1.40379e-5 kWh
  Petroleum (Other Fossil) WO – Waste/Other Oil (including Crude Oil, Liquid Butane, Liquid Propane, Oil Waste, Re-Refined Motor Oil, Sludge Oil, Tar Oil, or other petroleum-based liquid wastes)
- Electricity, bituminous coal, at power plant [RNA]: 0.586955 kWh
  Bituminous Coal BIT - Anthracite Coal, and Bituminous Coal.

## Sampling procedure
based on EIA electricity reports for all power plants in the US.

## Sources
- USEPA
- EIA
- EIA
- Statistics Canada
- EIA
- EIA
- International Energy Agency
- US DOE
- unspecified
- EIA
- Statistics Canada
- EIA
- EIA
- Chris Goemans, Athena Institute
- USEPA
- EIA
- EIA
- EIA
- Statistics Canada
- Statistics Canada
- Statistics Canada
- Statistics Canada
- EIA
- US DOE
