# Switchgrass, ground and stored, 2022

Dataset: openLCA process, unit process
Category: 11: Agriculture, Forestry, Fishing and Hunting/1151: Support Activities for Crop Production
Geography: Northern America
Time period: 2009-12-31 to 2099-12-31
Allocation method: no allocation
Generated by: Daniel Inman
Published in: Hsu, D.
restrictionsDescription: All information can be accessed by everybody.
copyright: false

## Technology
future

## Geography
North America

## Time period
2010

## Reference product
- Switchgrass, ground and stored [RNA]: 1000 kg; = 1.0*1000; provider Switchgrass, carted, 2022

## Inputs from technosphere
- Corn wet mill, gluten drying, AP-42 [RNA]: 50 kg
- Agricultural machinery, general, production: 0.9 kg
- Grinding [RNA]: 970.03 kg; = 0.97003*1000
- Conveyor belt, at plant: 3.4747e-5 m
  conveyor for grinder in-feed system
- Dried roughage store, non ventilated: 9.5711e-8 m3
- Electricity, at grid [RNA]: 63.928 kWh; provider Electricity, at Grid, US, 2010
  Electricity needed for dust collection: Proxy: Electricity, medium voltage, at grid/US with US electricity U.
- Fodder loading, by self-loading trailer: 2.2653 m3
  loading to storage
- Switchgrass, carted [RNA]: 1330 kg; = 1.33*1000; provider Switchgrass, carted, 2022
  comes in wet
- Loading bales: 1.43 Item(s)
  loading bales for grinder. Calculation of number of bales comes from 2000 lbs of corn stover divided by weight per bale. Trailer volume is 2511 ft^3 (INL table 4-5), density is 12 lbs/ft^3 dry (=20 wet at 40% moisture).

## Emissions to nature
- Water [emission, air, troposphere, rural]: 333 kg
  water dried per ton of final moisture corn stover.

## Sources
- Jacobson, J.J.
- Hsu, D.
- Hess, J.
