# Polyethylene, high density, HDPE, virgin resin, at plant

Dataset: openLCA process, unit process
Category: 31-33: Manufacturing/3252: Resin, Synthetic Rubber, and Artificial and Synthetic Fibers and Filaments Manufacturing
Geography: Northern America
Time period: 2014-12-30 to 2016-12-29
Allocation method: no allocation
Data quality: US EPA - Process Pedigree Matrix (4;1)
Generated by: Franklin Associates, A Division of ERG
Owner: American Chemistry Council
Reviewer: Franklin Associates, A Division of ERG
Published in: Franklin Associates (2020) Cradle-to-Gate LCA of HDPE
restrictionsDescription: These U.S. LCI Database Project data ("Data") are provided by the National Renewable Energy Laboratory ("NREL"), operated by the Alliance for Sustainable Energy, LLC ("Alliance") for the US Department of Energy ("DOE") under Contract No. DE-AC36-08GO28308. The United States Government (the "Government") retains and the user acknowledges that the Government retains a non-exclusive, paid-up, irrevocable, worldwide license to publish or reproduce the published form of these data, or allow others to do so, for Government purposes.
Access to and use of these Data shall impose the following obligations on the user, as set forth in this Agreement. The user is granted the right, without any fee or cost, to use, copy, modify, alter, enhance and distribute these Data for any purpose whatsoever, provided that this entire notice appears in all copies of the Data. Any modification, alteration or enhancement of these data shall be identified and documented by the user. Further, the user agrees to credit the DOE/NREL/Alliance in any publication that results from the use of these Data. The names DOE/NREL/Alliance, however, may not be used in any advertising or publicity to endorse or promote any products or commercial entities unless specific written permission is obtained from DOE/NREL/Alliance. The user also understands that DOE/NREL/Alliance is not obligated to provide the user with any support, consulting, training or assistance of any kind with regard to the use of these Data or to provide the user with any updates, revisions or new versions of these Data.
YOU AGREE TO INDEMNIFY THE GOVERNMENT AND DOE/NREL/ALLIANCE, AND ITS SUBSIDIARIES, AFFILIATES, OFFICERS, AGENTS, AND EMPLOYEES AGAINST ANY CLAIM OR DEMAND, INCLUDING REASONABLE ATTORNEYS' FEES, RELATED TO YOUR USE OF THESE DATA. THESE DATA ARE PROVIDED BY DOE/NREL/ALLIANCE "AS IS" AND ANY EXPRESS OR IMPLIED WARRANTIES, INCLUDING BUT NOT LIMITED TO, THE IMPLIED WARRANTIES OF MERCHANTABILITY AND FITNESS FOR A PARTICULAR PURPOSE ARE DISCLAIMED. IN NO EVENT SHALL THE GOVERNMENT OR DOE/NREL/ALLIANCE BE LIABLE FOR ANY SPECIAL, INDIRECT OR CONSEQUENTIAL DAMAGES OR ANY DAMAGES WHATSOEVER, INCLUDING BUT NOT LIMITED TO CLAIMS ASSOCIATED WITH THE LOSS OF DATA OR PROFITS, WHICH MAY RESULT FROM AN ACTION IN CONTRACT, NEGLIGENCE OR OTHER TORTIOUS CLAIM THAT ARISES OUT OF OR IN CONNECTION WITH THE ACCESS, USE OR PERFORMANCE OF THESE DATA.
copyright: false

## General comment
Includes material and energy requirements and environmental emissions for one kilogram of High-density polyethylene (HDPE) virgin resin production at the plant only (gate to gate). The HDPE resin is commonly polymerized in low pressure reactors. The three main reactor types used are gas-phase, slurry loop, and solution reactors. Only the gas-phase and slurry loop reactors were stated as the representative technology by the data providers. Normally a combination of Phillips, Ziegler-Natta and/or metallocene catalysts are required during the process. The metal mining and processing for titanium (ZN catalyst) and chromium and silica gel used in the Phillips catalyst were included.

## Technology
All data providers used the low pressure technology and either the gas-phase or slurry loop reactors with either a Phillips or a Ziegler catalyst.

## Geography
For the HDPE resin primary data, companies were requested to provide data for the year 2015, the most recent full year of HDPE resin production prior to the project initiation date. Companies providing data were given the option to collect data from the year preceding or following 2015 if either year would reflect more typical production conditions. Four companies provided data for the year 2015, and one company provided data for the year 2016. After reviewing individual company data in comparison to the average, each manufacturer verified data from 2015-2016 was representative of an average year for HDPE resin production at their company.

The geographic scope of the analysis is the manufacture of HDPE resin in North America. All HDPE resin data collected were from plants in the United States and Canada and incoming materials were modeled using North American databases such as the U.S. LCI database, ecoinvent (adapted to US conditions), and Franklin Associates’ private database.

## Time period
All primary data were collected from 2015-2016

## Reference product
- Polyethylene, high density, HDPE, virgin resin, at plant: 1 kg

## By-products
- Disposal, solid waste to incineration with energy recovery: 3.6e-6 kg
  Non hazardouse waste

## Inputs from technosphere
- Transport, train, diesel powered [RNA]: 0.0045 t*km
- Electricity, at grid [RNA]: 1.116 MJ; provider Electricity, at Grid, US, 2010
- Transport, pipeline, natural gas [RNA]: 0.022 t*km
- Residual fuel oil, at refinery [RNA]: 1.1e-6 m3; provider Petroleum refining, at refinery
- Ethylene, at plant, kg: 0.983 kg; provider Ethylene, materials production, organic compound, at plant, kg
  The Ethylene amount includes amounts for Butene and Hexene-1, as well as ancillary materials Isobutane and isopentane. Ethylene is used as surrogate for these inputs.
- Silica sand, at mine: 0.000221 kg
  Silica (as a gel) is a raw material for Phillips catalyst. Individual companies provided information about their Phillips Catalyst.
- Nitrogen, liquid, at plant: 0.102 kg
- Titanium: 3.75e-6 kg
  This is titanium from the Ziegler-Natta Catalyst. Individual companies provided information about their ZN Catalyst.
- Cyclohexane, production: 0.00048 kg
  Ecoinvent data, adapted for US
- Natural gas, combusted in industrial boiler [RNA]: 0.028 m3
- Transport, combination truck, diesel powered [RNA]: 3.5e-5 t*km
- Hydrogen, liquid, synthesis gas, at plant [RNA]: 0.0018 kg
- Electricity, at cogen, for natural gas turbine [US]: 0.2952 MJ
- Chromium, at regional storage: 2.16e-6 kg
  This is chromium from Phillips catalyst. Individual companies provided information on how much Chromium in each of their Phillips Catalyst.
- Transport, barge, diesel powered [RNA]: 0.0026 t*km

## Inputs from nature
- Water [resource, water]: 1.4 kg

## Waste to treatment
- Disposal, solid waste, process, to sanitary landfill: 0.00038 kg
  Non hazardouse waste
- Disposal, hazardous waste, to incineration without energy recovery: 4e-5 kg
- Recycling, solid waste, to recycling or reuse: 0.0133 kg
  Non hazardous waste
- Recycling, hazardous waste, to recovery: 1.5e-6 kg
- Disposal, hazardous waste, to unspecified hazardous waste landfill: 1.3e-5 kg
- Disposal, solid waste, to incineration without energy recovery: 7.2e-5 kg
  Non hazardous waste
- Disposal, hazardous waste, to incineration with energy recovery: 0.00023 kg

## Emissions to nature
- Ethylene [emission, air]: 0.00013 kg
- Sulfur oxides [emission, air]: 1.6e-6 kg
- 2-Methylbutane [emission, air]: 1e-6 kg
  Isopentane. This data was reported by fewer than three companies. To indicate known emissions while protecting the confidentiality of individual company responses, the emission is reported only by order of magnitude.
- Heptane [emission, air]: 1e-7 kg
- Suspended solids, inorganic [emission, water]: 3.5e-5 kg
- Zinc [emission, water]: 7.4e-8 kg
- Butane [emission, air]: 1e-7 kg
  This data was reported by fewer than three companies. To indicate known emissions while protecting the confidentiality of individual company responses, the emission is reported only by order of magnitude.
- Orthophosphate [emission, water]: 1e-10 kg
  Phosphates. This data was reported by fewer than three companies. To indicate known emissions while protecting the confidentiality of individual company responses, the emission is reported only by order of magnitude.
- Octane [emission, air]: 1e-6 kg
  (same comment as for Butane)
- Chemical Oxygen Demand [emission, water]: 1e-5 kg
  (same comment as for Butane)
- Toluene [emission, water]: 1e-9 kg
  (same comment as for Butane)
- 1-Hexene [emission, air]: 1e-5 kg
  (same comment as for Butane)
- Dodecane [emission, air]: 1e-7 kg
  (same comment as for Butane)
- Total Organic Carbon [emission, water]: 1e-5 kg
- Iron [emission, water]: 1e-6 kg
  (same comment as for Butane)
- Biological Oxygen Demand [emission, water]: 5.1e-6 kg
- Particulate matter, ≤ 2.5μm [emission, air]: 6.9e-6 kg
- Isobutane [emission, air]: 1e-5 kg
  (same comment as for Butane)
- Neem oil [emission, water, fresh water body]: 3.5e-6 kg
- Pentane [emission, air]: 1e-7 kg
  (same comment as for Butane)
- Hexane [emission, air]: 1e-6 kg
  (same comment as for Butane)
- Isopropanol [emission, air]: 1e-6 kg
  (same comment as for Butane)
- Methane [emission, air]: 0.00064 kg
- Hydrocarbons [emission, air]: 5.6e-6 kg
  (same comment as for Butane)
- Cyanide [emission, water]: 1e-9 kg
  (same comment as for Butane)
- Carbon dioxide [emission, air]: 0.037 kg
- Phenol [emission, water]: 1e-9 kg
  (same comment as for Butane)
- Aluminum [emission, water]: 1.7e-6 kg
- Heptane [emission, air]: 1e-7 kg
  (same comment as for Butane)
- Propane [emission, air]: 1e-7 kg
  (same comment as for Butane)
- 1-Octene [emission, air]: 1e-7 kg
  (same comment as for Butane)
- Isobutene [emission, air, troposphere, urban, low]: 1e-7 kg
  Isobutylene. This data was reported by fewer than three companies. To indicate known emissions while protecting the confidentiality of individual company responses, the emission is reported only by order of magnitude.
- Decane [emission, air]: 1e-7 kg
  (same comment as for Butane)
- Sulfide [emission, water]: 1e-8 kg
  (same comment as for Butane)
- Ethane [emission, air]: 1e-6 kg
  (same comment as for Butane)
- Hydrocarbons [emission, air, troposphere, rural]: 6.2e-5 kg
- Nitrogen oxides [emission, air]: 4e-5 kg
- Nitrous oxide [emission, air]: 3.2e-8 kg
- Carbon monoxide [emission, air]: 0.00017 kg
- Mercury [emission, water]: 1e-12 kg
  (same comment as for Butane)
- Total dissolved solids [emission, water]: 0.0001 kg
  (same comment as for Butane)
- Particulate matter, > 2.5μm and ≤ 10μm [emission, air]: 1.7e-5 kg
- Phenyl ether [emission, air, troposphere, urban, ground-level]: 1e-7 kg
  Diphenyl oxide. This data was reported by fewer than three companies. To indicate known emissions while protecting the confidentiality of individual company responses, the emission is reported only by order of magnitude.
- Propylene [emission, air]: 1e-6 kg
  (same comment as for Butane)
- Fluoride [emission, water]: 1e-9 kg
  (same comment as for Butane)
- Cyclohexane [emission, air]: 1e-5 kg
  (same comment as for Butane)
- Naphthalene [emission, air]: 1e-11 kg
  (same comment as for Butane)
- Ammonia [emission, water]: 1e-10 kg
  (same comment as for Butane)
- Dissolved Organic Carbon [emission, water]: 0.0001 kg
  (same comment as for Butane)
- Lead [emission, water]: 1e-9 kg
  (same comment as for Butane)
- Copper [emission, water]: 1e-9 kg
  (same comment as for Butane)
- Nickel [emission, water]: 1e-9 kg
  (same comment as for Butane)
- Arsenic [emission, water]: 1e-8 kg
  (same comment as for Butane)
- 1-Butene [emission, air]: 1e-6 kg
  (same comment as for Butane)
- Phosphorus [emission, water]: 1e-7 kg
  (same comment as for Butane)
- Particulate matter [emission, air]: 3.6e-6 kg
- Chromium [emission, water]: 1e-8 kg
  (same comment as for Butane)
- 2-Methylpentane [emission, air]: 1e-7 kg
  (same comment as for Butane)
- Biphenyl [emission, air]: 1e-7 kg
  (same comment as for Butane)

## Allocation factors
- causal, Polyethylene, high density, HDPE, virgin resin, at plant, for Ammonia: 1
- causal, Disposal, solid waste to incineration with energy recovery, for Silica sand, at mine: 0
- causal, Polyethylene, high density, HDPE, virgin resin, at plant, for Orthophosphate: 1
- causal, Polyethylene, high density, HDPE, virgin resin, at plant, for Cyclohexane: 1
- causal, Polyethylene, high density, HDPE, virgin resin, at plant, for Phosphorus: 1
- causal, Disposal, solid waste to incineration with energy recovery, for Suspended solids, inorganic: 0
- causal, Disposal, solid waste to incineration with energy recovery, for Cyclohexane, production: 0
- causal, Disposal, solid waste to incineration with energy recovery, for Isobutane: 0
- causal, Disposal, solid waste to incineration with energy recovery, for Electricity, at cogen, for natural gas turbine: 0
- causal, Disposal, solid waste to incineration with energy recovery, for Methane: 0
- causal, Disposal, solid waste to incineration with energy recovery, for Heptane: 0
- causal, Polyethylene, high density, HDPE, virgin resin, at plant, for Isobutene: 1
- causal, Polyethylene, high density, HDPE, virgin resin, at plant, for Dissolved Organic Carbon: 1
- causal, Disposal, solid waste to incineration with energy recovery, for Disposal, hazardous waste, to incineration with energy recovery: 0
- causal, Disposal, solid waste to incineration with energy recovery, for Chemical Oxygen Demand: 0
- causal, Polyethylene, high density, HDPE, virgin resin, at plant, for Biological Oxygen Demand: 1
- causal, Disposal, solid waste to incineration with energy recovery, for Sulfide: 0
- causal, Polyethylene, high density, HDPE, virgin resin, at plant, for Cyclohexane, production: 1
- causal, Disposal, solid waste to incineration with energy recovery, for Propane: 0
- causal, Polyethylene, high density, HDPE, virgin resin, at plant, for Hydrocarbons: 1
- causal, Polyethylene, high density, HDPE, virgin resin, at plant, for Zinc: 1
- causal, Polyethylene, high density, HDPE, virgin resin, at plant, for Sulfide: 1
- causal, Polyethylene, high density, HDPE, virgin resin, at plant, for Lead: 1
- causal, Disposal, solid waste to incineration with energy recovery, for Iron: 0
- causal, Disposal, solid waste to incineration with energy recovery, for Disposal, solid waste, to incineration without energy recovery: 0
- causal, Polyethylene, high density, HDPE, virgin resin, at plant, for Electricity, at grid: 1
- causal, Disposal, solid waste to incineration with energy recovery, for Recycling, solid waste, to recycling or reuse: 0
- causal, Disposal, solid waste to incineration with energy recovery, for Hydrogen, liquid, synthesis gas, at plant: 0
- causal, Disposal, solid waste to incineration with energy recovery, for Cyanide: 0
- causal, Disposal, solid waste to incineration with energy recovery, for Disposal, solid waste, process, to sanitary landfill: 0
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
## Inventory method
Attributional; Compatible with TRACI

## Modelling constants
LCI data for the production of HDPE resin were collected from five producers in North America. Four companies provided data for the year 2015, and one company provided data for the year 2016. After reviewing individual company data in comparison to the average, each manufacturer verified data from 2015-2016 was representative of an average year for HDPE resin production at their company. Mass allocation was used to allocate all inputs and outputs to each product and co-products.

## Completeness
Data evaluation procedures and criteria were applied consistently to all primary data provided by the participating producers for all data collected. All primary data obtained specifically for this study were considered the most representative available for the systems studied. Data sets were reviewed for completeness and material balances, and follow-up was conducted as needed to resolve any questions about the input and output flows, process technology, etc. The aggregated averaged datasets were also reviewed by the providing companies as compared to the provided dataset. Companies were requested to review whether their data were complete and to comment about their or the average dataset.

## Data selection
All HDPE production data was sourced from primary producers.

## Data treatment
A weighted average was calculated from the data collected and used to develop the LCA model. Small amounts (less than 1 percent of total output) of off-spec/scrap resin and isomers are produced as coproducts during this process and sold. A mass basis was used to allocate out the credit for the coproduct off-spec/scrap resin; thus, this inventory represents only the primary (i.e., virgin resin) produced. The average HDPE datasets were reviewed and accepted respectively by each HDPE data provider.

## Sampling procedure
BOUNDARY CONDITIONS: The system boundary includes manufacturing of HDPE resin at the plant, including incoming transportation for each material.
DATA COLLECTION: The primary data for the life cycle inventory of the production of HDPE, were collected from five producers located in the United States and Canada in 2015-2016. A weighted average was calculated from the data collected and used to develop the LCA model. For this process the data sets are based on actual plant data reported by plant personnel. Supporting background data were drawn from credible, widely used databases including the US LCI database, GREET, and Ecoinvent.
UNCERTAINTY ESTIMATION: Primary data collected from actual facilities are considered the best available data for representing industry operations. In this study, primary data were used to model the HDPE production. All data received were carefully evaluated before compiling the production-weighted average data sets used to generate results. No uncertainty analysis was carried out due to the lack of uncertainty data or probability distributions for key parameters, which are often only available as single point estimates from the producers.

## Review details
Some ACC members reviewed the data and associated report. Internal review of data entry proofreading, mass balance verification and data documentation was also carried out.

## Intended application
"Accounting, with system-external interactions" - The intended application is a purely descriptive accounting / documentation of the analysed system including existing interactions with other systems in the LCI model. These data are an update to a previously published dataset which is a generic unit process data.

## Project
These data are an update to a previously published dataset which is a generic unit process data.; Cradle-to-Resin Life Cycle Analysis of High-Density Polyethylene Resin. Submitted to the American Chemistry Council (ACC). 2020 (currently draft form)

## Sources
- Franklin Associates (2020) ACC Olefins
