# Anthracite coal, combusted in industrial boiler

Dataset: openLCA process, unit process
Category: 22: Utilities/2213: Water, Sewage and Other Systems
Geography: Northern America
Allocation method: no allocation
Generated by: Jeff Hernbloom
Published in: Franklin Associates (2003) Anthracite Combustion Industrial Boilers
restrictionsDescription: All information can be accessed by everybody.
copyright: false

## General comment
In cases where industrial boiler data were not available, utility boiler data were adjusted accordingly.,
Important note: although most of the data in the US LCI database has
undergone some sort of review, the database as a whole has not yet
undergone a formal validation process.
Please email comments to lci@nrel.gov.

## Geography
North America

## Reference product
- Anthracite coal, combusted in industrial boiler [RNA]: 1 kg

## Inputs from technosphere
- Transport, combination truck, average fuel mix [RNA]: 0.17381 t*km
  Represents transportation from coal production/processing to industrial boiler.
- Anthracite coal, at mine [RNA]: 1 kg
- Disposal, anthracite coal combustion byproducts, to unspecified reuse: 0.0136 kg
- Disposal, solid waste, unspecified, to unspecified treatment: 0.010649 kg
- Transport, train, diesel powered [RNA]: 1.036 t*km
  Represents transportation from coal production/processing to industrial boiler.

## Emissions to nature
- Carbon monoxide [emission, air]: 0.00068043 kg
- Naphthalene [emission, air]: 6.5e-5 kg
  Sources for PAH data are old or unverifiable. Use this PAH data with caution.
- Particulate matter [emission, air]: 0.003224 kg
- Acrolein [emission, air]: 4.392e-9 kg
- Formaldehyde [emission, air]: 6.6461e-6 kg
- Phenanthrene [emission, air]: 3.4e-6 kg
  Sources for PAH data are old or unverifiable. Use this PAH data with caution.
- Selenium [emission, air]: 6.5e-7 kg
- Cadmium [emission, air]: 4.9278e-8 kg
- Volatile organic compounds [emission, air]: 6.8487e-5 kg
- Sulfur dioxide [emission, air]: 0.045449 kg
- Arsenic [emission, air]: 1.0256e-7 kg
- Particulate matter, > 2.5μm and ≤ 10μm [emission, air]: 0.00045399 kg
- Mercury [emission, air]: 6.6584e-7 kg
- Chromium [emission, air]: 7.034e-6 kg
- Nitrogen oxides [emission, air]: 0.0071206 kg
- PAH/POM, unspecified [emission, air, indoor]: 1.0914e-6 kg
- Manganese [emission, air]: 9.5626e-7 kg
- Carbon dioxide [emission, air]: 2.84 kg
- Nickel [emission, air]: 6.6041e-6 kg
- Hydrofluoric acid [emission, air]: 0.00049642 kg
- Beryllium [emission, air]: 8.001e-8 kg
- Lead [emission, air]: 2.8662e-6 kg
- Acetaldehyde [emission, air]: 3.6778e-7 kg
- Benzene [emission, air]: 9.4685e-5 kg
- Suspended solids, inorganic [emission, water]: 2.1828e-6 kg
- Biphenyl [emission, air]: 1.25e-5 kg
  Sources for PAH data are old or unverifiable. Use this PAH data with caution.
- Methane [emission, air]: 2e-5 kg

## Sources
- Franklin Associates (2003) Estimate
- Speight
- DOE
- EPA
- unspecified
- EPA
- Franklin Associates (2003) Anthracite Combustion Industrial Boilers
- Minerals Yearbook
- EPA
- unspecified
- unspecified
- unspecified
- EPA
- EIA
