# Paper, mechanical, uncoated, average production, at mill

Dataset: openLCA process, unit process
Category: 31-33: Manufacturing/3221: Pulp, Paper, and Paperboard Mills
Geography: Northern America
Time period: 2005-12-31 to 2005-12-31
Allocation method: no allocation
Generated by: Caroline Gaudreault
Reviewer: Martha Stevenson
Published in: AF&PA (2010). Printing & Writing Papers LCA
restrictionsDescription: All information can be accessed by everybody.
copyright: false

## General comment
Uncoated Mechanical Paper, average North American production, at mill. By-products were allocated 0% of the impacts to enable the user to choose and apply their own allocation method more easily. All flows are production-weighted means. Data were developed for a full LCA that was critically reviewed. Reviewers were: • Martha Stevenson, Chairperson – Private Consultant to the public interest with ten years of experience in sustainability, environmental management, packaging and materials recovery; led the development of the Design Guidelines for Sustainable Packaging and the COMPASS software used to compare the environmental impacts of package designs; • Pascal Lesage – Life cycle assessment consultant, Researcher at École Polytechnique de Montréal [at the Inter-University Research Centre for the Life Cycle of Products, Processes and Services (CIRAIG) in Montreal]; and • Dale Phenicie, Environmental Affairs Consulting – Consultant with 35 years of experience in environmental protection and process consulting for the forest products industry. Has served on several U.S. EPA Task Forces dealing with water quality issues and authored several AF&PA Environmental, Health and Safety/Sustainability reports.

## Technology
current technology mix for uncoated mechanical

## Time period
Primary data collected from participating companies and associations for their operational activities are representative for 2006 and 2007.

## Reference product
- Paper, mechanical, uncoated, average production, at mill [RNA]: 861.83 kg
  861.83 dry kg is equal to 1 market-dried short ton (5% water).

## By-products
- Turpentine, at uncoated mechanical paper mill [RNA]: 0.27714 kg
  Produced as byproduct of pulp production. Sold i.e., not used on site. Allocation set to 0%.
- Tall oil, at uncoated mechanical paper mill [RNA]: 3.5743 kg
  (same comment as for Turpentine, at uncoated mechanical paper mill)
- Steam, at uncoated mechanical paper mill [RNA]: 238 MJ
  (same comment as for Turpentine, at uncoated mechanical paper mill)
- Electricity, at uncoated mechanical paper mill [RNA]: 65 kWh
  (same comment as for Turpentine, at uncoated mechanical paper mill)

## Inputs from technosphere
- Pulpwood; softwood; average; at forest road [US]: 0.212 m3; provider Pulpwood, softwood, average, at forest road, INW
  Mass of incoming southern softwood logs intended for pulping. Assumed density: 450 kg/m3. US LCI: "Softwood logs with bark, harvested at average intensity site, at mill, US SE/US" can be used but transportation needs to be removed as it is already included here. Wood usage in the process is distrubuted as follows: 66% ends up in pulp, 13% in self-generated hogged fuel and 22% in black liquor. All the hogged fuel is combusted onsite. Combustion of this fuel is important to the economic viability of all modern pulp mills. Substitution of other fuels for this fuel is not recommended. Need to be paired with "Self-generated hogged fuel, combusted in industrial boiler, at pulp and paper mill". Black liquor solides are combusted onsite as part of the pulping chemical recovery process that is integral to and is essential to the economic viability of all modern pulp mills. Substitution of other fuels for this fuel is not recommended.
- Electricity, at grid, ON: 265.74 kWh
- Electricity, at grid [RNA]: 369.81 kWh; provider Electricity, at Grid, US, 2010
  Net purchased, National average grid, Medium voltage: <50 kV
- Polypropylene, PP, virgin resin, at plant [RNA]: 1.016 kg
  Packaging material
- Old news paper: 144.24 kg
- Transport, train, diesel powered [RNA]: 68.619 t*km
  Transportation of chemicals. Kaolin: 1204 km. Dithionite and Hydrogen peroxide: 1088 km. Fatty acids and DTPA: 2438 km. Transports of fuels. Coal: 653 km. Residual fuel oil, Distillate fuel oil: 1114 km. Liquefied petroleum gas: 1246 km. Tire derived fuel: 1156 km.
- Soap stock, at plant [RNA]: 2.9756 kg; provider Soy oil, refined, at plant
  ei: Fatty acids, from vegetarian oil, at plant
- Mixed paper: 47.718 kg
- Pulpwood, softwood, average, at forest road [RNA]: 0.4818 m3; provider Pulpwood, softwood, average, at forest road, NE-NC
  Mass of incoming northern softwood logs (assumed 63.5% East/Central based on mill location) intended for pulping. Assumed density: 450 kg/m3. Wood usage in the process is distrubuted as follows: 66% ends up in pulp, 13% in self-generated hogged fuel and 22% in black liquor. All the hogged fuel is combusted onsite. Combustion of this fuel is important to the economic viability of all modern pulp mills. Substitution of other fuels for this fuel is not recommended. Need to be paired with "Self-generated hogged fuel, combusted in industrial boiler, at pulp and paper mill". Black liquor solides are combusted onsite as part of the pulping chemical recovery process that is integral to and is essential to the economic viability of all modern pulp mills. Substitution of other fuels for this fuel is not recommended.
- Disposal, solid waste, unspecified, to unspecified incinerator: 1.9323 kg
  Typically on-site with energy recovery.
- Pulp, deinked market, bleached, at mill: 26.943 kg
- Transport, ocean freighter, average fuel mix [RNA]: 4.1755 t*km
  Transportation of chemicals. Kaolin, Fatty acids, DTPA: 0 km. Dithionite and Hydrogen peroxide: 517 km. Transports of fuels. Residual fuel oil , Distillate fuel oil: 682 km. Kerosene and gasoline, Other fossil assumed to be diesel: 1183 km.
- Chips; softwood; green; at sawmill [US]: 434.36 kg
  Mass of incoming pulp chips intended for pulping. US LCI: "Pulp chips, at sawmill,US SE/kg" can be used as a proxy. The actual mix of chips is: northern softwood chips: 66%, northern hardwood chips: 18%, southern softwood chips: 11% and southern hardwood chips: 6%. Pulp chips usage in the process is distrubuted as follows: 75% ends up in pulp and 25% in black liquor. Combusted onsite as part of the pulping chemical recovery process that is integral to and is essential to the economic viability of all modern pulp mills. Substitution of other fuels for this fuel is not recommended.
- Transport, train, diesel powered [RNA]: 39.127 t*km
  Transport market pulp. Bleached kraft market pulp, Deinked bleached market pulp: 1452 km.
- Disposal, solid waste, unspecified, to unspecified beneficial use: 4.5359 kg
  Typically off-site.
- Old magazines: 35.471 kg
- Natural gas, combusted in industrial boiler [RNA]: 3.0658 m3
  Purchased steam, assumed to be natural gas.
- Core board, at plant: 3.3475 kg
  Packaging material
- Hot rolled sheet, steel, at plant [RNA]: 0.17962 kg
  Packaging material
- Transport, pipeline, natural gas [RNA]: 111 t*km
  Transports of fuels. Natural gas: 33584 tkm/MMcf, Average transportation for natural gas in North America according to the US LCI database
- DTPA: 0.80286 kg
  ei: DTPA, diethylenetriaminepentaacetic acid, at plant
- Disposal, unspecified ashes, to unspecified landfill: 10.251 kg
  Mix of wood and coal ashes. Based on typical ash contents can be assumed to be 78% from wood and 22% from coal. Typically company-owned, but some third party.
- Transport, barge, average fuel mix [RNA]: 30.513 t*km
  Transportation of chemicals. Kaolin, Fatty acids, DTPA: 0 km. Dithionite and Hydrogen peroxide: 489 km. Transports of fuels. Coal: 515 km. Residual fuel oil, Distillate fuel oil: 163 km. Kerosene and gasoline, Other fossil assumed to be diesel : 163 km. Tire derived fuel: 315 km.
- Transport, combination truck, average fuel mix [RNA]: 404.41 t*km
  Transportation of pulpwood and chips to pulp mill. Pulpwood: 200 km (rounded trip distance), chips: 254 km (rounded trip distance).
- Pulpwood; softwood; average; at forest road [US]: 0.1633 m3; provider Pulpwood, softwood, average, at forest road, INW
  Mass of incoming northern softwood logs (assumed 36.5% West based on mill location) intended for pulping. Assumed density: 450 kg/m3. Wood usage in the process is distrubuted as follows: 66% ends up in pulp, 13% in self-generated hogged fuel and 22% in black liquor. All the hogged fuel is combusted onsite. Combustion of this fuel is important to the economic viability of all modern pulp mills. Substitution of other fuels for this fuel is not recommended. Need to be paired with "Self-generated hogged fuel, combusted in industrial boiler, at pulp and paper mill". Black liquor solides are combusted onsite as part of the pulping chemical recovery process that is integral to and is essential to the economic viability of all modern pulp mills. Substitution of other fuels for this fuel is not recommended.
- Polyethylene, linear low-density, LLDPE, virgin resin, at plant: 0.08709 kg
  Packaging material
- Pulp slurry, sulfite, bleached, average production, at mill: 12.247 kg
- Transport, combination truck, average fuel mix [RNA]: 6.8327 t*km
  Transport market pulp. Bleached kraft market pulp, Deinked bleached market pulp: 256 km.
- Clay, at mine: 34.292 kg
  ei: Kaolin
- Sodium hydrosulfite: 13.154 kg
  ei: dithionite
- Pulp, kraft market, bleached, average production, at mill [RNA]: 22.317 kg
- Disposal, solid waste, unspecified, to unspecified land application: 6.187 kg
  Typically off-site agricultural/silvicultural
- Electricity, at grid, QC: 825.1 kWh
- Electricity from hydro: 57.5 kWh
  Generation at company facilities. Ei: Electricity, hydropower, at run-of-river power plant
- Disposal, solid waste, unspecified, to unspecified landfill: 28.395 kg
  Typically company-owned, but some third party.
- Pulpwood; hardwood; average; at forest road [US]: 0.07572 m3; provider Pulpwood, hardwood, average, at forest road, NE-NC
  Mass of incoming southern hardwood logs intended for pulping. Assumed density: 650 kg/m3. US LCI: "Roundwood, hardwood, green, at mill, SE/US" can be used but transportation needs to be removed as it is already included here. Wood usage in the process is distrubuted as follows: 66% ends up in pulp, 13% in self-generated hogged fuel and 22% in black liquor. All the hogged fuel is combusted onsite. Combustion of this fuel is important to the economic viability of all modern pulp mills. Substitution of other fuels for this fuel is not recommended. Need to be paired with "Self-generated hogged fuel, combusted in industrial boiler, at pulp and paper mill". Black liquor solides are combusted onsite as part of the pulping chemical recovery process that is integral to and is essential to the economic viability of all modern pulp mills. Substitution of other fuels for this fuel is not recommended.
- Disposal, wastewater treatment plant residuals, to uns. Incinerator: 16.057 kg
  Typically on-site with energy recovery. (uns. = unspecified)
- Transport, train, diesel powered [RNA]: 210.24 t*km
  Transportation of pulpwood and chips to pulp mill. Pulpwood: 375 km, chips: 127 km.
- Transport, combination truck, average fuel mix [RNA]: 1.9564 t*km
  Transport of packaging. Containerboard: 201 km. Core board: 369 km. Polypropylene and Polyethylene: 417 km. Steel: 257 km.
- Disposal, wastewater treatment plant residuals, to uns. land application: 20.412 kg
  Typically off-site agricultural/silvicultural. (uns. = unspecified)
- Fuels, burned at uncoated mechanical paper, average production, at mill [RNA]: 8061 MJ
  Includes all fuels burned on site
- Disposal, wastewater treatment plant residuals, to uns. landfill: 52.707 kg
  Typically company-owned, but some third party. (uns. = unspecified)
- Hydrogen peroxide: 9.979 kg
  ei: Hydrogen peroxide, 50% in H2O, at plant
- Containerboard, average production, at mill [US]: 8.0286 kg
  Packaging material
- Electricity, at grid, BC: 397.68 kWh
- Transport, combination truck, average fuel mix [RNA]: 9.1102 t*km
  Transportation of chemicals. Kaolin: 295 km. Dithionite and Hydrogen peroxide: 183 km. Fatty acids and DTPA: 272 km. Transports of fuels. Coal: 153 km. Residual fuel oil, Distillate fuel oil: 50 km. Liquefied petroleum gas, Kerosene and gasoline, Other fossil assumed to be diesel: 80 km. Tire derived fuel: 98 km.
- Transport, train, diesel powered [RNA]: 5.6647 t*km
  Transport of packaging. Containerboard: 1410 km. Core board: 1276 km. Polypropylene and Polyethylene: 1806 km. Steel: 1083 km.
- Pulp slurry, groundwood, bleached, average production, at mill: 13.789 kg

## Inputs from nature
- Water [resource, water]: 44029, 46162 kg (2 entries)
  Estimated based on individual mill process effluent and cooling water flows and process characteristics. Share between process and cooling estimated.

## Emissions to nature
- Ammonia [emission, air]: 0.019126 kg
  From process
- Mercury [emission, ground]: 5.84e-6 kg
  From onsite management of solid waste. All metals reported as elemental althought in most cases they are releases into metal compounds.
- Water [emission, air]: 1945 kg
  Estimated based on individual mill process effluent and cooling water flows and process characteristics. Share between process and cooling estimated. Includes evaporation and other losses (e.g., water in solid waste).
- Polycyclic aromatic hydrocarbons [emission, water]: 0.0020904 kg
  In effluent.
- Copper [emission, water]: 8.2065e-5 kg
  In effluent.
- Lead [emission, ground]: 0.0134 kg
  (same comment as for Mercury)
- Mercury [emission, water]: 2.5851e-8 kg
  In effluent.
- Ammonia [emission, water]: 0.018661 kg
  In effluent.
- Acetaldehyde [emission, ground]: 3.78e-7 kg
  (same comment as for Mercury)
- Lead [emission, water]: 9.2323e-6 kg
  In effluent.
- Acetaldehyde [emission, air]: 0.00406 kg
  From process
- Barium [emission, ground]: 0.0141 kg
  (same comment as for Mercury)
- Formaldehyde [emission, water]: 0.00091277 kg
  In effluent.
- Phosphorus [emission, water]: 0.041829 kg
  In effluent.
- 2,4,5-T [emission, water]: 45175 kg
  (same comment as for Water)
- Barium [emission, water]: 0.00096426 kg
  In effluent.
- Methanol [emission, air]: 0.14391 kg
  From process
- Phenol [emission, air]: 0.013932 kg
  From process
- Acetaldehyde [emission, water]: 0.00023835 kg
  In effluent.
- Arsenic [emission, water]: 5.1291e-5 kg
  In effluent.
- Polycyclic aromatic hydrocarbons [emission, ground]: 3e-6 kg
  (same comment as for Mercury)
- Nickel [emission, water]: 0.00018054 kg
  In effluent.
- Methanol [emission, water]: 0.0019571 kg
  In effluent.
- Zinc [emission, ground]: 0.00572 kg
  (same comment as for Mercury)
- Vanadium [emission, ground]: 0.000373 kg
  (same comment as for Mercury)
- Chromium [emission, water]: 4.5136e-5 kg
  In effluent.
- Nitrogen [emission, water]: 0.38885 kg
  In effluent.
- Suspended solids, inorganic [emission, water]: 2.3091 kg
  In effluent.
- Biological Oxygen Demand [emission, water]: 1.3825 kg
  In effluent.
- Chromium [emission, ground]: 0.00458 kg
  (same comment as for Mercury)
- Water [emission, water]: 44029 kg
  (same comment as for Water)
- Arsenic [emission, ground]: 0.000728 kg
  (same comment as for Mercury)
- Adsorbable organic halides [emission, water]: 0.020062 kg
  In effluent.
- Nickel [emission, ground]: 0.00196 kg
  (same comment as for Mercury)
- Phenol [emission, water]: 7.5818e-6 kg
  In effluent.
- Manganese [emission, water]: 0.0064011 kg
  In effluent.
- Copper [emission, ground]: 0.00623 kg
  (same comment as for Mercury)
- Manganese [emission, ground]: 0.0807 kg
  (same comment as for Mercury)
- Zinc [emission, water]: 0.0050367 kg
  In effluent.
- Ammonia [emission, ground]: 0.00339 kg
  (same comment as for Mercury)

## Allocation factors
- causal, Steam, at uncoated mechanical paper mill, for Nickel: 0
- causal, Steam, at uncoated mechanical paper mill, for Water: 0
- causal, Electricity, at uncoated mechanical paper mill, for Pulpwood; hardwood; average; at forest road: 0
- causal, Turpentine, at uncoated mechanical paper mill, for Transport, train, diesel powered: 0
- causal, Paper, mechanical, uncoated, average production, at mill, for Lead: 1
- physical, Steam, at uncoated mechanical paper mill: 0
- causal, Paper, mechanical, uncoated, average production, at mill, for Core board, at plant: 1
- causal, Electricity, at uncoated mechanical paper mill, for Arsenic: 0
- causal, Tall oil, at uncoated mechanical paper mill, for Pulpwood; hardwood; average; at forest road: 0
- causal, Turpentine, at uncoated mechanical paper mill, for Containerboard, average production, at mill: 0
- causal, Steam, at uncoated mechanical paper mill, for Mercury: 0
- causal, Electricity, at uncoated mechanical paper mill, for Mercury: 0
- causal, Paper, mechanical, uncoated, average production, at mill, for Mercury: 1
- causal, Tall oil, at uncoated mechanical paper mill, for Zinc: 0
- causal, Turpentine, at uncoated mechanical paper mill, for Pulp slurry, sulfite, bleached, average production, at mill: 0
- causal, Tall oil, at uncoated mechanical paper mill, for Barium: 0
- causal, Turpentine, at uncoated mechanical paper mill, for Electricity, at grid, BC: 0
- causal, Tall oil, at uncoated mechanical paper mill, for Acetaldehyde: 0
- causal, Turpentine, at uncoated mechanical paper mill, for Transport, train, diesel powered: 0
- causal, Turpentine, at uncoated mechanical paper mill, for Manganese: 0
- causal, Electricity, at uncoated mechanical paper mill, for Barium: 0
- causal, Electricity, at uncoated mechanical paper mill, for Chips; softwood; green; at sawmill: 0
- causal, Steam, at uncoated mechanical paper mill, for Electricity, at grid: 0
- causal, Paper, mechanical, uncoated, average production, at mill, for Electricity, at grid, QC: 1
- causal, Electricity, at uncoated mechanical paper mill, for Disposal, wastewater treatment plant residuals, to uns. landfill: 0
- causal, Steam, at uncoated mechanical paper mill, for Nitrogen: 0
- causal, Paper, mechanical, uncoated, average production, at mill, for Formaldehyde: 1
- causal, Electricity, at uncoated mechanical paper mill, for Nickel: 0
- causal, Turpentine, at uncoated mechanical paper mill, for Polycyclic aromatic hydrocarbons: 0
- causal, Paper, mechanical, uncoated, average production, at mill, for Phenol: 1
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
## Sampling procedure
The survey included results from 8 paper mills representing 1.7 million short tons per year (TPY), nearly 61% of 2006/2007 North American production volume.

## Sources
- AF&PA (2010). Printing & Writing Papers LCA
