# Transport, single unit truck, short-haul, diesel powered, Northeast

Dataset: openLCA process, unit process
Category: 48-49: Transportation and Warehousing/4841: General Freight Trucking
Geography: Northern America
Time period: 2009-12-31 to 2009-12-31
Allocation method: no allocation
Generated by: Nathan Hardesty
Published in: U.S. Environmental Protection Agency (EP
restrictionsDescription: All information can be accessed by everybody.
copyright: false

## General comment
This dataset represents the Northeast U.S. (ME, NH, VT, MA, RI, CT, NY, PA, NJ, MD, DE, DC (Reference 11)) average airborne emissions for operating a diesel powered, single unit truck in a short-haul manner (trips less than 200 miles [322 km]). The inventory includes all vehicle operation processes, including off-network and refueling activities.
The refinery-to-pump transportation and distribution data are calculated from Argonne National Laboratory's GREET 1.8d.1 model.
The vehicle operation data are calculated from EPA's MOVES2010a model, using the assumptions described in the corresponding detailed spreadsheet. Emissions factors in MOVES2010a are largely based on EPA's Mobile Source Observation Database, which in turn includes data from a variety of vehicle studies (References 7-9).
MOVES2010a acknowledges sources of uncertainty in the model structure, the population and acitivty data, and other model parameters. As of July 2011, the uncertainty calculation function of the model has not been activated.

## Technology
Combustion of diesel in a single unit, short-haul truck.

## Geography
US

## Reference product
- Transport, single unit truck, short-haul, diesel powered [RNA]: 1 t*km

## Inputs from technosphere
- Transport, train, diesel powered [RNA]: 0.0609167 t*km
- Diesel, at refinery: 0.101265 l; provider Petroleum refining, at refinery
- Transport, combination truck, average fuel mix [RNA]: 0.0326435 t*km
- Transport, barge, average fuel mix [RNA]: 0.0315739 t*km
- Transport, pipeline, unspecified petroleum products [RNA]: 0.329035 t*km
- Transport, ocean freighter, average fuel mix [RNA]: 0.223164 t*km

## Emissions to nature
- Particulate matter, ≤ 2.5μm [emission, air]: 7.4979e-5 kg
  PM2.5 from organic carbon, elemental carbon, and sulfate particulates.
- Particulate matter, ≤ 10μm [emission, air]: 7.72949e-5 kg
  PM10 from organic carbon, elemental carbon, and sulfate particulates.
- Methane [emission, air]: 8.79767e-6 kg
- Particulate matter, ≤ 2.5μm [emission, air]: 4.45834e-6 kg
  PM2.5 from brakewear.
- Carbon dioxide [emission, air]: 0.265872 kg
- Nitrogen oxides [emission, air]: 0.00148704, 0.00133472 kg (2 entries)
- Particulate matter, ≤ 10μm [emission, air]: 1.70309e-5 kg
  PM10 from brakewear.
- Hydrocarbons [emission, air]: 0.00016238 kg
- Particulate matter, ≤ 10μm [emission, air]: 3.24176e-6 kg
  PM10 from tirewear.
- Nitrogen dioxide [emission, air]: 0.000152325 kg
- Ammonia [emission, air]: 5.99009e-6 kg
- Carbon monoxide [emission, air]: 0.000692609 kg
- Particulate matter, ≤ 2.5μm [emission, air]: 7.774e-7 kg
  PM2.5 from tirewear.
- Sulfur dioxide [emission, air]: 4.35473e-6 kg
- Volatile organic compounds [emission, air]: 0.000167574 kg
- Nitrous oxide [emission, air]: 7.96585e-7 kg

## Sources
- Wang, M.
- Assessment and Standards Division, Offic
- EPA
- National Climatic Data Center, National
- Transportation Characteristics Branch, U
- Assessment and Standards Division, Offic
- Alam & Rajamanickam (2007). Development of TPEF
- U.S. Environmental Protection Agency (EP
- Eastern Research Group
- National Institute of Standards and Tech
- U.S. Alternative Fuels and Advanced Vehi
