# Electricity, at Grid, RFC, 2008

Dataset: openLCA process, unit process
Category: 22: Utilities/2211: Electric Power Generation, Transmission and Distribution
Geography: Northern America
Time period: 2007-12-31 to 2007-12-31
Allocation method: no allocation
Generated by: Alberta Carpenter
Published in: Chris Goemans, Athena Institute
restrictionsDescription: All information can be accessed by everybody.
copyright: false

## General comment
The methodology used to put together the grid information is outlined in reference 1.

## Technology
Typical

## Geography
Delaware, District of Columbia, Indiana, Maryland, New Jersey, Ohio, Pennsylvania and West Virginia and parts of Kentucky, Michigan, Tennessee, Virginia and Wisconsin.

## Reference product
- Electricity, at grid [RNA]: 1 kWh

## Inputs from technosphere
- Electricity, diesel, at power plant [RNA]: 0.00175648 kWh
  DFO – Distillate Fuel Oil (includes all Diesel and No. 1, No. 2, and No. 4 Fuel Oils)
- Electricity, biomass, liquid, sludge, at power plant: 1.96498e-5 kWh
  SLW – Sludge Waste
- Electricity, other gases, unspecified, at power plant: 9.40406e-7 kWh
  PG – Propane
- Electricity, bituminous coal, at power plant [RNA]: 0.17125 kWh
  SUB – Subbituminous Coal
- Electricity, bituminous coal, at power plant [RNA]: 0.000130982 kWh
  SC - Coal Synfuel. Coal-based solid fuel that has been processed by a coal synfuel plant, and coal-based fuels such as briquettes, pellets, or extrusions, which are formed from fresh or recycled coal and binding materials.
- Electricity, natural gas, at power plant [RNA]: 0.0650016 kWh
  NG – Natural Gas
- Electricity, other fuels, unspecified, at power plant: 0.000335774 kWh
  WH – Waste heat not directly attributed to a fuel source. Note that WH should only be reported where the fuel source for the waste heat is undetermined, and for combined cycle steam turbines that are not supplementary fired
- Electricity, other gases, unspecified, at power plant: 0.00163968 kWh
  OG – Other Gas (Butane, Coal Processes, Coke-Oven, Refinery, and other processes)
- Electricity, tire derived fuel, at power plant: 0.000262113 kWh
  TDF – Tired (tire derived fuel)
- Electricity, diesel, at power plant [RNA]: 1.20372e-7 kWh
  JF – Jet Fuel
- Electricity, diesel, at power plant [RNA]: 0.000144816 kWh
  KER – Kerosene
- Electricity, petroleum, waste oil, at power plant: 7.63697e-5 kWh
  WO – Waste/Other Oil (including Crude Oil, Liquid Butane, Liquid Propane, Oil Waste, Re-Refined Motor Oil, Sludge Oil, Tar Oil, or other petroleum-based liquid wastes)
- Electricity, solar, unspecified, at power plant: 2.82885e-6 kWh
  SUN – Solar (Photovoltaic, Thermal)
- Electricity, bituminous coal, at power plant [RNA]: 0.454456 kWh
  BIT - Anthracite Coal, and Bituminous Coal.
- Electricity, MSW, non-biogenic, at power plant: 0.00165075 kWh
  MSN – Municipal Solid Waste – Non-biogenic components
- Electricity, biomass,solid, unspecified, at power plant: 9.46824e-6 kWh
  OBS – Other Biomass Solid (Animal Manure and Waste, Solid By-products, and other solid biomass not specified)
- Electricity, nuclear, at power plant [RNA]: 0.267504 kWh
  NUC – Nuclear (Uranium, Plutonium, Thorium)
- Electricity, biomass,liquid, unspecified, at power plant: 0.00110143 kWh
  BLQ – Black Liquor
- Electricity, biomass,liquid, unspecified, at power plant: 9.40125e-7 kWh
  OBL – Other Biomass Liquid (Ethanol, Fish Oil, Liquid Acetonitrile Waste, Medical Waste, Tall Oil, Waste Alcohol, and other Biomass not specified)
- Electricity, petroleum coke, at power plant: 0.00151893 kWh
  PC – Petroleum Coke
- Electricity, bituminous coal, at power plant [RNA]: 0.0122399 kWh
  WC - Waste/Other Coal (Anthracite Culm, Bituminous Gob, Fine Coal, Lignite Waste, Waste Coal) .
- Electricity, biomass, solid, biogenic MSW, at power plant: 0.00210095 kWh
  MSB – Municipal Solid Waste – Biogenic Component
- Electricity, biomass, at power plant [RNA]: 0.00176126 kWh
  WDS – Wood/Wood Waste Solids (Paper Pellets, Railroad Ties, Utility Poles, Wood Chips, and other wood solids)
- Electricity, hydropower, at power plant, unspecified: 0.00634425 kWh
  WAT – Water (Conventional, Pumped Storage)
- Electricity, residual fuel oil, at power plant [RNA]: 0.000798231 kWh
  RFO – Residual Fuel Oil (includes No. 5 and No. 6 Fuel Oils and Bunker C Fuel Oil)
- Electricity, biomass, gas, unspecified, at power plant: 2.28925e-6 kWh
  OBG – Other Biomass Gases (Digester Gas, Methane, and other biomass gases)
- Electricity, biomass, gas, landfill, at power plant: 0.0027297 kWh
  LFG – Landfill Gas
- Electricity, at wind power plant, unspecified: 0.00411452 kWh
  WND – Wind
- Electricity, other gases, unspecified, at power plant: 0.00291564 kWh
  BFG – Blast Furnace Gas
- Electricity, other fuels, unspecified, at power plant: 0.000130886 kWh
  OTH – Other (Batteries, Chemicals, Coke Breeze, Hydrogen, Pitch, Sulfur, Tar Coal, and miscellaneous technologies)

## Sampling procedure
based on EIA electricity reports for all power plants in the US.

## Sources
- USEPA
- EIA
- EIA
- Statistics Canada
- EIA
- EIA
- International Energy Agency
- US DOE
- unspecified
- EIA
- Statistics Canada
- EIA
- EIA
- Chris Goemans, Athena Institute
- USEPA
- EIA
- EIA
- EIA
- Statistics Canada
- Statistics Canada
- Statistics Canada
- Statistics Canada
- EIA
- US DOE
