# Transport, combination truck, diesel powered

Dataset: openLCA process, unit process
Category: 48-49: Transportation and Warehousing/4841: General Freight Trucking
Geography: Northern America
Time period: 2000-12-31 to 2000-12-31
Allocation method: no allocation
Generated by: Franklin Associates
Published in: Franklin Associates (2003) Diesel Truck Transport
restrictionsDescription: All information can be accessed by everybody.
copyright: false

## General comment
Important note: although most of the data in the US LCI database has
undergone some sort of review, the database as a whole has not yet
undergone a formal validation process.
Please email comments to lci@nrel.gov.

## Technology
Combustion of diesel in a combination truck

## Geography
United States

## Reference product
- Transport, combination truck, diesel powered [RNA]: 1 t*km

## Inputs from technosphere
- Diesel, at refinery: 0.027224 l; provider Petroleum refining, at refinery

## Emissions to nature
- Volatile organic compounds [emission, air]: 2.6292e-5 kg
- Particulate matter, ≤ 10μm [emission, air]: 9.1907e-6 kg
- Nitrogen oxides [emission, air]: 0.00053228 kg
- Sulfur oxides [emission, air]: 1.759e-5 kg
- Carbon monoxide [emission, air]: 0.00012696 kg
- Nitrous oxide [emission, air]: 1.9932e-6 kg
- Carbon dioxide [emission, air]: 0.079876 kg
- Methane [emission, air]: 1.2883e-6 kg

## Sources
- Franklin Associates (2003) Diesel Truck Transport
- Center for Transportation Research, Argo
- unspecified
