# Enzyme, Alpha-amylase, Novozyme Liquozyme

Dataset: openLCA process, unit process
Category: 31-33: Manufacturing/3251: Basic Chemical Manufacturing
Geography: Europe
Time period: 2003-12-31 to 2003-12-31
Allocation method: no allocation
Generated by: Daniel Inman
Published in: P.H. Nielsen
restrictionsDescription: All information can be accessed by everybody.
copyright: false

## General comment
from Figure 3 - values recieved from Novozyme.

## Technology
current

## Time period
2004

## Reference product
- Enzyme, Alpha-amylase, Novozyme Liquozyme [RER]: 1 kg

## Inputs from technosphere
- Transformation, from pasture and meadow: 0.3 m2
- Transformation, to industrial area: 0.3 m2

## Inputs from nature
- Coal [resource, ground, subterranean]: 14 MJ
  Data is fossil energy. Assumed it was all coal. This number does not affect the GHG emissions. This number is just for energy.
- Water [resource, water, subterranean]: 12 kg

## Emissions to nature
- Orthophosphate [emission, ground]: 0.0066 kg
  phosphate equiv.
- Ethylene [emission, air]: 0.0005 kg
  C2H4 eq
- Sulfur dioxide [emission, air]: 0.0014 kg
  SO2 eq
- Carbon dioxide [emission, air]: 1.2 kg
  CO2 eq

## Sources
- Hsu, D.
- P.H. Nielsen
