# Enzyme, Cellulase, Novozyme Celluclast

Dataset: openLCA process, unit process
Category: 31-33: Manufacturing/3251: Basic Chemical Manufacturing
Geography: Europe
Time period: 2003-12-31 to 2003-12-31
Allocation method: no allocation
Generated by: Daniel Inman
Published in: P.H. Nielsen
restrictionsDescription: All information can be accessed by everybody.
copyright: false

## General comment
based on Figure B. Values recieved from Novozyme. Inventory in terms of equivalents.

## Technology
current

## Time period
2004

## Reference product
- Enzyme, Cellulase, Novozyme Celluclast [RER]: 1 kg

## Inputs from technosphere
- Transformation, from pasture and meadow: 0.72264 m2
- Transformation, to industrial area: 0.72264 m2

## Inputs from nature
- Coal [resource, ground, subterranean]: 52.076 MJ
  Data is fossil energy. Assumed it was all coal. This number does not affect the GHG emissions. This number is just for energy.
- Water [resource, water, subterranean]: 20.852 kg

## Emissions to nature
- Ethylene [emission, air]: 0.0020044 kg
  This is C2H4 eq.
- Carbon dioxide [emission, air]: 4.0894 kg
  this is CO2 eq.
- Orthophosphate [emission, ground]: 0.0093655 kg
  this is phosphate equiv.
- Sulfur dioxide [emission, air]: 0.015277 kg
  this is SO2 eq.

## Sources
- Hsu, D.
- P.H. Nielsen
