# Transport, single unit truck, diesel powered

Dataset: openLCA process, unit process
Category: 48-49: Transportation and Warehousing/4841: General Freight Trucking
Geography: Northern America
Time period: 2000-12-31 to 2000-12-31
Allocation method: no allocation
Generated by: Franklin Associates
Published in: Franklin Associates (2003) Single Unit Diesel Truck
restrictionsDescription: All information can be accessed by everybody.
copyright: false

## General comment
Important note: although most of the data in the US LCI database has
undergone some sort of review, the database as a whole has not yet
undergone a formal validation process.
Please email comments to lci@nrel.gov.

## Technology
Combustion of diesel in a single-unit truck.

## Geography
United States

## Reference product
- Transport, single unit truck, diesel powered [RNA]: 1 t*km

## Inputs from technosphere
- Diesel, at refinery: 0.058338 l; provider Petroleum refining, at refinery

## Emissions to nature
- Carbon monoxide [emission, air]: 0.00024568 kg
- Particulate matter, ≤ 10μm [emission, air]: 2.3537e-5 kg
- Nitrogen oxides [emission, air]: 0.0012188 kg
- Nitrous oxide [emission, air]: 6.1875e-6 kg
- Carbon dioxide [emission, air]: 0.17111 kg
- Sulfur oxides [emission, air]: 3.7693e-5 kg
- Methane [emission, air]: 4.1257e-6 kg
- Volatile organic compounds [emission, air]: 8.4198e-5 kg

## Sources
- Center for Transportation Reasearch, Arg
- Franklin Associates (2003) Single Unit Diesel Truck
- unspecified
