# Transport, combination truck, gasoline powered

Dataset: openLCA process, unit process
Category: 48-49: Transportation and Warehousing/4841: General Freight Trucking
Geography: Northern America
Time period: 2000-12-31 to 2000-12-31
Allocation method: no allocation
Generated by: Franklin Associates
Published in: Franklin Associates (2003) Diesel Truck Transport
restrictionsDescription: All information can be accessed by everybody.
copyright: false

## General comment
Important note: although most of the data in the US LCI database has
undergone some sort of review, the database as a whole has not yet
undergone a formal validation process.
Please email comments to lci@nrel.gov.

## Technology
Represents current technologies for combination truck transport.

## Geography
United States

## Reference product
- Transport, combination truck, gasoline powered [RNA]: 1 t*km

## Inputs from technosphere
- Gasoline, at refinery: 0.027224 l

## Emissions to nature
- Particulate matter, ≤ 10μm [emission, air]: 1.4809e-6 kg
- Nitrogen oxides [emission, air]: 0.00033825 kg
- Nitrous oxide [emission, air]: 1.7964e-6 kg
- Methane [emission, air]: 8.8995e-6 kg
- Carbon monoxide [emission, air]: 0.0012282 kg
- Carbon dioxide [emission, air]: 0.061826 kg
- Volatile organic compounds [emission, air]: 5.5285e-5 kg
- Sulfur oxides [emission, air]: 1.4759e-5 kg

## Sources
- Franklin Associates (2003) Diesel Truck Transport
- Center for Transportation Research, Argo
- unspecified
