# Electricity, at eGrid, AZNM, 2008

Dataset: openLCA process, unit process
Category: 22: Utilities/2211: Electric Power Generation, Transmission and Distribution
Geography: Northern America
Time period: 2007-12-31 to 2007-12-31
Allocation method: no allocation
Generated by: Alberta Carpenter
Published in: Chris Goemans, Athena Institute
restrictionsDescription: All information can be accessed by everybody.
copyright: false

## General comment
The methodology used to put together the grid information is outlined in reference 1.

## Technology
Typical

## Geography
Southwest US (Arizona and New Mexico and small portions of southern California, southern Nevada and western Texas. )

## Reference product
- Electricity, at grid [RNA]: 1 kWh

## Inputs from technosphere
- Electricity, biomass, at power plant [RNA]: 0.0026748 kWh
  WDS – Wood/Wood Waste Solids (Paper Pellets, Railroad Ties, Utility Poles, Wood Chips, and other wood solids)
- Electricity, petroleum coke, at power plant: 1.37404e-5 kWh
  Petroleum (Other Fossil) PC – Petroleum Coke
- Electricity, nuclear, at power plant [RNA]: 0.183563 kWh
- Electricity, diesel, at power plant [RNA]: 0.000387065 kWh
  Petroleum (DFO) - Distillate Fuel Oil (includes all Diesel and No. 1, No. 2, and No. 4 Fuel Oils)
- Electricity, other gases, unspecified, at power plant: 1.24718e-5 kWh
  Other Gases OG – Other Gas (Butane, Coal Processes, Coke-Oven, Refinery, and other processes)
- Electricity, at wind power plant, unspecified: 8.02643e-6 kWh
- Electricity, natural gas, at power plant [RNA]: 0.420785 kWh
- Electricity, geothermal, unspecified: 0.0244416 kWh
- Electricity, solar, unspecified, at power plant: 0.00107147 kWh
  Solar (Photovoltaic, Thermal)
- Electricity, biomass, gas, landfill, at power plant: 0.000119549 kWh
  Gaseous Renewable Fuels (Biomass) LFG - Landfill Gas
- Electricity, biomass, gas, unspecified, at power plant: 0.000143214 kWh
  Gaseous Renewable Fuels (Biomass) OBG – Other Biomass Gases (Digester Gas, Methane, and other biomass gases)
- Electricity, hydropower, at power plant, unspecified: 0.059673 kWh
- Electricity, bituminous coal, at power plant [RNA]: 0.171311 kWh
  subbituminous coal
- Electricity, other fuels, at power plant, unspecified: 1.91342e-5 kWh
  Other Fuels WH - Waste Heat

## Sampling procedure
based on EIA electricity reports for all power plants in the US.

## Sources
- USEPA
- EIA
- EIA
- Statistics Canada
- EIA
- EIA
- International Energy Agency
- US DOE
- unspecified
- EIA
- Statistics Canada
- EIA
- EIA
- Chris Goemans, Athena Institute
- USEPA
- EIA
- EIA
- EIA
- Statistics Canada
- Statistics Canada
- Statistics Canada
- Statistics Canada
- EIA
- US DOE
