# Aluminum, primary, smelt, at plant

Dataset: openLCA process, unit process
Category: 31-33: Manufacturing/3313: Alumina and Aluminum Production and Processing
Geography: Northern America
Time period: 1997-12-31 to 1997-12-31
Allocation method: no allocation
Generated by: James Littlefield, Franklin Associates
Published in: Franklin Associates, A Division of ERG (2007) LCI Primary Aluminum
restrictionsDescription: All information can be accessed by everybody.
copyright: false

## General comment
Smelting is the reduction of refined alumina to metallic aluminum by the electrolytic separation of aluminum from its oxide. The process is carried out in a long series of electrolytic cells carrying direct current. The alumina is dissolved in a molten bath of cryolite (an electrolyte) and aluminum fluoride (which increases the conductivity of the electrolyte). These chemicals are assumed to be recovered with little or no loss, and therefore negligible inputs of these materials are assumed for this LCI. Carbon anodes carry the current to the solution, and on to the next cell. The anodes are consumed during the reaction at a rate of approximately 500 kg of material per 1,000 kg of aluminum produced. The principal products of the reaction are carbon dioxide, which is released as a gas, and elemental aluminum, which settles to the bottom of the cell and is periodically drained off.
Important note: although most of the data in the US LCI database has
undergone some sort of review, the database as a whole has not yet
undergone a formal validation process.
Please email comments to lci@nrel.gov.

## Technology
Series of electrolytic cells carrying direct current and immersed in cryolite and aluminum fluoride.

## Geography
North America

## Reference product
- Aluminum, primary, smelt, at plant [RNA]: 1000 kg

## Inputs from technosphere
- Residual fuel oil, combusted in industrial boiler [RNA]: 4.59 l
- Disposal, solid waste, unspecified, to unspecified treatment: 59.39 kg
- Electricity, aluminum smelting and ingot casting regions [RNA]: 15410 kWh
- Liquefied petroleum gas, combusted in industrial boiler [RNA]: 5.007 l
- Diesel, combusted in industrial boiler [RNA]: 1.836 l
- Anode, at plant [RNA]: 455 kg
- Gasoline, combusted in equipment [RNA]: 0.28374 l
- Natural gas, combusted in industrial boiler [RNA]: 7.616 m3
- Alumina, at plant [RNA]: 1930 kg

## Emissions to nature
- PAH/POM, unspecified [emission, air]: 0.00059 kg
- Cyanide [emission, water]: 0.0002 kg
- Particulate matter [emission, air]: 4.75 kg
- Carbon tetrafluoride [emission, air]: 0.3572 kg
- Sulfur oxides [emission, air]: 17 kg
- Sodium(I) [emission, water]: 0.0062 kg
- Hydrocarbons [emission, water]: 4.8e-6 kg
- Hydrochlorofluorocarbons [emission, air]: 0.06 kg
- Ammonium [emission, water]: 0.00057 kg
- Nitrogen oxides [emission, air]: 0.11 kg
- Carbon dioxide [emission, air]: 1520 kg
- Hexafluoroethane [emission, air]: 0.0228 kg
- Iron [emission, water]: 0.0022 kg
- Chloride [emission, water]: 0.00842 kg
- Chemical Oxygen Demand [emission, water]: 0.079 kg
- Dissolved Organic Carbon [emission, water]: 0.013 kg
- Mercury [emission, water]: 4e-7 kg
- Carbon monoxide [emission, air]: 66.9 kg
- Nitrogen [emission, water]: 0.00049 kg
- Lead [emission, water]: 4.6e-6 kg
- Hydrogen cyanide [emission, air]: 0.037 kg
- Carbonyl sulfide [emission, air]: 1.12 kg
- Phenol [emission, water]: 0.00018 kg
- Suspended solids, inorganic [emission, water]: 0.06 kg
- Metals [emission, water]: 0.0082 kg
- Biological Oxygen Demand [emission, water]: 0.0091 kg
- Volatile organic compounds [emission, air]: 0.91 kg
- Polycyclic aromatic hydrocarbons [emission, air]: 0.15 kg
- Hydrofluoric acid [emission, air]: 0.62 kg
- Chlorofluorocarbons [emission, air]: 0.06 kg
- Total dissolved solids [emission, water]: 0.076 kg
- Fluoride [emission, water]: 0.051 kg
- PAH/POM, unspecified [emission, air, indoor]: 0.0099 kg

## Sources
- US Geological Survey
- Energy Information Administration (EIA)
- IAI Statistical Report: Electrical Power
- The Aluminum Association
- US EPA
- Franklin Associates, A Division of ERG (2007) LCI Primary Aluminum
