# Rice, at field

Dataset: openLCA process, unit process
Category: 11: Agriculture, Forestry, Fishing and Hunting/1111: Oilseed and Grain Farming
Geography: Northern America
Time period: 1996-12-31 to 2000-12-31
Allocation method: no allocation
Generated by: Olivier Muller
Published in: USDA/National Agricultural Statistics Se
restrictionsDescription: All information can be accessed by everybody.
copyright: false

## General comment
Agricultural Crop Production, Harvested acres are 99% of the planted acres (1998-2000 US average).
The impacts of producing 1 kg of seed are assumed equal to those of producing 1kg of grain.
For Water, only consumptive use is taken into account (i.e. 60.7% of the total water consumption).
Important note: although most of the data in the US LCI database has
undergone some sort of review, the database as a whole has not yet
undergone a formal validation process.
Please email comments to lci@nrel.gov.

## Technology
US average

## Geography
USA

## Reference product
- Rice grain, at field [RNA]: 1 kg
  Planted surface (1), Production (1), Seeds (7)

## By-products
- Rice straw, at field [RNA]: 1.22 kg
  Residue to Crop Ratio (4), C N content of residues (4). Initially considered an output to nature (category Nature). Chaged to an unvalued coproduct by Pascal Lesage (12/07)

## Inputs from technosphere
- Transport, train, diesel powered [RNA]: 0.0399 t*km
  Transportation of fertilizers (400km)
- Electricity, at grid [RNA]: 0.0501 kWh; provider Electricity, at Grid, US, 2010
  Energy Consumption (7)
- Agrochemicals, at plant: 0.000921 kg
  Pesticides - consumption (19)
- Phosphorous fertilizer, production mix, at plant [RNA]: 0.00517 kg
  Fertilizers NPK (7)
- Quicklime, at plant [RNA]: 0.00689 kg
  Fertilizers Ca (9)
- Nitrogen fertilizer, production mix, at plant [RNA]: 0.0238 kg
  Fertilizers NPK (7)
- Transport, single unit truck, diesel powered [RNA]: 0.0163 t*km
  Transportation of fertilizers (200 km)
- Copper, at regional storage: 0.000161 kg
  Pesticides - consumption (19)
- Potash Fertilizer (K2O), at plant: 0.00448 kg
  Fertilizers NPK (7)
- Natural gas, combusted in industrial boiler [RNA]: 0.00537 m3
  Energy Consumption (7). Initially reported as MJ. Converted using the following factor: 38.0 MJ/m3.
- Liquefied petroleum gas, combusted in industrial boiler [RNA]: 0.00283 l
  Energy Consumption (7). Was initially reported as MJ. Converted using following factors: 50.3 MJ/kg, 1.85L/kg
- Diesel, combusted in industrial equipment [RNA]: 0.0486 l
  Farm tractor. Energy Consumption (7)

## Inputs from nature
- Water [resource, water, fresh water body, river]: 422000 kg
  Water consumption - consumptive use for irrigation and percent of water from surface/ground (5), Water consumption - area irrigated and depth of irrigation water applied (17)
- Carbon dioxide [resource, air]: -1.27 kg
  Carbon fixation through plant growth
- Land use [resource, ground, human-dominated, agricultural]: 0.0923, 0.123, 1.32 m2*a (3 entries)
  Planted surface (1), Tillage practices (7)
- Water [resource, water, subterranean]: 246000 kg
  (same comment as for Water)

## Emissions to nature
- Carbofuran [emission, water]: 2.35e-7 kg
  Pesticides - consumption (19), Pesticides - application method similar to corn, soybean, wheat cotton (11), Runoff of pesticide (14)
- Molinate [emission, air, troposphere, rural]: 7.08e-5 kg
  Pesticides - consumption (19), Pesticides - application method similar to corn, soybean, wheat cotton (11), Pesticide - air emission factors (12), Pesticide - vapor pressure (13)
- Glyphosate [emission, air, troposphere, rural]: 4.75e-6 kg
  (same comment as for Molinate)
- Paraquat [emission, air, troposphere, rural]: 1.43e-7 kg
  (same comment as for Molinate)
- Carbaryl [emission, air, troposphere, rural]: 1.6e-6 kg
  (same comment as for Molinate)
- Pendimethalin [emission, air, troposphere, rural]: 1.11e-5 kg
  (same comment as for Molinate)
- Paraquat [emission, water]: 6.13e-9 kg
  (same comment as for Carbofuran)
- Malathion [emission, air, troposphere, rural]: 2.6e-6 kg
  (same comment as for Molinate)
- Glyphosate [emission, water]: 2.03e-7 kg
  (same comment as for Carbofuran)
- Pendimethalin [emission, water]: 4.76e-7 kg
  (same comment as for Carbofuran)
- Carbofuran [emission, air, troposphere, rural]: 5.48e-6 kg
  (same comment as for Molinate)
- Nitrogen [emission, water]: 0.0029 kg
  Runoff/leaching of fertilizers (15)
- Molinate [emission, water]: 3.04e-6 kg
  (same comment as for Carbofuran)
- Hydrocarbons [emission, air, troposphere, rural]: 0.000553 kg
  Pesticides - consumption (19), Pesticides - application method similar to corn, soybean, wheat cotton (11)
- Bentazon [emission, air, troposphere, rural]: 2.47e-6 kg
  (same comment as for Molinate)
- Thiobencarb [emission, water]: 1.59e-6 kg
  (same comment as for Carbofuran)
- 2,4-D [emission, air, troposphere, rural]: 9.51e-6 kg
  (same comment as for Molinate)
- Propanil [emission, air, troposphere, rural]: 0.000155 kg
  (same comment as for Molinate)
- Carbaryl [emission, water]: 6.88e-8 kg
  (same comment as for Carbofuran)
- MCPA [emission, air, troposphere, rural]: 2.44e-6 kg
  (same comment as for Molinate)
- Nitrous oxide [emission, air, troposphere, rural]: 0.000743 kg
  Air emissions of CH4 and N2O and NH3 and NOx (4)
- Methyl parathion [emission, air, troposphere, rural]: 3.93e-6 kg
  (same comment as for Molinate)
- Nitrogen oxides [emission, air, troposphere, rural]: 0.00426 kg
  Air emissions of CH4 and N2O and NH3 and NOx (4)
- Suspended solids, inorganic [emission, water]: 1.07 kg
  Erosion (6)
- Phosphorus compounds [emission, water]: 3.05e-5 kg
  Runoff/leaching of fertilizers (15)
- Methane [emission, air, troposphere, rural]: 0.0446 kg
  Air emissions of CH4 and N2O and NH3 and NOx (4)
- Bentazon [emission, water]: 1.06e-7 kg
  (same comment as for Carbofuran)
- Ammonia [emission, air, troposphere, rural]: 0.00143 kg
  Air emissions of CH4 and N2O and NH3 and NOx (4)
- Carbon monoxide [emission, air, troposphere, rural]: 0.00722 kg
  Residue combustion - percent of residue burning per state (4)
- Malathion [emission, water]: 1.11e-7 kg
  (same comment as for Carbofuran)
- Methyl parathion [emission, water]: 1.68e-7 kg
  (same comment as for Carbofuran)
- Propanil [emission, water]: 6.65e-6 kg
  (same comment as for Carbofuran)
- 2,4-D [emission, water]: 4.08e-7 kg
  (same comment as for Carbofuran)
- Copper(I) [emission, water]: 2.41e-6 kg
  (same comment as for Carbofuran)
- MCPA [emission, water]: 1.05e-7 kg
  (same comment as for Carbofuran)
- Thiobencarb [emission, air, troposphere, rural]: 3.71e-5 kg
  (same comment as for Molinate)

## Allocation factors
- causal, Rice straw, at field, for Phosphorus compounds: 0
- causal, Rice grain, at field, for Land use: 1
- causal, Rice straw, at field, for Carbofuran: 0
- causal, Rice grain, at field, for Ammonia: 1
- causal, Rice grain, at field, for Bentazon: 1
- causal, Rice grain, at field, for Hydrocarbons: 1
- causal, Rice straw, at field, for Methyl parathion: 0
- causal, Rice straw, at field, for Paraquat: 0
- causal, Rice straw, at field, for Malathion: 0
- causal, Rice straw, at field, for Carbofuran: 0
- causal, Rice straw, at field, for Thiobencarb: 0
- causal, Rice grain, at field, for Quicklime, at plant: 1
- causal, Rice grain, at field, for Copper(I): 1
- causal, Rice straw, at field, for Hydrocarbons: 0
- causal, Rice grain, at field, for Suspended solids, inorganic: 1
- causal, Rice grain, at field, for Agrochemicals, at plant: 1
- causal, Rice grain, at field, for Nitrous oxide: 1
- causal, Rice straw, at field, for 2,4-D: 0
- causal, Rice grain, at field, for Nitrogen fertilizer, production mix, at plant: 1
- causal, Rice straw, at field, for Water: 0
- causal, Rice straw, at field, for Propanil: 0
- causal, Rice grain, at field, for Thiobencarb: 1
- causal, Rice grain, at field, for Carbon monoxide: 1
- causal, Rice straw, at field, for MCPA: 0
- causal, Rice grain, at field, for Water: 1
- causal, Rice straw, at field, for Copper, at regional storage: 0
- causal, Rice straw, at field, for Glyphosate: 0
- causal, Rice grain, at field, for Methyl parathion: 1
- causal, Rice straw, at field, for Natural gas, combusted in industrial boiler: 0
- causal, Rice grain, at field, for Diesel, combusted in industrial equipment: 1
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
## Sources
- U.S. EPA
- USDA/ERS
- U.S. EPA
- USDA/ERS
- USDA/NCRS
- National Center for Food and Agricultura
- USGS
- U.S. EPA
- USDA/National Agricultural Statistics Se
- USDA/ERS
- USDA/ERS
- USDA/ERS
- USDA/ERS
- Conservation Technology Information Cent
- USGS
- USDA/ERS
- USDA/NCRS
- U.S. EPA
- USDA/NRI
