# Natural gas, combusted in industrial boiler, at pulp and paper mill (EXCL.)

Dataset: openLCA process, unit process
Category: 31-33: Manufacturing/3221: Pulp, Paper, and Paperboard Mills
Geography: Northern America
Time period: 1997-12-31 to 2000-12-31
Allocation method: no allocation
Generated by: Caroline Gaudreault
Reviewer: Martha Stevenson
Published in: Franklin Associates (2003) Natural Gas Industrial Combustion
restrictionsDescription: All information can be accessed by everybody.
copyright: false

## General comment
This process was built to be used within the processes named "Fuels burned at bleached kraft market pulp mill", "Fuels burned at uncoated freesheet paper mill", "Fuels burned at coated freesheet paper mill", "Fuels burned at uncoated mechanical paper mill", "Fuels burned at coated mechanical paper mill" and "Fuels burned at bag and sack paper mill". It was built from the process named "Natural gas, combusted in industrial boiler" v.1.6 available in the US LCI database. Transport and waste processes were removed. The following emissions to air were excluded (excl.): Sulfur oxidesand Nitrogen oxides. These processes and emissions are reported in pulp and paper mill process chain in which this process is integrated.
Important note: although most of the data in the US LCI database has
undergone some sort of review, the database as a whole has not yet
undergone a formal validation process.
Please email comments to lci@nrel.gov.

## Technology
Natural gas combustion in average industrial boiler.

## Geography
United States

## Reference product
- Natural gas, combusted in industrial boiler, at pulp and paper mill (EXCL.) [RNA]: 1 m3; provider Natural gas, processed, for energy use, at plant

## Inputs from technosphere
- Natural gas, production mixture, to energy use: 1 m3; provider Natural gas, processed, for energy use, at plant

## Emissions to nature
- Cobalt [emission, air]: 1.3456e-9 kg
- Methane [emission, air]: 3.6017e-5 kg
- Cadmium [emission, air]: 1.762e-8 kg
- Benzene [emission, air]: 3.3639e-8 kg
- Formaldehyde [emission, air]: 1.2014e-6 kg
- Selenium [emission, air]: 3.8444e-10 kg
- Volatile organic compounds [emission, air]: 8.8405e-5 kg
- Arsenic [emission, air]: 3.2037e-9 kg
- Mercury [emission, air]: 4.1648e-9 kg
- Nitrous oxide [emission, air]: 3.6017e-5 kg
- Carbon dioxide [emission, air]: 1.96 kg
- Naphthalene [emission, air]: 9.7713e-9 kg
- Particulate matter, > 2.5μm and ≤ 10μm [emission, air]: 0.00012115 kg
- Lead [emission, air]: 8.0092e-9 kg
- Beryllium [emission, air]: 1.9222e-10 kg
- Chromium [emission, air]: 2.2426e-8 kg
- Nickel [emission, air]: 3.3639e-8 kg
- Radionuclides [emission, air]: 0.0034247 kBq
- Carbon monoxide [emission, air]: 0.0013457 kg
- Manganese [emission, air]: 6.087e-9 kg

## Sources
- U.S. EPA
- AF&PA (2010). Printing & Writing Papers LCA
- unspecified
- Franklin Associates (2003) Natural Gas Industrial Combustion
- EPA
- Center for Transportation Research, Argo
- U.S. EPA Office of Solid Waste and Emerg
