# Hydrogen, liquid, synthesis gas, at plant

Dataset: openLCA process, unit process
Category: 31-33: Manufacturing/3251: Basic Chemical Manufacturing
Geography: Northern America
Time period: 1992-12-31 to 2002-12-31
Allocation method: no allocation
Generated by: Franklin Associates
Published in: THE PLASTICS DIVISION OF THE AMERICAN C
restrictionsDescription: All information can be accessed by everybody.
copyright: false

## General comment
Hydrogen and carbon dioxide are coproducts in the production of synthesis gas. The data for hydrogen production are estimates of the synthesis gas production. Raw material inputs for hydrogen are based on the conversion of methane to carbon monoxide and hydrogen. The carbon dioxide emissions include those from the shift reaction as well as from the combustion of the portion of processed natural gas used as feedstock that becomes PSA offgas that is burned and used as process energy. Complete inventory data and metadata are available in full in the final report and appendices, Cradle-to-Gate Life Cycle Inventory of Nine Plastic Resins and Four Polyurethane Precursors. This report has been extensively reviewed within Franklin Associates and has undergone partial critical review by ACC Plastics Division members and is available at: www.americanchemistry.com. Quantities may vary slightly between the reference to main source and and this module due to rounding. Important note: although most of the data in the US LCI database has undergone some sort of review, the database as a whole has not yet undergone a formal validation process. Please email comments to lci@nrel.gov.

## Technology
Typical

## Geography
North America (US and Canada)

## Reference product
- Hydrogen, liquid, synthesis gas, at plant [RNA]: 1 kg; provider Natural gas, processed, for material use, at plant

## Inputs from technosphere
- Transport, train, diesel powered [RNA]: 0.00819 t*km
- Electricity, at grid [RNA]: 0.316 kWh; provider Electricity, at Grid, US, 2010
- Natural gas, production mixture, to material use: 2.91 kg; provider Natural gas, processed, for material use, at plant
  MATERIAL USE
- Transport, combination truck, diesel powered [RNA]: 0.0234 t*km
- Natural gas, combusted in industrial boiler [RNA]: 0.0703 m3
- Transport, pipeline, natural gas [RNA]: 0.0468 t*km

## Inputs from nature
- Water [resource, water]: 4.8 kg
  Mass of liquid water at room temperature.

## Emissions to nature
- Carbon monoxide [emission, air]: 0.0069 kg
- Total Organic Carbon [emission, air]: 0.0036 kg
- Carbon dioxide [emission, air]: 8 kg
  The carbon dioxide emissions include those from the shift reaction as well as from the combustion of the portion of processed natural gas used as feedstock that becomes PSA offgas that is burned and used as process energy.
- Sulfur oxides [emission, air]: 2.9e-5 kg

## Sampling procedure
Data are from secondary sources.

## Sources
- THE PLASTICS DIVISION OF THE AMERICAN C
