# Combustion, wet wood residue, AP-42

Dataset: openLCA process, unit process
Category: 22: Utilities/2213: Water, Sewage and Other Systems
Geography: Northern America
Time period: 1994-12-31 to 1994-12-31
Allocation method: no allocation
Generated by: Daniel Inman
restrictionsDescription: All information can be accessed by everybody.
copyright: false

## General comment
From EPA AP-42 document for External Combustion Sources: Wood Residue Combusition. http://www.epa.gov/ttn/chief/ap42/ch01/final/c01s06.pdf. Accessed May 2008.

Use background spreadsheet to pick "fluidized bed" as firing configuration, where available.

## Technology
current

## Geography
North America

## Reference product
- Combustion, wet wood residue, AP-42 [RNA]: 1055.87 MJ
  based on heat input (HHV)

## Emissions to nature
- Hydrochloric acid [emission, air]: 0.00861826 kg
- Nitrous oxide [emission, air]: 0.0058967 kg
- Sulfur dioxide [emission, air]: 0.00816466 kg
  wet wood-fired boiler, fluidized bed configuration
- Nitrogen oxides [emission, air]: 0.0725748 kg
  wet wood-fired boiler, fluidized bed configuration
- Organic compounds [emission, air]: 0.0176901 kg
- Particulate matter [emission, air]: 0.0453592 kg
  for fabric filter
- Particulate matter, ≤ 10μm [emission, air]: 0.0335658 kg
  for fabric filter
- Carbon monoxide [emission, air]: 0.0843682 kg
  wet wood-fired boiler, fluidized bed configuration
- Particulate matter, ≤ 2.5μm [emission, air]: 0.0294835 kg
  for fabric filter
- Methane [emission, air]: 0.00952544 kg
- Volatile organic compounds [emission, air]: 0.00771107 kg

## Sources
- Unknown
- Hsu, D.
- USEPA
