# Paper, freesheet, coated, average production, at mill

Dataset: openLCA process, unit process
Category: 31-33: Manufacturing/3221: Pulp, Paper, and Paperboard Mills
Geography: Northern America
Time period: 2005-12-31 to 2005-12-31
Allocation method: no allocation
Generated by: Caroline Gaudreault
Reviewer: Martha Stevenson
Published in: AF&PA (2010). Printing & Writing Papers LCA
restrictionsDescription: All information can be accessed by everybody.
copyright: false

## General comment
Coated Freesheet, average North American production, at mill. By-products were allocated 0% of the impacts to enable the user to choose and apply their own allocation method more easily. All flows are production-weighted means. Data were developed for a full LCA that was critically reviewed. Reviewers were: • Martha Stevenson, Chairperson – Private Consultant to the public interest with ten years of experience in sustainability, environmental management, packaging and materials recovery; led the development of the Design Guidelines for Sustainable Packaging and the COMPASS software used to compare the environmental impacts of package designs; • Pascal Lesage – Life cycle assessment consultant, Researcher at École Polytechnique de Montréal [at the Inter-University Research Centre for the Life Cycle of Products, Processes and Services (CIRAIG) in Montreal]; and • Dale Phenicie, Environmental Affairs Consulting – Consultant with 35 years of experience in environmental protection and process consulting for the forest products industry. Has served on several U.S. EPA Task Forces dealing with water quality issues and authored several AF&PA Environmental, Health and Safety/Sustainability reports.

## Technology
current technology mix for coated freesheet

## Time period
Primary data collected from participating companies and associations for their operational activities are representative for 2006 and 2007.

## Reference product
- Paper, freesheet, coated, average production, at mill [RNA]: 861.83 kg
  861.83 dry kg is equal to 1 market-dried short ton (5% water).

## By-products
- Electricity, at coated freesheet mill [RNA]: 65 kWh
  Produced as byproduct of pulp production. Sold i.e., not used on site. Allocation set to 0%.
- Tall oil, at coated freesheet mill [RNA]: 19.323 kg
  (same comment as for Electricity, at coated freesheet mill)
- Steam, at coated freesheet mill [RNA]: 38.8 MJ
  (same comment as for Electricity, at coated freesheet mill)
- Turpentine, at coated freesheet mill [RNA]: 1.4969 kg
  (same comment as for Electricity, at coated freesheet mill)

## Inputs from technosphere
- Core board, at plant: 3.3475 kg
  Packaging material
- Starch: 17.554 kg
  ei: Maize starch, at plant and/or Potato starch, at plant
- Transport, pipeline, natural gas [RNA]: 71.8 t*km
  Transports of fuels. Natural gas: 33584 tkm/MMcf, Average transportation for natural gas in North America according to the US LCI database
- Electricity, at grid [RNA]: 190.25, 102.89 kWh (2 entries); provider Electricity, at Grid, US, 2010
  Net purchased, National average grid, Medium voltage: <50 kV
- Transport, train, diesel powered [RNA]: 75.042 t*km
  Transport market pulp. Bleached kraft market pulp, Deinked bleached market pulp: 1452 km.
- Hot rolled sheet, steel, at plant [RNA]: 0.17962 kg
  Packaging material
- Calcium carbonate, ground, 20 micron, at plant [US]: 94.347 kg
  ei: Limestone, milled, loose, at plant
- Latex, at plant: 25.945 kg
  ei: Latex, at plant
- Sulfuric acid, at plant [RNA]: 2.3042 kg
- Transport, train, diesel powered [RNA]: 331.3 t*km
  Transportation of chemicals. Kaolin: 1204 km. Sodium chlorate, sulfuric acid, Hydrochloric acid, Titanium dioxide, Ground calcium carbonate, Precipitated calcium carbonate and Quicklime: 1088 km. Latex: 985 km. Starch: 1788 km. Sizers: 2438 km. Transports of fuels. Coal: 653 km. Residual fuel oil, Distillate fuel oil: 1114 km. Liquefied petroleum gas: 1246 km. Tire derived fuel: 1156 km.
- Transport, barge, average fuel mix [RNA]: 121.93 t*km
  Transportation of chemicals. Kaolin, Starch, Sizer and Latex: 0 km. Sodium chlorate, sulfuric acid, Hydrochloric acid, Titanium dioxide, Ground calcium carbonate, Precipitated calcium carbonate and Quicklime: 489 km. Transports of fuels. Coal: 515 km. Residual fuel oil, Distillate fuel oil: 163 km. Kerosene and gasoline, Other fossil assumed to be diesel : 163 km. Tire derived fuel: 315 km.
- Pulpwood; softwood; average; at forest road [US]: 0.0811 m3; provider Pulpwood, softwood, average, at forest road, INW
  Mass of incoming northern softwood logs (assumed 36.5% West based on mill location) intended for pulping. Assumed density: 450 kg/m3. Wood usage in the process is distrubuted as follows: 35% ends up in pulp, 23% in self-generated hogged fuel and 42% in black liquor. All the hogged fuel is combusted onsite. Combustion of this fuel is important to the economic viability of all modern pulp mills. Substitution of other fuels for this fuel is not recommended. Need to be paired with "Self-generated hogged fuel, combusted in industrial boiler, at pulp and paper mill". Black liquor solides are combusted onsite as part of the pulping chemical recovery process that is integral to and is essential to the economic viability of all modern pulp mills. Substitution of other fuels for this fuel is not recommended.
- Disposal, wastewater treatment plant residuals, to uns. land application: 14.878 kg
  Typically off-site agricultural/silvicultural. (uns. = unspecified)
- Precipitated calcium carbonate, at plant: 4.4679 kg
- Quicklime, at plant [RNA]: 22.518 kg
  For on site PCC
- Sodium chlorate: 20.003 kg
  ei: Sodium chlorate, powder, at plant
- Pulpwood; hardwood; average; at forest road [US]: 0.2219 m3; provider Pulpwood, hardwood, average, at forest road, NE-NC
  Mass of incoming southern hardwood logs intended for pulping. Assumed density: 650 kg/m3. US LCI: "Roundwood, hardwood, green, at mill, SE/US" can be used but transportation needs to be removed as it is already included here. Wood usage in the process is distrubuted as follows: 35% ends up in pulp, 23% in self-generated hogged fuel and 42% in black liquor. All the hogged fuel is combusted onsite. Combustion of this fuel is important to the economic viability of all modern pulp mills. Substitution of other fuels for this fuel is not recommended. Need to be paired with "Self-generated hogged fuel, combusted in industrial boiler, at pulp and paper mill". Black liquor solides are combusted onsite as part of the pulping chemical recovery process that is integral to and is essential to the economic viability of all modern pulp mills. Substitution of other fuels for this fuel is not recommended.
- Chips; softwood; green; at sawmill [US]: 435.09 kg
  Mass of incoming pulp chips intended for pulping. US LCI: "Pulp chips, at sawmill,US SE/kg" can be used as a proxy. The actual mix of chips is: northern softwood chips: 66%, northern hardwood chips: 18%, southern softwood chips: 11% and southern hardwood chips: 6%. Pulp chips usage in the process is distrubuted as follows: 45% ends up in pulp and 55% in black liquor. Combusted onsite as part of the pulping chemical recovery process that is integral to and is essential to the economic viability of all modern pulp mills. Substitution of other fuels for this fuel is not recommended.
- Transport, ocean freighter, average fuel mix [RNA]: 5.4541 t*km
  Transportation of chemicals. Kaolin, Starch, Sizer and Latex: 0 km. Sodium chlorate, sulfuric acid, Hydrochloric acid, Titanium dioxide, Ground calcium carbonate, Precipitated calcium carbonate and Quicklime: 517 km. Transports of fuels. Residual fuel oil , Distillate fuel oil: 682 km. Kerosene and gasoline, Other fossil assumed to be diesel: 1183 km.
- Polyethylene, linear low-density, LLDPE, virgin resin, at plant: 0.08709 kg
  Packaging material
- Clay, at mine: 104.78 kg
  ei: Kaolin
- Disposal, wastewater treatment plant residuals, to uns. beneficial use: 0.071849 kg
  Typically off-site. (uns. = unspecified)
- Polypropylene, PP, virgin resin, at plant [RNA]: 1.016 kg
  Packaging material
- Disposal, solid waste, unspecified, to unspecified incinerator: 0.17327 kg
  Typically on-site with energy recovery.
- Pulp slurry, kraft market, bleached, average production, at mill: 79.56 kg
- Disposal, solid waste, unspecified, to unspecified beneficial use: 16.874 kg
  Typically off-site.
- Disposal, wastewater treatment plant residuals, to uns. landfill: 15.876 kg
  Typically company-owned, but some third party. (uns. = unspecified)
- Transport, combination truck, average fuel mix [RNA]: 1.9564 t*km
  Transport of packaging. Containerboard: 201 km. Core board: 369 km. Polypropylene and Polyethylene: 417 km. Steel: 257 km.
- Disposal, unspecified ashes, to unspecified beneficial use: 3.0572 kg
  Mix of wood and coal ashes. Based on typical ash contents can be assumed to be 78% from wood and 22% from coal. Typically off-site.
- Disposal, wastewater treatment plant residuals, to uns. Incinerator: 16.239 kg
  Typically on-site with energy recovery. (uns. = unspecified)
- Fuels, burned at coated freesheet, average production, at mill [RNA]: 15145 MJ
  Includes all fuels burned on site
- Pulpwood, softwood, average, at forest road [RNA]: 0.0932 m3; provider Pulpwood, softwood, average, at forest road, NE-NC
  Mass of incoming northern softwood logs (assumed 63.5% East/Central based on mill location) intended for pulping. Assumed density: 450 kg/m3. Wood usage in the process is distrubuted as follows: 35% ends up in pulp, 23% in self-generated hogged fuel and 42% in black liquor. All the hogged fuel is combusted onsite. Combustion of this fuel is important to the economic viability of all modern pulp mills. Substitution of other fuels for this fuel is not recommended. Need to be paired with "Self-generated hogged fuel, combusted in industrial boiler, at pulp and paper mill". Black liquor solides are combusted onsite as part of the pulping chemical recovery process that is integral to and is essential to the economic viability of all modern pulp mills. Substitution of other fuels for this fuel is not recommended.
- Electricity from hydro: 14.694 kWh
  Generation at company facilities. Ei: Electricity, hydropower, at run-of-river power plant
- Transport, train, diesel powered [RNA]: 57.523 t*km
  Transportation of pulpwood and chips to pulp mill. Pulpwood: 375 km, chips: 127 km.
- Pulp, kraft market, bleached, average production, at mill [RNA]: 73.301 kg
- Disposal, solid waste, unspecified, to unspecified landfill: 12.428 kg
  Typically company-owned, but some third party.
- Hydrochloric acid, without water, in 30% solution state, at plant [RNA]: 0.54885 kg
- Pulp, deinked market, bleached, at mill: 19.323 kg
- Disposal, solid waste, unspecified, to unspecified land application: 5.3615 kg
  Typically off-site agricultural/silvicultural
- Transport, combination truck, average fuel mix [RNA]: 364.99 t*km
  Transportation of pulpwood and chips to pulp mill. Pulpwood: 200 km (rounded trip distance), chips: 254 km (rounded trip distance).
- Transport, train, diesel powered [RNA]: 5.6647 t*km
  Transport of packaging. Containerboard: 1410 km. Core board: 1276 km. Polypropylene and Polyethylene: 1806 km. Steel: 1083 km.
- Sizer, at plant: 3.2885 kg
  ei: AKD sizer, in paper production, at plant
- Transport, combination truck, average fuel mix [RNA]: 13.111 t*km
  Transport market pulp. Bleached kraft market pulp, Deinked bleached market pulp: 256 km.
- Transport, combination truck, average fuel mix [RNA]: 51.559 t*km
  Transportation of chemicals. Kaolin: 295 km. Sodium chlorate, sulfuric acid, Hydrochloric acid, Titanium dioxide, Ground calcium carbonate, Precipitated calcium carbonate and Quicklime: 183 km. Latex: 312 km. Starch: 510 km. Sizers: 282 km. Transports of fuels. Coal: 153 km. Residual fuel oil, Distillate fuel oil: 50 km. Liquefied petroleum gas, Kerosene and gasoline, Other fossil assumed to be diesel: 80 km. Tire derived fuel: 98 km.
- Sorted office paper: 15.513 kg
- Pulpwood; softwood; average; at forest road [US]: 0.1166 m3; provider Pulpwood, softwood, average, at forest road, INW
  Mass of incoming southern softwood logs intended for pulping. Assumed density: 450 kg/m3. US LCI: "Softwood logs with bark, harvested at average intensity site, at mill, US SE/US" can be used but transportation needs to be removed as it is already included here. Wood usage in the process is distrubuted as follows: 35% ends up in pulp, 23% in self-generated hogged fuel and 42% in black liquor. All the hogged fuel is combusted onsite. Combustion of this fuel is important to the economic viability of all modern pulp mills. Substitution of other fuels for this fuel is not recommended. Need to be paired with "Self-generated hogged fuel, combusted in industrial boiler, at pulp and paper mill". Black liquor solides are combusted onsite as part of the pulping chemical recovery process that is integral to and is essential to the economic viability of all modern pulp mills. Substitution of other fuels for this fuel is not recommended.
- Disposal, unspecified ashes, to unspecified landfill: 54.975 kg
  Mix of wood and coal ashes. Based on typical ash contents can be assumed to be 78% from wood and 22% from coal. Typically company-owned, but some third party.
- Pulpwood; hardwood; average; at forest road [US]: 0.379 m3; provider Pulpwood, hardwood, average, at forest road, NE-NC
  Mass of incoming northern hardwood logs intended for pulping. Assumed density: 650 kg/m3. Wood usage in the process is distrubuted as follows: 35% ends up in pulp, 23% in self-generated hogged fuel and 42% in black liquor. All the hogged fuel is combusted onsite. Combustion of this fuel is important to the economic viability of all modern pulp mills. Substitution of other fuels for this fuel is not recommended. Need to be paired with "Self-generated hogged fuel, combusted in industrial boiler, at pulp and paper mill". Black liquor solides are combusted onsite as part of the pulping chemical recovery process that is integral to and is essential to the economic viability of all modern pulp mills. Substitution of other fuels for this fuel is not recommended.
- Disposal, unspecified ashes, to unspecified land application: 4.9442 kg
  Mix of wood and coal ashes. Based on typical ash contents can be assumed to be 78% from wood and 22% from coal. Typically off-site agricultural/silvicultural.
- Containerboard, average production, at mill [US]: 8.0286 kg
  Packaging material
- Titanium dioxide: 14.424 kg
  ei: titanium dioxide, production mix, at plant

## Inputs from nature
- Water [resource, water]: 49987, 16341 kg (2 entries)
  Estimated based on individual mill process effluent and cooling water flows and process characteristics. Share between process and cooling estimated.

## Emissions to nature
- Nickel [emission, water]: 0.00011917 kg
  In effluent.
- Vanadium [emission, water]: 0.00053718 kg
  In effluent.
- Lead [emission, ground]: 0.00829 kg
  From onsite management of solid waste. All metals reported as elemental althought in most cases they are releases into metal compounds.
- Ammonia [emission, ground]: 0.000114 kg
  (same comment as for Lead)
- Acetaldehyde [emission, ground]: 5.63e-6 kg
  (same comment as for Lead)
- Methanol [emission, water]: 0.0171 kg
  In effluent.
- Copper [emission, ground]: 0.00918 kg
  (same comment as for Lead)
- Biological Oxygen Demand [emission, water]: 0.84257 kg
  In effluent.
- Ammonia [emission, water]: 0.0029063 kg
  In effluent.
- Ammonia [emission, air]: 0.080293 kg
  From process
- Water [emission, air]: 1695 kg
  Estimated based on individual mill process effluent and cooling water flows and process characteristics. Share between process and cooling estimated. Includes evaporation and other losses (e.g., water in solid waste).
- Arsenic [emission, ground]: 0.0038 kg
  (same comment as for Lead)
- Phosphorus [emission, water]: 0.028996 kg
  In effluent.
- Barium [emission, ground]: 0.0596 kg
  (same comment as for Lead)
- Chloromethane [emission, water]: 4.3908e-9 kg
  In effluent.
- Arsenic [emission, water]: 0.00012392 kg
  In effluent.
- 2,4,5-T [emission, water]: 49479 kg
  (same comment as for Water)
- Chromium [emission, ground]: 0.00955 kg
  (same comment as for Lead)
- Nitrogen [emission, water]: 0.21216 kg
  In effluent.
- Chromium [emission, water]: 0.00014586 kg
  In effluent.
- Phenol [emission, ground]: 1.93e-5 kg
  (same comment as for Lead)
- Suspended solids, inorganic [emission, water]: 1.4197 kg
  In effluent.
- Polycyclic aromatic hydrocarbons [emission, ground]: 2.66e-6 kg
  (same comment as for Lead)
- Adsorbable organic halides [emission, water]: 0.1154 kg
  In effluent.
- Zinc [emission, ground]: 0.055 kg
  (same comment as for Lead)
- Methanol [emission, air]: 0.37447 kg
  From process
- Polycyclic aromatic hydrocarbons [emission, water]: 4.5178e-6 kg
  In effluent.
- Formaldehyde [emission, ground]: 1.55e-6 kg
  (same comment as for Lead)
- Manganese [emission, ground]: 0.0964 kg
  (same comment as for Lead)
- Acetaldehyde [emission, air]: 0.017 kg
  From process
- Barium [emission, water]: 0.0023894 kg
  In effluent.
- Acetaldehyde [emission, water]: 0.00115 kg
  In effluent.
- Mercury [emission, water]: 1.838e-7 kg
  In effluent.
- Carbon dioxide [emission, air]: -5.911, -11.782 kg (2 entries)
  From process (Precipitated Calcium Carbonate (PCC) production on site). Some emissions reported under "Fuels burned at coated freesheet, average producion, at mill" are capture to produce PCC
- Nickel [emission, ground]: 0.00166 kg
  (same comment as for Lead)
- Zinc [emission, water]: 0.00087158 kg
  In effluent.
- Manganese [emission, water]: 0.016779 kg
  In effluent.
- Mercury [emission, ground]: 1.31e-5 kg
  (same comment as for Lead)
- Phenol [emission, water]: 5.6245e-5 kg
  In effluent.
- Water [emission, water]: 16341 kg
  (same comment as for Water)
- Formaldehyde [emission, water]: 0.00041794 kg
  In effluent.
- Lead [emission, water]: 3.4626e-5 kg
  In effluent.
- Copper [emission, water]: 0.00010791 kg
  In effluent.
- Vanadium [emission, ground]: 0.00272 kg
  (same comment as for Lead)

## Allocation factors
- causal, Electricity, at coated freesheet mill, for Pulpwood, softwood, average, at forest road: 0
- causal, Electricity, at coated freesheet mill, for Transport, train, diesel powered: 0
- causal, Tall oil, at coated freesheet mill, for Disposal, unspecified ashes, to unspecified landfill: 0
- causal, Paper, freesheet, coated, average production, at mill, for Calcium carbonate, ground, 20 micron, at plant: 1
- causal, Tall oil, at coated freesheet mill, for Disposal, wastewater treatment plant residuals, to uns. Incinerator: 0
- causal, Electricity, at coated freesheet mill, for Calcium carbonate, ground, 20 micron, at plant: 0
- physical, Steam, at coated freesheet mill: 0
- causal, Tall oil, at coated freesheet mill, for Fuels, burned at coated freesheet, average production, at mill: 0
- causal, Electricity, at coated freesheet mill, for Phosphorus: 0
- causal, Turpentine, at coated freesheet mill, for Copper: 0
- causal, Electricity, at coated freesheet mill, for Water: 0
- causal, Turpentine, at coated freesheet mill, for Disposal, solid waste, unspecified, to unspecified landfill: 0
- causal, Electricity, at coated freesheet mill, for Arsenic: 0
- causal, Turpentine, at coated freesheet mill, for Disposal, solid waste, unspecified, to unspecified land application: 0
- causal, Electricity, at coated freesheet mill, for Ammonia: 0
- causal, Paper, freesheet, coated, average production, at mill, for Transport, train, diesel powered: 1
- causal, Paper, freesheet, coated, average production, at mill, for Starch: 1
- causal, Electricity, at coated freesheet mill, for Sodium chlorate: 0
- causal, Electricity, at coated freesheet mill, for Sorted office paper: 0
- causal, Tall oil, at coated freesheet mill, for Lead: 0
- causal, Steam, at coated freesheet mill, for Disposal, wastewater treatment plant residuals, to uns. land application: 0
- causal, Steam, at coated freesheet mill, for Vanadium: 0
- causal, Electricity, at coated freesheet mill, for Disposal, wastewater treatment plant residuals, to uns. Incinerator: 0
- causal, Turpentine, at coated freesheet mill, for Pulpwood; hardwood; average; at forest road: 0
- causal, Tall oil, at coated freesheet mill, for Copper: 0
- causal, Electricity, at coated freesheet mill, for Chromium: 0
- causal, Paper, freesheet, coated, average production, at mill, for Manganese: 1
- causal, Turpentine, at coated freesheet mill, for Ammonia: 0
- causal, Turpentine, at coated freesheet mill, for Polycyclic aromatic hydrocarbons: 0
- causal, Turpentine, at coated freesheet mill, for Hot rolled sheet, steel, at plant: 0
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
## Sampling procedure
The survey included results from 15 paper mills representing 5 million short tons per year (TPY), nearly 76% of 2006/2007 North American production volume.

## Sources
- AF&PA (2010). Printing & Writing Papers LCA
