# Transport, refuse truck, gasoline powered

Dataset: openLCA process, unit process
Category: 56: Administrative and Support and Waste Management and Remediation Services/5621: Waste Collection
Geography: Northern America
Time period: 2009-12-31 to 2009-12-31
Allocation method: no allocation
Generated by: Nathan Hardesty
Published in: U.S. Environmental Protection Agency (EP
restrictionsDescription: All information can be accessed by everybody.
copyright: false

## General comment
This dataset represents the U.S. average airborne emissions for operating a gasoline powered refuse truck. The inventory includes all vehicle operation processes, including off-network and refueling activities.
The refinery-to-pump transportation and distribution data are calculated from Argonne National Laboratory's GREET 1.8d.1 model.
The vehicle operation data are calculated from EPA's MOVES2010a model, using the assumptions described in the corresponding detailed spreadsheet. Emissions factors in MOVES2010a are largely based on EPA's Mobile Source Observation Database, which in turn includes data from a variety of vehicle studies (References 6-8).
MOVES2010a acknowledges sources of uncertainty in the model structure, the population and acitivty data, and other model parameters. As of July 2011, the uncertainty calculation function of the model has not been activated.

## Technology
Combustion of gasoline in a refuse truck.

## Geography
US

## Reference product
- Transport, refuse truck, gasoline powered [RNA]: 1 t*km

## Inputs from technosphere
- Transport, combination truck, average fuel mix [RNA]: 0.0118175 t*km
- Transport, train, diesel powered [RNA]: 0.0220636 t*km
- Transport, barge, average fuel mix [RNA]: 0.00765624 t*km
- Transport, pipeline, unspecified petroleum products [RNA]: 0.115996 t*km
- Transport, ocean freighter, average fuel mix [RNA]: 0.101036 t*km
- Gasoline, at refinery: 0.0405824 l

## Emissions to nature
- Nitrogen oxides [emission, air]: 0.000352897, 0.000326039 kg (2 entries)
- Hydrocarbons [emission, air]: 0.000151875 kg
- Particulate matter, ≤ 10μm [emission, air]: 1.42117e-6 kg
  PM10 from organic carbon, elemental carbon, and sulfate particulates.
- Particulate matter, ≤ 2.5μm [emission, air]: 6.68494e-7 kg
  PM2.5 from brakewear.
- Methane [emission, air]: 3.63185e-6 kg
- Carbon dioxide [emission, air]: 0.0930117 kg
- Particulate matter, ≤ 2.5μm [emission, air]: 1.35486e-7 kg
  PM2.5 from tirewear.
- Volatile organic compounds [emission, air]: 0.000156183 kg
- Particulate matter, ≤ 2.5μm [emission, air]: 1.30864e-6 kg
  PM2.5 from organic carbon, elemental carbon, and sulfate particulates.
- Carbon monoxide [emission, air]: 0.00353842 kg
- Nitrous oxide [emission, air]: 2.22809e-6 kg
- Nitrogen dioxide [emission, air]: 2.68582e-5 kg
- Ammonia [emission, air]: 2.41617e-6 kg
- Particulate matter, ≤ 10μm [emission, air]: 2.55365e-6 kg
  PM10 from brakewear.
- Sulfur dioxide [emission, air]: 1.72964e-6 kg
- Particulate matter, ≤ 10μm [emission, air]: 5.64975e-7 kg
  PM10 from tirewear.

## Sources
- Wang, M.
- Assessment and Standards Division, Offic
- EPA
- Assessment and Standards Division, Offic
- Alam & Rajamanickam (2007). Development of TPEF
- U.S. Environmental Protection Agency (EP
- Eastern Research Group
- National Institute of Standards and Tech
- U.S. Alternative Fuels and Advanced Vehi
