# Lime, agricultural, corn production

Dataset: openLCA process, unit process
Category: 11: Agriculture, Forestry, Fishing and Hunting/1151: Support Activities for Crop Production
Geography: Northern America
Time period: 2004-12-31 to 2009-12-30
Allocation method: no allocation
Generated by: Daniel Inman
Published in: Hsu, D.
restrictionsDescription: All information can be accessed by everybody.
copyright: false

## Technology
current

## Geography
North America (US and Canada)

## Time period
2005-2009

## Reference product
- Lime, agricultural, corn production [RNA]: 10000 m2; = 1.0*10000

## Inputs from technosphere
- Transport, combination truck, diesel powered [RNA]: 112 t*km
  Assuming a 500km two way distance to an outlet. Proxy: Transport, lorry >32t, EURO5/RER with US electricity U
- Fertilising, by broadcaster: 10000 m2; = 1.0*10000
- Transport, single unit truck, gasoline powered [RNA]: 3.43 t*km
  Assumign a 80.51 km round-trip distance from the outlet to the farm - diesel / petrol mix truck -19% % diesel ; 18.035 tkm total. Proxy: Transport, van <3.5t/RER with US electricity U
- Transport, single unit truck, diesel powered [RNA]: 14.6 t*km
  Assumign a 80.51 km round-trip distance from the outlet to the farm - diesel / petrol mix truck - 81% diesel ; 18.035 tkm total. Proxy: Transport, van <3.5t/RER with US electricity U
- Quicklime, at plant [RNA]: 448 kg
  Farrell et al., 2006. proxy: limestone, milled, packed, at plant

## Sources
- Hsu, D.
- Farrell, A.E.
