# Rapeseed, whole plant, at field

Dataset: openLCA process, unit process
Category: 11: Agriculture, Forestry, Fishing and Hunting/1111: Oilseed and Grain Farming
Geography: United States
Time period: 1989-12-31 to 1999-12-31
Allocation method: no allocation
Generated by: Olivier Muller
restrictionsDescription: All information can be accessed by everybody.
copyright: true

## General comment
Agricultural Crop Production, Harvested acres are 97% of the planted acre (1998-2000 US average).
The impacts of producing 1 kg of seed are assumed equal to those of producing 1kg of grain.
For Water, only consumptive use is taken into account (i.e. 60.7% of the total water consumption). 100% of impacts allocated to rapeseed, 0% to residues
Important note: although most of the data in the US LCI database has
undergone some sort of review, the database as a whole has not yet
undergone a formal validation process.
Please email comments to lci@nrel.gov.

## Technology
USA and European average practices (tillage, fertilizer and pesticide application, crop residue management, irrigation),

## Geography
USA and European average practices .

## Reference product
- Rapeseed, at field [US]: 1 kg

## By-products
- Rapeseed residues, at field [US]: 5 kg

## Inputs from technosphere
- Nitrogen fertilizer, production mix, at plant [RNA]: 0.076103 kg
- Transport, train, diesel powered [RNA]: 0.2276 t*km
- Potash Fertilizer (K2O), at plant: 0.022848 kg
- Transport, single unit truck, diesel powered [RNA]: 0.085459 t*km
- Agrochemicals, at plant: 0.00042878 kg
- Diesel, combusted in industrial equipment [RNA]: 0.051675 l
- Phosphorous fertilizer, production mix, at plant [RNA]: 0.015288 kg

## Inputs from nature
- Land use [resource, ground, human-dominated, agricultural]: 1.177, 4.355, 1.267 m2*a (3 entries)
- Carbon dioxide [resource, air]: 1.833 kg

## Emissions to nature
- Trifluralin [emission, water]: 2.0271e-6 kg
  Pesticides - consumption (19), Pesticides - application method is 100% surface application and 0% soil incorporation ie similar to corn cotton soybean wheat in (11), Runoff of pesticides (14)
- Hydrocarbons [emission, air, troposphere, rural]: 0.00025727 kg
  Pesticides - consumption (19), Pesticides - application method is 100% surface application and 0% soil incorporation ie similar to corn cotton soybean wheat in (11)
- Nitrogen [emission, water]: 0.014915 kg
  Runoff/leaching of fertilizers (15)
- Malathion [emission, water]: 9.1307e-9 kg
  (same comment as for Trifluralin)
- Carbofuran [emission, water]: 1.0074e-7 kg
  (same comment as for Trifluralin)
- Ethalfluralin [emission, water]: 2.9176e-6 kg
  (same comment as for Trifluralin)
- Phosphorus compounds [emission, water]: 0.00032059 kg
  Runoff/leaching of fertilizers (15)
- Methyl parathion [emission, water]: 4.4495e-8 kg
  (same comment as for Trifluralin)
- Ammonia [emission, air, troposphere, rural]: 0.0073557 kg
  Emissions of N2O and NH3 and NOx (4),
- Trifluralin [emission, air, troposphere, rural]: 7.8382e-5 kg
  Pesticides - consumption (19), Pesticides - application method is 100% surface application and 0% soil incorporation ie similar to corn cotton soybean wheat in (11), Pesticides - air emission factors (12), Pesticides - vapor pressure (13),
- Nitrous oxide [emission, air, troposphere, rural]: 0.0059404 kg
  Emissions of N2O and NH3 and NOx (4),
- Ethalfluralin [emission, air, troposphere, rural]: 6.8078e-5 kg
  (same comment as for Trifluralin)
- Carbofuran [emission, air, troposphere, rural]: 2.3507e-6 kg
  (same comment as for Trifluralin)
- Methyl parathion [emission, air, troposphere, rural]: 1.0382e-6 kg
  (same comment as for Trifluralin)
- Carbaryl [emission, air, troposphere, rural]: 9.0784e-7 kg
  (same comment as for Trifluralin)
- Suspended solids, inorganic [emission, water]: 4.725 kg
  Erosion (6)
- Nitrogen oxides [emission, air, troposphere, rural]: 0.019904 kg
  Emissions of N2O and NH3 and NOx (4)
- Malathion [emission, air, troposphere, rural]: 2.1305e-7 kg
  (same comment as for Trifluralin)
- Carbaryl [emission, water]: 3.8908e-8 kg
  (same comment as for Trifluralin)

## Allocation factors
- causal, Rapeseed, at field, for Nitrogen oxides: 1
- causal, Rapeseed residues, at field, for Diesel, combusted in industrial equipment: 0
- causal, Rapeseed, at field, for Land use: 1
- causal, Rapeseed residues, at field, for Malathion: 0
- causal, Rapeseed, at field, for Land use: 1
- causal, Rapeseed, at field, for Carbaryl: 1
- causal, Rapeseed residues, at field, for Agrochemicals, at plant: 0
- causal, Rapeseed residues, at field, for Trifluralin: 0
- causal, Rapeseed, at field, for Carbon dioxide: 1
- causal, Rapeseed, at field, for Potash Fertilizer (K2O), at plant: 1
- causal, Rapeseed residues, at field, for Nitrogen: 0
- causal, Rapeseed residues, at field, for Transport, train, diesel powered: 0
- causal, Rapeseed residues, at field, for Carbaryl: 0
- causal, Rapeseed residues, at field, for Suspended solids, inorganic: 0
- causal, Rapeseed residues, at field, for Transport, single unit truck, diesel powered: 0
- causal, Rapeseed residues, at field, for Potash Fertilizer (K2O), at plant: 0
- causal, Rapeseed, at field, for Methyl parathion: 1
- causal, Rapeseed, at field, for Nitrous oxide: 1
- causal, Rapeseed residues, at field, for Methyl parathion: 0
- causal, Rapeseed, at field, for Trifluralin: 1
- causal, Rapeseed residues, at field, for Carbofuran: 0
- causal, Rapeseed residues, at field, for Land use: 0
- physical, Rapeseed, at field: 1
- causal, Rapeseed, at field, for Carbaryl: 1
- causal, Rapeseed, at field, for Malathion: 1
- causal, Rapeseed, at field, for Phosphorus compounds: 1
- causal, Rapeseed residues, at field, for Methyl parathion: 0
- causal, Rapeseed, at field, for Nitrogen fertilizer, production mix, at plant: 1
- causal, Rapeseed, at field, for Malathion: 1
- causal, Rapeseed residues, at field, for Carbofuran: 0
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
## Sources
- USDA/ERS
- U.S. EPA
- USDA/ERS
- USDA/NCRS
- National Center for Food and Agricultura
- USDA/NRCS
- USGS
- U.S. EPA
- USDA/National Agricultural Statistics Se
- USDA/ERS
- USDA/ERS
- North Dakota State University
- USDA/ERS
- Conservation Technology Information Cent
- USGS
- USDA/NCRS
- U.S. EPA
- U.S. EPA
- USDA/ERS
- Ecobilan
