# Electricity, lignite coal, at power plant

Dataset: openLCA process, unit process
Category: 22: Utilities/2211: Electric Power Generation, Transmission and Distribution
Geography: Northern America
Time period: 2001-12-31 to 2002-12-31
Allocation method: no allocation
Generated by: Franklin Associates
Published in: Franklin Associates (2003) Lignite Utility Combustion
restrictionsDescription: All information can be accessed by everybody.
copyright: false

## General comment
Important note: although most of the data in the US LCI database has
undergone some sort of review, the database as a whole has not yet
undergone a formal validation process.
Please email comments to lci@nrel.gov.

## Technology
Electricity production by coal-fired steam generation.

## Geography
United States

## Reference product
- Electricity, lignite coal, at power plant [RNA]: 1 kWh

## Inputs from technosphere
- Transport, train, diesel powered [RNA]: 0.0008055 t*km
  Represents transportation from lignite mining to utility.
- Transport, combination truck, average fuel mix [RNA]: 0.0086088 t*km
  Represents transportation from lignite mining to utility.
- Disposal, lignite coal combustion byproducts, to unspecified reuse: 0.022514 kg
- Disposal, solid waste, unspecified, to unspecified treatment: 0.1426 kg
- Lignite coal, at surface mine [RNA]: 0.78206 kg

## Emissions to nature
- Benzene [emission, air]: 5.0834e-7 kg
- Cadmium [emission, air]: 1.9942e-8 kg
- Benz[a]anthracene [emission, air]: 3.1282e-11 kg
  Sources for PAH data are old or unverifiable. Use this PAH data with caution.
- Pyrene [emission, air]: 1.2904e-10 kg
  Sources for PAH data are old or unverifiable. Use this PAH data with caution.
- Indeno[1,2,3-cd]pyrene [emission, air]: 2.3853e-11 kg
  Sources for PAH data are old or unverifiable. Use this PAH data with caution.
- Volatile organic compounds [emission, air]: 2.2617e-5 kg
- PAH/POM, unspecified [emission, air, indoor]: 9.7286e-7 kg
- Fluoranthene [emission, air]: 2.7763e-10 kg
  Sources for PAH data are old or unverifiable. Use this PAH data with caution.
- Benzo[a]pyrene [emission, air]: 1.4859e-11 kg
  Sources for PAH data are old or unverifiable. Use this PAH data with caution.
- Sulfur dioxide [emission, air]: 0.0056347 kg
- Methylene chloride [emission, air]: 1.134e-7 kg
- Suspended solids, inorganic [emission, water]: 1.9457e-6 kg
- Carbon dioxide [emission, air]: 1.088 kg
- Arsenic [emission, air]: 1.6032e-7 kg
- Nickel [emission, air]: 1.0949e-7 kg
- Chromium [emission, air]: 1.0167e-7 kg
- Radionuclides [emission, air]: 22.13 kBq
- Lead [emission, air]: 1.6423e-7 kg
- Selenium [emission, air]: 5.0834e-7 kg
- Tetrachloroethylene [emission, air]: 1.6814e-8 kg
- Fluorene [emission, air]: 3.5584e-10 kg
  Sources for PAH data are old or unverifiable. Use this PAH data with caution.
- Naphthalene [emission, air]: 5.0834e-9 kg
  Sources for PAH data are old or unverifiable. Use this PAH data with caution.
- Formaldehyde [emission, air]: 9.3847e-8 kg
- Cobalt [emission, air]: 3.9103e-8 kg
- Beryllium [emission, air]: 8.2116e-9 kg
- Hydrochloric acid [emission, air]: 0.00046923 kg
- 5-Methylchrysene [emission, air]: 8.6026e-12 kg
  Sources for PAH data are old or unverifiable. Use this PAH data with caution.
- Acenaphthene [emission, air]: 1.9942e-10 kg
  Sources for PAH data are old or unverifiable. Use this PAH data with caution.
- Anthracene [emission, air]: 8.2116e-11 kg
  Sources for PAH data are old or unverifiable. Use this PAH data with caution.
- Magnesium [emission, air]: 4.3013e-6 kg
- Carbon monoxide [emission, air]: 9.7757e-5 kg
- Hydrofluoric acid [emission, air]: 5.8654e-5 kg
- Phenols [emission, air]: 6.2564e-9 kg
- Benzofluoranthene [emission, air]: 4.3013e-11 kg
  Sources for PAH data are old or unverifiable. Use this PAH data with caution.
- Chromium(VI) [emission, air]: 3.0891e-8 kg
- Nitrous oxide [emission, air]: 2.4973e-5 kg
- Chrysene [emission, air]: 3.9103e-11 kg
  Sources for PAH data are old or unverifiable. Use this PAH data with caution.
- Mercury [emission, air]: 3.2455e-8 kg
- Methane [emission, air]: 1.5641e-5 kg
- Phenanthrene [emission, air]: 1.0558e-9 kg
  Sources for PAH data are old or unverifiable. Use this PAH data with caution.
- Biphenyl [emission, air]: 6.6475e-10 kg
  Sources for PAH data are old or unverifiable. Use this PAH data with caution.
- Organic compounds [emission, air]: 2.5234e-6 kg
- Sulfur oxides [emission, air]: 0.0043278 kg
- Aldehydes, C5 [emission, air]: 3.7148e-7 kg
- Benzo[ghi]perylene [emission, air]: 1.0558e-11 kg
  Sources for PAH data are old or unverifiable. Use this PAH data with caution.
- Manganese [emission, air]: 1.916e-7 kg
- Nitrogen oxides [emission, air]: 0.0034674 kg
- Antimony [emission, air]: 7.0385e-9 kg
- Acenaphthylene [emission, air]: 9.7757e-11 kg
  Sources for PAH data are old or unverifiable. Use this PAH data with caution.
- Particulate matter [emission, air]: 0.0011105 kg
- Acrolein [emission, air]: 1.134e-7 kg

## Sources
- unspecified
- U.S. EPA
- U.S. Energy Information Administration
- U.S. EPA
- Energy Information Administration
- Franklin Associates (2003) Lignite Utility Combustion
- U.S. EPA
- U.S. Energy Information Administration
- Energy Information Administration
