# Natural gas, combusted in industrial boiler

Dataset: openLCA process, unit process
Category: 22: Utilities/2213: Water, Sewage and Other Systems
Geography: Northern America
Time period: 1997-12-31 to 2000-12-31
Allocation method: no allocation
Generated by: Franklin Associates
Published in: Franklin Associates (2003) Natural Gas Industrial Combustion
restrictionsDescription: All information can be accessed by everybody.
copyright: false

## General comment
Important note: although most of the data in the US LCI database has
undergone some sort of review, the database as a whole has not yet
undergone a formal validation process.
Please email comments to lci@nrel.gov.

## Technology
Natural gas combustion in average industrial boiler.

## Geography
United States

## Reference product
- Natural gas, combusted in industrial boiler [RNA]: 1 m3; provider Natural gas, processed, for energy use, at plant

## Inputs from technosphere
- Transport, train, diesel powered [RNA]: 0.011858 t*km
  Represents transportation from natural gas plant to combustion.
- Transport, combination truck, average fuel mix [RNA]: 0.1985 t*km
  Represents transportation from natural gas plant to combustion.
- Natural gas, production mixture, to energy use: 1 m3; provider Natural gas, processed, for energy use, at plant
- Transport, pipeline, natural gas [RNA]: 1.186 t*km
  Represents transportation from natural gas plant to combustion.

## Emissions to nature
- Carbon dioxide [emission, air]: 1.96 kg
- Methane [emission, air]: 3.6017e-5 kg
- Nitrogen oxides [emission, air]: 0.0016011 kg
- Mercury [emission, air]: 4.1648e-9 kg
- Chromium [emission, air]: 2.2426e-8 kg
- Cobalt [emission, air]: 1.3456e-9 kg
- Sulfur oxides [emission, air]: 1.0126e-5 kg
- Selenium [emission, air]: 3.8444e-10 kg
- Formaldehyde [emission, air]: 1.2014e-6 kg
- Nickel [emission, air]: 3.3639e-8 kg
- Nitrous oxide [emission, air]: 3.6017e-5 kg
- Naphthalene [emission, air]: 9.7713e-9 kg
- Arsenic [emission, air]: 3.2037e-9 kg
- Cadmium [emission, air]: 1.762e-8 kg
- Radionuclides [emission, air]: 0.0034247 kBq
- Benzene [emission, air]: 3.3639e-8 kg
- Manganese [emission, air]: 6.087e-9 kg
- Beryllium [emission, air]: 1.9222e-10 kg
- Carbon monoxide [emission, air]: 0.0013457 kg
- Particulate matter, ≤ 10μm [emission, air]: 0.00012115 kg
- Volatile organic compounds [emission, air]: 8.8405e-5 kg
- Lead [emission, air]: 8.0092e-9 kg

## Sources
- U.S. EPA
- unspecified
- Franklin Associates (2003) Natural Gas Industrial Combustion
- EPA
- Center for Transportation Research, Argo
- U.S. EPA Office of Solid Waste and Emerg
