# Transport, transit bus, diesel powered, Central

Dataset: openLCA process, unit process
Category: 48-49: Transportation and Warehousing/4851: Urban Transit Systems
Geography: Northern America
Time period: 2009-12-31 to 2009-12-31
Allocation method: no allocation
Generated by: Nathan Hardesty
Published in: U.S. Environmental Protection Agency (EP
restrictionsDescription: All information can be accessed by everybody.
copyright: false

## General comment
This dataset represents the Central U.S. (KY, IL, IN, MO, OH, TN, WV (Reference 10)) average airborne emissions for operating a diesel powered transit bus. The inventory includes all vehicle operation processes, including off-network and refueling activities.
The refinery-to-pump transportation and distribution data are calculated from Argonne National Laboratory's GREET 1.8d.1 model.
The vehicle operation data are calculated from EPA's MOVES2010a model, using the assumptions described in the corresponding detailed spreadsheet. Emissions factors in MOVES2010a are largely based on EPA's Mobile Source Observation Database, which in turn includes data from a variety of vehicle studies (References 6-8).
MOVES2010a acknowledges sources of uncertainty in the model structure, the population and acitivty data, and other model parameters. As of July 2011, the uncertainty calculation function of the model has not been activated.

## Technology
Combustion of diesel in a transit bus.

## Geography
US

## Reference product
- Transport, transit bus, diesel powered [RNA]: 1 p*km

## Inputs from technosphere
- Transport, barge, average fuel mix [RNA]: 0.0106164 t*km
- Transport, train, diesel powered [RNA]: 0.0204827 t*km
- Transport, combination truck, average fuel mix [RNA]: 0.0109761 t*km
- Transport, pipeline, unspecified petroleum products [RNA]: 0.110635 t*km
- Diesel, at refinery: 0.0340493 l; provider Petroleum refining, at refinery
- Transport, ocean freighter, average fuel mix [RNA]: 0.0750367 t*km

## Emissions to nature
- Carbon monoxide [emission, air]: 0.000320603 kg
- Particulate matter, ≤ 2.5μm [emission, air]: 6.41134e-7 kg
  PM2.5 from brakewear.
- Particulate matter, ≤ 10μm [emission, air]: 4.27379e-5 kg
  PM10 from organic carbon, elemental carbon, and sulfate particulates.
- Particulate matter, ≤ 2.5μm [emission, air]: 4.14573e-5 kg
  PM2.5 from organic carbon, elemental carbon, and sulfate particulates.
- Particulate matter, ≤ 10μm [emission, air]: 7.42856e-7 kg
  PM10 from tirewear.
- Particulate matter, ≤ 2.5μm [emission, air]: 1.78143e-7 kg
  PM2.5 from tirewear.
- Nitrous oxide [emission, air]: 1.91962e-7 kg
- Particulate matter, ≤ 10μm [emission, air]: 2.44913e-6 kg
  PM10 from brakewear.
- Nitrogen dioxide [emission, air]: 6.86095e-5 kg
- Sulfur dioxide [emission, air]: 1.49598e-6 kg
- Carbon dioxide [emission, air]: 0.0894098 kg
- Nitrogen oxides [emission, air]: 0.000859129, 0.00079052 kg (2 entries)
- Ammonia [emission, air]: 1.3088e-6 kg
- Hydrocarbons [emission, air]: 4.98399e-5 kg
- Volatile organic compounds [emission, air]: 5.14076e-5 kg
- Methane [emission, air]: 1.44437e-6 kg

## Sources
- Wang, M.
- Assessment and Standards Division, Offic
- EPA
- National Climatic Data Center, National
- Assessment and Standards Division, Offic
- unspecified
- U.S. Environmental Protection Agency (EP
- Eastern Research Group
- National Institute of Standards and Tech
- U.S. Alternative Fuels and Advanced Vehi
