# Wood fuel, unspecified

Dataset: openLCA process, unit process
Category: 22: Utilities/2213: Water, Sewage and Other Systems
Geography: Northern America
Time period: 1994-12-31 to 1998-12-31
Allocation method: no allocation
Generated by: Maureen Puetmann
Published in: Franklin Associates Ltd. (2001) Franklin USA 98
restrictionsDescription: All information can be accessed by everybody.
copyright: false

## General comment
Important note: although most of the data in the US LCI database has
undergone some sort of review, the database as a whole has not yet
undergone a formal validation process.
Please email comments to lci@nrel.gov.

## Technology
This process is a copy of the FAL "Wood" process. It has been modified in the following way: (1) it has an input of CO2 from the atmosphere, to close the carbon balance; (2) weights are expressed as ovendry basis; and (3) waste has been moved from a final waste flow to a waste treatment input

## Geography
US

## Reference product
- Wood fuel, unspecified [RNA]: 1 kg
  Weight reported on an ovendry basis. Assumes the actual moisture content is 100% ovendry basis. This assumption is very uncertain.

## Inputs from technosphere
- Disposal, solid waste, unspecified, to unspecified treatment: 0.003 kg

## Inputs from nature
- Wood [resource, biotic]: 1.006 kg
  (same comment as for Wood fuel, unspecified)
- Uranium [resource, ground, subterranean]: 4.8e-8 kg
- Limestone [resource, ground, subterranean]: 0.116 kg
- Natural gas [resource, air, subterranean]: 0.147888 MJ
- Crude oil [resource, water, subterranean]: 0.59892 MJ
- Coal, bituminous [resource, ground, subterranean]: 0.008448 MJ

## Emissions to nature
- Particulate matter [emission, air, troposphere, rural]: 6e-6 kg
- Carbon monoxide [emission, air, troposphere, rural]: 0.0002 kg
- Sulfur oxides [emission, air]: 2.4e-5 kg
- Nitrogen oxides [emission, air, troposphere, rural]: 0.00072 kg

## Sources
- Franklin Associates Ltd. (2001) Franklin USA 98
- Maureen Puettmann
