# Crude oil, at production

Dataset: openLCA process, unit process
Category: 21: Mining, Quarrying, and Oil and Gas Extraction/2111: Oil and Gas Extraction
Geography: Northern America
Time period: 1996-12-31 to 2000-12-31
Allocation method: no allocation
Generated by: Franklin Associates
Published in: Franklin Associates (2003) Crude Oil Extraction
restrictionsDescription: All information can be accessed by everybody.
copyright: false

## General comment
No data are available for foreign extraction of crude oil. United States data was used to represent extraction by foreign producers.,
Important note: although most of the data in the US LCI database has
undergone some sort of review, the database as a whole has not yet
undergone a formal validation process.
Please email comments to lci@nrel.gov.

## Technology
Includes data for crude oil extracted from onshore and offshore wells.

## Geography
North America

## Reference product
- Crude oil, at production [RNA]: 1 kg

## Inputs from technosphere
- Diesel, combusted in industrial boiler [RNA]: 0.00125 l
- Electricity, at grid [RNA]: 0.039 kWh; provider Electricity, at Grid, US, 2010
- Disposal, solid waste, unspecified, to sanitary landfill: 0.0261 kg
- Gasoline, combusted in equipment [RNA]: 0.000684 l
- Residual fuel oil, combusted in industrial boiler [RNA]: 0.000835 l
- Natural gas, combusted in industrial boiler [RNA]: 0.0328 m3

## Inputs from nature
- Crude oil [resource, water, subterranean]: 23.9808 MJ

## Emissions to nature
- Silver [emission, water]: 7.47e-6 kg
- Yttrium [emission, water]: 2.4e-8 kg
- Octadecane [emission, water]: 5.3e-8 kg
- Sodium(I) [emission, water]: 0.0362 kg
- p-Cymene [emission, water]: 3.55e-10 kg
- Suspended solids, inorganic [emission, water]: 0.00977 kg
- Methyl ethyl ketone [emission, water]: 2.86e-10 kg
- Naphthalenes, C3 [emission, air]: 2.86e-9 kg
- Acetone [emission, water]: 3.55e-8 kg
- Neem oil [emission, water]: 2.96e-6 kg
- Decane [emission, water]: 1.04e-7 kg
- Chloromethane [emission, water]: 1.43e-10 kg
- Toluene [emission, water]: 5.63e-6 kg
- Tetradecane [emission, water]: 8.62e-8 kg
- Barium [emission, water]: 0.00436 kg
- PAH/POM, unspecified [emission, air, troposphere, urban, low]: 1.19e-9 kg
- Aroclor (unspecified) [emission, water, fresh water body, river, urban]: 1.75e-7 kg
- Lead [emission, water]: 2.09e-6 kg
- Radium-226 [emission, water]: 0.004736 kBq
  Radioactive substances in kBq in other DB and in impact assessment methods, no conversion factors found.
- Eicosane [emission, water]: 5.41e-8 kg
- Iron [emission, water]: 0.000631 kg
- Docosane [emission, water]: 3.8e-9 kg
- 1-Methylfluorene [emission, water]: 4.05e-10 kg
- Cadmium(II) [emission, water]: 1.45e-7 kg
- Titanium [emission, water]: 3.06e-6 kg
- Xylene [emission, water]: 7.84e-8, 2.95e-6 kg (2 entries)
- Dodecane [emission, water]: 1.97e-7 kg
- Bromide [emission, water]: 0.000762 kg
- Chromium [emission, water]: 8.5e-6 kg
- 2,4-Dimethylphenol [emission, water]: 9.96e-8 kg
- Aroclor (unspecified) [emission, ground]: 1.01e-8 kg
- PAH/POM, unspecified [emission, air, indoor]: 7.2e-5 kg
- Phenol [emission, water]: 1.58e-6 kg
- Strontium [emission, water]: 0.000194 kg
- Biological Oxygen Demand [emission, water]: 0.000619 kg
- Sulfate [emission, water]: 0.000258 kg
- Zinc [emission, water]: 7.34e-6 kg
- Chloride [emission, water]: 0.128 kg
- Magnesium [emission, water]: 0.00223 kg
- Ammonia [emission, water]: 5.32e-5 kg
- Total dissolved solids [emission, water]: 0.158 kg
- Cobalt [emission, water]: 7.88e-8 kg
- Antimony [emission, water]: 1.99e-7 kg
- Thallium [emission, water]: 4.2e-8 kg
- Calcium(II) [emission, water]: 0.0114 kg
- Radium-228 [emission, water]: 0.00657 kBq
  (same comment as for Radium-226)
- Boron [emission, water]: 1.12e-5 kg
- Beryllium [emission, water]: 5.52e-8 kg
- Naphthalene [emission, water]: 6.48e-8 kg
- Molybdenum [emission, water]: 8.17e-8 kg
- Fluorine [emission, water]: 4.98e-9 kg
- Benzoic acid [emission, water]: 3.61e-6 kg
- Nickel [emission, water]: 9.77e-7 kg
- Dibenzofuran [emission, water]: 6.76e-10 kg
- Sulfur [emission, water]: 9.42e-6 kg
- m-Xylene [emission, water]: 1.08e-7 kg
- 2-Hexanone [emission, water]: 2.32e-8 kg
- o-Cresol [emission, water]: 1.02e-7 kg
- 2-Methylnaphthalene [emission, water]: 5.63e-8 kg
- Copper(I) [emission, water]: 1.02e-6 kg
- Dibenzothiophene [emission, water]: 3.49e-11, 5.48e-10 kg (2 entries)
- Lead-210 [emission, water]: 0.0010332 kBq
  (same comment as for Radium-226)
- Methane [emission, air]: 0.00353 kg
- Biphenyl [emission, water]: 1.13e-8 kg
- Benzene [emission, water]: 5.96e-6 kg
- Selenium [emission, water]: 3.86e-8 kg
- p-Cresol [emission, water]: 1.1e-7 kg
- Aluminum [emission, water]: 0.000319 kg
- Hexanoic acid [emission, water]: 7.47e-7 kg
- Hexadecane [emission, water]: 2.15e-7 kg
- Hexacosane [emission, water]: 2.37e-9 kg
- Manganese [emission, water]: 3.56e-6 kg
- Phenanthrene [emission, water]: 1.01e-9 kg
- Benzene, pentamethyl- [emission, water]: 2.66e-10 kg
- Lithium(I) [emission, water]: 3.82e-6 kg
- Arsenic(V) [emission, water]: 9.83e-7 kg
- Chemical Oxygen Demand [emission, water]: 0.00102 kg
- Cyanide [emission, water]: 2.57e-10 kg
- Vanadium [emission, water]: 9.65e-8 kg
- Ethylbenzene [emission, water]: 3.35e-7 kg
- 3-Pentanone [emission, water]: 1.49e-8 kg
- Mercury [emission, water]: 3.49e-9 kg
- Tin [emission, water]: 7.99e-7 kg

## Sampling procedure
Data on different elementary flows come from different sources

## Sources
- unspecified
- unspecified
- unspecified
- unspecified
- unspecified
- unspecified
- Franklin Associates (2003) Crude Oil Extraction
- unspecified
- unspecified
- unspecified
- unspecified
- unspecified
- ICF Consulting
