# Transport, aircraft, freight

Dataset: openLCA process, unit process
Category: 48-49: Transportation and Warehousing/4811: Scheduled Air Transportation
Geography: Northern America
Time period: 2002-12-31 to 2009-12-31
Allocation method: no allocation
Generated by: Beverly Sauer
Published in: Franklin Associates (2006) Cargo Plane Transport
restrictionsDescription: All information can be accessed by everybody.
copyright: false

## General comment
1. Important note: although most of the data in the US LCI database has
undergone some sort of review, the database as a whole has not yet
undergone a formal validation process.
2. Please email comments to lci@nrel.gov.

## Technology
Typical

## Geography
United States

## Reference product
- Transport, aircraft, freight [RNA]: 1 t*km

## Inputs from technosphere
- Kerosene, at refinery [RNA]: 0.41992 l

## Emissions to nature
- Hydrocarbons [emission, air]: 0.00104611 kg
- Nitrogen oxides [emission, air]: 0.00536646 kg
- Carbon dioxide [emission, air]: 1.05285 kg
- Carbon monoxide [emission, air]: 0.00441023 kg

## Sources
- ICAO
- J. Davies
- Oak Ridge National Laboratory
- Aviation Industry Press
- Franklin Associates (2006) Cargo Plane Transport
- unspecified
- Michael Wang
