# Roundwood, hardwood, green, at mill, NE-NC

Dataset: openLCA process, unit process
Category: 11: Agriculture, Forestry, Fishing and Hunting/1133: Logging
Geography: United States
Time period: 2004-12-31 to 2005-12-31
Allocation method: physical allocation
Generated by: Maureen Puetmann
Published in: Richard D. Bergman
restrictionsDescription: All information can be accessed by everybody.
copyright: false

## General comment
1. All weights given on an ovendry basis.
2. Both logs and bark were transported jointly - however, these were seperated in themodel based on mass allocation. This unit process only accounts for the transport of logs and excludes the transport of bark.
3. Important note: although most of the data in the US LCI database has
undergone some sort of review, the database as a whole has not yet
undergone a formal validation process.
Please email comments to lci@nrel.gov.

## Technology
Average transport distance.

## Geography
NE/NC = Northeast (NE) and Northcentral (NC) United States. The 20 states are Connecticut, Delaware, Illinois, Indiana, Iowa, Maine, Maryland, Massachusetts, Michigan, Minnesota, Missouri, New Hampshire, New Jersey, New York, Ohio, Pennsylvania, Rhode Island, Vermont, West Virginia, Wisconsin.

## Reference product
- Roundwood; hardwood; green; at mill [US]: 1 m3
  Based on a weighted average green density of 854 kg/m3; specific gravity of 0.511; 87%MC

## By-products
- Bark; hardwood; green; at mill [US]: 58.7 kg
  Weight reported on an ovendry basis. Moisture content (ovendry basis) = 87%

## Inputs from technosphere
- Bark; hardwood; average; at forest road [US]: 58.7 kg
  Weight reported on an ovendry basis. Moisture content (ovendry basis) = 87%
- Transport, combination truck, diesel powered [RNA]: 13.7 t*km
  Transport of green bark over 125 km.
- Roundwood, hardwood, average, at forest road [RNA]: 1 m3
  Weight reported on an ovendry basis. Moisture content (ovendry basis) = 87%
- Transport, combination truck, diesel powered [RNA]: 119 t*km
  Transport of green logs over 125 km.

## Allocation factors
- physical, Bark; hardwood; green; at mill: 0.0505936
- physical, Roundwood; hardwood; green; at mill: 0.949406
- causal, Roundwood; hardwood; green; at mill, for Roundwood, hardwood, average, at forest road: 0.949406
- causal, Roundwood; hardwood; green; at mill, for Transport, combination truck, diesel powered: 0.949406
- causal, Bark; hardwood; green; at mill, for Roundwood, hardwood, average, at forest road: 0.0505936
- causal, Roundwood; hardwood; green; at mill, for Transport, combination truck, diesel powered: 0.949406
- economic, Roundwood; hardwood; green; at mill: 0.949406
- causal, Bark; hardwood; green; at mill, for Transport, combination truck, diesel powered: 0.0505936
- causal, Roundwood; hardwood; green; at mill, for Bark; hardwood; average; at forest road: 0.949406
- causal, Bark; hardwood; green; at mill, for Bark; hardwood; average; at forest road: 0.0505936
- economic, Bark; hardwood; green; at mill: 0.0505936
- causal, Bark; hardwood; green; at mill, for Transport, combination truck, diesel powered: 0.0505936

## Sampling procedure
Questionnaires from 20 mills (17 companies) from the 20 states of Forest Service (FS) Northeastern (NE) Region. Hardwood sawmills were members of the Hardwood Manufacturer Association (HMA).

## Sources
- Richard D. Bergman
- Maureen Puettmann
