# Corn steep liquor

Dataset: openLCA process, unit process
Category: 31-33: Manufacturing/3112: Grain and Oilseed Milling
Geography: Northern America
Time period: 2002-12-31 to 2002-12-31
Allocation method: no allocation
Generated by: Daniel Inman
Published in: Hsu, D.
restrictionsDescription: All information can be accessed by everybody.
copyright: false

## General comment
Taken from Sheehan, Corn Stover Ethanol LCA. (Directly from TEAM). The corn steep liquor production involves the steeping of harvested corn for a period of from 24 to 48 hours in a light sulfurous acid solution. The production of sulfurous acid was assumed to be negligible. The only emissions were SOx from the steeping tanks. Emission factors provided by USA EPA AP-42. All of the production burdens from corn are assumed to be allocated to the production of the steeping liquor.&#xD;&#xA;

## Technology
current

## Geography
North America

## Time period
2003

## Reference product
- Corn steep liquor [RNA]: 1 kg

## Inputs from nature
- Potassium oxide [resource, ground, subterranean]: 0.0003308 kg
  potash
- Orthophosphate [resource, ground, subterranean]: 0.0013295 kg
- Crude oil [resource, water, subterranean]: 0.0138084 MJ
- Uranium [resource, ground, subterranean]: 1.0488e-8 kg
- Water [resource, water, subterranean]: 1.15 kg
- Limestone [resource, ground, subterranean]: 0.0027155 kg
- Coal, anthracite [resource, ground, subterranean]: 0.0122919 MJ
- Natural gas [resource, air, subterranean]: 0.056684 MJ
  0.8 kg/m3

## Waste to treatment
- Waste, industrial [RNA]: 5.8042e-7 kg
- Waste, unspecified [RNA]: 0.00042041 kg

## Emissions to nature
- Carbon dioxide [emission, air]: 0.006861 kg
- Molybdenum [emission, air]: 7.2755e-13 kg
- Nickel [emission, air]: 5.3312e-10 kg
- PAH/POM, unspecified [emission, air, indoor]: 1.6358e-7 kg
- Zinc [emission, air]: 2.3309e-11 kg
- Fluoride [emission, water]: 1.5817e-9 kg
- Hydrocarbons [emission, air]: 7.64e-6 kg
  non-methane
- Nitrogen oxides [emission, air]: 2.991e-5 kg
- Mercury [emission, air]: 9.6382e-12 kg
- Benzene [emission, air]: 2.9121e-8 kg
- Copper [emission, air]: 1.7306e-12 kg
- Ammonia [emission, water]: 8.3327e-8 kg
- Xylene [emission, air]: 1.098e-12 kg
- Hydrochloric acid [emission, air]: 1.2101e-7 kg
- Suspended solids, inorganic [emission, water]: 1.3179e-6 kg
- Methane [emission, air]: 1.0554e-5 kg
- Manganese [emission, air]: 3.2155e-10 kg
- Chloride [emission, water]: 7.22e-6 kg
- Nitrous oxide [emission, air]: 6.2058e-6 kg
- Hydrocarbons [emission, water]: 1.6507e-9 kg
- Fluoride [emission, air]: 1.1181e-7 kg
- Particulate matter [emission, air]: 0.00020285 kg
- Cadmium [emission, air]: 1.0494e-11 kg
- Lead [emission, air]: 2.6013e-10 kg
- Metals [emission, water]: 1.2958e-8 kg
  assumed to be metals (unspecified)
- Antimony [emission, air]: 5.6285e-12 kg
- Carbon monoxide [emission, air]: 2.0511e-5 kg
- Arsenic [emission, air]: 1.2898e-10 kg
- Chemical Oxygen Demand [emission, water]: 6.2012e-6 kg
- Iron [emission, water]: 3.1525e-12 kg
- Vanadium [emission, air]: 1.2978e-11 kg
- Sodium(I) [emission, water]: 9.2973e-6 kg
- Acid compounds [emission, water]: 6.0202e-8 kg
- Barium [emission, air]: 4.3915e-12 kg
- Toluene [emission, air]: 2.7545e-11 kg
- Cobalt [emission, air]: 1.2849e-11 kg
- Phenol [emission, water]: 5.3525e-9 kg
- Organic compounds [emission, air]: 4.9767e-6 kg
- Sulfate [emission, water]: 3.4498e-10 kg
- Biological Oxygen Demand [emission, water]: 1.5419e-6 kg
- Water [emission, water]: 8.2483e-6 kg
  TEAM=water: chemically polluted
- Formaldehyde [emission, air]: 1.7323e-9 kg
- Hydrofluoric acid [emission, air]: 1.8732e-8 kg
- Aldehydes, C5 [emission, air]: 6.1085e-9 kg
- Ammonia [emission, air]: 0.00012017 kg
- Nitrate [emission, water]: 0.00053401 kg
- Nicotine and salts [emission, water]: 1.4095e-6 kg
  assumed to be dissolved matter (unspecified)
- Chromium [emission, air]: 5.216e-10 kg
- Hydrogen sulfide [emission, air]: 3.5735e-9 kg
- Sulfur dioxide [emission, air]: 0.0082154 kg
- Magnesium [emission, air]: 8.6981e-10 kg

## Sources
- USEPA
- Hsu, D.
- Sheehan, J.
