# Paper, freesheet, uncoated, average production, at mill, 2006

Dataset: openLCA process, unit process
Category: 31-33: Manufacturing/3221: Pulp, Paper, and Paperboard Mills
Geography: Northern America
Time period: 2005-12-31 to 2005-12-31
Allocation method: no allocation
Generated by: Caroline Gaudreault
Reviewer: Martha Stevenson
Published in: AF&PA (2010). Printing & Writing Papers LCA
restrictionsDescription: All information can be accessed by everybody.
copyright: false

## General comment
Uncoated Freesheet, average North American production, at mill. By-products were allocated 0% of the impacts to enable the user to choose and apply their own allocation method more easily. All flows are production-weighted means. Data were developed for a full LCA that was critically reviewed. Reviewers were: • Martha Stevenson, Chairperson – Private Consultant to the public interest with ten years of experience in sustainability, environmental management, packaging and materials recovery; led the development of the Design Guidelines for Sustainable Packaging and the COMPASS software used to compare the environmental impacts of package designs; • Pascal Lesage – Life cycle assessment consultant, Researcher at École Polytechnique de Montréal [at the Inter-University Research Centre for the Life Cycle of Products, Processes and Services (CIRAIG) in Montreal]; and • Dale Phenicie, Environmental Affairs Consulting – Consultant with 35 years of experience in environmental protection and process consulting for the forest products industry. Has served on several U.S. EPA Task Forces dealing with water quality issues and authored several AF&PA Environmental, Health and Safety/Sustainability reports.

## Technology
current technology mix for uncoated freesheet

## Time period
Primary data collected from participating companies and associations for their operational activities are representative for 2006 and 2007.

## Reference product
- Paper, freesheet, uncoated, average production, at mill [RNA]: 861.83 kg
  861.83 dry kg is equal to 1 market-dried short ton (5% water).

## By-products
- Tall oil, at uncoated freesheet mill [RNA]: 21.818 kg
  Produced as byproduct of pulp production. Sold i.e., not used on site. Allocation set to 0%.
- Steam, at uncoated freesheet mill [RNA]: 129 MJ
  (same comment as for Tall oil, at uncoated freesheet mill)
- Electricity, at uncoated freesheet mill [RNA]: 65 kWh
  (same comment as for Tall oil, at uncoated freesheet mill)
- Turpentine, at uncoated freesheet mill [RNA]: 1.6919 kg
  (same comment as for Tall oil, at uncoated freesheet mill)

## Inputs from technosphere
- Sodium chlorate, at plant: 27.261 kg
  ei: Sodium chlorate, powder, at plant
- Sizer, at plant: 6.0328 kg
  ei: AKD sizer, in paper production, at plant/RER U or Rosin size, in paper production, at plant
- Sodium hydroxide, production mix, at plant [US]: 14.47 kg
- Electricity from hydro: 5.1944 kWh
  Generation at company facilities. Ei: Electricity, hydropower, at run-of-river power plant
- Disposal, solid waste, unspecified, to unspecified landfill: 25.583 kg
  Typically company-owned, but some third party.
- Sulfuric acid, at plant [RNA]: 15.513 kg
- Transport, combination truck, average fuel mix [RNA]: 1.7958 t*km
  Transport of packaging. Paper: 113 km. Containerboard: 201 km.
- Transport, pipeline, natural gas [RNA]: 122 t*km
  Transports of fuels. Natural gas: 33584 tkm/MMcf, Average transportation for natural gas in North America according to the US LCI database
- Transport, aircraft, freight [RNA]: 0.02044 t*km
  Transport of packaging. Paper: 1663
- Quicklime, at plant [RNA]: 61.725 kg
  For production of precipitated calcium carbonate on site
- Disposal, solid waste, unspecified, to unspecified incinerator: 0.0016329 kg
  Typically on-site with energy recovery.
- Pulpwood; softwood; average; at forest road [US]: 0.3045 m3; provider Pulpwood, softwood, average, at forest road, INW
  Mass of incoming southern softwood logs intended for pulping. Assumed density: 450 kg/m3. US LCI: "Softwood logs with bark, harvested at average intensity site, at mill, US SE/US" can be used but transportation needs to be removed as it is already included here. Wood usage in the process is distrubuted as follows: 33% ends up in pulp, 27% in self-generated hogged fuel and 40% in black liquor. All the hogged fuel is combusted onsite. Combustion of this fuel is important to the economic viability of all modern pulp mills. Substitution of other fuels for this fuel is not recommended. Need to be paired with "Self-generated hogged fuel, combusted in industrial boiler, at pulp and paper mill". Black liquor solides are combusted onsite as part of the pulping chemical recovery process that is integral to and is essential to the economic viability of all modern pulp mills. Substitution of other fuels for this fuel is not recommended.
- Disposal, wastewater treatment plant residuals, to uns. beneficial use: 4.8807 kg
  Typically off-site. (uns. = unspecified)
- Disposal, wastewater treatment plant residuals, to uns. landfill: 19.051 kg
  Typically company-owned, but some third party. (uns. = unspecified)
- Pulp, deinked market, bleached, at mill: 26.762 kg
- Electricity, at grid [RNA]: 387.2, 92.237 kWh (2 entries); provider Electricity, at Grid, US, 2010
  Net purchased, National average grid, Medium voltage: <50 kV
- Transport, barge, average fuel mix [RNA]: 7.3269 t*km
  Transportation of chemicals. Kaolin: 0 km. Sodium hydroxide: 776 km. Sodium chlorate, sulfuric acid, hydrogen peroxide, Precipitated calcium carbonate, Quicklime and oxygen: 489 km. Methanol: 671 km. Transports of fuels. Coal: 515 km. Residual fuel oil, Distillate fuel oil: 163 km. Kerosene and gasoline, Other fossil assumed to be diesel : 163 km. Tire derived fuel: 315 km.
- Transport, ocean freighter, average fuel mix [RNA]: 5.3373 t*km
  Transportation of chemicals. Kaolin: 0 km. Sodium hydroxide: 24.1 km. Sodium chlorate, sulfuric acid, hydrogen peroxide, Precipitated calcium carbonate, Quicklime and oxygen: 517 km. Methanol: 740 km. Transports of fuels. Residual fuel oil , Distillate fuel oil: 682 km. Kerosene and gasoline, Other fossil assumed to be diesel: 1183 km.
- Pulp, kraft market, bleached, average production, at mill [RNA]: 64.41 kg
- Paper, freesheet, uncoated, average production, at mill [RNA]: 7.6657 kg
  Packaging material
- Transport, train, diesel powered [RNA]: 73.874 t*km
  Transport market pulp. Bleached kraft market pulp, Deinked bleached market pulp: 1452 km.
- Optical brightner, at plant: 1.2156 kg
  ei: Optical brighteners, in paper production, at plant
- Pulpwood, softwood, average, at forest road [RNA]: 0.065 m3; provider Pulpwood, softwood, average, at forest road, NE-NC
  Mass of incoming northern softwood logs (assumed 63.5% East/Central based on mill location) intended for pulping. Assumed density: 450 kg/m3. Wood usage in the process is distrubuted as follows: 33% ends up in pulp, 27% in self-generated hogged fuel and 40% in black liquor. All the hogged fuel is combusted onsite. Combustion of this fuel is important to the economic viability of all modern pulp mills. Substitution of other fuels for this fuel is not recommended. Need to be paired with "Self-generated hogged fuel, combusted in industrial boiler, at pulp and paper mill". Black liquor solides are combusted onsite as part of the pulping chemical recovery process that is integral to and is essential to the economic viability of all modern pulp mills. Substitution of other fuels for this fuel is not recommended.
- Disposal, solid waste, unspecified, to unspecified beneficial use: 4.3998 kg
  Typically off-site.
- Starch, at plant: 32.84 kg
  ei: Maize starch, at plant and/or Potato starch, at plant
- Oxygen, liquid, at plant [RNA]: 3.2114 kg
- Sawdust; softwood; green; at sawmill [US]: 29.484 kg
  Mass of incoming sawdusts intended for pulping. US LCI: "Sawdust, at sawmill, US SE/kg" can be used as a proxy. The actual mix of sawdustsis the same as the one for pulp chips. Sawdust usage in the process is distrubuted as follows: 46% ends up in pulp and 54% in black liquor. Combusted onsite as part of the pulping chemical recovery process that is integral to and is essential to the economic viability of all modern pulp mills. Substitution of other fuels for this fuel is not recommended.
- Containerboard, average production, at mill [US]: 19.323 kg
  Packaging material
- Disposal, unspecified ashes, to unspecified landfill: 30.3 kg
  Mix of wood and coal ashes. Based on typical ash contents can be assumed to be 78% from wood and 22% from coal. Typically company-owned, but some third party.
- Transport, combination truck, average fuel mix [RNA]: 12.921 t*km
  Transport market pulp. Bleached kraft market pulp, Deinked bleached market pulp: 256 km.
- Transport, train, diesel powered [RNA]: 309.1 t*km
  Transportation of chemicals. Kaolin: 1204 km. Sodium hydroxide: 927 km. Sodium chlorate, sulfuric acid, hydrogen peroxide, Precipitated calcium carbonate, Quicklime and oxygen: 1088 km. Methanol: 1254 km. Starch: 1788 km. Optical brighteners: 2313 km. Sizers: 2438 km. Transports of fuels. Coal: 653 km. Residual fuel oil, Distillate fuel oil: 1114 km. Liquefied petroleum gas: 1246 km. Tire derived fuel: 1156 km.
- Disposal, unspecified ashes, to unspecified land application: 11.975 kg
  Mix of wood and coal ashes. Based on typical ash contents can be assumed to be 78% from wood and 22% from coal. Typically off-site agricultural/silvicultural.
- Disposal, solid waste, unspecified, to unspecified land application: 7.7836 kg
  Typically off-site agricultural/silvicultural
- Transport, train, diesel powered [RNA]: 76.94 t*km
  Transportation of pulpwood and chips to pulp mill. Pulpwood: 375 km, chips: 127 km.
- Transport, combination truck, average fuel mix [RNA]: 516.83 t*km
  Transportation of pulpwood and chips to pulp mill. Pulpwood: 200 km (rounded trip distance), chips: 254 km (rounded trip distance).
- Chips; softwood; green; at sawmill [US]: 823.72 kg
  Mass of incoming pulp chips intended for pulping. US LCI: "Pulp chips, at sawmill,US SE/kg" can be used as a proxy. The actual mix of chips is: northern softwood chips: 66%, northern hardwood chips: 18%, southern softwood chips: 11% and southern hardwood chips: 6%. Pulp chips usage in the process is distrubuted as follows: 46% ends up in pulp and 54% in black liquor. Combusted onsite as part of the pulping chemical recovery process that is integral to and is essential to the economic viability of all modern pulp mills. Substitution of other fuels for this fuel is not recommended.
- Clay, at mine: 0.83915 kg
  ei: Kaolin
- Pulpwood; softwood; average; at forest road [US]: 0.0548 m3; provider Pulpwood, softwood, average, at forest road, INW
  Mass of incoming northern softwood logs (assumed 36.5% West based on mill location) intended for pulping. Assumed density: 450 kg/m3. Wood usage in the process is distrubuted as follows: 33% ends up in pulp, 27% in self-generated hogged fuel and 40% in black liquor. All the hogged fuel is combusted onsite. Combustion of this fuel is important to the economic viability of all modern pulp mills. Substitution of other fuels for this fuel is not recommended. Need to be paired with "Self-generated hogged fuel, combusted in industrial boiler, at pulp and paper mill". Black liquor solides are combusted onsite as part of the pulping chemical recovery process that is integral to and is essential to the economic viability of all modern pulp mills. Substitution of other fuels for this fuel is not recommended.
- Precipitated calcium carbonate, at plant: 12.247 kg
- Pulpwood; hardwood; average; at forest road [US]: 0.1674 m3; provider Pulpwood, hardwood, average, at forest road, NE-NC
  Mass of incoming northern hardwood logs intended for pulping. Assumed density: 650 kg/m3. Wood usage in the process is distrubuted as follows: 33% ends up in pulp, 27% in self-generated hogged fuel and 40% in black liquor. All the hogged fuel is combusted onsite. Combustion of this fuel is important to the economic viability of all modern pulp mills. Substitution of other fuels for this fuel is not recommended. Need to be paired with "Self-generated hogged fuel, combusted in industrial boiler, at pulp and paper mill". Black liquor solides are combusted onsite as part of the pulping chemical recovery process that is integral to and is essential to the economic viability of all modern pulp mills. Substitution of other fuels for this fuel is not recommended.
- Disposal, wastewater treatment plant residuals, to uns. Incinerator: 13.88 kg
  Typically on-site with energy recovery. (uns. = unspecified)
- Disposal, unspecified ashes, to unspecified beneficial use: 7.3573 kg
  Mix of wood and coal ashes. Based on typical ash contents can be assumed to be 78% from wood and 22% from coal. Typically off-site.
- Disposal, wastewater treatment plant residuals, to uns. land application: 6.7041 kg
  Typically off-site agricultural/silvicultural. (uns. = unspecified)
- Pulp slurry, kraft market, bleached, average production, at mill: 39.281 kg
- Fuels, burned at uncoated freesheet, average production, at mill [RNA]: 13563 MJ
  Includes all fuels burned on site
- Hydrogen peroxide, at plant: 0.86636 kg
  ei: Hydrogen peroxide, 50% in H2O, at plant
- Transport, train, diesel powered [RNA]: 3.1973 t*km
  Transport of packaging. Paper: 1075 km. Containerboard: 1410 km.
- Transport, combination truck, average fuel mix [RNA]: 306.02 t*km
  Transportation of chemicals. Kaolin: 295 km. Sodium hydroxide: 230 km. Sodium chlorate, sulfuric acid, hydrogen peroxide, Precipitated calcium carbonate, Quicklime and oxygen: 183 km. Methanol: 632 km. Starch: 510 km. Obtical brighteners: 270 km. Sizers: 282 km. Transports of fuels. Coal: 153 km. Residual fuel oil, Distillate fuel oil: 50 km. Liquefied petroleum gas, Kerosene and gasoline, Other fossil assumed to be diesel: 80 km. Tire derived fuel: 98 km.
- Electricity, at grid, ON: 0.9608 kWh
- Pulpwood; hardwood; average; at forest road [US]: 0.3645 m3; provider Pulpwood, hardwood, average, at forest road, NE-NC
  Mass of incoming southern hardwood logs intended for pulping. Assumed density: 650 kg/m3. US LCI: "Roundwood, hardwood, green, at mill, SE/US" can be used but transportation needs to be removed as it is already included here. Wood usage in the process is distrubuted as follows: 33% ends up in pulp, 27% in self-generated hogged fuel and 40% in black liquor. All the hogged fuel is combusted onsite. Combustion of this fuel is important to the economic viability of all modern pulp mills. Substitution of other fuels for this fuel is not recommended. Need to be paired with "Self-generated hogged fuel, combusted in industrial boiler, at pulp and paper mill". Black liquor solides are combusted onsite as part of the pulping chemical recovery process that is integral to and is essential to the economic viability of all modern pulp mills. Substitution of other fuels for this fuel is not recommended.

## Inputs from nature
- Water [resource, water]: 10890 kg
  Estimated based on individual mill process effluent and cooling water flows and process characteristics. Share between process and cooling estimated. Includes evaporation and other losses (e.g., water in solid waste).
- Water [resource, water]: 62892 kg
  Estimated based on individual mill process effluent and cooling water flows and process characteristics. Share between process and cooling estimated.

## Emissions to nature
- Lead [emission, ground]: 0.013586 kg
  From onsite management of solid waste. All metals reported as elemental althought in most cases they are releases into metal compounds.
- Methanol [emission, air]: 0.391 kg
  From process
- Nickel [emission, water]: 0.00015365 kg
  In effluent.
- Formaldehyde [emission, ground]: 5.8399e-5 kg
  (same comment as for Lead)
- Zinc [emission, water]: 0.0011237 kg
  In effluent.
- Water [emission, air]: 1042 kg
  (same comment as for Water)
- Water [emission, water]: 10890 kg
  (same comment as for Water)
- Carbon dioxide [emission, air]: -16.203, -32.295 kg (2 entries)
  From process (Precipitated Calcium Carbonate (PCC) production on site). Some emissions reported under "Fuels burned at uncoated freesheet, average producion, at mill" are capture to produce PCC
- Manganese [emission, water]: 0.021633 kg
  In effluent.
- Manganese [emission, ground]: 0.10431 kg
  (same comment as for Lead)
- Phenol [emission, water]: 5.6344e-5 kg
  In effluent.
- Ammonia [emission, ground]: 0.00013705 kg
  (same comment as for Lead)
- Copper [emission, water]: 0.00013912 kg
  In effluent.
- Mercury [emission, ground]: 1.0417e-5 kg
  (same comment as for Lead)
- Biological Oxygen Demand [emission, water]: 1.4622 kg
  In effluent.
- Acetaldehyde [emission, air]: 0.034881 kg
  From process
- Nitrogen [emission, water]: 0.45089 kg
  In effluent.
- Zinc [emission, ground]: 0.046004 kg
  (same comment as for Lead)
- Arsenic [emission, water]: 0.00015976 kg
  In effluent.
- Adsorbable organic halides [emission, water]: 0.12383 kg
  In effluent.
- Chromium [emission, ground]: 0.0075148 kg
  (same comment as for Lead)
- Nickel [emission, ground]: 0.0016988 kg
  (same comment as for Lead)
- Vanadium [emission, ground]: 0.0019921 kg
  (same comment as for Lead)
- Polycyclic aromatic hydrocarbons [emission, ground]: 2.3321e-5 kg
  (same comment as for Lead)
- Chromium [emission, water]: 0.00018805 kg
  In effluent.
- Suspended solids, inorganic [emission, water]: 2.15 kg
  In effluent.
- Phenol [emission, ground]: 1.7969e-5 kg
  (same comment as for Lead)
- Ammonia [emission, air]: 0.1041 kg
  From process
- Lead [emission, water]: 4.4642e-5 kg
  In effluent.
- Formaldehyde [emission, water]: 0.0024205 kg
  In effluent.
- Arsenic [emission, ground]: 0.002519 kg
  (same comment as for Lead)
- Vanadium [emission, water]: 0.00069256 kg
  In effluent.
- Acetaldehyde [emission, water]: 0.0028363 kg
  In effluent.
- Barium [emission, water]: 0.0030806 kg
  In effluent.
- 2,4,5-T [emission, water]: 63372 kg
  (same comment as for Water)
- Ammonia [emission, water]: 0.013123 kg
  In effluent.
- Phosphorus [emission, water]: 0.057065 kg
  In effluent.
- Methanol [emission, water]: 0.017095 kg
  In effluent.
- Polycyclic aromatic hydrocarbons [emission, water]: 4.5162e-6 kg
  In effluent.
- Acetaldehyde [emission, ground]: 0.00011886 kg
  (same comment as for Lead)
- Chloromethane [emission, water]: 4.3902e-9 kg
  In effluent.
- Barium [emission, ground]: 0.045591 kg
  (same comment as for Lead)
- Copper [emission, ground]: 0.007293 kg
  (same comment as for Lead)
- Mercury [emission, water]: 2.3697e-7 kg
  In effluent.

## Allocation factors
- causal, Paper, freesheet, uncoated, average production, at mill, for Chromium: 1
- causal, Paper, freesheet, uncoated, average production, at mill, for Optical brightner, at plant: 1
- causal, Electricity, at uncoated freesheet mill, for Pulp, deinked market, bleached, at mill: 0
- causal, Steam, at uncoated freesheet mill, for Pulpwood; softwood; average; at forest road: 0
- causal, Tall oil, at uncoated freesheet mill, for Oxygen, liquid, at plant: 0
- causal, Turpentine, at uncoated freesheet mill, for Polycyclic aromatic hydrocarbons: 0
- causal, Paper, freesheet, uncoated, average production, at mill, for Barium: 1
- causal, Electricity, at uncoated freesheet mill, for Nitrogen: 0
- causal, Tall oil, at uncoated freesheet mill, for Sizer, at plant: 0
- causal, Steam, at uncoated freesheet mill, for Sizer, at plant: 0
- causal, Turpentine, at uncoated freesheet mill, for Copper: 0
- causal, Electricity, at uncoated freesheet mill, for Water: 0
- causal, Paper, freesheet, uncoated, average production, at mill, for Clay, at mine: 1
- causal, Turpentine, at uncoated freesheet mill, for Phosphorus: 0
- causal, Tall oil, at uncoated freesheet mill, for Transport, train, diesel powered: 0
- causal, Electricity, at uncoated freesheet mill, for Ammonia: 0
- causal, Turpentine, at uncoated freesheet mill, for Disposal, wastewater treatment plant residuals, to uns. land application: 0
- causal, Paper, freesheet, uncoated, average production, at mill, for Lead: 1
- causal, Steam, at uncoated freesheet mill, for Arsenic: 0
- causal, Turpentine, at uncoated freesheet mill, for Pulp slurry, kraft market, bleached, average production, at mill: 0
- causal, Electricity, at uncoated freesheet mill, for Adsorbable organic halides: 0
- causal, Steam, at uncoated freesheet mill, for Acetaldehyde: 0
- causal, Turpentine, at uncoated freesheet mill, for Ammonia: 0
- causal, Tall oil, at uncoated freesheet mill, for Electricity, at grid: 0
- physical, Steam, at uncoated freesheet mill: 0
- causal, Electricity, at uncoated freesheet mill, for Lead: 0
- causal, Electricity, at uncoated freesheet mill, for Pulp, kraft market, bleached, average production, at mill: 0
- causal, Turpentine, at uncoated freesheet mill, for Zinc: 0
- causal, Steam, at uncoated freesheet mill, for Pulp, kraft market, bleached, average production, at mill: 0
- causal, Paper, freesheet, uncoated, average production, at mill, for Arsenic: 1
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
## Sampling procedure
The survey included results from 31 paper mills representing 10.6 million short tons per year (TPY), nearly 75% of 2006/2007 North American production volume.

## Sources
- AF&PA (2010). Printing & Writing Papers LCA
