# Transport, passenger truck, gasoline powered

Dataset: openLCA process, unit process
Category: 48-49: Transportation and Warehousing/4859: Other Transit and Ground Passenger Transportation
Geography: Northern America
Time period: 2009-12-31 to 2009-12-31
Allocation method: no allocation
Generated by: Nathan Hardesty
Published in: U.S. Environmental Protection Agency (EP
restrictionsDescription: All information can be accessed by everybody.
copyright: false

## General comment
This dataset represents the U.S. average airborne emissions for operating a gasoline powered passenger truck. The inventory includes all vehicle operation processes, including off-network and refueling activities.
The refinery-to-pump transportation and distribution data are calculated from Argonne National Laboratory's GREET 1.8d.1 model.
The vehicle operation data are calculated from EPA's MOVES2010a model, using the assumptions described in the corresponding detailed spreadsheet. Emissions factors in MOVES2010a are largely based on EPA's Mobile Source Observation Database, which in turn includes data from a variety of vehicle studies (References 6-8).
MOVES2010a acknowledges sources of uncertainty in the model structure, the population and acitivty data, and other model parameters. As of July 2011, the uncertainty calculation function of the model has not been activated.

## Technology
Combustion of gasoline in a passenger truck.

## Geography
US

## Reference product
- Transport, passenger truck, gasoline powered [RNA]: 1 p*km

## Inputs from technosphere
- Transport, train, diesel powered [RNA]: 0.0426277 t*km
- Transport, combination truck, average fuel mix [RNA]: 0.0228318 t*km
- Gasoline, at refinery: 0.0784066 l; provider Petroleum refining, at refinery
- Transport, pipeline, unspecified petroleum products [RNA]: 0.224109 t*km
- Transport, ocean freighter, average fuel mix [RNA]: 0.195204 t*km
- Transport, barge, average fuel mix [RNA]: 0.0147921 t*km

## Emissions to nature
- Volatile organic compounds [emission, air]: 0.000383999 kg
- Nitrogen dioxide [emission, air]: 5.27243e-5 kg
- Nitrogen oxides [emission, air]: 0.000487033, 0.000539757 kg (2 entries)
- Carbon dioxide [emission, air]: 0.179701 kg
- Sulfur dioxide [emission, air]: 3.34218e-6 kg
- Particulate matter, ≤ 2.5μm [emission, air]: 7.62515e-6 kg
  PM2.5 from organic carbon, elemental carbon, and sulfate particulates.
- Particulate matter, ≤ 2.5μm [emission, air]: 4.76085e-7 kg
  PM2.5 from tirewear.
- Hydrocarbons [emission, air]: 0.000376395 kg
- Carbon monoxide [emission, air]: 0.0046627 kg
- Particulate matter, ≤ 10μm [emission, air]: 6.76274e-6 kg
  PM10 from brakewear.
- Nitrous oxide [emission, air]: 1.22719e-5 kg
- Particulate matter, ≤ 10μm [emission, air]: 1.98527e-6 kg
  PM10 from tirewear.
- Ammonia [emission, air]: 1.33714e-5 kg
- Particulate matter, ≤ 2.5μm [emission, air]: 1.77035e-6 kg
  PM2.5 from brakewear.
- Methane [emission, air]: 1.793e-5 kg
- Particulate matter, ≤ 10μm [emission, air]: 8.28088e-6 kg
  PM10 from organic carbon, elemental carbon, and sulfate particulates.

## Sources
- Wang, M.
- Assessment and Standards Division, Offic
- EPA
- Assessment and Standards Division, Offic
- Oak Ridge National Laboratory
- U.S. Environmental Protection Agency (EP
- Eastern Research Group
- National Institute of Standards and Tech
- U.S. Alternative Fuels and Advanced Vehi
