# Hog fuel, self-gen., combusted in ind. boiler, at pulp and paper mill (EXCL.)

Dataset: openLCA process, unit process
Category: 31-33: Manufacturing/3221: Pulp, Paper, and Paperboard Mills
Geography: Northern America
Allocation method: no allocation
Generated by: Caroline Gaudreault
Reviewer: Martha Stevenson
Published in: Franklin Associates (2004) Wood Combustion
restrictionsDescription: All information can be accessed by everybody.
copyright: false

## General comment
This process, "Hog fuel, self-generated, combusted in industrial boiler, at pulp and paper mill", was built to be used within the processes named "Fuels burned at bleached kraft market pulp mill", "Fuels burned at uncoated freesheet paper mill", "Fuels burned at coated freesheet paper mill", "Fuels burned at uncoated mechanical paper mill", "Fuels burned at coated mechanical paper mill" and "Fuels burned at bag and sack paper mill". It was built from the process named "Wood waste, combusted in industrial boiler" v.1.0 available in the US LCI database. Wood input, transport and waste processes were removed. The following emissions to air were excluded (excl.): Sulfur oxidesand Nitrogen oxides. These processes and emissions are reported in pulp and paper mill process chain in which this process is integrated.
Converted previous version from the assumption of 50% MC green basis; 100% MC od basis to OD basis to align with CORRIM calculations. Important note: although most of the data in the US LCI database has
undergone some sort of review, the database as a whole has not yet
undergone a formal validation process.
Please email comments to lci@nrel.gov.

## Technology
Typical

## Geography
US

## Reference product
- Hog fuel, self-gen., combusted in ind. boiler, at pulp and paper mill (EXCL.) [RNA]: 1 kg
  Wood inputs are taken into account in the pulp and paper mill

## Emissions to nature
- Nickel [emission, air]: 2.97e-7 kg
- Carbon dioxide [emission, air]: 1.83 kg
  1.83 kg CO2/kg of wood to preserve mass balance (Printing & Writing Papers Life-Cycle Assessment Summary Report)
- Formaldehyde [emission, air]: 3.96e-5 kg
- Carbon monoxide [emission, air]: 0.0054 kg
- Acrolein [emission, air]: 3.6e-5 kg
- Acetaldehyde [emission, air]: 7.47e-6 kg
- Metals [emission, air]: 0.00038494 kg
- Arsenic [emission, air]: 1.98e-7 kg
- Biological Oxygen Demand [emission, water]: 0.0175 kg
- Beryllium [emission, air]: 9.9e-9 kg
- Methylene chloride [emission, air]: 2.61e-6 kg
- Lead [emission, air]: 4.32e-7 kg
- Chlorine [emission, air]: 7.11e-6 kg
- Particulate matter, > 2.5μm and ≤ 10μm [emission, air]: 0.0045 kg
- Chromium [emission, air]: 1.89e-7 kg
- Total Organic Carbon [emission, air]: 3.681e-5 kg
- Selenium [emission, air]: 2.52e-8 kg
- Mercury [emission, air]: 3.15e-8 kg
- Naphthalene [emission, air]: 8.73e-7 kg
- Benzene [emission, air]: 3.78e-5 kg
- Cobalt [emission, air]: 5.85e-8 kg
- Carbon tetrachloride [emission, air]: 4.05e-7 kg
- Manganese [emission, air]: 1.44e-5 kg
- Antimony [emission, air]: 7.11e-8 kg
- Cadmium [emission, air]: 3.69e-8 kg
- Methane [emission, air]: 0.000189 kg
- Phenols [emission, air]: 4.59e-7 kg
- Hydrochloric acid [emission, air]: 0.000171 kg
- 2,3,7,8-Tetrachlorodibenzo-p-dioxin [emission, air]: 1.503e-8 kg

## Sources
- AF&PA (2010). Printing & Writing Papers LCA
- U.S. EPA
- Franklin Associates (2004) Wood Combustion
- Argonne National Laboratory
- U.S. DoE
- Kaminski, Paul
- Sassenrath, Charles P
- Combustion Engineering Inc.
