# Transport, refuse truck, diesel powered, Northeast region

Dataset: openLCA process, unit process
Category: 56: Administrative and Support and Waste Management and Remediation Services/5621: Waste Collection
Geography: Northern America
Time period: 2009-12-31 to 2009-12-31
Allocation method: no allocation
Generated by: Nathan Hardesty
Published in: U.S. Environmental Protection Agency (EP
restrictionsDescription: All information can be accessed by everybody.
copyright: false

## General comment
This dataset represents the Northeast U.S. average airborne emissions for operating a diesel powered refuse truck. The inventory includes all vehicle operation processes, including off-network and refueling activities.
The refinery-to-pump transportation and distribution data are calculated from Argonne National Laboratory's GREET 1.8d.1 model.
The vehicle operation data are calculated from EPA's MOVES2010a model, using the assumptions described in the corresponding detailed spreadsheet. Emissions factors in MOVES2010a are largely based on EPA's Mobile Source Observation Database, which in turn includes data from a variety of vehicle studies (References 6-8).
MOVES2010a acknowledges sources of uncertainty in the model structure, the population and acitivty data, and other model parameters. As of July 2011, the uncertainty calculation function of the model has not been activated.

## Technology
Combustion of diesel in a refuse truck.

## Geography
U.S. Northeast climate region: CT, DC, DE, ME, MD, MA, NH, NJ, NY, PA, RI, VT (NOAA, Reference 10)

## Reference product
- Transport, refuse truck, diesel powered [RNA]: 1 t*km

## Inputs from technosphere
- Transport, ocean freighter, average fuel mix [RNA]: 0.0846855 t*km
- Transport, combination truck, average fuel mix [RNA]: 0.0123874 t*km
- Transport, pipeline, unspecified petroleum products [RNA]: 0.124861 t*km
- Transport, barge, average fuel mix [RNA]: 0.0119815 t*km
- Diesel, at refinery: 0.0384276 l; provider Petroleum refining, at refinery
- Transport, train, diesel powered [RNA]: 0.0231165 t*km

## Emissions to nature
- Particulate matter, ≤ 10μm [emission, air]: 1.18083e-6 kg
  PM10 from tirewear.
- Carbon dioxide [emission, air]: 0.100892 kg
- Ammonia [emission, air]: 1.46214e-6 kg
- Carbon monoxide [emission, air]: 0.000223969 kg
- Particulate matter, ≤ 2.5μm [emission, air]: 2.83173e-7 kg
  PM2.5 from tirewear.
- Particulate matter, ≤ 10μm [emission, air]: 5.05732e-6 kg
  PM10 from brakewear.
- Particulate matter, ≤ 10μm [emission, air]: 4.12528e-5 kg
  PM10 from organic carbon, elemental carbon, and sulfate particulates.
- Methane [emission, air]: 1.1355e-6 kg
- Particulate matter, ≤ 2.5μm [emission, air]: 1.32391e-6 kg
  PM2.5 from brakewear.
- Hydrocarbons [emission, air]: 4.26366e-5 kg
- Volatile organic compounds [emission, air]: 4.39516e-5 kg
- Nitrogen oxides [emission, air]: 0.000711147, 0.000774028 kg (2 entries)
- Nitrogen dioxide [emission, air]: 6.2883e-5 kg
- Sulfur dioxide [emission, air]: 1.68744e-6 kg
- Nitrous oxide [emission, air]: 1.61103e-7 kg
- Particulate matter, ≤ 2.5μm [emission, air]: 4.00168e-5 kg
  PM2.5 from organic carbon, elemental carbon, and sulfate particulates.

## Sources
- Wang, M.
- Assessment and Standards Division, Offic
- EPA
- National Climatic Data Center, National
- Assessment and Standards Division, Offic
- Alam & Rajamanickam (2007). Development of TPEF
- U.S. Environmental Protection Agency (EP
- Eastern Research Group
- National Institute of Standards and Tech
- U.S. Alternative Fuels and Advanced Vehi
