# Natural gas, combusted in industrial equipment

Dataset: openLCA process, unit process
Category: 22: Utilities/2213: Water, Sewage and Other Systems
Geography: Northern America
Time period: 1998-12-31 to 2002-12-31
Allocation method: no allocation
Generated by: Jeff Hernbloom
Published in: Franklin Associates (2003) Natural Gas Equipment Combustion
restrictionsDescription: All information can be accessed by everybody.
copyright: false

## General comment
Important note: although most of the data in the US LCI database has
undergone some sort of review, the database as a whole has not yet
undergone a formal validation process.
Please email comments to lci@nrel.gov.

## Geography
North America

## Reference product
- Natural gas, combusted in industrial equipment, 1.357 m3/kg, 52.13 MJ/kg [RNA]: 1 m3; provider Natural gas, processed, for energy use, at plant

## Inputs from technosphere
- Transport, combination truck, average fuel mix [RNA]: 0.1985 t*km
  Represents transportation from natural gas plant to combustion.
- Natural gas, production mixture, to energy use: 1 m3; provider Natural gas, processed, for energy use, at plant
- Transport, pipeline, natural gas [RNA]: 1.186 t*km
  Represents transportation from natural gas plant to combustion.
- Transport, train, diesel powered [RNA]: 0.011858 t*km
  Represents transportation from natural gas plant to combustion.

## Emissions to nature
- Volatile organic compounds [emission, air]: 3.438e-5 kg
- Nitrogen oxides [emission, air]: 0.0016666 kg
- Toluene [emission, air]: 2.124e-6 kg
- Propylene oxide [emission, air]: 4.7383e-7 kg
- 1,3-Butadiene [emission, air]: 7.0257e-9 kg
- Sulfur oxides [emission, air]: 1.0126e-5 kg
- Formaldehyde [emission, air]: 1.1601e-5 kg
- Carbon monoxide [emission, air]: 0.00024557 kg
- Xylene [emission, air]: 1.0457e-6 kg
- Benzene [emission, air]: 1.9607e-7 kg
- Methane [emission, air]: 0.00013948 kg
- Acrolein [emission, air]: 1.0457e-7 kg
- Acetaldehyde [emission, air]: 6.5355e-7 kg
- Polycyclic aromatic hydrocarbons [emission, air]: 3.5945e-8 kg
- Naphthalene [emission, air]: 2.124e-8 kg
- Ethylbenzene [emission, air]: 5.2284e-7 kg
- Particulate matter, > 2.5μm and ≤ 10μm [emission, air]: 0.00010772 kg
- Carbon dioxide [emission, air]: 1.962 kg

## Sources
- U.S. EPA Office of Solid Waste and Emerg
- Center for Transportation Research, Argo
- unspecified
- EPA
- Franklin Associates (2003) Natural Gas Equipment Combustion
