# Electricity, at grid, Western US, 2000

Dataset: openLCA process, unit process
Category: 22: Utilities/2211: Electric Power Generation, Transmission and Distribution
Geography: Northern America
Time period: 1999-12-31 to 1999-12-31
Allocation method: no allocation
Generated by: James Littlefield, Franklin Associates
Published in: Franklin Associates (2003) Electricity Generation
restrictionsDescription: All information can be accessed by everybody.
copyright: false

## General comment
Important note: although most of the data in the US LCI database has
undergone some sort of review, the database as a whole has not yet
undergone a formal validation process.
Please email comments to lci@nrel.gov.

## Technology
Representative of year 2000 mix of fuels used for utility electricity generation in the Western U.S. Fuels include coals, fuel oil, nuclear, hydroelectric, and unconventional energy sources. Data are weighted according to percent share of consumption. Includes line loss factor of 8.36%, which represents the difference between electricity generated and electricity sold.

## Geography
United States, West

## Reference product
- Electricity, at grid [RNA]: 1 kWh

## Inputs from technosphere
- Electricity, nuclear, at power plant [RNA]: 0.12 kWh
  Accounts for line losses of 8.36%
- Electricity, residual fuel oil, at power plant [RNA]: 0.00641 kWh
  Accounts for line losses of 8.36%
- Electricity, bituminous coal, at power plant [RNA]: 0.351 kWh
  Accounts for line losses of 8.36%
- Electricity, fossil, unspecified, at power plant: 0.00601 kWh
  Accounts for line losses of 8.36%
- Electricity, hydropower, at power plant, unspecified: 0.305 kWh
  Accounts for line losses of 8.36%
- Electricity, photovoltaic, unspecified: 0.00102 kWh
  Accounts for line losses of 8.36%
- Electricity, at wind power plant, unspecified: 0.0062 kWh
  Accounts for line losses of 8.36%
- Electricity, natural gas, at power plant [RNA]: 0.252 kWh
  Accounts for line losses of 8.36%
- Electricity, biomass, at power plant [RNA]: 0.0139 kWh
  Accounts for line losses of 8.36%
- Electricity, geothermal, unspecified: 0.0223 kWh
  Accounts for line losses of 8.36%

## Sources
- Franklin Associates (2003) Electricity Generation
- U.S. Energy Information Administration
- U.S. Environmental Protection Agency
