# Scanner, department, i5200v, i5600v

Dataset: openLCA process, unit process
Category: 31-33: Manufacturing/3341: Computer and Peripheral Equipment Manufacturing
Geography: Global
Time period: 2003-06-09 to 2012-09-14
Allocation method: no allocation
Generated by: Roy Wood
Reviewer: Jay Mathewson
Published in: Wood R (2012) LC GHG Summary Report - Kodak i2900, i3400, i4200, i4600, i5200, i5200v, i5600, i5600v, and i5800 Scanners
restrictionsDescription: All information can be accessed by everybody.
copyright: false

## General comment
Cradle to Gate data for a single 78.6 kg line of production scanners from a single company. Scanner scans at 280-340 A4 images per minute. Use can exceed 200,000 images per day. This cradle to gate data was extracted from a full cradle to end of life LCA. Internal company validation via business and peer review and internal assessment. This dataset was consistent with LCA conducted using same approach as the office scanner LCA, which was peer reviewed by Kate Winnebeck, LCACP, New York State Pollution Prevention Institute , Rochester Institute of Technology. Data is only directly representative for the scanner models i5200v and i5600v. However components and manufacturing process is similar for many scanners, so extrapolation to other similar scanners may be done using judement. Component proxy data for original LCA was from Ecoinvent. Each flow represents one or more parts made with the same materials and processes, which were aggregated. The scanner was manufactured in China with the subcomponents mostly from China. However the best available datasets were used as proxy data and the best data often came from different geographic locations. Some data was replaced in this cradle to gate dataset by USLCI data where appropriate data was available. Unless otherwise noted in a General Comment for individual flows, data described as dummy_ was from Ecoinvent. Waste scrap was 0.5% of input flows. Although these were included in the full LCA, they were not shown to be significant in the modeling and according to a 1% cutoff criteria, have not been included in this cradle to gate data.

## Technology
Best available technology

## Geography
Global

## Time period
start date was based on earliest date of secondary data. Start date of primary data was 2011-07-01

## Reference product
- Scanner, department, i5200v, i5600v [GLO]: 1 Item(s)

## Inputs from technosphere
- Polycarbonate, at plant: 0.539 kg; triangle minimum 0.53, mode 0.537, maximum 0.55
- Cable, connector for computer, without plugs, at plant: 2.9 kg; triangle minimum 2.91, mode 2.87, maximum 2.92
- Light emitting diode, LED, at plant: 0.16 kg; triangle minimum 0.15, mode 0.16, maximum 0.17
- Treatment, sewage, to wastewater treatment, class 1: 207 kg; triangle minimum 186, mode 207, maximum 228
- Tap water, at user: 207 kg; triangle minimum 186, mode 207, maximum 228
- Polyvinyl chloride, PVC, resin; at plant [RNA]: 0.052 kg; triangle minimum 0.051, mode 0.052, maximum 0.053
  original data - polyvinyl chloride ar regional storage, RER/U from Ecoinvent
- Acrylonitrile-butadiene-styrene, ABS, copolymer resin, at plant [RNA]: 9.164 kg; triangle minimum 9.1, mode 9.162, maximum 9.23
  original data - acrylonitrile-butadiene-styrene (ABS), at plant RER/U from Ecoinvent
- Flat glass, uncoated, at plant: 0.2045 kg; triangle minimum 0.2, mode 0.2035, maximum 0.21
- Copper product manufacturing, average metal working: 1.094 kg; triangle minimum 1.08, mode 1.094, maximum 1.108
- Electricity, at grid [RNA]: 37 kWh; triangle minimum 33, mode 37, maximum 41
- Power adapter, for laptop, at plant: 0.808 kg; triangle minimum 0.8, mode 0.804, maximum 0.82
- Electronic component, unspecified, at plant: 0.002 kg; triangle minimum 0.0018, mode 0.002, maximum 0.0022
- Transport, combination truck, diesel powered [RNA]: 76 t*km; triangle minimum 38, mode 57, maximum 133
  original data - transport, lorry &amp;amp;gt;32t, EURO5/ RER U from Ecoinvent
- Carbon black, at plant: 0.055 kg; triangle minimum 0.053, mode 0.055, maximum 0.057
- Polystyrene, high impact, HIPS, resin, at plant [RNA]: 0.164 kg; triangle minimum 0.158, mode 0.164, maximum 0.17
  original data - Polystyrene, high impact, HIPS, at plant, RER/U from Ecoinvent
- Silver, at regional storage: 0.009 kg; triangle minimum 0.008, mode 0.009, maximum 0.01
  silver data was used for neodymium, because there was no neodymium data and silver was the best substitute based on price and cost of production.
- Packaging, production scanners [GLO]: 15.76 kg; triangle minimum 15.7, mode 15.76, maximum 15.82; provider Packaging, Production Scanners
- Polypropylene, PP, virgin resin, at plant [RNA]: 1.146 kg; triangle minimum 1.14, mode 1.146, maximum 1.152
  original data - polypropylene granulate, at plant, RER/U from Ecoinvent
- Cold impact extrusion, aluminium, 1 stroke: 0.425 kg; triangle minimum 0.42, mode 0.425, maximum 0.43
- Printed wiring board, surface mounted, unspec., Pb free, at plant: 2.068 kg; triangle minimum 2.06, mode 2.064, maximum 2.08
- Aluminum ingot, production mix, at plant [US]: 0.425 kg; = 4.25E-4*1000; triangle minimum 0.00042, mode 0.000425, maximum 0.00043
  original data - aluminum, production mix at plant RER/U from Ecoinvent
- Polyethylene terephthalate, granulate, amorphous, at plant: 0.117 kg; triangle minimum 0.11, mode 0.116, maximum 0.125
- Polyurethane, flexible foam, at plant: 0.004 kg; triangle minimum 0.0038, mode 0.004, maximum 0.0042
- LCD glass, at plant: 0.403 kg; triangle minimum 0.4, mode 0.403, maximum 0.406
  About half this quantity was LCD glass and half was lens glass and other highly processed glass. LCD glass was the best available data for lens and other highly processed glass based on cost and manufacturing complexity.
- Polyethylene, linear low-density, LLDPE, virgin resin, at plant: 0.274 kg; triangle minimum 0.27, mode 0.272, maximum 0.28
  original data - LDPE granulate, at plant, RER/U from Ecoinvent
- Tetrafluoroethylene, at plant: 0.032 kg; triangle minimum 0.031, mode 0.032, maximum 0.033
- injection moulding: 12.617 kg; triangle minimum 12.3, mode 12.651, maximum 12.9
- Steel, low-alloyed, at plant: 42.116 kg; triangle minimum 42, mode 42.048, maximum 42.3
- copper, primary, at refinery: 1.094 kg; triangle minimum 1.08, mode 1.094, maximum 1.108
- Flat glass, coated, at plant: 0.2045 kg; triangle minimum 0.2, mode 0.2035, maximum 0.21
- Synthetic rubber, at plant: 0.335 kg; triangle minimum 0.33, mode 0.335, maximum 0.34
- Polyphenylene sulfide, at plant: 0.616 kg; triangle minimum 0.61, mode 0.616, maximum 0.622
- Steel product manufacturing, average metal working: 42.116 kg; triangle minimum 41.8, mode 42.148, maximum 42.4
- Nylon 6, at plant: 0.121 kg; triangle minimum 0.115, mode 0.121, maximum 0.127

## Sampling procedure
engineering specifications, variability less than 1% for this model

## Review details
Data was reviewed to ensure in was consistent with the manufacturing process and components, was based on quality sources - primary data from design and manufacturing specifications, and secondary data was from reliable sources (largely from Ecoinvent) and data was properly documented in final report and associated appendices. Initial review was by Roy Wood, followed by an independent internal review by Jay Mathewson.

## Sources
- Wood R (2012) LC GHG Summary Report - Kodak i2900, i3400, i4200, i4600, i5200, i5200v, i5600, i5600v, and i5800 Scanners
