# Electricity, Western US, 2014

Dataset: openLCA process, unit process
Category: 22: Utilities/2211: Electric Power Generation, Transmission and Distribution
Geography: United States
Time period: 2013-12-31 to 2014-12-30
Allocation method: no allocation
Generated by: Caroline Gaudreault
Owner: Corrugated Packaging Alliance (CPA)
Reviewer: Dr. Lindita Bushi
Published in: NCASI (2017) LCA Average Corrugated Product
restrictionsDescription: All information can be accessed by everybody.
copyright: true

## General comment
The electricity mix for Western US was calculated by considering the quantity of power produced in the U.S. by type of fuel, the quantity of power exported, and the quantity imported from Canada and Mexico. The production mix for the United States was calculated using 2014 data from the U.S. Department of Energy, Energy Information Administration (EIA 2015, forms EIA-906. EIA-920 and EIA-923). Data for 2013 from the International Energy Agency (IEA 2016) were used for Mexico, as these were the most recently available. Since electricity imports from Mexico represent less than 1% of the total energy consumed in the U.S., these data are not expected to have a significant effect on the results. 2014 Canadian data were taken from Statistics Canada.

## Technology
Typical

## Reference product
- Electricity, at grid [RNA]: 1 kWh

## Inputs from technosphere
- Electricity, nuclear, at power plant [RNA]: 0.077 kWh
- Electricity, bituminous coal, at power plant [RNA]: 0.27 kWh
- Electricity, residual fuel oil, at power plant [RNA]: 0.003 kWh
  Petroleum
- Electricity, natural gas, at power plant [RNA]: 0.303 kWh
- Electricity, hydropower, at power plant, unspecified: 0.223 kWh
- Electricity, biomass,solid, unspecified, at power plant: 0.045 kWh
  Proxy for all other fuels.
- Electricity, from renewable source, unspecified: 0.063 kWh
  Proxy for wind power.
- Electricity, biomass, at power plant [RNA]: 0.015 kWh
  Proxy for wood and wood fuels.

## Inventory method
Attributional

## Modelling constants
This dataset have been produced by assembling data from different Canadian, US and Mexican governmental agencies.

## Completeness
Data represent all electricity produced in the US + Canadian and Mexican import/exports.

## Data collection
2013-2014

## Review details
The LCA study that produced this unit process was critically reviewed per ISO 14040 and 14044 standards by Dr. Lindita Bushi, Senior Research Associate of Athena Sustainable Materials Institute.

## Intended application
In order to respond to increasing interest among product manufacturers and consumer retail markets in selecting more sustainable packaging options, CPA engaged NCASI to update the results of a LCA they published in 2014 that relied primarily on 2010 data to the most recent available data (i.e., 2014 data). This electricity dataset is part of that project. SITUATION A -- MICRO-LEVEL DECISION SUPPORT: The intended application for this process is for micro-level decision support as described in Goal Situation A from the ILCD Handbook's Detailed Guidance. These data were developed as specific, average or generic unit process LCI results for use in answering internal company product-related questions. A full inventory of environmental flows are included, thus this unit process can be used for a full range of LCIA impact categories, on the fate and transport considerations have been applied. The original study results were analyzed using the TRACI LCIA factors.

## Project
This dataset is part of an LCA project commissioned by the Corrugated Packaging Alliance (CPA), a joint venture of the American Forest & Paper Association (AF&PA), Fibre Box Association (FBA), the Association of Independent Corrugated Converters (AICC) and TAPPI. For this study, a core project team was established to direct, review, and coordinate the activities associated with the methodologies employed, data collection, modeling, presentation and dissemination of the LCI data and corresponding LCA results. The core group for this project consisted of a technical advisory group within the Fibre Box Association (FBA) Sustainability Committee along with various staff from the National Council for Air and Stream Improvement (NCASI).

## Sources
- NCASI (2017) LCA Average Corrugated Product
