# Transport, train, diesel powered

Dataset: openLCA process, unit process
Category: 48-49: Transportation and Warehousing/4821: Rail Transportation
Geography: Northern America
Time period: 2000-12-31 to 2000-12-31
Allocation method: no allocation
Generated by: Franklin Associates
Published in: Franklin Associates (2003) Locomotive Diesel Transport
restrictionsDescription: All information can be accessed by everybody.
copyright: false

## General comment
Important note: although most of the data in the US LCI database has
undergone some sort of review, the database as a whole has not yet
undergone a formal validation process.
Please email comments to lci@nrel.gov.

## Technology
Combustion of diesel in a locomotive.

## Geography
United States

## Reference product
- Transport, train, diesel powered [RNA]: 1 t*km

## Inputs from technosphere
- Diesel, at refinery: 0.006482 l

## Emissions to nature
- Carbon dioxide [emission, air]: 0.018949 kg
- Carbon monoxide [emission, air]: 4.912e-5 kg
- Nitrous oxide [emission, air]: 4.7458e-7 kg
- Sulfur oxides [emission, air]: 4.1881e-6 kg
- Volatile organic compounds [emission, air]: 1.8466e-5 kg
- Particulate matter, ≤ 10μm [emission, air]: 1.2372e-5 kg
- Methane [emission, air]: 9.0485e-7 kg
- Nitrogen oxides [emission, air]: 0.00049859 kg

## Sources
- Center for Transportation Research, Argo
- Association of American Railroads
- Franklin Associates (2003) Locomotive Diesel Transport
- unspecified
