# Electricity, natural gas, at power plant

Dataset: openLCA process, unit process
Category: 22: Utilities/2211: Electric Power Generation, Transmission and Distribution
Geography: Northern America
Time period: 2001-12-31 to 2002-12-31
Allocation method: no allocation
Generated by: Franklin Associates
Published in: Franklin Associates (2003) Natural Gas Utility Combustion
restrictionsDescription: All information can be accessed by everybody.
copyright: false

## General comment
Important note: although most of the data in the US LCI database has
undergone some sort of review, the database as a whole has not yet
undergone a formal validation process.
Please email comments to lci@nrel.gov.

## Technology
Electricity production by natural gas steam generation

## Geography
United States

## Reference product
- Electricity, natural gas, at power plant [RNA]: 1 kWh; provider Natural gas, processed, for energy use, at plant

## Inputs from technosphere
- Natural gas, production mixture, to energy use: 0.29829 m3; provider Natural gas, processed, for energy use, at plant
  Fuel consumption: 0.298 m3/kWh (10.5 ft3/kWh)
- Transport, pipeline, natural gas [RNA]: 0.35372 t*km
  Represents transportation from natural gas plant to utility.
- Transport, combination truck, average fuel mix [RNA]: 0.05921 t*km
  Represents transportation from natural gas plant to utility.
- Transport, train, diesel powered [RNA]: 0.0035372 t*km
  Represents transportation from natural gas plant to utility.

## Emissions to nature
- Beryllium [emission, air]: 5.7337e-11 kg
- Volatile organic compounds [emission, air]: 2.637e-5 kg
- Formaldehyde [emission, air]: 3.5836e-7 kg
- Cadmium [emission, air]: 5.2559e-9 kg
- Carbon monoxide [emission, air]: 0.00040141 kg
- Manganese [emission, air]: 1.8157e-9 kg
- Lead [emission, air]: 2.3891e-9 kg
- Chromium [emission, air]: 6.6894e-9 kg
- Nitrogen oxides [emission, air]: 0.00047759 kg
- Carbon dioxide [emission, air]: 0.58466 kg
- Arsenic [emission, air]: 9.5562e-10 kg
- Nitrous oxide [emission, air]: 1.0743e-5 kg
- Naphthalene [emission, air]: 2.9147e-9 kg
- Methane [emission, air]: 1.0743e-5 kg
- Cobalt [emission, air]: 4.0136e-10 kg
- Sulfur oxides [emission, air]: 3.0205e-6 kg
- Benzene [emission, air]: 1.0034e-8 kg
- Particulate matter, ≤ 10μm [emission, air]: 3.6137e-5 kg
- Radionuclides [emission, air]: 0.0010215 kBq
- Selenium [emission, air]: 1.1467e-10 kg
- Nickel [emission, air]: 1.0034e-8 kg
- Mercury [emission, air]: 1.2423e-9 kg

## Sources
- U.S. EPA
- Franklin Associates (2003) Natural Gas Utility Combustion
- Center for Transportation Research, Argo
- U.S. EPA Office of Solid Waste and Emerg
- U.S. EPA
- unspecified
- U.S. EPA
