# Pulpwood, softwood, average, at forest road, NE-NC

Dataset: openLCA process, unit process
Category: 11: Agriculture, Forestry, Fishing and Hunting/1133: Logging
Geography: Northern America
Time period: 2002-12-31 to 2002-12-31
Allocation method: no allocation
Generated by: Maureen Puetmann
Published in: Elaine Oneil
restrictionsDescription: All information can be accessed by everybody.
copyright: true

## General comment
Important note: although most of the data in the US LCI database has
undergone some sort of review, the database as a whole has not yet
undergone a formal validation process.
Please email comments to lci@nrel.gov.

## Technology
Average technology. Some data extrapolated from similar processes.

## Geography
Northeast/North Central (NE/NC) region of the US : Connecticut, Delaware, Illinois, Indiana, Iowa, Maine, Maryland, Massachusetts, Michigan, Minnesota, Missouri, New Hampshire, New Jersey, New York, Ohio, Pennsylvania, Rhode Island, Vermont, West Virginia, and Wisconsin.

## Reference product
- Pulpwood, softwood, average, at forest road [RNA]: 1 m3

## Inputs from technosphere
- Pulpwood; softwood; average; med intensity management [US]: 0.36113 m3
- Pulpwood; softwood; average; low intensity management [US]: 0.453386 m3
- Pulpwood; softwood, average; high intensity management [US]: 0.185484 m3

## Sampling procedure
Average is calculated based on harvested areas and the specific yield for each type of management intensity.

## Sources
- Maureen Puettmann
- Elaine Oneil
