# Potato, whole plant, at field

Dataset: openLCA process, unit process
Category: 11: Agriculture, Forestry, Fishing and Hunting/1112: Vegetable and Melon Farming
Geography: United States
Time period: 1996-12-31 to 2000-12-31
Allocation method: no allocation
Generated by: Olivier Muller
restrictionsDescription: All information can be accessed by everybody.
copyright: true

## General comment
Agricultural Crop Production, Harvested acres are 97% of the planted acres (1998-2000 US average).
The impacts of producing 1 kg of seed are assumed equal to those of producing 1kg of potatoes.
For Water, only consumptive use is taken into account (i.e. 60.7% of the total water consumption).
Important note: although most of the data in the US LCI database has
undergone some sort of review, the database as a whole has not yet
undergone a formal validation process.
Please email comments to lci@nrel.gov.

## Technology
US average

## Geography
USA

## Reference product
- Potato, at field [US]: 1 kg
  Planted surface (1), Production (1), Seeds (18)

## By-products
- Potato leaves, at field [US]: 0.4 kg
  Residue to Crop Ratio (4), C N content of residues (4). Initially considered an output to nature. Changed to unvalued co-product by Pascal Lesage (12/07)

## Inputs from technosphere
- Potash Fertilizer (K2O), at plant: 0.0044393 kg
  Fertilizers NPK (8)
- Nitrogen fertilizer, production mix, at plant [RNA]: 0.0060369 kg
  Fertilizers NPK (8)
- Sulfuric acid, at plant [RNA]: 0.0010199 kg
  Pesticides - consumption (19)
- Copper, at regional storage: 7.7036e-6 kg
  Pesticides - consumption (19)
- Quicklime, at plant [RNA]: 0.0097017 kg
  Fertilizer Ca and fertilizer application (9)
- Diesel, combusted in industrial equipment [RNA]: 0.0045906 l
  Farm tractor. Energy production (20)
- Transport, single unit truck, diesel powered [RNA]: 0.0068968 t*km
  Transportation of fertilizers (200 km)
- Transport, train, diesel powered [RNA]: 0.018368 t*km
  Transportation of fertilizers (400km)
- Agrochemicals, at plant: 0.0013244 kg
  Pesticides - consumption (19)
- Phosphorous fertilizer, production mix, at plant [RNA]: 0.0046554 kg
  Fertilizers NPK (8)

## Inputs from nature
- Land use [resource, ground, human-dominated, agricultural]: 0.048865, 0.16802, 0.045407 m2*a (3 entries)
  Planted surface (1), Tillage practices (3)
- Water [resource, water, subterranean]: 28250 kg
  Water consumption - consumptive use for irrigation and percent of water from surface/ground (5), Water consumption - depth of irrigation water applied (17), Water consumption - area irrigated (11)
- Carbon dioxide [resource, air]: 1.343 kg
  Carbon fixation through plant growth
- Water [resource, water, fresh water body, river]: 48510 kg
  (same comment as for Water)

## Emissions to nature
- Disulfoton [emission, water]: 7.3559e-8 kg
  Pesticides - consumption (19), Pesticide - application method (11), Runoff of pesticides (14)
- Ammonia [emission, air, troposphere, rural]: 0.00036286 kg
  Air emissions of N2O and NH3 and NOx (4)
- Copper(I) [emission, water]: 1.1555e-7 kg
  (same comment as for Disulfoton)
- 1,3-Dichloropropene [emission, water]: 3.2175e-6 kg
  (same comment as for Disulfoton)
- Metolachlor [emission, water]: 1.1204e-7 kg
  (same comment as for Disulfoton)
- Metolachlor [emission, air, troposphere, rural]: 1.8672e-6 kg
  Pesticides - consumption (19), Pesticide - application method (11), Pesticide - air emission factors (12), Pesticide - vapor pressure (13),
- 2,4-D [emission, air, troposphere, rural]: 5.6312e-10 kg
  (same comment as for Metolachlor)
- Sodium methyldithiocarbamate [emission, water]: 1.1283e-5 kg
  (same comment as for Disulfoton)
- S-Ethyl dipropylthiocarbamate [emission, air, troposphere, rural]: 1.2691e-5 kg
  (same comment as for Metolachlor)
- Phorate [emission, water]: 2.5308e-7 kg
  (same comment as for Disulfoton)
- Carbaryl [emission, water]: 3.1286e-8 kg
  (same comment as for Disulfoton)
- Diazinon [emission, water]: 1.4576e-9 kg
  (same comment as for Disulfoton)
- Metribuzin [emission, water]: 1.3449e-7 kg
  (same comment as for Disulfoton)
- 1,3-Dichloropropene [emission, air, troposphere, rural]: 9.0091e-5 kg
  (same comment as for Metolachlor)
- Mancozeb [emission, water]: 1.137e-6 kg
  (same comment as for Disulfoton)
- Endosulfan [emission, water]: 5.9194e-8 kg
  (same comment as for Disulfoton)
- Carbofuran [emission, air, troposphere, rural]: 1.2801e-6 kg
  (same comment as for Metolachlor)
- Carbofuran [emission, water]: 7.6804e-8 kg
  (same comment as for Disulfoton)
- Azinphos-methyl [emission, air, troposphere, rural]: 4.4597e-7 kg
  (same comment as for Metolachlor)
- Phosphorus compounds [emission, water]: 2.7441e-5 kg
  Runoff/leaching of fertilizers (15)
- Methyl parathion [emission, water]: 8.2029e-9 kg
  (same comment as for Disulfoton)
- Nitrogen [emission, water]: 0.00073575 kg
  Runoff/leaching of fertilizers (15)
- Aldicarb [emission, air, troposphere, rural]: 1.9088e-6 kg
  (same comment as for Metolachlor)
- Chlorothalonil [emission, water]: 1.4717e-6 kg
  (same comment as for Disulfoton)
- Pendimethalin [emission, water]: 8.0838e-8 kg
  (same comment as for Disulfoton)
- Suspended solids, inorganic [emission, water]: 0.18227 kg
  Erosion (6)
- Methyl parathion [emission, air, troposphere, rural]: 1.3672e-7 kg
  (same comment as for Metolachlor)
- Oxamyl [emission, air, troposphere, rural]: 5.2361e-7 kg
  (same comment as for Metolachlor)
- Diazinon [emission, air, troposphere, rural]: 2.4294e-8 kg
  (same comment as for Metolachlor)
- Sodium methyldithiocarbamate [emission, air, troposphere, rural]: 0.00018805 kg
  (same comment as for Metolachlor)
- S-Ethyl dipropylthiocarbamate [emission, water]: 4.5326e-7 kg
  (same comment as for Disulfoton)
- Phorate [emission, air, troposphere, rural]: 7.0862e-6 kg
  (same comment as for Metolachlor)
- 2,4-D [emission, water]: 3.3787e-11 kg
  (same comment as for Disulfoton)
- Ethoprop [emission, water]: 1.701e-7 kg
  (same comment as for Disulfoton)
- Nitrous oxide [emission, air, troposphere, rural]: 0.00022079 kg
  Air emissions of N2O and NH3 and NOx (4)
- Mancozeb [emission, air, troposphere, rural]: 3.1837e-5 kg
  (same comment as for Metolachlor)
- Carbaryl [emission, air, troposphere, rural]: 5.2143e-7 kg
  (same comment as for Metolachlor)
- Azinphos-methyl [emission, water]: 2.6758e-8 kg
  (same comment as for Disulfoton)
- Metribuzin [emission, air, troposphere, rural]: 2.2415e-6 kg
  (same comment as for Metolachlor)
- Oxamyl [emission, water]: 1.87e-8 kg
  (same comment as for Disulfoton)
- Trifluralin [emission, water]: 1.0421e-8 kg
  (same comment as for Disulfoton)
- Permethrin [emission, air, troposphere, rural]: 1.0861e-7 kg
  (same comment as for Metolachlor)
- Glyphosate [emission, air, troposphere, rural]: 2.9987e-7 kg
  (same comment as for Metolachlor)
- Paraquat [emission, water]: 1.264e-8 kg
  (same comment as for Disulfoton)
- Ethoprop [emission, air, troposphere, rural]: 4.7629e-6 kg
  (same comment as for Metolachlor)
- Pendimethalin [emission, air, troposphere, rural]: 1.3473e-6 kg
  (same comment as for Metolachlor)
- Paraquat [emission, air, troposphere, rural]: 2.1067e-7 kg
  (same comment as for Metolachlor)
- Aldicarb [emission, water]: 1.1453e-7 kg
  (same comment as for Disulfoton)
- Disulfoton [emission, air, troposphere, rural]: 2.0597e-6 kg
  (same comment as for Metolachlor)
- Hydrocarbons [emission, air, troposphere, rural]: 0.00079462 kg
  (same comment as for Metolachlor)
- Nitrogen oxides [emission, air, troposphere, rural]: 0.00098187 kg
  Air emissions of N2O and NH3 and NOx (4)
- Endosulfan [emission, air, troposphere, rural]: 9.8657e-7 kg
  (same comment as for Metolachlor)
- Chlorothalonil [emission, air, troposphere, rural]: 4.1207e-5 kg
  (same comment as for Metolachlor)
- Glyphosate [emission, water]: 1.7992e-8 kg
  (same comment as for Disulfoton)
- Linuron [emission, water]: 3.3229e-8 kg
  (same comment as for Disulfoton)
- Linuron [emission, air, troposphere, rural]: 5.5382e-7 kg
  (same comment as for Metolachlor)
- Permethrin [emission, water]: 6.5168e-9 kg
  (same comment as for Disulfoton)
- Trifluralin [emission, air, troposphere, rural]: 2.9179e-7 kg
  (same comment as for Metolachlor)

## Allocation factors
- causal, Potato, at field, for Sodium methyldithiocarbamate: 1
- causal, Potato, at field, for Permethrin: 1
- causal, Potato leaves, at field, for Glyphosate: 0
- causal, Potato leaves, at field, for S-Ethyl dipropylthiocarbamate: 0
- causal, Potato leaves, at field, for Metolachlor: 0
- causal, Potato leaves, at field, for Pendimethalin: 0
- causal, Potato leaves, at field, for Aldicarb: 0
- causal, Potato, at field, for Sodium methyldithiocarbamate: 1
- causal, Potato, at field, for Paraquat: 1
- causal, Potato, at field, for Pendimethalin: 1
- causal, Potato leaves, at field, for 2,4-D: 0
- causal, Potato, at field, for Trifluralin: 1
- causal, Potato leaves, at field, for Trifluralin: 0
- causal, Potato, at field, for 2,4-D: 1
- causal, Potato, at field, for 2,4-D: 1
- causal, Potato, at field, for Land use: 1
- causal, Potato leaves, at field, for Oxamyl: 0
- causal, Potato, at field, for Land use: 1
- causal, Potato, at field, for Aldicarb: 1
- causal, Potato, at field, for Transport, single unit truck, diesel powered: 1
- causal, Potato leaves, at field, for Suspended solids, inorganic: 0
- causal, Potato, at field, for Mancozeb: 1
- causal, Potato leaves, at field, for Ethoprop: 0
- causal, Potato, at field, for Chlorothalonil: 1
- physical, Potato leaves, at field: 0
- causal, Potato leaves, at field, for Disulfoton: 0
- causal, Potato leaves, at field, for Azinphos-methyl: 0
- causal, Potato leaves, at field, for Sodium methyldithiocarbamate: 0
- causal, Potato leaves, at field, for Carbaryl: 0
- causal, Potato leaves, at field, for Metribuzin: 0
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
## Sources
- U.S. EPA
- USDA/ERS
- U.S. EPA
- USDA/ERS
- U.S. EPA
- National Center for Food and Agricultura
- USDA/ERS
- USDA/NRCS
- USGS
- U.S. EPA
- USDA/National Agricultural Statistics Se
- USDA/ERS
- USDA/ERS
- USDA/ERS
- USDA/ERS
- Conservation Technology Information Cent
- USGS
- Ecobalance
- USDA/NCRS
- USDA/NRI
