# Electricity, at eGrid, HIOA, 2010

Dataset: openLCA process, unit process
Category: 22: Utilities/2211: Electric Power Generation, Transmission and Distribution
Geography: Northern America
Time period: 2009-12-31 to 2009-12-31
Allocation method: no allocation
Generated by: Samantha Wascavage
Published in: Chris Goemans, Athena Institute
restrictionsDescription: All information can be accessed by everybody.
copyright: false

## General comment
The methodology used to put together the grid information is outlined in reference 1.

## Technology
Typical

## Geography
Oahu electricity grid.

## Reference product
- Electricity, at grid [RNA]: 1 kWh

## Inputs from technosphere
- Electricity, residual fuel oil, at power plant [RNA]: 0.745893 kWh
  Petroleum (RFO) - Residual Fuel Oil (includes No. 5 and No. 6 Fuel Oils and Bunker C Fuel Oil)
- Electricity, bituminous coal, at power plant [RNA]: 0.190925 kWh
  Bituminous Coal - BIT - Anthracite Coal, and Bituminous Coal also includes SC, SGC, WC.
- Electricity, biomass, solid, biogenic MSW, at power plant: 0.022261 kWh
  Solid Renewable Fuels (Biomass) MSB - Municipal Solid Waste – Biogenic Component also includes AB, MSW, OBS, TDF, WDS
- Electricity, diesel, at power plant [RNA]: 0.019129 kWh
  Petroleum (DFO) - Distillate Fuel Oil (includes all Diesel and No. 1, No. 2, and No. 4 Fuel Oils also includes JF, KER)
- Electricity, MSW, non-biogenic, at power plant: 0.01848 kWh
  Other Fuels MSN, OTH, PUR, WH
- Electricity, biomass,liquid, unspecified, at power plant: 0.000206 kWh
  Black Liquor - BLQ, OBL, SLW, WDL
- Electricity, petroleum, waste oil, at power plant: 0.000309 kWh
  Petroleum (Other Fossil) WO - Waste/Other Oil (including Crude Oil, Liquid Butane, Liquid Propane, Oil Waste, Re-Refined Motor Oil, Sludge Oil, Tar Oil, or other petroleum-based liquid wastes also includes PC, SG)
- Electricity, other gases, unspecified, at power plant: 0.002797 kWh
  Other Gases OG, BFG, PG

## Sampling procedure
based on EIA electricity reports for all power plants in the US.

## Sources
- unspecified
- EIA
- EIA
- EIA
- USEPA
- Statistics Canada
- EIA
- Statistics Canada
- International Energy Agency
- Statistics Canada
- US DOE
- EIA
- Statistics Canada
- Chris Goemans, Athena Institute
- Statistics Canada
- EIA
- EIA
- EIA
- USEPA
- EIA
- EIA
