# Electricity, at grid, Eastern US, 2000

Dataset: openLCA process, unit process
Category: 22: Utilities/2211: Electric Power Generation, Transmission and Distribution
Geography: Northern America
Time period: 1999-12-31 to 1999-12-31
Allocation method: no allocation
Generated by: James Littlefield, Franklin Associates
Published in: Franklin Associates (2003) Electricity Generation
restrictionsDescription: All information can be accessed by everybody.
copyright: false

## General comment
Important note: although most of the data in the US LCI database has
undergone some sort of review, the database as a whole has not yet
undergone a formal validation process.
Please email comments to lci@nrel.gov.

## Technology
Representative of year 2000 mix of fuels used for utility electricity generation in the Eastern U.S. Fuels include coals, fuel oil, nuclear, hydroelectric, and unconventional energy sources. Data are weighted according to percent share of consumption. Includes line loss factor of 9.58%, which represents the difference between electricity generated and electricity sold.

## Geography
United States, East

## Reference product
- Electricity, at grid [RNA]: 1 kWh; provider Electricity, natural gas, at power plant

## Inputs from technosphere
- Electricity, bituminous coal, at power plant [RNA]: 0.627 kWh
  Accounts for average line losses of 9.58%
- Electricity, nuclear, at power plant [RNA]: 0.248 kWh
  Accounts for average line losses of 9.58%
- Electricity, at wind power plant, unspecified: 0.000483 kWh
  Accounts for average line losses of 9.58%
- Electricity, lignite coal, at power plant [RNA]: 0.0188 kWh
  Accounts for average line losses of 9.58%
- Electricity, natural gas, at power plant [RNA]: 0.11 kWh
  Accounts for average line losses of 9.58%
- Electricity, hydropower, at power plant, unspecified: 0.0316 kWh
  Accounts for average line losses of 9.58%
- Electricity, fossil, unspecified, at power plant: 0.00591 kWh
  Accounts for average line losses of 9.58%
- Electricity, residual fuel oil, at power plant [RNA]: 0.0358 kWh
  Accounts for average line losses of 9.58%
- Electricity, biomass, at power plant [RNA]: 0.0177 kWh
  Accounts for average line losses of 9.58%

## Sources
- Franklin Associates (2003) Electricity Generation
- U.S. Energy Information Administration
- U.S. Environmental Protection Agency
