# Aluminum, secondary, ingot, from beverage cans, at plant

Dataset: openLCA process, unit process
Category: 31-33: Manufacturing/3313: Alumina and Aluminum Production and Processing
Geography: Northern America
Time period: 1997-12-31 to 1997-12-31
Allocation method: no allocation
Generated by: James Littlefield, Franklin Associates
Published in: Franklin Associates (2005) Secondary Aluminum Production
restrictionsDescription: All information can be accessed by everybody.
copyright: false

## General comment
Separate unit processes are shown for automotive and UBC (used beverage container) scrap; however, it was determined that the recovery rates and processing requirements for these 2 markets are similar, and thus the results for the 2 markets are the same. Atmospheric, waterborne, and solid waste emissions represent process emissions only, not fuel combustion emissions.,
Important note: although most of the data in the US LCI database has
undergone some sort of review, the database as a whole has not yet
undergone a formal validation process.
Please email comments to lci@nrel.gov.

## Geography
North America

## Reference product
- Aluminum, secondary, ingot, from beverage cans, at plant [RNA]: 1 kg

## Inputs from technosphere
- Treatment gases, unspecified, at plant: 0.003 kg
- Grain refiners, at plant: 0.0003 kg
- Lubricant feedstock, at refinery: 8.75e-7 kg
- Natural gas, combusted in industrial boiler [RNA]: 0.22285 m3
- Aluminum scrap, used beverage cans: 1.032 kg
- Alloying additives, at plant: 0.021 kg
- Packaging, unspecified, at plant: 1.67e-5 kg
- Filter media, at plant: 4.79e-5 kg
- Chemicals, unspecified, used for wastewater treatment: 0.008 kg
- Treatment salts, unspecified, at plant: 0.009 kg
- Disposal, solid waste, unspecified, to sanitary landfill: 0.084164 kg
- Quicklime, at plant [RNA]: 2.35e-5 kg
- Electricity, at grid [RNA]: 0.66794 kWh; provider Electricity, at Grid, US, 2010
- Aluminum recovery, transport, to plant [RNA]: 1.032 kg

## Emissions to nature
- Volatile organic compounds [emission, air]: 4.7e-5 kg
- Acid compounds [emission, air]: 4.31e-5 kg
- Lead [emission, air]: 2.16e-7 kg
- Total dissolved solids [emission, water]: 2.38e-8 kg
- Biological Oxygen Demand [emission, water]: 1.35e-9 kg
- Suspended solids, inorganic [emission, water]: 2.56e-5 kg
- Chemical Oxygen Demand [emission, water]: 8.3e-7 kg
- Particulate matter [emission, air]: 1.74e-7 kg
- Organic compounds [emission, water]: 1.29e-6 kg
- Metals [emission, water]: 2.25e-5 kg

## Sources
- The Aluminum Association
- unspecified
- Franklin Associates (2005) Secondary Aluminum Production
- unspecified
