# Residual fuel oil, combusted in industrial boiler

Dataset: openLCA process, unit process
Category: 22: Utilities/2213: Water, Sewage and Other Systems
Geography: Northern America
Time period: 1997-12-31 to 2000-12-31
Allocation method: no allocation
Generated by: Franklin Associates
Published in: Franklin Associates (2003) Residual Oil Industrial Combustion
restrictionsDescription: All information can be accessed by everybody.
copyright: false

## General comment
Important note: although most of the data in the US LCI database has
undergone some sort of review, the database as a whole has not yet
undergone a formal validation process.
Please email comments to lci@nrel.gov.

## Technology
Residual oil combustion in average industrial boiler

## Geography
United States

## Reference product
- Residual fuel oil, combusted in industrial boiler [RNA]: 1 l

## Inputs from technosphere
- Transport, train, diesel powered [RNA]: 0.0033554 t*km
  Represents transportation from petroleum refinery to industrial combustion.
- Transport, barge, average fuel mix [RNA]: 0.028425 t*km
  Represents transportation from petroleum refinery to industrial combustion.
- Disposal, solid waste, unspecified, to unspecified treatment: 0.0012702 kg
- Residual fuel oil, at refinery [RNA]: 1 l; provider Petroleum refining, at refinery
- Transport, combination truck, average fuel mix [RNA]: 0.0052453 t*km
  Represents transportation from petroleum refinery to industrial combustion.

## Emissions to nature
- Nitrous oxide [emission, air]: 1.4205e-5 kg
- 2,3,7,8-Tetrachlorodibenzo-p-dioxin [emission, air]: 1.7914e-12 kg
- Iron [emission, water]: 4.2906e-8 kg
- Benzene [emission, air]: 2.5643e-8 kg
- Carbon monoxide [emission, air]: 0.00063922 kg
- Phenols [emission, air]: 4.3531e-7 kg
- Lead [emission, air]: 1.8094e-7 kg
- Chromium [emission, air]: 1.0125e-7 kg
- Nickel [emission, air]: 1.0125e-5 kg
- Suspended solids, inorganic [emission, water]: 1.2872e-6 kg
- Hydrochloric acid [emission, air]: 8.3807e-5 kg
- Methane [emission, air]: 0.00012784 kg
- Copper(I) [emission, water]: 4.2906e-8 kg
- Selenium [emission, air]: 8.1841e-8 kg
- Tetrachloroethylene [emission, air]: 8.3916e-9 kg
- Radionuclides [emission, air]: 0.099393 kBq
- Mercury [emission, air]: 1.354e-8 kg
- Arsenic [emission, air]: 1.5817e-7 kg
- Chloride [emission, water]: 8.5811e-9 kg
- Manganese [emission, air]: 3.5948e-7 kg
- Naphthalene [emission, air]: 1.354e-7 kg
- Cadmium [emission, air]: 4.7691e-8 kg
- Carbon dioxide [emission, air]: 3.262 kg
- Particulate matter, ≤ 10μm [emission, air]: 0.00024267 kg
- Cobalt [emission, air]: 7.2136e-7 kg
- Volatile organic compounds [emission, air]: 3.5907e-5 kg
- Nitrogen oxides [emission, air]: 0.0070315 kg
- Sulfur oxides [emission, air]: 0.0051155 kg
- Methylene chloride [emission, air]: 5.7773e-7 kg
- PAH/POM, unspecified [emission, air, indoor]: 6.4359e-7 kg
- Beryllium [emission, air]: 3.3312e-9 kg
- Formaldehyde [emission, air]: 3.9543e-6 kg

## Sources
- U.S. EPA
- Center for Transportation Research, Argo
- EPA
- EIA
- Franklin Associates (2003) Residual Oil Industrial Combustion
- U.S. EPA
- unspecified
- U.S. EPA Office of Solid Waste and Emerg
