# Harvest, switchgrass

Dataset: openLCA process, unit process
Category: 11: Agriculture, Forestry, Fishing and Hunting/1151: Support Activities for Crop Production
Geography: Northern America
Time period: 2009-12-31 to 2100-12-30
Allocation method: no allocation
Generated by: Daniel Inman
Published in: Hsu, D.
restrictionsDescription: All information can be accessed by everybody.
copyright: false

## General comment
Estimate from standard forage harvesting processes in the US. This process accounts for the harvest and baling of switchgrass from one hectare of land. Processes include cutting and windrowing (aka swathing), tedding-which turns the windrows for proper drying, and baling. Moving, loading, and storing bales is not included.

## Technology
modern

## Geography
North America

## Time period
2010 and after

## Reference product
- Harvest, switchgrass [RNA]: 1 m2
  This is one ha of baling

## Inputs from technosphere
- Haying, by rotary tedder: 1 m2
- Baling: 1 m2
- Swath, by rotary windrower: 1 m2

## Sources
- Hsu, D.
- Hess, J. R.
