# TDF, combusted in industrial boiler, at pulp and paper mill (EXCL.)

Dataset: openLCA process, unit process
Category: 31-33: Manufacturing/3221: Pulp, Paper, and Paperboard Mills
Geography: Northern America
Time period: 1996-12-31 to 1996-12-31
Allocation method: no allocation
Generated by: Caroline Gaudreault
Reviewer: Martha Stevenson
Published in: Joel I. Reisman
restrictionsDescription: All information can be accessed by everybody.
copyright: false

## General comment
This process was built to be used within the processes named "Fuels burned at bleached kraft market pulp mill", "Fuels burned at uncoated freesheet paper mill", "Fuels burned at coated freesheet paper mill", "Fuels burned at uncoated mechanical paper mill", "Fuels burned at coated mechanical paper mill" and "Fuels burned at bag and sack paper mill". Transport and waste processes were removed. The following emissions to air were excluded (excl.): Sulfur oxidesand Nitrogen oxides and Total reduced sulfur (TRS). These processes and emissions are reported in pulp and paper mill process chain in which this process is integrated.
Important note: although most of the data in the US LCI database has
undergone some sort of review, the database as a whole has not yet
undergone a formal validation process.
Please email comments to lci@nrel.gov.

## Geography
US

## Reference product
- TDF, combusted in industrial boiler, at pulp and paper mill (EXCL.) [RNA]: 1 kg
  34.3 GJ HHV/st: Energy content in used shredded tires( U.S. EPA 1997)

## Inputs from technosphere
- Tire derived fuel: 1 kg

## Emissions to nature
- Lead [emission, air]: 3.62e-5 kg
- Mercury [emission, air]: 1.23e-8 kg
- Copper [emission, air]: 0.000282 kg
- Carbon dioxide [emission, air]: 3.075 kg
  179.3 lb/GJ HHV: IPCC 2006
- Carbon monoxide [emission, air]: 1.17e-6 kg
  0.00234 lb/st: U.S. EPA 1997, 1995
- Nickel [emission, air]: 3.42e-6 kg
- Manganese [emission, air]: 4.03e-5 kg
- Cadmium [emission, air]: 6.7e-7 kg
- Beryllium [emission, air]: 2.1e-8 kg
- Hydrochloric acid [emission, air]: 0.00037 kg
- Arsenic [emission, air]: 7.3e-7 kg
- Particulate matter [emission, air]: 5.4e-7 kg
  0.00007 lb/st: U.S. EPA 1997, 1995
- Chromium [emission, air]: 4.63e-6 kg
- Cobalt [emission, air]: 0.000253 kg
- Barium [emission, air]: 2e-5 kg
- Zinc [emission, air]: 7.45e-8 kg
- Selenium [emission, air]: 3.575e-8 kg
- Antimony [emission, air]: 1.2e-8 kg

## Sources
- AF&PA (2010). Printing & Writing Papers LCA
- Joel I. Reisman
