# Glycerine, at plant

Dataset: openLCA process, unit process
Category: 31-33: Manufacturing/3256: Soap, Cleaning Compound, and Toilet Preparation Manufacturing
Geography: Northern America
Time period: 1988-12-31 to 2004-12-31
Allocation method: no allocation
Generated by: Franklin Associates
Published in: THE PLASTICS DIVISION OF THE AMERICAN C
restrictionsDescription: All information can be accessed by everybody.
copyright: false

## General comment
Although a number of raw materials (coconut oil, palm oil, palm kernel oil, etc.) can be used to produce glycerine, palm kernel oil has been chosen as the raw material for the production of glycerine for this module as this is representative of 75% of U.S. supply. Methyl esters are a coproduct of the process for which credit has been given on a mass basis. Complete inventory data and metadata are available in full in the final report and appendices, Cradle-to-Gate Life Cycle Inventory of Nine Plastic Resins and Four Polyurethane Precursors. This report has been extensively reviewed within Franklin Associates and has undergone partial critical review by ACC Plastics Division members and is available at: www.americanchemistry.com. Quantities may vary slightly between the reference to main source and and this module due to rounding. Important note: although most of the data in the US LCI database has undergone some sort of review, the database as a whole has not yet undergone a formal validation process. Please email comments to lci@nrel.gov.

## Technology
Refined palm kernel oil is converted to methyl esters and glycerine by the transesterification of triglycerides with excess methanol.

## Geography
North America (US and Canada)

## Reference product
- Glycerine, at plant [RNA]: 1 kg

## Inputs from technosphere
- Palm kernel oil, processed, at plant [RNA]: 0.675 kg
- Methanol, at plant, kg: 0.124 kg
- Transport, barge, residual fuel oil powered [RNA]: 0.00767 t*km
  Values for barge transport are calculated based on average fuel consumption rates as reported in Transportation Energy Data Book: Edition 22 from Oak Ridge National Laboratory, September 2002: 22% of barges use diesel fuel in their engines, 78% use residual oil to generate steam for steam turbines, and a barge that consumes residual oil consumes 3.4 gallons per 1,000 ton-miles
- Transport, pipeline, natural gas [RNA]: 0.0002 t*km
- Electricity, at grid [RNA]: 0.0121 kWh; provider Electricity, at Grid, US, 2010
- Transport, single unit truck, diesel powered [RNA]: 0.00464 t*km
- Transport, ocean freighter, diesel powered [US]: 0.44 t*km
  Values for ocean freighter transport are calculated based on average fuel consumption rates as determined from a personal communication with Rich Sonnenschein, U.S. Department of Transportation, Maritime Administration in February 2004: 10% of ocean freighters use diesel fuel, 90% use residual fuel, and a freighter that consumes residual fuel consumes 1.9 gallons per 1,000 ton-miles
- Transport, combination truck, diesel powered [RNA]: 0.0404 t*km
- Transport, barge, diesel powered [RNA]: 0.00231 t*km
  (same comment as for Transport, barge, residual fuel oil powered)
- Natural gas, combusted in industrial boiler [RNA]: 0.129 m3
- Bituminous coal, combusted in industrial boiler [RNA]: 0.0491 kg
- Transport, ocean freighter, residual fuel oil powered [US]: 3.96 t*km
  (same comment as for Transport, ocean freighter, diesel powered)
- Crude palm kernel oil, at plant [RNA]: 0.232 kg

## Emissions to nature
- Volatile organic compounds [emission, air]: 0.00241 kg
- Suspended solids, inorganic [emission, water]: 2.8e-5 kg
- Organic compounds [emission, air]: 3.4e-5 kg
- Chemical Oxygen Demand [emission, water]: 7e-5 kg
- Biological Oxygen Demand [emission, water]: 6.3e-5 kg
- Methane [emission, air]: 1.4e-5 kg
- Total dissolved solids [emission, water]: 6.8e-5 kg
- Neem oil [emission, water, fresh water body]: 1.2e-5 kg

## Sampling procedure
Data have been collected and compiled from both primary and secondary sources.

## Sources
- THE PLASTICS DIVISION OF THE AMERICAN C
