# Bituminous coal, combusted in industrial boiler, at pulp and paper mill (EXCL.)

Dataset: openLCA process, unit process
Category: 31-33: Manufacturing/3221: Pulp, Paper, and Paperboard Mills
Geography: Northern America
Time period: 1996-12-31 to 2002-12-31
Allocation method: no allocation
Generated by: Caroline Gaudreault
Reviewer: Martha Stevenson
Published in: Franklin Associates (2003) Bituminous Combustion Industrial Boiler
restrictionsDescription: All information can be accessed by everybody.
copyright: false

## General comment
This process was built to be used within the processes named "Fuels burned at bleached kraft market pulp mill", "Fuels burned at uncoated freesheet paper mill", "Fuels burned at coated freesheet paper mill", "Fuels burned at uncoated mechanical paper mill", "Fuels burned at coated mechanical paper mill" and "Fuels burned at bag and sack paper mill". It was built from the process named "Bituminous coal, combusted in industrial boiler" v.1.6 available in the US LCI database. Transport and waste processes were removed. The following emissions to air were excluded (excl.): Sulfur oxidesand Nitrogen oxides. These processes and emissions are reported in pulp and paper mill process chain in which this process is integrated.
In cases where industrial boiler data were not available, utility boiler data were adjusted accordingly., 100% inputs from technosphere and elementary flows allocated to the combustion of coal, and 0% to the production of ash and flue gas desulfurization sludge
Important note: although most of the data in the US LCI database has
undergone some sort of review, the database as a whole has not yet
undergone a formal validation process.
Please email comments to lci@nrel.gov.

## Technology
Surface mining is used to extract 58 percent of the U.S. supply of coal, while underground mining extracts 42 percent

## Geography
United States

## Reference product
- Bituminous coal, combusted in industrial boiler, at pulp and paper mill (EXCL.) [RNA]: 1 kg

## Inputs from technosphere
- Bituminous coal, at mine [RNA]: 1 kg

## Emissions to nature
- Phenol [emission, air]: 8e-9 kg
- Carbon monoxide [emission, air]: 0.0028911 kg
- Benzyl chloride [emission, air]: 3.5e-7 kg
- Propionaldehyde [emission, air]: 1.9e-7 kg
- Vinyl acetate [emission, air]: 3.8e-9 kg
- Methyl ethyl ketone [emission, air]: 1.95e-7 kg
- Carbon dioxide [emission, air]: 2.634 kg
- Naphthalene [emission, air]: 6.5e-9 kg
  Sources for PAH data are old or unverifiable. Use this PAH data with caution.
- Phenols [emission, air]: 8e-9 kg
- 2-Chloroacetophenone [emission, air, stratosphere]: 3.5e-9 kg
- Isophorone [emission, air]: 2.9e-7 kg
- Suspended solids, inorganic [emission, water]: 2.0108e-6 kg
- Methane [emission, air]: 0.00011543 kg
- Nickel [emission, air]: 1.741e-7 kg
- Benzene [emission, air]: 4.7668e-5 kg
- Chromium(VI) [emission, air]: 3.95e-8 kg
- Chloromethane [emission, air]: 2.65e-7 kg
- Organic compounds [emission, air]: 3.0287e-6 kg
- Acetophenone [emission, air]: 7.5e-9 kg
- Biphenyl [emission, air]: 8.5e-10 kg
  Sources for PAH data are old or unverifiable. Use this PAH data with caution.
- Magnesium [emission, air]: 5.5e-6 kg
- PAH/POM, unspecified [emission, air, indoor]: 1.0054e-6 kg
- Acetaldehyde [emission, air]: 2.85e-7 kg
- Hydrofluoric acid [emission, air]: 5.2357e-5 kg
- Antimony [emission, air]: 9e-9 kg
- 1,1,1-Trichloroethane [emission, air]: 1e-8 kg
- Cumene [emission, air]: 2.65e-9 kg
- Hydrochloric acid [emission, air]: 0.00030654 kg
- Chlorobenzene [emission, air]: 1.1e-8 kg
- 5-Methylchrysene [emission, air]: 1.1e-11 kg
  Sources for PAH data are old or unverifiable. Use this PAH data with caution.
- Methyl tert-butyl ether [emission, air]: 1.75e-8 kg
- Benzo[ghi]perylene [emission, air]: 1.35e-11 kg
  Sources for PAH data are old or unverifiable. Use this PAH data with caution.
- Indeno[1,2,3-cd]pyrene [emission, air]: 3.05e-11 kg
  Sources for PAH data are old or unverifiable. Use this PAH data with caution.
- Acenaphthene [emission, air]: 2.55e-10 kg
  Sources for PAH data are old or unverifiable. Use this PAH data with caution.
- Hexane [emission, air]: 3.35e-8 kg
- Benzo[a]pyrene [emission, air]: 1.9e-11 kg
  Sources for PAH data are old or unverifiable. Use this PAH data with caution.
- Fluoranthene [emission, air]: 3.55e-10 kg
  Sources for PAH data are old or unverifiable. Use this PAH data with caution.
- Nitrous oxide [emission, air]: 0.000368 kg
- Manganese [emission, air]: 1.7876e-7 kg
- Di(2-ethylhexyl) phthalate [emission, air]: 3.65e-8 kg
- Styrene [emission, air]: 1.25e-8 kg
- Tetrachloroethylene [emission, air]: 2.15e-8 kg
- Benz[a]anthracene [emission, air]: 4e-11 kg
  Sources for PAH data are old or unverifiable. Use this PAH data with caution.
- Ethylbenzene [emission, air]: 4.7e-8 kg
- Methylene chloride [emission, air]: 1.45e-7 kg
- Formaldehyde [emission, air]: 3.383e-6 kg
- Ethylene dibromide [emission, air]: 6e-10 kg
- Lead [emission, air]: 1.7862e-6 kg
- Tribromomethane [emission, air]: 1.95e-8 kg
- Methyl methacrylate [emission, air]: 1e-8 kg
- Mercaptans [emission, air]: 0.0001085 kg
- Cobalt [emission, air]: 5e-8 kg
- Cyanide [emission, air]: 1.25e-6 kg
- Chloroethane [emission, air]: 2.1e-8 kg
- Benzofluoranthene [emission, air]: 5.5e-11 kg
  Sources for PAH data are old or unverifiable. Use this PAH data with caution.
- Chloroform [emission, air]: 2.95e-8 kg
- Xylene [emission, air]: 1.85e-8 kg
- 2,4-Dinitrotoluene [emission, air]: 1.4e-10 kg
- Pyrene [emission, air]: 1.65e-10 kg
  Sources for PAH data are old or unverifiable. Use this PAH data with caution.
- Beryllium [emission, air]: 7.7597e-9 kg
- Volatile organic compounds [emission, air]: 0.00014006 kg
- Fluorene [emission, air]: 4.55e-10 kg
  Sources for PAH data are old or unverifiable. Use this PAH data with caution.
- Mercury [emission, air]: 6.5409e-7 kg
- Chrysene [emission, air]: 5e-11 kg
  Sources for PAH data are old or unverifiable. Use this PAH data with caution.
- Arsenic [emission, air]: 1.5756e-7 kg
- Methyl bromide [emission, air]: 8e-8 kg
- Dimethyl sulfate [emission, air, troposphere, rural]: 2.4e-8 kg
- Fluoride [emission, air]: 2.2297e-5 kg
- Toluene [emission, air]: 1.2e-7 kg
- 1,2-Dichloroethane [emission, air]: 2e-8 kg
- Anthracene [emission, air]: 1.05e-10 kg
  Sources for PAH data are old or unverifiable. Use this PAH data with caution.
- Selenium [emission, air]: 6.5e-7 kg
- Chromium [emission, air]: 9.9038e-8 kg
- Particulate matter, > 2.5μm and ≤ 10μm [emission, air]: 0.002003 kg
- Acrolein [emission, air]: 7.4696e-8 kg
- Acenaphthylene [emission, air]: 1.25e-10 kg
  Sources for PAH data are old or unverifiable. Use this PAH data with caution.
- Carbon disulfide [emission, air]: 6.5e-8 kg
- Phenanthrene [emission, air]: 1.35e-9 kg
  Sources for PAH data are old or unverifiable. Use this PAH data with caution.
- Methyl hydrazine [emission, air]: 8.5e-8 kg
- Cadmium [emission, air]: 4.4278e-8 kg

## Sources
- Franklin Associates (2003) Estimate
- Speight
- AF&PA (2010). Printing & Writing Papers LCA
- DOE
- unspecified
- EPA
- EPA
- Franklin Associates (2003) Bituminous Combustion Industrial Boiler
- Minerals Yearbook
- EPA
- EPA
- unspecified
- unspecified
- unspecified
- EIA
