# Automotive painting, pretreatment

Dataset: openLCA process, unit process
Category: 31-33: Manufacturing/3362: Motor Vehicle Body and Trailer Manufacturing
Geography: Northern America
Time period: 1999-12-31 to 2003-12-31
Allocation method: no allocation
Generated by: James Littlefield, Franklin Associates
Published in: VRP (Vehicle Recycling Partnership)
restrictionsDescription: All information can be accessed by everybody.
copyright: false

## General comment
Square meters of pretreated automotive body is functional unit.,
Important note: although most of the data in the US LCI database has
undergone some sort of review, the database as a whole has not yet
undergone a formal validation process.
Please email comments to lci@nrel.gov.

## Technology
state-of-the art painting booth

## Geography
North America

## Reference product
- Automotive painting, pretreatment [RNA]: 1 m2

## Inputs from technosphere
- Biocide, at plant: 0.00022 kg
- Cleaner alkaline, at plant: 0.00193 kg
- Highlighter, at plant: 0.0003 kg
- Disposal, sludge, containing glycol ethers, to sanitary landfill: 7e-8 kg
- Accelerator, at plant: 0.00113 kg
- Disposal, sludge, containing manganese compounds, to sanitary landfill: 8.28e-5 kg
- Disposal, filters, to sanitary landfill: 5e-8, 9.12e-6, 2.85e-6 kg (3 entries)
- Rinse conditioner, at plant: 0.00059 kg
- Disposal, sludge, containing phosphorous, to sanitary landfill: 3.3e-7 kg
- Disposal, sludge, containing nitrate compounds, to sanitary landfill: 7e-8 kg
- Solution corrosion inhibitor, at plant: 0.00073 kg
- Disposal, sludge, containing zinc compounds, to sanitary landfill: 0.000132 kg
- Body washer, at plant: 0.00225 kg
- Disposal, sludge, containing 1-methoxy-2-propanol, to sanitary landfill: 2e-8 kg
- Phosphate anti-corrosion: 0.0105 kg
- Disposal, packaging-biocide carboys (HDPE), to sanitary landfill: 0.000468 kg
- Prewipe, at plant: 0.00286 kg
- Phosphate anti-corrosion makeup: 0.00017 kg
- Phosphate anti-corrosion post-rinse: 0.00113 kg
- Disposal, sludge, to sanitary landfill: 0.000613 kg
- Electricity, at grid [RNA]: 0.105 kWh; provider Electricity, at Grid, US, 2010

## Inputs from nature
- Water [resource, water]: 22400 kg
  Original value submitted in Liters; assume water mass 1 kg/L

## Emissions to nature
- Nitric acid [emission, air]: 4e-7 kg
- Propylene glycol 1-methyl ether [emission, air]: 5.4e-7 kg
- Diethylene glycol [emission, air]: 1.82e-6 kg

## Sources
- VRP (Vehicle Recycling Partnership)
- VRP (Vehicle Recycling Partnership)
