# Recycled postconsumer high-density polyethylene, HDPE, pellet

Dataset: openLCA process, unit process
Category: 31-33: Manufacturing/3259: Other Chemical Product and Preparation Manufacturing
Geography: United States
Time period: 2007-12-25 to 2009-12-25
Allocation method: no allocation
Data quality: US EPA - Process Pedigree Matrix (4;1)
Generated by: Franklin Associates
Owner: ACC, APR, NAPCOR, & PETRA
Reviewer: Beverly Sauer
Published in: Franklin Associates (2011) LCI HDPE & PET Recycled Resin
restrictionsDescription: These U.S. LCI Database Project data ("Data") are provided by the National Renewable Energy Laboratory ("NREL"), operated by the Alliance for Sustainable Energy, LLC ("Alliance") for the US Department of Energy ("DOE") under Contract No. DE-AC36-08GO28308. The United States Government (the "Government") retains and the user acknowledges that the Government retains a non-exclusive, paid-up, irrevocable, worldwide license to publish or reproduce the published form of these data, or allow others to do so, for Government purposes.
Access to and use of these Data shall impose the following obligations on the user, as set forth in this Agreement. The user is granted the right, without any fee or cost, to use, copy, modify, alter, enhance and distribute these Data for any purpose whatsoever, provided that this entire notice appears in all copies of the Data. Any modification, alteration or enhancement of these data shall be identified and documented by the user. Further, the user agrees to credit the DOE/NREL/Alliance in any publication that results from the use of these Data. The names DOE/NREL/Alliance, however, may not be used in any advertising or publicity to endorse or promote any products or commercial entities unless specific written permission is obtained from DOE/NREL/Alliance. The user also understands that DOE/NREL/Alliance is not obligated to provide the user with any support, consulting, training or assistance of any kind with regard to the use of these Data or to provide the user with any updates, revisions or new versions of these Data.
YOU AGREE TO INDEMNIFY THE GOVERNMENT AND DOE/NREL/ALLIANCE, AND ITS SUBSIDIARIES, AFFILIATES, OFFICERS, AGENTS, AND EMPLOYEES AGAINST ANY CLAIM OR DEMAND, INCLUDING REASONABLE ATTORNEYS' FEES, RELATED TO YOUR USE OF THESE DATA. THESE DATA ARE PROVIDED BY DOE/NREL/ALLIANCE "AS IS" AND ANY EXPRESS OR IMPLIED WARRANTIES, INCLUDING BUT NOT LIMITED TO, THE IMPLIED WARRANTIES OF MERCHANTABILITY AND FITNESS FOR A PARTICULAR PURPOSE ARE DISCLAIMED. IN NO EVENT SHALL THE GOVERNMENT OR DOE/NREL/ALLIANCE BE LIABLE FOR ANY SPECIAL, INDIRECT OR CONSEQUENTIAL DAMAGES OR ANY DAMAGES WHATSOEVER, INCLUDING BUT NOT LIMITED TO CLAIMS ASSOCIATED WITH THE LOSS OF DATA OR PROFITS, WHICH MAY RESULT FROM AN ACTION IN CONTRACT, NEGLIGENCE OR OTHER TORTIOUS CLAIM THAT ARISES OUT OF OR IN CONNECTION WITH THE ACCESS, USE OR PERFORMANCE OF THESE DATA.
copyright: false

## General comment
This attributional unit process LCI represents additional separation and processing of postconsumer resin by a reclaimer to convert the received material into clean resin ready for use in manufacturing. Starts with collection of postconsumer plastics and ends with pelletizing of clean postconsumer HDPE resin. Includes removal of foreign material and washing. Does not include outbound transportation of finished pellets.

The LCI study was conducted by Franklin Associates, Ltd. and sponsored jointly by NAPCOR, the American Chemistry Council (ACC), the Association of Postconsumer Plastic Recyclers (APR), and the PET Resin Association (PETRA). Using life cycle inventory (LCI) methodology, the study determines and quantifies the energy requirements, solid wastes, and atmospheric and waterborne emissions for the processes required to collect postconsumer PET and HDPE packaging, sort and separate the material, and reprocess it into clean recycled resin.

Important note: although most of the data in the US LCI database has undergone some sort of review, the database as a whole has not yet undergone a formal validation process. Please email comments to lci@nrel.gov.

## Technology
Data collected from 4 MRFs and 6 North American HDPE reclaimers that processed over 50% of U.S. recycled HDPE in 2007. HDPE recycled mechanically

## Geography
United States

## Time period
Data compiled 2010 from most recent sources

## Reference product
- Recycled postconsumer high-density polyethylene, HDPE, pellet [US]: 1 kg
  Depending on the practitioner's choice of methodology, some share of the virgin material burdens for initially producing the plastic may be allocated to the recycled resin.

## Inputs from technosphere
- Disposal, solid waste, unspecified, to unspecified landfill: 0.066 kg
  Wastes landfilled or incinerated include bale wire trash, labels, PVC in incoming bale, and other materials that become processing wastes or sludges.
- Alkaline cleaner, unspecified: 6e-5 kg
- Sodium hydroxide, production mix, at plant [US]: 0.00027 kg
  Pure weight of NaOH for the solution used
- Mixed recyclables, sorted, at material recycling facility (MRF) [US]: 1.0326 kg
  Includes wt of contaminants in incoming material from MRF.
- Diesel, combusted in industrial boiler [RNA]: 0.00018 l
- Electricity, at grid [RNA]: 0.49 kWh; provider Electricity, at Grid, US, 2010
- Surfactant, unspecified: 0.00077 kg
- Wetting agent, unspecified: 0.00057 kg
- Deposit containers, at collection, California Refund Value, CRV [US]: 0.046397 kg
  Percentage of postconsumer HDPE collected via California container refund value (CRV) system. Includes wt of contaminants in incoming material.
- Disposal, solid waste, unspecified, to incineration with energy recovery: 0.013 kg
- Defoamant, unspecified: 0.00152 kg
- Natural gas, combusted in industrial boiler [RNA]: 0.0077 m3
- Liquefied petroleum gas, combusted in industrial boiler [RNA]: 0.0011 l
- Transport, combination truck, diesel powered [RNA]: 0.911123 t*km
  Represents transport of inbound material (HDPE and contaminants).

## Inputs from nature
- Water [resource, water]: 3912.45 kg
  Water input to washing

## Emissions to nature
- Particulate matter, ≤ 2.5μm [emission, air]: 1.5e-5 kg
- Chemical Oxygen Demand [emission, water]: 1.5e-6 kg
- Total dissolved solids [emission, water]: 9.1e-6 kg
- Particulate matter, > 10μm [emission, air]: 2.3e-5 kg
- Biological Oxygen Demand [emission, water]: 0.0003 kg
  Unknown how much of the waterborne emissions are from washing chemicals versus material washed off received plastic. These emissions are not included in the material balance.
- Water [emission, air]: 3466.39 kg
  Water returned after washing (reflects evaporative losses of water carried out with washed resin and evaporated during drying)
- Suspended solids, inorganic [emission, water]: 0.00029 kg

## Inventory method
Attributional; data sets for the three recycling unit processes (collection, sorting/separation, reclaimer operations) were linked to cover the full sequence of processing steps required to produce recycled resins  gate-to-gate results; for cradle-to-gate LCI of recycled resin, the practitioner needs to make decision about virgin resin burdens associated with the postconsumer products that are feedstocks to recycling. Recycling occurs in the context of a product made from resin; use and end-of-life management of the material will depend on the product in which it is used

## Modelling constants
HDPE reclaimers providing data for this analysis produced 448 million pounds of clean flake and converted 427 million pounds of flake to pellet. The weighted average incoming transport profile of postconsumer material was 350 miles by truck and 134 miles by rail. A small amount of ocean transport was also reported. Approximately 92% of incoming material was shipped to participating reclaimers from MRFs, 6% from deposit centers, and less than 1% each from PRFs and other sources. The majority of the incoming material was reported as bottles (82%), with the remainder rigids.

## Completeness
TREATMENT OF MISSING ENVIRONMENTAL DATA
Elementary flows are cut-off at less than 1% based on environmental relevance.

TREATMENT OF MISSING TECHNOSPHERE DATA
Intermediate flows are cut-off at less than 1% based on environmental relevance. Capital equipment is not included in this unit process.

MASS BALANCE
Mixed recyclables and deposit container inputs include the weight of contaminants in incoming material from MRF. Sodium hydroxide inputs are the pure weight of NaOH for the solution used. Water inputs are to washing and the outputs are the water returned after washing (reflects evaporative losses of water carried out with washed resin and evaporated during drying). It is unknown how much of the waterborne emissions are from washing chemicals versus material washed off received plastic. These emissions are not included in the material balance. Waste disposal weight includes bale wire trash, labels, PVC in incoming bale, and other materials that become processing wastes or sludges.

## Data selection
Incoming bales are broken down and the material sorted to remove foreign material. A small amount of reclaimed resin was reported as received already in flake form (weighted average less than 3%). Material may be washed before grinding, after grinding, or both. Most reclaimers reported using a variety of chemicals in the washing process, although types and quantities varied by reclaimer. Incoming HDPE material contains small amounts of non-HDPE saleable material as well as unusable contaminants. The weighted average percentage of non-HDPE saleable material recovered from incoming bales was less than 1%, while 17% of the incoming material was unusable contaminants.

## Data treatment
For each facility, operating data normalized to basis of 1000 lb output, then individual reclaimer data sets were aggregated, weighting each data set according to the facility’s contribution to the total output of postconsumer recycled HDPE or PET ; Other assumtions and calculations described in Modeling Constants & Sampling Procedure.

## Sampling procedure
BOUNDARY CONDITIONS
Processing steps include debaling, grinding, washing, drying, extruding and pelletizing.

DATA COLLECTION
Data collection forms for HDPE and PET reclaimers were developed for this project by ERG. Completed forms were received from 4 PET facilities and 6 HDPE facilities. The data sets were used to compile a weighted average for each resin based on each facility’s recycled resin output as a percentage of the total output of that recycled resin for all reporting facilities. As with the MRF data sets, only the weighted average data sets can be shown in order to protect the confidentiality of individual facility data sets. Assumptions and calculations are described in Modeling Constants and the supporting documentation.

UNCERTAINTY ESTIMATION
No uncertainty estimations were included.

## Review details
The LCI study was conducted by Franklin Associates, Ltd. and sponsored jointly by NAPCOR, the American Chemistry Council (ACC), the Association of Postconsumer Plastic Recyclers (APR), and the PET Resin Association (PETRA). Using life cycle inventory (LCI) methodology, the study determines and quantifies the energy requirements, solid wastes, and atmospheric and waterborne emissions for the processes required to collect postconsumer PET and HDPE packaging, sort and separate the material, and reprocess it into clean recycled resin. The data has had a partial critical review by internal parties.

## Intended application
"Accounting, with system-external interactions" - The intended application is a purely descriptive accounting / documentation of the analysed system including existing interactions with other systems in the LCI model.

## Project
LIFE CYCLE INVENTORY OF 100% POSTCONSUMER HDPE AND PET RECYCLED RESIN FROM POSTCONSUMER CONTAINERS AND PACKAGING PREPARED FOR THE PLASTICS DIVISION OF THE AMERICAN CHEMISTRY COUNCIL, INC. THE ASSOCIATION OF POSTCONSUMER PLASTIC RECYCLERS (APR), THE NATIONAL ASSOCIATION FOR PET CONTAINER RESOURCES (NAPCOR), AND THE PET RESIN ASSOCIATION (PETRA) BY FRANKLIN ASSOCIATES, A DIVISION OF ERG PRAIRIE VILLAGE, KANSAS JANUARY 19, 2011.

## Sources
- Franklin Associates (2011) LCI HDPE & PET Recycled Resin
