# Electricity, at eGrid, FRCC, 2008

Dataset: openLCA process, unit process
Category: 22: Utilities/2211: Electric Power Generation, Transmission and Distribution
Geography: Northern America
Time period: 2007-12-31 to 2007-12-31
Allocation method: no allocation
Generated by: Alberta Carpenter
Published in: Chris Goemans, Athena Institute
restrictionsDescription: All information can be accessed by everybody.
copyright: false

## General comment
The methodology used to put together the grid information is outlined in reference 1.

## Technology
Typical

## Geography
Florida except for the panhandle (SRSO).

## Reference product
- Electricity, at grid [RNA]: 1 kWh

## Inputs from technosphere
- Electricity, biomass, gas, unspecified, at power plant: 0.000210702 kWh
  Gaseous Renewable Fuels (Biomass) OBG - Other Biomass Gases (Digester Gas, Methane, and other biomass gases)
- Electricity, bituminous coal, at power plant [RNA]: 0.00050971 kWh
  Bituminous Coal, SC - Coal Synfuel. Coal-based solid fuel that has been processed by a coal synfuel plant, and coal-based fuels such as briquettes, pellets, or extrusions, which are formed from fresh or recycled coal and binding materials.
- Electricity, natural gas, at power plant [RNA]: 0.483109 kWh
  Natural Gas
- Electricity, biomass, at power plant [RNA]: 0.0035268 kWh
  Solid Renewable Fuels (Biomass) WDS - Wood/Wood Waste Solids (Paper Pellets, Railroad Ties, Utility Poles, Wood Chips, and other wood solids)
- Electricity, residual fuel oil, at power plant [RNA]: 0.039713 kWh
  Petroleum (RFO) - Residual Fuel Oil (includes No. 5 and No. 6 Fuel Oils and Bunker C Fuel Oil)
- Electricity, MSW, non-biogenic, at power plant: 0.00569614 kWh
  Other Fuels MSN - Municipal Solid Waste – Non-biogenic components
- Electricity, biomass, solid, biogenic MSW, at power plant: 0.00724951 kWh
  Solid Renewable Fuels (Biomass) MSB - Municipal Solid Waste – Biogenic Component
- Electricity, bituminous coal, at power plant [RNA]: 0.272361 kWh
  Bituminous Coal, BIT - Anthracite Coal, and Bituminous Coal
- Electricity, petroleum coke, at power plant: 0.0158028 kWh
  Petroleum (Other Fossil) PC - Petroleum Coke
- Electricity, biomass, gas, landfill, at power plant: 0.000845808 kWh
  Gaseous Renewable Fuels (Biomass) LFG - Landfill Gas
- Electricity, other fuels, unspecified, at power plant: 0.00212347 kWh
  Other Fuels OTH - Other (Batteries, Chemicals, Coke Breeze, Hydrogen, Pitch, Sulfur, Tar Coal, and miscellaneous technologies)
- Electricity, biomass,liquid, unspecified, at power plant: 0.00348289 kWh
  Liquid Renewable Fuels (Biomass) BLQ - Black liquor
- Electricity, other gases, unspecified, at power plant: 2.9723e-7 kWh
  Other Gases PG - Propane
- Electricity, biomass, solid, agriculture by-products, at power plant: 0.00221481 kWh
  Solid Renewable Fuels (Biomass) AB - Agriculture Crop By-products/Straw/Energy Crops
- Electricity, diesel, at power plant [RNA]: 0.00182249 kWh
  Petroleum (DFO) - Distillate Fuel Oil (includes all Diesel and No. 1, No. 2, and No. 4 Fuel Oils)
- Electricity, petroleum, waste oil, at power plant: 6.26017e-6 kWh
  Petroleum (Other Fossil) WO - Waste/Other Oil (including Crude Oil, Liquid Butane, Liquid Propane, Oil Waste, Re-Refined Motor Oil, Sludge Oil, Tar Oil, or other petroleum-based liquid wastes)
- Electricity, hydropower, at power plant, unspecified: 0.000988855 kWh
  Hydroelectric
- Electricity, tire derived fuel, at power plant: 0.000154671 kWh
  Solid Renewable Fuels (Biomass) TDF - Tires (tire derived fuel)
- Electricity, nuclear, at power plant [RNA]: 0.15413 kWh
  Nuclear Fission
- Electricity, biomass,solid, unspecified, at power plant: 0.000490063 kWh
  Solid Renewable Fuels (Biomass) OBS - Other Biomass Solid (Animal Manure and Waste, Solid By-products, and other solid biomass not specified)
- Electricity, other fuels, unspecified, at power plant: 0.00556204 kWh
  Other Fuels WH - Waste Heat

## Sampling procedure
based on EIA electricity reports for all power plants in the US.

## Sources
- USEPA
- EIA
- EIA
- Statistics Canada
- EIA
- EIA
- International Energy Agency
- US DOE
- unspecified
- EIA
- Statistics Canada
- EIA
- EIA
- Chris Goemans, Athena Institute
- USEPA
- EIA
- EIA
- EIA
- Statistics Canada
- Statistics Canada
- Statistics Canada
- Statistics Canada
- EIA
- US DOE
