# Roundwood, hardwood, green, at logyard, NE-NC

Dataset: openLCA process, unit process
Category: 11: Agriculture, Forestry, Fishing and Hunting/1133: Logging
Geography: United States
Time period: 2004-12-31 to 2005-12-31
Allocation method: physical allocation
Generated by: Maureen Puetmann
Published in: Richard D. Bergman
restrictionsDescription: All information can be accessed by everybody.
copyright: false

## General comment
All weights given on an ovendry basis.
Both logs and bark were transported jointly - however, these were seperated in themodel based on mass allocation. This unit process only accounts for the transport of logs and excludes the transport of bark.
Important note: although most of the data in the US LCI database has
undergone some sort of review, the database as a whole has not yet
undergone a formal validation process.
Please email comments to lci@nrel.gov.

## Technology
Average transport distance.

## Geography
NE/NC = Northeast (NE) and Northcentral (NC) United States. The 20 states are Connecticut, Delaware, Illinois, Indiana, Iowa, Maine, Maryland, Massachusetts, Michigan, Minnesota, Missouri, New Hampshire, New Jersey, New York, Ohio, Pennsylvania, Rhode Island, Vermont, West Virginia, Wisconsin.

## Reference product
- Roundwood; hardwood; green; at logyard [US]: 1 m3
  Based on a weighted average green density of 854 kg/m3; specific gravity of 0.511; 87%MC

## By-products
- Bark; hardwood; green; at logyard [US]: 58.7 kg
  Weight reported on an ovendry basis. Moisture content (ovendry basis) = 87%

## Inputs from technosphere
- Bark; hardwood; green; at mill [US]: 58.7 kg; provider Roundwood, hardwood, green, at mill, NE-NC
- Natural gas, combusted in industrial equipment, 1.357 m3/kg, 52.13 MJ/kg [RNA]: 0.0375 l
  40% of mill use based on Softwood SE CORRIM Report: transporation on-site
- Roundwood; hardwood; green; at mill [US]: 1 m3; provider Roundwood, hardwood, green, at mill, NE-NC
  526 OD kg/m3
- Gasoline, combusted in equipment [RNA]: 0.16 l
  40% of mill use based on Softwood SE CORRIM Report: transporation on-site
- Electricity, at grid [RNA]: 5.84 kWh
  5% of total electricity is used for logyard and based on 1.0 m^3 planed dried lumber
- Diesel, combusted in industrial equipment [RNA]: 1.84 l
  40% of mill use based on Softwood SE CORRIM Report: transporation on-site
- Electricity; onsite boiler; hardwood mill; average [US]: 0.0999 kWh; provider Heat, onsite boiler, hardwood mill average, NE-NC
  5% of total electricity is used for logyard and based on 1.0 m^3 planed dried lumber

## Inputs from nature
- Water [resource, water, subterranean]: 104000 kg
  Spraying or soaking logs for stain prevention

## Allocation factors
- causal, Bark; hardwood; green; at logyard, for Electricity; onsite boiler; hardwood mill; average: 0.0505936
- causal, Bark; hardwood; green; at logyard, for Electricity, at grid: 0.0505936
- physical, Bark; hardwood; green; at logyard: 0.0505936
- economic, Roundwood; hardwood; green; at logyard: 0.949406
- causal, Roundwood; hardwood; green; at logyard, for Electricity, at grid: 0.949406
- causal, Bark; hardwood; green; at logyard, for Diesel, combusted in industrial equipment: 0.0505936
- causal, Bark; hardwood; green; at logyard, for Water: 0.0505936
- causal, Bark; hardwood; green; at logyard, for Bark; hardwood; green; at mill: 0.0505936
- causal, Roundwood; hardwood; green; at logyard, for Electricity; onsite boiler; hardwood mill; average: 0.949406
- causal, Bark; hardwood; green; at logyard, for Natural gas, combusted in industrial equipment, 1.357 m3/kg, 52.13 MJ/kg: 0.0505936
- causal, Roundwood; hardwood; green; at logyard, for Diesel, combusted in industrial equipment: 0.949406
- causal, Bark; hardwood; green; at logyard, for Roundwood; hardwood; green; at mill: 0.0505936
- causal, Roundwood; hardwood; green; at logyard, for Bark; hardwood; green; at mill: 0.949406
- causal, Bark; hardwood; green; at logyard, for Gasoline, combusted in equipment: 0.0505936
- physical, Roundwood; hardwood; green; at logyard: 0.949406
- economic, Bark; hardwood; green; at logyard: 0.0505936
- causal, Roundwood; hardwood; green; at logyard, for Gasoline, combusted in equipment: 0.949406
- causal, Roundwood; hardwood; green; at logyard, for Natural gas, combusted in industrial equipment, 1.357 m3/kg, 52.13 MJ/kg: 0.949406
- causal, Roundwood; hardwood; green; at logyard, for Roundwood; hardwood; green; at mill: 0.949406
- causal, Roundwood; hardwood; green; at logyard, for Water: 0.949406

## Sampling procedure
Questionnaires from 20 mills (17 companies) from the 20 states of Forest Service (FS) Northeastern (NE) Region. Hardwood sawmills were members of the Hardwood Manufacturer Association (HMA).

## Sources
- Richard D. Bergman
- Maureen Puettmann
