# Soy oil, refined, at plant

Dataset: openLCA process, unit process
Category: 31-33: Manufacturing/3112: Grain and Oilseed Milling
Geography: Northern America
Time period: 2004-12-31 to 2008-12-31
Allocation method: no allocation
Generated by: Anne Landfield Greig
Published in: Omni Tech International
restrictionsDescription: All information can be accessed by everybody.
copyright: false

## General comment
1. Energy data: late 2000s, other data: theoretical. 2. The study (Main Data Source) underwent external peer review prior to this submission to the US LCI database. 3. CARBON SEQUESTRATION should be accounted for after the product is built in its LCA model, and should be included depending on the use of end of life fate of that product.
REFINED SOY OIL: 80.6% C --> 2.955 kg CO2/kg refined soy oil

## Technology
average

## Geography
US

## Reference product
- Soy oil, refined, at plant [RNA]: 1000 kg

## By-products
- Soap stock, at plant [RNA]: 7.4 kg

## Inputs from technosphere
- Disposal, liquid wastes, unspecified to waste water treatment: 90 l
- Soybean oil, crude, degummed, at plant [RNA]: 1040 kg
- Transport, combination truck, diesel powered [RNA]: 33.6 t*km
- Natural gas, combusted in industrial boiler [RNA]: 1.56 m3
- Electricity, at grid [RNA]: 4.46 kWh; provider Electricity, at Grid, US, 2010
- Sodium hydroxide, production mix, at plant [US]: 2.3 kg
  NaOH

## Inputs from nature
- Water [resource, water]: 156000 kg

## Emissions to nature
- Particulate matter [emission, air]: 15 kg
- 2,4-D, salts and esters [emission, water]: 18 kg

## Allocation factors
- causal, Soap stock, at plant, for Soybean oil, crude, degummed, at plant: 0
- causal, Soy oil, refined, at plant, for Natural gas, combusted in industrial boiler: 1
- causal, Soy oil, refined, at plant, for Soybean oil, crude, degummed, at plant: 1
- economic, Soy oil, refined, at plant: 1
- causal, Soap stock, at plant, for Water: 0
- causal, Soy oil, refined, at plant, for Water: 1
- causal, Soap stock, at plant, for 2,4-D, salts and esters: 0
- causal, Soy oil, refined, at plant, for Electricity, at grid: 1
- causal, Soap stock, at plant, for Electricity, at grid: 0
- economic, Soap stock, at plant: 0
- causal, Soap stock, at plant, for Particulate matter: 0
- causal, Soap stock, at plant, for Transport, combination truck, diesel powered: 0
- causal, Soap stock, at plant, for Sodium hydroxide, production mix, at plant: 0
- causal, Soy oil, refined, at plant, for Sodium hydroxide, production mix, at plant: 1
- causal, Soy oil, refined, at plant, for Transport, combination truck, diesel powered: 1
- causal, Soy oil, refined, at plant, for 2,4-D, salts and esters: 1
- causal, Soap stock, at plant, for Natural gas, combusted in industrial boiler: 0
- physical, Soy oil, refined, at plant: 1
- causal, Soap stock, at plant, for Disposal, liquid wastes, unspecified to waste water treatment: 0
- physical, Soap stock, at plant: 0
- causal, Soy oil, refined, at plant, for Disposal, liquid wastes, unspecified to waste water treatment: 1
- causal, Soy oil, refined, at plant, for Particulate matter: 1

## Sources
- Omni Tech International
