# Biodegradable loose fill

Dataset: openLCA process, unit process
Category: 31-33: Manufacturing/3261: Plastics Product Manufacturing
Geography: Northern America
Time period: 2004-12-31 to 2009-12-31
Allocation method: no allocation
Generated by: Seth Levine
Published in: Caspervandertak Consulting USA
restrictionsDescription: All information can be accessed by everybody.
copyright: false

## General comment
Willem Christiaens, Jesse Houlihan - CVDT Consulting (compiled/evaluated data supplied by Starchtech, Inc.

## Technology
Extrusion, thermoplastic starch

## Geography
Midwest US

## Reference product
- Biodegradable loose fill [RNA]: 1 m3

## Inputs from technosphere
- Transport, ocean freighter, average fuel mix [RNA]: 8.353 t*km
  European potato starch
- Transport, ocean freighter, average fuel mix [RNA]: 148 t*km
  Equivalent finished product that would be made from Renew 400, bulk density = 7.53 kg/m^3
- Transport, single unit truck, diesel powered [RNA]: 0.0017409 t*km
- Transport, combination truck, average fuel mix [RNA]: 163.4 t*km
  Equivalent finished product that would be made from Renew 400, bulk density = 7.53 kg/m^3
- Transport, single unit truck, gasoline powered [RNA]: 0.0007461 t*km
- PVOH, at plant: 0.9277 kg; = 9.277E-4*1000
  PVOH usage
- Transport, ocean freighter, average fuel mix [RNA]: 0.1845 t*km
  Polymers
- Transport, train, diesel powered [RNA]: 159.2 t*km
  Equivalent finished product that would be made from Renew 400, bulk density = 7.53 kg/m^3
- Transport, train, diesel powered [RNA]: 0.07969 t*km
  Polymers
- Transport, combination truck, average fuel mix [RNA]: 5.97 t*km
  Domestic (US) corn starch, trucked in from IA
- Transport, combination truck, average fuel mix [RNA]: 0.6792 t*km
  PVOH (Taiwan), shipped through Perry Chemical
- Transport, combination truck, average fuel mix [RNA]: 0.6306 t*km
  Domestic (US) potato starch
- Transport, combination truck, average fuel mix [RNA]: 6.613 t*km
  Talc (Chicago, IL), shipped through Fitz Chemical
- Potato Starch, at plant: 1.264 kg; = 0.001264*1000
  Potato starch usage
- Transport, combination truck, average fuel mix [RNA]: 0.622 t*km
  European potato starch
- Polymers, at plant: 0.274 kg; = 2.74E-4*1000
  Polymers usage
- Transport, ocean freighter, average fuel mix [RNA]: 10.28 t*km
  PVOH (Taiwan), shipped through Perry Chemical
- Talc, at plant: 0.01079 kg; = 1.079E-5*1000
  Talc usage
- Transport, combination truck, average fuel mix [RNA]: 0.07969 t*km
- Water, at plant: 1.658 kg; = 0.001658*1000
  Water usage
- Corn Starch, at plant: 7.165 kg; = 0.007165*1000
  Corn starch usage
- Transport, train, diesel powered [RNA]: 3.014 t*km
  PVOH (Taiwan), shipped through Perry Chemical
- Transport, combination truck, average fuel mix [RNA]: 1.866 t*km
  Peanuts shipped from STI nationwide; a weighted average of shipping distance/amount
- Natural gas, combusted in industrial equipment, 1.357 m3/kg, 52.13 MJ/kg [RNA]: 0.019907 m3; provider Natural gas, combusted in industrial equipment
  Original weight factor provided by data submitter was 0.76472 MJ; converted to link to USLCI combustion process on m3 basis using higher heating value and density 52.13 MJ/kg and 0.7369 kg/m3, respectively.
- Electricity, at grid [RNA]: 2.986 kWh; provider Electricity, at Grid, US, 2010

## Inputs from nature
- Water [resource, water]: 220.2 kg; = 0.2202*1000

## Emissions to nature
- Water [emission, water]: 0.8145 kg
  Release of steam during pellitization process
- Carbon dioxide [emission, air]: 7.69841 kg
  Total carbon dioxide generation from production of raw materials and products
- Carbon dioxide [emission, air]: 0.4124 kg
  Total carbone dioxide generation from disposal phase
- Methane [emission, air]: 0.9622 kg
  Total methane generation from disposal phase
- Methane [emission, air]: 0.2735 kg
  Total methane generation from production of raw materials and products

## Sampling procedure
Based on annual acquisition/shipment data

## Sources
- Caspervandertak Consulting USA
- Energy Information Administration
- EPA 2010 (MO
