# Cold rolled sheet, steel, at plant

Dataset: openLCA process, unit process
Category: 31-33: Manufacturing/3312: Steel Product Manufacturing from Purchased Steel
Geography: Northern America
Time period: 1992-12-31 to 2001-12-31
Allocation method: no allocation
Generated by: Jamie K. Meil, Vice-President of the ATH
Published in: Markus Engineering Services & ATHENA Institute (2003). Steel Production
restrictionsDescription: All information can be accessed by everybody.
copyright: false

## General comment
Important note: although most of the data in the US LCI database has
undergone some sort of review, the database as a whole has not yet
undergone a formal validation process.
Please email comments to lci@nrel.gov.

## Technology
Data represent U.S and Canadian average technologies.

## Geography
North America

## Reference product
- Cold rolled sheet, steel, at plant: 1 kg

## Inputs from technosphere
- Disposal, slag, to unspecified treatment: 0.22712 kg
- Steel scrap, at plant: 0.30826 kg
- Disposal, solid waste, unspecified, to unspecified treatment: 0.085995 kg
- Disposal, BOF dust, to unspecified treatment: 0.017772 kg
- Disposal, BOF slag, to unspecified treatment: 0.086216 kg

## Inputs from nature
- Natural gas [resource, air, subterranean]: 3.91108 MJ
- Coal, bituminous [resource, ground, subterranean]: 16.4052, 4.62211 MJ (2 entries)
- Wood [resource, biotic]: 0.0001775 kg
- Energy, hydro [resource, water]: 0.24912 MJ
- Oxygen [resource, air]: 0.095477 kg
- Iron [resource, ground, subterranean]: 1.336 kg
- Crude oil [resource, water, subterranean]: 2.99132 MJ
- Uranium [resource, ground, subterranean]: 6.9237e-7 kg
- Limestone [resource, ground, subterranean]: 0.21142 kg

## Emissions to nature
- Biological Oxygen Demand [emission, water]: 4.9833e-6 kg
- Zinc(II) [emission, water]: -6.4386e-5 kg
- Phenols [emission, water]: 6.5268e-6 kg
- Cadmium(II) [emission, water]: 2.0198e-7 kg
- Total dissolved solids [emission, water]: 0.0044762 kg
- Ammonia [emission, air]: 1.8941e-6 kg
- Particulate matter, > 2.5μm and ≤ 10μm [emission, air]: 9.8784e-5 kg
- Tetrachloroethylene [emission, air]: 5.6889e-9 kg
- Metals [emission, water]: 1.6493e-6 kg
- Naphthalene [emission, air]: 4.0572e-10 kg
- Chromate [emission, water]: 4.8951e-9 kg
- Organic compounds [emission, air]: 1.215e-7, 5.0054e-6 kg (2 entries)
- Mercury [emission, water]: 1.5832e-11 kg
- Chemical Oxygen Demand [emission, water]: 0.002011 kg
- Carbon monoxide [emission, air]: 0.00051377, 0.025799 kg (2 entries)
- Ammonium [emission, water]: -0.012172 kg
- Sulfate [emission, water]: 0.00023373 kg
- Chromium [emission, water]: -1.4685e-6 kg
- Nitrate [emission, water]: 5.733e-8 kg
- Formaldehyde [emission, air]: 2.0948e-6 kg
- Particulate matter [emission, air]: 0.00049987 kg
- Dimethylnitramine [emission, air]: 1.2613e-9 kg
- Nitrogen oxides [emission, air]: 0.0034839 kg
- Benzo[a]pyrene [emission, water]: 5.5346e-6 kg
- Chlorine [emission, air]: 1.4619e-8 kg
- Arsenic [emission, air]: 2.1433e-8 kg
- Chromium [emission, air]: 3.4398e-8 kg
- Cyanide [emission, water]: 0.00063284 kg
- Fluoride [emission, water]: 0.00018787 kg
- Acrolein [emission, air]: 5.9756e-9 kg
- Methylene chloride [emission, air]: 2.5358e-8 kg
- 2,3,7,8-Tetrachlorodibenzo-p-dioxin [emission, air]: 3.2634e-14 kg
- Nitrogen [emission, water]: 0.00069017 kg
- Lead [emission, water]: 0.00013473 kg
- Methane [emission, air]: 0.0014487 kg
- Cadmium [emission, air]: 5.5566e-9 kg
- Selenium [emission, air]: 4.2777e-8 kg
- Phosphorus [emission, water]: 1.3936e-5 kg
- Radionuclides [emission, air]: 18.47 kBq
- Hydrochloric acid [emission, air]: 3.0209e-5 kg
- Carbon tetrachloride [emission, air]: 9.4374e-9 kg
- Phenol [emission, water]: 5.3361e-9 kg
- Sulfuric acid [emission, water]: 4.0572e-6 kg
- Nickel(II) [emission, water]: 1.4707e-6 kg
- Boron [emission, water]: 1.6229e-5 kg
- Benzene [emission, water]: -5.1817e-5 kg
- Manganese [emission, water]: 1.3693e-5 kg
- Hydrogen ion [emission, water]: 7.7396e-11 kg
- Sulfide [emission, water]: 0.0018632 kg
- Nitrous oxide [emission, air]: 3.7265e-6 kg
- Metals [emission, air]: 9.3272e-8 kg
- PAH/POM, unspecified [emission, air, indoor]: 0.017883 kg
- Cobalt [emission, air]: 8.5334e-9 kg
- Naphthalene [emission, water]: -4.2336e-5 kg
- Hydrofluoric acid [emission, air]: 4.1675e-6 kg
- Kerosene [emission, air]: 1.5259e-7 kg
- Sodium(I) [emission, water]: 2.4035e-7 kg
- Orthophosphate [emission, water]: -6.5268e-6 kg
- Calcium(II) [emission, water]: 1.3142e-7 kg
- Manganese [emission, air]: 6.7694e-8 kg
- Phenol [emission, air]: 1.689e-8 kg
- Chloride [emission, water]: 0.0068355 kg
- Antimony [emission, air]: 2.9988e-9 kg
- Volatile organic compounds [emission, air]: 0.00021896, 0.0012083 kg (2 entries)
- Benzene [emission, air]: 8.5113e-9 kg
- Beryllium [emission, air]: 2.4917e-9 kg
- Trichloroethylene [emission, air]: 5.6448e-9 kg
- Mercury [emission, air]: 1.1576e-8 kg
- Carbon dioxide [emission, air]: 0.00023153, 2.58 kg (2 entries)
- Suspended solids, inorganic [emission, water]: 0.035501 kg
- Aldehydes, C5 [emission, air]: 5.3582e-6 kg
- Ammonia [emission, water]: 3.8588e-7 kg
- Nickel [emission, air]: 9.1508e-8 kg
- Lead [emission, air]: 2.0948e-8 kg
- Sulfur oxides [emission, air]: 0.0054905 kg
- Organic compounds [emission, water]: 1.5788e-5 kg
- Iron [emission, water]: 0.00024696 kg
- Sulfur dioxide [emission, air]: 0.0020749 kg

## Sources
- Franklin Associates Ltd. (2001) Franklin USA 98
- Markus Engineering Services & ATHENA Institute (2003). Steel Production
- Stelco Technical Services Limited
