# Coil, coating, m2, at plant

Dataset: openLCA process, unit process
Category: 31-33: Manufacturing/3328: Coating, Engraving, Heat Treating, and Allied Activities
Geography: Northern America
Time period: 2013-12-31 to 2015-02-27
Allocation method: no allocation
Generated by: PE INTERNATIONAL
Published in: PE INTERNATIONAL
restrictionsDescription: All information can be accessed by everybody.
copyright: false

## General comment
The coil coating process includes all known cradle-to-gate processes necessary for the treatment of metallic sheets. The process however omits the production of the metal coils themselves as the feedstock metal can vary depending on the product. Raw materials include all known pre-treatments, cleaners, paints, and packaging materials to protect the finished sheets--as well as inbound transport. Manufacturing processes require electricity, heat from natural gas, and process water. Air and water emissions are captured in the output of the process.

## Technology
Metal coil coating process necessary for metallic construction products. Technology based on companies identified by Metal Construction Association to be representative of industry.

## Geography
North America

## Reference product
- Coil, coating, m2, at plant [RNA]: 1 m2

## Inputs from technosphere
- Liquefied petroleum gas, at refinery [RNA]: 2.11709e-6 m3; provider Petroleum refining, at refinery
  m3 amount LPG replaces "CUTOFF Thermal energy from propane (MJ)" using HHV 49.1 MJ/kg for LPG and density 543.478 kg/m3 (per USLCI petroleum refining products densities)
- Transport, single unit truck, long-haul, diesel powered [RNA]: 1300.6 kg*km; provider Transport, single unit truck, long-haul, diesel powered, Northwest
- Disposal, sludge, to sanitary landfill: 0.00128683 kg
- Electricity, at grid [RNA]: 1.04814 kWh; provider Electricity, at Grid, US, 2010
- Polyethylene, low-density, LDPE, virgin resin, at plant: 0.0020748 kg
- Polypropylene, PP, virgin resin, at plant [RNA]: 0.0001139 kg
- Water, process: 1.51852 kg
- Waste, industrial [RNA]: 0.000877633 kg
- Lubricant feedstock, at refinery: 0.00174117 kg
- Chromic acid: 0.00149189 kg
- Natural gas, combusted in industrial equipment, 1.357 m3/kg, 52.13 MJ/kg [RNA]: 0.00469836 m3; provider Natural gas, combusted in industrial equipment
- Chromium III chromate sealer: 0.000325005 kg
- Disposal, solid waste, unspecified, to unspecified treatment: 0.0390179 kg
- Alkaline cleaner, unspecified: 0.00159484 kg
- Flouropolymer (PVDF): 0.0458205 kg
- Hot rolled sheet, steel, at plant [RNA]: 0.000970302 kg
- Mineral spirits: 2.85715e-6 kg
- Disposal, chemical waste, unspecified, to residual materials landfill: 0.000380835 kg
- Disposal, chemical waste, unspecified, to unspecified treatment: 0.000928836 kg
- Phosphate pre-treat: 0.000511245 kg
- Particleboard, average, softwood, particleboard mill [RNA]: 8.10992e-6 m3; = 0.00605/746
  Conversion factor (from original weight factor 0.00605 kg to m3) based on particleboard parent process description: 1 m3 of particleboard weighs 746 kg on oven dry (OD) basis--5 mill average
- Materials for basecoat painting, at plant: 0.0146103 kg
- Containerboard, average production, at mill [US]: 0.00661996 kg
- Polyvinylidene fluoride: 0.00945089 kg
- Disposal, liquid wastes, unspecified to waste water treatment: 1.51852 l

## Emissions to nature
- Carbon [emission, water]: 2.23568e-7 kg
- Biological Oxygen Demand [emission, water, fresh water body, river]: 3.34972e-6 kg
- Particulate matter, ≤ 10μm [emission, air, troposphere, rural]: 6.38541e-5 kg
- Chromium(III) [emission, water, fresh water body, river]: 2.74758e-9 kg
- Carbon monoxide [emission, air]: 0.000134893 kg
- Copper(I) [emission, water, fresh water body, river]: 1.51269e-8 kg
- Suspended solids, inorganic [emission, water, fresh water body, river]: 0.000541955 kg
- Nitrogen oxides [emission, air]: 0.000828269 kg
- Ammonia [emission, air]: 3.12996e-7 kg
- Volatile organic compounds [emission, air]: 0.000832175 kg
- Chemical Oxygen Demand [emission, water, fresh water body, river]: 2.94498e-5 kg
- Particulate matter, ≤ 2.5μm [emission, air, troposphere, rural]: 3.47601e-5 kg
- Sulfur dioxide [emission, air]: 1.67408e-7 kg
- Lead [emission, water, fresh water body, river]: 1.45577e-8 kg

## Sources
- PE INTERNATIONAL
