# Scanner, department, S3120 Max, S3140 Max

Dataset: openLCA process, unit process
Category: 31-33: Manufacturing/3341: Computer and Peripheral Equipment Manufacturing
Geography: China
Time period: 2019-01-29 to 2020-11-29
Allocation method: no allocation
Data quality: US EPA - Process Pedigree Matrix (2;1)
Exchange data quality scheme: US EPA - Flow Pedigree Matrix
Generated by: Roy Wood
Owner: Kodak Alaris
Reviewer: Jay Mathewson
Published in: Roy Wood
restrictionsDescription: Summary is available to public.
These U.S. LCI Database Project data ("Data") are provided by the National Renewable Energy Laboratory ("NREL"), operated by the Alliance for Sustainable Energy, LLC ("Alliance") for the US Department of Energy ("DOE") under Contract No. DE-AC36-08GO28308. The United States Government (the "Government") retains and the user acknowledges that the Government retains a non-exclusive, paid-up, irrevocable, worldwide license to publish or reproduce the published form of these data, or allow others to do so, for Government purposes.
Access to and use of these Data shall impose the following obligations on the user, as set forth in this Agreement. The user is granted the right, without any fee or cost, to use, copy, modify, alter, enhance and distribute these Data for any purpose whatsoever, provided that this entire notice appears in all copies of the Data. Any modification, alteration or enhancement of these data shall be identified and documented by the user. Further, the user agrees to credit the DOE/NREL/Alliance in any publication that results from the use of these Data. The names DOE/NREL/Alliance, however, may not be used in any advertising or publicity to endorse or promote any products or commercial entities unless specific written permission is obtained from DOE/NREL/Alliance. The user also understands that DOE/NREL/Alliance is not obligated to provide the user with any support, consulting, training or assistance of any kind with regard to the use of these Data or to provide the user with any updates, revisions or new versions of these Data.
YOU AGREE TO INDEMNIFY THE GOVERNMENT AND DOE/NREL/ALLIANCE, AND ITS SUBSIDIARIES, AFFILIATES, OFFICERS, AGENTS, AND EMPLOYEES AGAINST ANY CLAIM OR DEMAND, INCLUDING REASONABLE ATTORNEYS' FEES, RELATED TO YOUR USE OF THESE DATA. THESE DATA ARE PROVIDED BY DOE/NREL/ALLIANCE "AS IS" AND ANY EXPRESS OR IMPLIED WARRANTIES, INCLUDING BUT NOT LIMITED TO, THE IMPLIED WARRANTIES OF MERCHANTABILITY AND FITNESS FOR A PARTICULAR PURPOSE ARE DISCLAIMED. IN NO EVENT SHALL THE GOVERNMENT OR DOE/NREL/ALLIANCE BE LIABLE FOR ANY SPECIAL, INDIRECT OR CONSEQUENTIAL DAMAGES OR ANY DAMAGES WHATSOEVER, INCLUDING BUT NOT LIMITED TO CLAIMS ASSOCIATED WITH THE LOSS OF DATA OR PROFITS, WHICH MAY RESULT FROM AN ACTION IN CONTRACT, NEGLIGENCE OR OTHER TORTIOUS CLAIM THAT ARISES OUT OF OR IN CONNECTION WITH THE ACCESS, USE OR PERFORMANCE OF THESE DATA.
copyright: false

## General comment
This unit process represents the gate-to-gate production of one Kodak Alaris scanner models S3120 Max & S3140 Max, including power supply and cables (mass = 17.5 kg). The system boundary includes: 1) the transport of raw materials to multiple manufacturing facilities where various subcomponents are produced; 2) the manufacture of subcomponents; 3) the transport of subcomponents to a different manufacturing plant for final assembly; 4) the assembly of subcomponents into a complete scanner; and 5) the transport of generated waste from the manufacturing facilities to a municipal solid waste landfill. The following processes and life cycle phases fall outside of the system boundary: 1) packaging of the completed scanner; 2) all transport downstream of the assembly plant gate; 3) sale of product; 4) product use phase; and 5) end-of-life phase (including recycling).

The use of this unit process for the analysis of similar devices requires professional judgement based on the degree of similarity.

## Technology
The manufacture of a department level scanner that uses 2022 technology including information storage and processing and energy savings features. The manufacture includes the manufacturing of subcomponents at other facilities and assembly at a central location in Guangzhou, China.

## Geography
Scanners are manufactured in China, but components represent a global supply chain and secondary data is based on best available data from global sources.

## Time period
Primary data is valid from 2020 - 2022. Secondary data is valid from 2005 - 2021.

## Reference product
- Scanner, department, S3120 Max, S3140 Max [CN]: 1 Item(s)
  17.5 kg department scanner

## Inputs from technosphere
- Copper, at regional storage: 0.035 kg; triangle minimum 0.033, mode 0.035, maximum 0.037
- metal product manufacturing, average metal working: 8.232 kg; triangle minimum 8.1, mode 8.232, maximum 8.36
- Flat glass, uncoated, at plant: 0.028 kg; triangle minimum 0.027, mode 0.028, maximum 0.029
- Polyethylene terephthalate, PET, virgin resin, at plant, kg: 0.023 kg; triangle minimum 0.022, mode 0.023, maximum 0.024
- Cold rolled sheet, steel, at plant: 7.58 kg; triangle minimum 7.48, mode 7.58, maximum 7.68
- Cable, connector for computer, without plugs, at plant: 0.899 kg; triangle minimum 0.89, mode 0.899, maximum 0.909
- Polyethylene, low-density, LDPE, virgin resin, at plant: 0.0014 kg; triangle minimum 0.0013, mode 0.0014, maximum 0.0015
- Lubricant feedstock, at refinery: 0.002 kg; triangle minimum 0.0019, mode 0.002, maximum 0.0021
- Gasoline, at refinery: 1.5 kg; triangle minimum 1.3, mode 1.5, maximum 1.7
- Acrylonitrile-butadiene-styrene, ABS, copolymer resin, at plant [RNA]: 6.497 kg; triangle minimum 6.4, mode 6.497, maximum 6.6
- polycarbonate: 0.507 kg; triangle minimum 0.497, mode 0.507, maximum 0.517
- transport, passenger, aircraft: 12 p*km; triangle minimum 9, mode 12, maximum 15
- Power adapter, for laptop, at plant: 0.643 kg; triangle minimum 0.64, mode 0.643, maximum 0.646
- E-glass, at plant [US]: 0.049 kg; triangle minimum 0.048, mode 0.049, maximum 0.05
- Electricity, at grid [CN]: 33 kWh; triangle minimum 30, mode 33, maximum 36
- Paper, freesheet, coated, average production, at mill [RNA]: 0.079 kg; triangle minimum 0.077, mode 0.079, maximum 0.081
- Injection molding, rigid polypropylene part, at plant [RNA]: 7.807 kg; triangle minimum 7.7, mode 7.807, maximum 7.9
- Carbon black, at plant: 0.195 kg; triangle minimum 0.185, mode 0.195, maximum 0.205
- Polybutadiene, butadiene rubber, BR, at plant [RNA]: 0.312 kg; triangle minimum 0.3, mode 0.312, maximum 0.324
- nylon 6-6 - GLO: 0.181 kg; triangle minimum 0.175, mode 0.181, maximum 0.196
- printed wiring board, through-hole mounted, unspecified, Pb free: 0.171 kg; triangle minimum 0.165, mode 0.171, maximum 0.177
- Polyvinyl chloride, PVC, resin; at plant [RNA]: 0.024 kg; triangle minimum 0.023, mode 0.024, maximum 0.025
- Natural gas, processed, at plant, 1.357 m3/kg [RNA]: 8.35 cu ft; triangle minimum 8.15, mode 8.35, maximum 8.55
- Iron and steel, production mix [RNA]: 0.19 kg; triangle minimum 0.15, mode 0.19, maximum 0.23
- polymethyl methacrylate beads: 0.0054 kg; triangle minimum 0.005, mode 0.0054, maximum 0.0058
- Polypropylene, PP, virgin resin, at plant [RNA]: 0.0022 kg; triangle minimum 0.002, mode 0.0022, maximum 0.0024
- Zinc, Special High Grade [GLO]: 0.0041 kg; triangle minimum 0.0039, mode 0.0041, maximum 0.0043
- Transport, combination truck, average fuel mix [RNA]: 37 t*km; triangle minimum 30, mode 37, maximum 44
- Urea formaldehyde, UF, resin, neat, 65% solids [RNA]: 0.0003 kg; triangle minimum 0.00025, mode 0.0003, maximum 0.00035
- Transport, pipeline, natural gas [RNA]: 0.2 t*km; triangle minimum 0.1, mode 0.2, maximum 0.4
- polyoxymethylene (POM) - EU-27: 0.226 kg; triangle minimum 0.22, mode 0.226, maximum 0.232
- Aluminum ingot, production mix, at plant [US]: 0.613 kg; triangle minimum 0.603, mode 0.613, maximum 0.623

## Inputs from nature
- Water, fresh [resource, water, fresh water body]: 84.9504 kg; triangle minimum 76.4554, mode 84.9504, maximum 93.4454
  Process water, surface water

## Inventory method
Attributional.

## Modelling constants
Allocation rules: Materials were based on actual specifications. Energy and fuels were allocated to products manufactured at the location based on their mass.
Substitution allocation: Substitution by close proxy ( data for similar processes were used for the components)

## Completeness
TREATMENT OF MISSING Environmental Data - all known elementary flows are included, so cutoff is <1%
Technosphere flow data - Intermediate flows are cut-off at less than 1% (physical criteria). Capital equipment used for manufacturing were not included.
Note that there were no significant emissions to air, soil, or water from the scanner assembly process. No emissions were measured and estimnates could not be quantified, but were believed to be were well 0.1% of total emissions from the full cradle to gate process, so zero emissions were included.
Mass Balance - The mass of inputs (not including fuels) balances with the scanner output, so there is less than 1% difference.

## Data selection
An attempt was made to include data for all inputs. Primary data were used where available and the most representative secondary data were used where primary data were not available.

## Data treatment
Primary data were taken from precise engineering specifications specific to this unit process. These data were then transformed into material and energy flows using the methodology described in Wood (2022) which is due to be released in July, 2022. The Wood (2022) methodology, which is an ISO 14044 compliant LCA, was independent third party reviewed.

Secondary data were taken from the ecoinvent 3.2 database (Wernet et al. 2016) and the U.S. Life Cycle Inventory Database (National Renewable Energy Laboratory 2016). The data were global except where otherwise specified.

## Data collection
All primary data were collected from 2019 to 2021. Secondary data were collected from 2005-2021.

## Sampling procedure
BOUNDARY CONDITIONS
The system boundary includes: 1) the transport of raw materials to multiple manufacturing facilities where various subcomponents are produced; 2) the manufacture of subcomponents; 3) the transport of subcomponents to a different manufacturing plant for final assembly; 4) the assembly of subcomponents into a complete scanner; and 5) the transport of generated waste from the manufacturing facilities to a municipal solid waste landfill. The following processes and life cycle phases fall outside of the system boundary: 1) packaging of the completed scanner; 2) all transport downstream of the assembly plant gate; 3) sale of product; 4) product use phase; and 5) end-of-life phase (including recycling).

DATA COLLECTION
For material inputs, data collection was based on scanner specifications provided by the manufacturer. Other inputs (e.g. energy; waste transport and disposal) were calculated on the basis of quantity of input per kg of scanner produced.

UNCERTAINTY ESTIMATION
Uncertainty was estimated based on engineering judgment. Material inputs had less uncertainty because they were based off of precise engineering specifications. Other inputs (e.g. energy; waste transport and disposal) had more uncertainty.

## Review details
Internal review. The Wood (2021) methodology is almost identical to the methodology described in Wood (2012) which is an ISO 14044 compliant, peer-reviewed LCA report of three Kodak scanners (Kodak i2800; i2600; and i2400), which was peer reviewed by Kate Wennebeck of Rochester Institute of Technology's Pollution Prevention Institute. A third party review of the current LCA by the New York State Pollution Prevention Institute is in progress and results will be included in a later update to this data.

## Intended application
The intended application for this unit process is for "Accounting" purposes as described in Situation C2 from the Institute for Environment and Sustainablility (2011:3). As such, it describes the gate-to-gate production of one S3120 Max, or S3140 Max desktop scanner "without being interested in any potential consequences on other parts of the economy" (Institute for Environment and Sustainablility 2011:3) and without consideration of potential benefits from recycling the scanner at the end of its useful life.

## Project
Data and LCA results are reported in Wood (2022) Life Cycle Assessment Summary Report -
Kodak Alaris models S3120 Max, and S3140 Max Scanners - ISO 14044 Protocol

## Sources
- Wernet et al. (2016) The ecoinvent database version 3 (part I): overview and methodology.
