# Anode, at plant

Dataset: openLCA process, unit process
Category: 31-33: Manufacturing/3313: Alumina and Aluminum Production and Processing
Geography: Northern America
Time period: 1997-12-31 to 1997-12-31
Allocation method: no allocation
Generated by: James Littlefield, Franklin Associates
Published in: Franklin Associates, A Division of ERG (2007) LCI Primary Aluminum
restrictionsDescription: All information can be accessed by everybody.
copyright: false

## General comment
The two types of aluminum smelting technologies are distinguished by the type of anode that is used in the reduction process: soderberg and prebake. Soderberg design has a single anode that covers most of the top surface of a reduction cell (pot). Anode paste (briquettes) is fed to the top of the anode and as the anode is consumed in the process, the paste feeds downward by gravity. Heat from the pot bakes the paste into a monolithic mass before it gets to the electrolytic bath interface. The prebake design has prefired blocks of solid carbon suspended from axial busbars. The busbars both hold the anodes in place and carry the current for electrolysis. The process for making the aggregate for briquettes or prebake blocks is identical. Coke is calcined, ground and blended with pitch to form a paste that is subsequently extruded into blocks or briquettes and allowed to cool. While the briquettes are sent direct to the pots for consumption, the blocks are then sent to a separate baking furnace. Baking furnace technology has evolved from simple pits that discharged volatiles to atmosphere during the baking cycle to closed loop type designs that convert the caloric heat of the volatile into a process fuel that reduces energy consumption for the process.
Important note: although most of the data in the US LCI database has
undergone some sort of review, the database as a whole has not yet
undergone a formal validation process.
Please email comments to lci@nrel.gov.

## Technology
Coke is calcined and blended with pitch.

## Geography
North America

## Reference product
- Anode, at plant [RNA]: 1 kg

## Inputs from technosphere
- Natural gas, combusted in industrial boiler [RNA]: 0.097138 m3
- Residual fuel oil, combusted in industrial boiler [RNA]: 0.0049238 l
- Liquefied petroleum gas, combusted in industrial boiler [RNA]: 0.0011684 l
- Gasoline, combusted in equipment [RNA]: 4.5065e-5 l
- Diesel, combusted in industrial boiler [RNA]: 0.00010849 l
- Electricity, at grid [RNA]: 0.26676 kWh; provider Electricity, at Grid, US, 2010
- Metallurgical coke, at plant [RNA]: 0.82 kg
- Disposal, solid waste, unspecified, to unspecified treatment: 0.02441 kg
- Petroleum coke, at refinery [RNA]: 0.316 kg; provider Petroleum refining, at refinery

## Emissions to nature
- Sulfuric acid [emission, air]: 4.4e-6 kg
- Nitrogen [emission, water]: 1.6e-6, 2.2e-8 kg (2 entries)
- Dissolved Organic Carbon [emission, water]: 3.9e-6 kg
- PAH/POM, unspecified [emission, air]: 9.4e-9 kg
- Hydrofluoric acid [emission, air]: 2.3e-5 kg
- Chlorofluorocarbons [emission, air]: 5.5e-9 kg
- Sulfate [emission, water]: 2.3e-5 kg
- Carbon dioxide [emission, air]: 0.388 kg
- Volatile organic compounds [emission, air]: 0.00024 kg
- Total dissolved solids [emission, water]: 2.3e-6 kg
- Particulate matter [emission, air]: 0.00247 kg
- Chemical Oxygen Demand [emission, water]: 0.00018 kg
- Metals [emission, water]: 1.3e-5 kg
- Biological Oxygen Demand [emission, water]: 1.5e-5 kg
- Ammonium [emission, water]: 1.5e-7 kg
- Magnesium [emission, water]: 4.7e-6 kg
- Phenol [emission, water]: 2.3e-10 kg
- Carbon monoxide [emission, air]: 0.00207 kg
- Cyanide [emission, water]: 6.3e-10 kg
- Suspended solids, inorganic [emission, water]: 4.3e-5 kg
- Nitrogen oxides [emission, air]: 0.00011 kg
- Iron [emission, water]: 4.2e-7 kg
- Fluoride [emission, water]: 1.3e-5 kg
- Chloride [emission, water]: 1.4e-9 kg
- Sulfur oxides [emission, air]: 0.00322 kg
- Organic compounds [emission, air]: 1.3e-6 kg
- Hydrochlorofluorocarbons [emission, air]: 5.5e-9 kg
- PAH/POM, unspecified [emission, air, indoor]: 1.2e-5 kg
- Lead [emission, water]: 5.7e-9 kg
- Hydrocarbons [emission, water]: 2e-8 kg
- Lead [emission, air]: 4.5e-12 kg
- Metals [emission, air]: 3.3e-8 kg
- Polycyclic aromatic hydrocarbons [emission, air]: 1.4e-5 kg

## Sources
- US Geological Survey
- Energy Information Administration (EIA)
- IAI Statistical Report: Electrical Power
- The Aluminum Association
- US EPA
- Franklin Associates, A Division of ERG (2007) LCI Primary Aluminum
