# Pulp, kraft market, bleached, average production, at mill

Dataset: openLCA process, unit process
Category: 31-33: Manufacturing/3221: Pulp, Paper, and Paperboard Mills
Geography: Northern America
Time period: 2005-12-31 to 2005-12-31
Allocation method: no allocation
Generated by: Caroline Gaudreault
Reviewer: Martha Stevenson
Published in: AF&PA (2010). Printing & Writing Papers LCA
restrictionsDescription: All information can be accessed by everybody.
copyright: false

## General comment
Bleached kraft market pulp, average North American production, at mill. By-products were allocated 0% of the impacts to enable the user to choose and apply their own allocation method more easily. All flows are production-weighted means. Data were developed for a full LCA that was critically reviewed. Reviewers were: • Martha Stevenson, Chairperson – Private Consultant to the public interest with ten years of experience in sustainability, environmental management, packaging and materials recovery; led the development of the Design Guidelines for Sustainable Packaging and the COMPASS software used to compare the environmental impacts of package designs; • Pascal Lesage – Life cycle assessment consultant, Researcher at École Polytechnique de Montréal [at the Inter-University Research Centre for the Life Cycle of Products, Processes and Services (CIRAIG) in Montreal]; and • Dale Phenicie, Environmental Affairs Consulting – Consultant with 35 years of experience in environmental protection and process consulting for the forest products industry. Has served on several U.S. EPA Task Forces dealing with water quality issues and authored several AF&PA Environmental, Health and Safety/Sustainability reports.

## Technology
current technology mix for kraft pulping

## Time period
Primary data collected from participating companies and associations for their operational activities are representative for 2006 and 2007.

## Reference product
- Pulp, kraft market, bleached, average production, at mill [RNA]: 816.466 kg; provider Transport, barge, average fuel mix
  816.46623 dry kg is equal to 1 air-dried short ton (10% water).

## By-products
- Steam, at bleached kraft market pulp mill [RNA]: 114 MJ
  Produced as byproduct of pulp production. Sold i.e., not used on site. Allocation set to 0%.
- Electricity, at bleached kraft market pulp mill [RNA]: 51.389 kWh
  (same comment as for Steam, at bleached kraft market pulp mill)
- Tall oil, at bleached kraft market pulp mill [RNA]: 29.846 kg
  (same comment as for Steam, at bleached kraft market pulp mill)
- Turpentine, at bleached kraft market pulp mill [RNA]: 2.3133 kg
  (same comment as for Steam, at bleached kraft market pulp mill)

## Inputs from technosphere
- Pulpwood, softwood, average, at forest road [RNA]: 0.2699 m3; provider Pulpwood, softwood, average, at forest road, NE-NC
  Mass of incoming northern softwood logs (assumed 63.5% East/Central based on mill location) intended for pulping. Assumed density: 450 kg/m3. Wood usage in the process is distrubuted as follows: 30% ends up in pulp, 30% in self-generated hogged fuel and 40% in black liquor. All the hogged fuel is combusted onsite. Combustion of this fuel is important to the economic viability of all modern pulp mills. Substitution of other fuels for this fuel is not recommended. Need to be paired with "Self-generated hogged fuel, combusted in industrial boiler, at pulp and paper mill". Black liquor solides are combusted onsite as part of the pulping chemical recovery process that is integral to and is essential to the economic viability of all modern pulp mills. Substitution of other fuels for this fuel is not recommended.
- Disposal, solid waste, unspecified, to unspecified incinerator: 0.48081 kg
  Typically on-site with energy recovery.
- Disposal, unspecified ashes, to unspecified land application: 2.0865 kg
  Mix of wood and coal ashes. Based on typical ash contents can be assumed to be 78% from wood and 22% from coal. Typically off-site agricultural/silvicultural.
- Transport, combination truck, average fuel mix [RNA]: 802.98 t*km
  Transportation of pulpwood and chips to pulp mill. Pulpwood: 200 km (rounded trip distance), chips: 254 km (rounded trip distance).
- Disposal, solid waste, unspecified, to unspecified beneficial use: 8.1647 kg
  Typically off-site.
- Pulpwood; softwood; average; at forest road [US]: 0.39513 m3; provider Pulpwood, softwood, average, at forest road, INW
  Mass of incoming southern softwood logs intended for pulping. Assumed density: 450 kg/m3. US LCI: "Softwood logs with bark, harvested at average intensity site, at mill, US SE/US" can be used but transportation needs to be removed as it is already included here. Wood usage in the process is distrubuted as follows: 30% ends up in pulp, 30% in self-generated hogged fuel and 40% in black liquor. All the hogged fuel is combusted onsite. Combustion of this fuel is important to the economic viability of all modern pulp mills. Substitution of other fuels for this fuel is not recommended. Need to be paired with "Self-generated hogged fuel, combusted in industrial boiler, at pulp and paper mill". Black liquor solides are combusted onsite as part of the pulping chemical recovery process that is integral to and is essential to the economic viability of all modern pulp mills. Substitution of other fuels for this fuel is not recommended.
- Electricity from hydro: 17.222 kWh
  Generation at company facilities. Ei: Electricity, hydropower, at run-of-river power plant/CH S
- Sulfuric acid, at plant [RNA]: 30.209 kg
- Electricity, at grid, QC: 131.66 kWh
- Transport, ocean freighter, average fuel mix [RNA]: 6.0443 t*km
  Transportation of chemicals. Talc: 0 km. Sodium hydroxide: 24.1 km. Sodium chlorate, sulfuric acid, hydrogen peroxide, quicklime and oxygen: 517 km. Methanol: 740 km. Transports of fuels. Residual fuel oil , Distillate fuel oil: 682 km. Kerosene and gasoline, Other fossil assumed to be diesel: 1183 km.
- Transport, single unit truck, diesel powered [RNA]: 2.9929 t*km
  Transportation of solid waste to land application and other beneficial use. Other management options assumed to occur onsite. Rounded trip distance: 64.4 km.
- Quicklime, at plant [RNA]: 3.4473 kg
- Transport, barge, average fuel mix [RNA]: 11.008 t*km
  Transportation of chemicals. Talc: 0 km. Sodium hydroxide: 776 km. Sodium chlorate, sulfuric acid, hydrogen peroxide, quicklime and oxygen: 489 km. Methanol: 671 km. Transports of fuels. Coal: 515 km. Residual fuel oil, Distillate fuel oil: 163 km. Kerosene and gasoline, Other fossil assumed to be diesel : 163 km. Tire derived fuel: 315 km.
- Transport, combination truck, average fuel mix [RNA]: 19.126 t*km
  Transportation of chemicals. Talc: 295 km. Sodium hydroxide: 230 km. Sodium chlorate, sulfuric acid, hydrogen peroxide, quicklime and oxygen: 183 km. Methanol: 632 km. Transports of fuels. Coal: 153 km. Residual fuel oil, Distillate fuel oil: 50 km. Liquefied petroleum gas, Kerosene and gasoline, Other fossil assumed to be diesel: 80 km. Tire derived fuel: 98 km.
- Transport, pipeline, natural gas [RNA]: 64.5 t*km
  Transports of fuels. Natural gas: 33584 tkm/MMcf, Average transportation for natural gas in North America according to the US LCI database
- Disposal, solid waste, unspecified, to unspecified land application: 3.6287 kg
  Typically off-site agricultural/silvicultural
- Methanol, at plant, kg: 4.8988 kg
- Disposal, unspecified ashes, to unspecified beneficial use: 6.8946 kg
  Mix of wood and coal ashes. Based on typical ash contents can be assumed to be 78% from wood and 22% from coal. Typically off-site.
- Electricity, at grid [RNA]: 114.29, 33.592 kWh (2 entries); provider Electricity, at Grid, US, 2010
  Net purchased, National average grid, Medium voltage: <50 kV
- Disposal, wastewater treatment plant residuals, to uns. land application: 3.1751 kg
  Typically off-site agricultural/silvicultural. (uns. = unspecified)
- Transport, train, diesel powered [RNA]: 101.32 t*km
  Transportation of chemicals. Talc: 1204 km. Sodium hydroxide: 927 km. Sodium chlorate, sulfuric acid, hydrogen peroxide, quicklime and oxygen: 1088 km. Methanol: 1254 km. Transports of fuels. Coal: 653 km. Residual fuel oil, Distillate fuel oil: 1114 km. Liquefied petroleum gas: 1246 km. Tire derived fuel: 1156 km.
- Disposal, solid waste, unspecified, to unspecified landfill: 25.583 kg
  Typically company-owned, but some third party.
- Chips; softwood; green; at sawmill [US]: 1321.8 kg
  Mass of incoming pulp chips intended for pulping. US LCI: "Pulp chips, at sawmill,US SE/kg" can be used as a proxy. The actual mix of chips is: northern softwood chips: 66%, northern hardwood chips: 18%, southern softwood chips: 11% and southern hardwood chips: 6%. Pulp chips usage in the process is distrubuted as follows: 42% ends up in pulp and 58% in black liquor. Combusted onsite as part of the pulping chemical recovery process that is integral to and is essential to the economic viability of all modern pulp mills. Substitution of other fuels for this fuel is not recommended.
- Disposal, wastewater treatment plant residuals, to uns. landfill: 14.696 kg
  Typically company-owned, but some third party. (uns. = unspecified)
- Disposal, wastewater treatment plant residuals, to uns. beneficial use: 0.90718 kg
  Typically off-site. (uns. = unspecified)
- Pulpwood; hardwood; average; at forest road [US]: 0.46476 m3; provider Pulpwood, hardwood, average, at forest road, NE-NC
  Mass of incoming northern hardwood logs intended for pulping. Assumed density: 650 kg/m3. Wood usage in the process is distrubuted as follows: 30% ends up in pulp, 30% in self-generated hogged fuel and 40% in black liquor. All the hogged fuel is combusted onsite. Combustion of this fuel is important to the economic viability of all modern pulp mills. Substitution of other fuels for this fuel is not recommended. Need to be paired with "Self-generated hogged fuel, combusted in industrial boiler, at pulp and paper mill". Black liquor solides are combusted onsite as part of the pulping chemical recovery process that is integral to and is essential to the economic viability of all modern pulp mills. Substitution of other fuels for this fuel is not recommended.
- Fuels, burned at bleached kraft market pulp mill, average production, at mill [RNA]: 10867 MJ
  Includes all fuels burned on site
- Pulpwood; softwood; average; at forest road [US]: 0.15547 m3; provider Pulpwood, softwood, average, at forest road, INW
  Mass of incoming northern softwood logs (assumed 36.5% West based on mill location) intended for pulping. Assumed density: 450 kg/m3. Wood usage in the process is distrubuted as follows: 30% ends up in pulp, 30% in self-generated hogged fuel and 40% in black liquor. All the hogged fuel is combusted onsite. Combustion of this fuel is important to the economic viability of all modern pulp mills. Substitution of other fuels for this fuel is not recommended. Need to be paired with "Self-generated hogged fuel, combusted in industrial boiler, at pulp and paper mill". Black liquor solides are combusted onsite as part of the pulping chemical recovery process that is integral to and is essential to the economic viability of all modern pulp mills. Substitution of other fuels for this fuel is not recommended.
- Natural gas, combusted in industrial boiler [RNA]: 1.0898 m3
  Purchased steam, assumed to be natural gas.
- Disposal, wastewater treatment plant residuals, to uns. Incinerator: 6.3503 kg
  Typically on-site with energy recovery. (uns. = unspecified)
- Electricity, at grid, BC: 70.272 kWh
- Sodium hydroxide, production mix, at plant [US]: 19.096 kg
- Electricity, at grid, NB: 8.8806 kWh
- Sawdust; softwood; green; at sawmill [US]: 55.338 kg
  Mass of incoming sawdusts intended for pulping. US LCI: "Sawdust, at sawmill, US SE/kg" can be used as a proxy. The actual mix of sawdustsis the same as the one for pulp chips. Sawdust usage in the process is distrubuted as follows: 42% ends up in pulp and 58% in black liquor. Combusted onsite as part of the pulping chemical recovery process that is integral to and is essential to the economic viability of all modern pulp mills. Substitution of other fuels for this fuel is not recommended.
- Electricity, at grid, ON: 27.8 kWh
- Disposal, unspecified ashes, to unspecified landfill: 13.336 kg
  Mix of wood and coal ashes. Based on typical ash contents can be assumed to be 78% from wood and 22% from coal. Typically company-owned, but some third party.
- Hydrogen peroxide, at plant: 0.27079 kg
  ei: Hydrogen peroxide, 50% in H2O, at plant
- Talc, at plant: 16.964 kg
  ei: Malusil, at plant
- Transport, train, diesel powered [RNA]: 122.05 t*km
  Transportation of pulpwood and chips to pulp mill. Pulpwood: 375 km, chips: 127 km.
- Oxygen, liquid, at plant [RNA]: 4.7627 kg
- Pulpwood; hardwood; average; at forest road [US]: 0.17725 m3; provider Pulpwood, hardwood, average, at forest road, NE-NC
  Mass of incoming southern hardwood logs intended for pulping. Assumed density: 650 kg/m3. US LCI: "Roundwood, hardwood, green, at mill, SE/US" can be used but transportation needs to be removed as it is already included here. Wood usage in the process is distrubuted as follows: 30% ends up in pulp, 30% in self-generated hogged fuel and 40% in black liquor. All the hogged fuel is combusted onsite. Combustion of this fuel is important to the economic viability of all modern pulp mills. Substitution of other fuels for this fuel is not recommended. Need to be paired with "Self-generated hogged fuel, combusted in industrial boiler, at pulp and paper mill". Black liquor solides are combusted onsite as part of the pulping chemical recovery process that is integral to and is essential to the economic viability of all modern pulp mills. Substitution of other fuels for this fuel is not recommended.
- Sodium chlorate, at plant: 50.439 kg
  ei: Sodium chlorate, powder, at plant

## Inputs from nature
- Water [resource, water]: 14242, 65968 kg (2 entries)
  Estimated based on individual mill process effluent and cooling water flows and process characteristics. Share between process and cooling estimated.

## Emissions to nature
- Lead [emission, ground]: 0.012058 kg
  From onsite management of solid waste. All metals reported as elemental althought in most cases they are releases into metal compounds.
- Adsorbable organic halides [emission, water]: 0.2105 kg
  In effluent.
- Mercury [emission, water]: 2.4878e-7 kg
  In effluent.
- Vanadium [emission, water]: 0.00072708 kg
  In effluent.
- Phosphorus compounds [emission, water]: 0.043324 kg
  In effluent.
- Chromium [emission, water]: 0.00019581 kg
  In effluent.
- Mercury [emission, ground]: 7.2632e-6 kg
  (same comment as for Lead)
- Barium [emission, water]: 0.0032342 kg
  In effluent.
- Ammonia [emission, air]: 0.13726 kg
  From process i.e., excluding from combustion of fuels not including black liquor solids.
- Zinc [emission, ground]: 0.035113 kg
  (same comment as for Lead)
- Zinc [emission, water]: 0.0011797 kg
  In effluent.
- Copper [emission, water]: 0.00014606 kg
  In effluent.
- Manganese [emission, ground]: 0.085879 kg
  (same comment as for Lead)
- Arsenic [emission, ground]: 0.00046523 kg
  (same comment as for Lead)
- Manganese [emission, water]: 0.022711 kg
  In effluent.
- 2,4,5-T [emission, water]: 66975 kg
  Estimated based on individual mill process effluent and cooling water flows and process characteristics. Share between process and cooling estimated. Includes evaporation and other losses (e.g., water in solid waste).
- Barium [emission, ground]: 0.018909 kg
  (same comment as for Lead)
- Nitrogen [emission, water]: 0.34275 kg
  In effluent.
- Chromium [emission, ground]: 0.0029099 kg
  (same comment as for Lead)
- Nickel [emission, ground]: 0.0012154 kg
  (same comment as for Lead)
- Water [emission, water]: 14242 kg
  (same comment as for 2,4,5-T)
- Water [emission, air]: 1155.9 kg
  (same comment as for 2,4,5-T)
- Nickel [emission, water]: 0.00016131 kg
  In effluent.
- Biological Oxygen Demand [emission, water]: 1.6565 kg
  In effluent.
- Suspended solids, inorganic [emission, water]: 2.4585 kg
  In effluent.
- Copper [emission, ground]: 0.0034313 kg
  (same comment as for Lead)
- Vanadium [emission, ground]: 0.00086319 kg
  (same comment as for Lead)
- Acetaldehyde [emission, air]: 0.030164 kg
  From process i.e., excluding from combustion of fuels not including black liquor solids.
- Lead [emission, water]: 4.6867e-5 kg
  In effluent.
- Arsenic [emission, water]: 0.00016773 kg
  In effluent.

## Allocation factors
- causal, Steam, at bleached kraft market pulp mill, for Electricity from hydro: 0
- causal, Electricity, at bleached kraft market pulp mill, for Disposal, unspecified ashes, to unspecified land application: 0
- causal, Steam, at bleached kraft market pulp mill, for Sawdust; softwood; green; at sawmill: 0
- causal, Electricity, at bleached kraft market pulp mill, for Transport, ocean freighter, average fuel mix: 0
- causal, Steam, at bleached kraft market pulp mill, for Electricity, at grid, QC: 0
- causal, Pulp, kraft market, bleached, average production, at mill, for Arsenic: 1
- causal, Turpentine, at bleached kraft market pulp mill, for Electricity from hydro: 0
- causal, Tall oil, at bleached kraft market pulp mill, for Transport, combination truck, average fuel mix: 0
- causal, Turpentine, at bleached kraft market pulp mill, for Disposal, wastewater treatment plant residuals, to uns. landfill: 0
- causal, Electricity, at bleached kraft market pulp mill, for Transport, barge, average fuel mix: 0
- physical, Electricity, at bleached kraft market pulp mill: 0
- causal, Steam, at bleached kraft market pulp mill, for Biological Oxygen Demand: 0
- causal, Tall oil, at bleached kraft market pulp mill, for Water: 0
- causal, Steam, at bleached kraft market pulp mill, for Electricity, at grid, NB: 0
- causal, Pulp, kraft market, bleached, average production, at mill, for Nickel: 1
- physical, Turpentine, at bleached kraft market pulp mill: 0
- causal, Tall oil, at bleached kraft market pulp mill, for Phosphorus compounds: 0
- causal, Steam, at bleached kraft market pulp mill, for Disposal, wastewater treatment plant residuals, to uns. Incinerator: 0
- causal, Pulp, kraft market, bleached, average production, at mill, for Mercury: 1
- causal, Pulp, kraft market, bleached, average production, at mill, for Electricity, at grid, BC: 1
- causal, Turpentine, at bleached kraft market pulp mill, for Manganese: 0
- causal, Steam, at bleached kraft market pulp mill, for Copper: 0
- causal, Tall oil, at bleached kraft market pulp mill, for Water: 0
- causal, Pulp, kraft market, bleached, average production, at mill, for Lead: 1
- causal, Electricity, at bleached kraft market pulp mill, for Suspended solids, inorganic: 0
- causal, Turpentine, at bleached kraft market pulp mill, for Pulpwood; hardwood; average; at forest road: 0
- causal, Steam, at bleached kraft market pulp mill, for Phosphorus compounds: 0
- causal, Turpentine, at bleached kraft market pulp mill, for Electricity, at grid, ON: 0
- causal, Steam, at bleached kraft market pulp mill, for Transport, single unit truck, diesel powered: 0
- causal, Turpentine, at bleached kraft market pulp mill, for Methanol, at plant, kg: 0
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
## Sampling procedure
The survey included results from 53 pulp mills representing 15.5 million short tons per year (TPY), nearly 97% of 2006 production volume.

## Sources
- AF&PA (2010). Printing & Writing Papers LCA
