# Electricity, at eGrid, NYLI, 2010

Dataset: openLCA process, unit process
Category: 22: Utilities/2211: Electric Power Generation, Transmission and Distribution
Geography: Northern America
Time period: 2009-12-31 to 2009-12-31
Allocation method: no allocation
Generated by: Samantha Wascavage
Published in: Chris Goemans, Athena Institute
restrictionsDescription: All information can be accessed by everybody.
copyright: false

## General comment
The methodology used to put together the grid information is outlined in reference 1.

## Technology
Typical

## Geography
New York City and Westchester County, NY

## Reference product
- Electricity, at grid [RNA]: 1 kWh

## Inputs from technosphere
- Electricity, MSW, non-biogenic, at power plant: 0.05504 kWh
  Other Fuels MSN, OTH, PUR, WH – Municipal Solid Waste – Non-biogenic components
- Electricity, diesel, at power plant [RNA]: 0.010877 kWh
  Petroleum (DFO, JF, KER) – Distillate Fuel Oil (includes all Diesel and No. 1, No. 2, and No. 4 Fuel Oils)
- Electricity, natural gas, at power plant [RNA]: 0.853427 kWh
  Natural Gas
- Electricity, biomass, solid, biogenic MSW, at power plant: 0.080656 kWh
  Solid Renewable Fuels (Biomass) MSB, AB, MSW, OBS, TDF, WDS – Municipal Solid Waste – Biogenic Component

## Sampling procedure
based on EIA electricity reports for all power plants in the US.

## Sources
- unspecified
- EIA
- EIA
- EIA
- USEPA
- Statistics Canada
- EIA
- Statistics Canada
- International Energy Agency
- Statistics Canada
- US DOE
- EIA
- Statistics Canada
- Chris Goemans, Athena Institute
- Statistics Canada
- EIA
- EIA
- EIA
- USEPA
- EIA
- EIA
