# Calcium carbonate, ground, 20 micron, at plant

Dataset: openLCA process, unit process
Category: 31-33: Manufacturing/3274: Lime and Gypsum Product Manufacturing
Geography: United States
Time period: 2013-12-30 to 2015-12-29
Allocation method: no allocation
Generated by: Sustainble Solutions Corporation
Reviewer: Industrial Ecology Consultants
Published in: Sustainable Solutions Corporation. (2016). IMA-NA Calcium Carbonate Life Cycle Assessment
restrictionsDescription: All information can be accessed by everybody.
copyright: false

## General comment
This unit process represents the gate-to-gate production of 1 kg of calcium carbonate (20 micron) from calcium carbonate rock (i.e., marble, limestone, or chalk) using average technologies for the contiguous United States in 2014-2015. Additional details on the technologies used in this process are available in the Technology description field at the bottom of this section.

The system boundary includes: 1) quarry operations at the mine/quarry; 2) raw material transport from quarry operations to plant processing; 3) plant processing; 4) overhead energy consumption (e.g., lighting, heating, cooling, etc.) at quarry operations and plant processing; and 5) manufacturing waste and emissions. The following processes and life cycle phases fall outside of the system boundary: 1) construction of capital equipment; 2) maintenance of operation and support equipment; 3) Human labor and employee commute; 4) final product shipping; 5) packaging; 6) product use; and 7) product disposal. Additional details regarding system boundaries are available in the Modeling and validation section in the Sampling Procedure field.

## Technology
The technologies described in this process are representative of average technologies in use in the United States from 2014-2015.

Quarry operations include mechanical extraction, primary crushing, screening, and intermediate storage of calcium carbonate rock (marble, limestone, or chalk). The output of quarry operations is then transported via barge, train, or truck to plant processing which includes jaw crushing, washing, impact crushing, ball milling, and then classifying based on particle size.

## Geography
This unit process is reflective of U.S. production.

## Time period
This unit process is representative of operations from 2014-2015.

## Reference product
- Calcium carbonate, ground, 20 micron, at plant [US]: 1000 kg

## Inputs from technosphere
- Lubricant feedstock, at refinery: 0.0651466 kg
  Materials for quarrying equipment
- Conveyor belt, at plant: 0.000396832 m
- Water, process: 0.186291 kg
  Used in quarry operations for washing the quarried stone to remove clay and other residues
- Ethylene glycol, at plant, kg: 0.0155426 kg; provider Ethylene glycol, materials production, organic compound, at plant, kg
  Antifreeze for quarrying equipment
- Steel, stainless 304, quarto plate [RNA]: 0.0208337 kg
  Materials for quarrying equipment and materials for screens
- Carbon black, at plant: 6.16192e-5 kg
  Materials for quarrying equipment
- Sulfuric acid, at plant [RNA]: 0.000760595 kg
  Battery proxy for quarrying equipment
- Diesel, combusted in industrial equipment [RNA]: 1.86291 l
- Polybutadiene, butadiene rubber, BR, at plant [RNA]: 0.0122357 kg
  Materials for quarrying equipment
- Residual fuel oil, combusted in industrial boiler [RNA]: 0.32408 l
- Natural gas, combusted in industrial equipment, 1.357 m3/kg, 52.13 MJ/kg [RNA]: 0.000253532 m3; provider Natural gas, combusted in industrial equipment
- Transport, train, diesel powered [RNA]: 252.429 t*km
  Raw material transport to processing plant
- Mixed recyclables, at collection, curbside, weight basis [US]: 0.0174165 kg
- Lead, at regional storage: 0.000507063 kg
  Battery proxy for quarrying equipment
- Transport, combination truck, diesel powered [RNA]: 52.47 t*km
  Raw material, accessory material and fuel transport to quarry and processing plant
- Electricity, at grid [RNA]: 44.8641 kWh; provider Electricity, at Grid, US, 2010
- Gasoline, combusted in equipment [RNA]: 0.0160937 l
- Transport, barge, diesel powered [RNA]: 265.657 t*km
  Raw material transport to processing plant
- Disposal, mineral waste, underground deposit: 1510.17 kg
- Petroleum refined, to material use, at refinery: 0.0121216 l
  Assumed density of 0.665 kg/l, materials for quarrying equipment; USLCI NOTE: Flow from USLCI used as proxy for 'Naphtha, at regional storage'; note transport to regional storage not included.
- Disposal, municipal solid wastes, to sanitary landfill: 0.023369 kg
- Textile, woven cotton, at plant: 0.00296522 kg
  Materials for quarrying equipment
- Kerosene, at refinery [RNA]: 0.0250225 l; provider Petroleum refining, at refinery
  Materials for quarrying equipment
- Blasting: 0.745162 kg
  Explosives for quarrying

## Inputs from nature
- Calcium carbonate [resource, ground]: 2492.34 kg; = 2.49234*1000

## Emissions to nature
- Particulate matter [emission, air]: 1.45505 kg
  Direct emissions from quarry operations and plant processing
- Particulate matter, ≤ 10μm [emission, air]: 0.00864212 kg
  Direct emissions from quarry operations and plant processing
- Particulate matter, ≤ 2.5μm [emission, air]: 0.000573202 kg
  Direct emissions from quarry operations and plant processing
- Water [emission, water, fresh water body, river]: 0.186291 kg
  Water output from washing the quarried stone during quarry operations. Water is discharged to river.

## Sampling procedure
BOUNDARY CONDITIONS
The system boundary includes: 1) quarry operations at the mine/quarry; 2) raw material transport from quarry operations to plant processing; 3) plant processing; 4) overhead energy consumption (e.g., lighting, heating, cooling, etc.) at quarry operations and plant processing; and 5) manufacturing waste and emissions.

Quarry operations include mechanical extraction, primary crushing, screening, and intermediate storage of calcium carbonate rock (marble, limestone, or chalk). Plant processing includes jaw crushing, washing, impact crushing, ball milling, and then classifying based on particle size. Both quarry operations and plant processing include inputs of energy/fuel, water, and support materials and outputs of waste and emissions.

The following processes and life cycle phases fall outside of the system boundary: 1) construction of capital equipment; 2) maintenance of operation and support equipment; 3) human labor and employee commute; 4) final product shipping; 5) packaging; 6) product use; and 7) product disposal.

DATA COLLECTION
Primary data were collected for both quarry operations and plant processing. These data represent 2014-2015 weighted industry averages based on production from multiple U.S. locations. Quarry operations data were collected from four companies and five locations. Plant processing data were collected from three companies and three locations.

Secondary data were taken from the ecoinvent 3.2 database (Wernet et al., 2016) and the U.S. Life Cycle Inventory Database (National Renewable Energy Laboratory, 2016). The data were global except where otherwise specified.

UNCERTAINTY ESTIMATION
Uncertainty was not quantified.

## Review details
The life cycle assessment study which produced this unit process was critically reviewed per ISO 14040 and 14044 standards by Dr. Thomas Gloria of Industrial Ecology Consultants.

## Sources
- Institute for Environment and Sustainability. (2011). General guide for Life Cycle Assessment - Detailed guidance.
- Sustainable Solutions Corporation. (2016). IMA-NA Calcium Carbonate Life Cycle Assessment
- Wernet et al. (2016) The ecoinvent database version 3 (part I): overview and methodology.
- National Renewable Energy Laboratory (2016). U.S. Life Cycle Inventory Database.
