# Aluminum recovery, transport, to plant

Dataset: openLCA process, unit process
Category: 56: Administrative and Support and Waste Management and Remediation Services/5621: Waste Collection
Geography: Northern America
Time period: 2004-12-31 to 2004-12-31
Allocation method: no allocation
Generated by: James Littlefield, Franklin Associates
Published in: Franklin Associates (2005) Secondary Aluminum Production
restrictionsDescription: All information can be accessed by everybody.
copyright: false

## General comment
Separate unit processes are shown for automotive and UBC (used beverage container) scrap; however, it was determined that the recovery rates and processing requirements for these 2 markets are similar, and thus the results for the 2 markets are the same. Atmospheric, waterborne, and solid waste emissions represent process emissions only, not fuel combustion emissions., Important note: although most of the data in the US LCI database has undergone some sort of review, the database as a whole has not yet undergone a formal validation process. Please email comments to lci@nrel.gov.

## Geography
North America

## Reference product
- Aluminum recovery, transport, to plant [RNA]: 1 kg

## Inputs from technosphere
- Transport, combination truck, diesel powered [RNA]: 0.3621 t*km
- Transport, train, diesel powered [RNA]: 0.040234 t*km

## Sources
- The Aluminum Association
- unspecified
- Franklin Associates (2005) Secondary Aluminum Production
- unspecified
