# Transport, single unit truck, gasoline powered

Dataset: openLCA process, unit process
Category: 48-49: Transportation and Warehousing/4841: General Freight Trucking
Geography: Northern America
Time period: 2000-12-31 to 2000-12-31
Allocation method: no allocation
Generated by: Franklin Associates
Published in: Franklin Associates (2003) Single Unit Diesel Truck
restrictionsDescription: All information can be accessed by everybody.
copyright: false

## General comment
Important note: although most of the data in the US LCI database has
undergone some sort of review, the database as a whole has not yet
undergone a formal validation process.
Please email comments to lci@nrel.gov.

## Technology
Represents current technologies for single unit truck transport.

## Geography
United States

## Reference product
- Transport, single unit truck, gasoline powered [RNA]: 1 t*km

## Inputs from technosphere
- Gasoline, at refinery: 0.058338 l; provider Petroleum refining, at refinery

## Emissions to nature
- Sulfur oxides [emission, air]: 3.1626e-5 kg
- Nitrogen oxides [emission, air]: 0.00077451 kg
- Particulate matter, ≤ 10μm [emission, air]: 3.7925e-6 kg
- Volatile organic compounds [emission, air]: 0.00017704 kg
- Methane [emission, air]: 2.85e-5 kg
- Carbon dioxide [emission, air]: 0.13245 kg
- Carbon monoxide [emission, air]: 0.0023766 kg
- Nitrous oxide [emission, air]: 5.5763e-6 kg

## Sources
- Center for Transportation Reasearch, Arg
- Franklin Associates (2003) Single Unit Diesel Truck
- unspecified
