# Mixed recyclables, at collection, commercial

Dataset: openLCA process, unit process
Category: 56: Administrative and Support and Waste Management and Remediation Services/5621: Waste Collection
Geography: United States
Time period: 2007-12-24 to 2008-12-24
Allocation method: no allocation
Data quality: US EPA - Process Pedigree Matrix (4;1)
Generated by: Franklin Associates
Owner: ACC, APR, NAPCOR, & PETRA
Reviewer: Beverly Sauer
Published in: Franklin Associates (2011) LCI HDPE & PET Recycled Resin
restrictionsDescription: These U.S. LCI Database Project data ("Data") are provided by the National Renewable Energy Laboratory ("NREL"), operated by the Alliance for Sustainable Energy, LLC ("Alliance") for the US Department of Energy ("DOE") under Contract No. DE-AC36-08GO28308. The United States Government (the "Government") retains and the user acknowledges that the Government retains a non-exclusive, paid-up, irrevocable, worldwide license to publish or reproduce the published form of these data, or allow others to do so, for Government purposes.
Access to and use of these Data shall impose the following obligations on the user, as set forth in this Agreement. The user is granted the right, without any fee or cost, to use, copy, modify, alter, enhance and distribute these Data for any purpose whatsoever, provided that this entire notice appears in all copies of the Data. Any modification, alteration or enhancement of these data shall be identified and documented by the user. Further, the user agrees to credit the DOE/NREL/Alliance in any publication that results from the use of these Data. The names DOE/NREL/Alliance, however, may not be used in any advertising or publicity to endorse or promote any products or commercial entities unless specific written permission is obtained from DOE/NREL/Alliance. The user also understands that DOE/NREL/Alliance is not obligated to provide the user with any support, consulting, training or assistance of any kind with regard to the use of these Data or to provide the user with any updates, revisions or new versions of these Data.
YOU AGREE TO INDEMNIFY THE GOVERNMENT AND DOE/NREL/ALLIANCE, AND ITS SUBSIDIARIES, AFFILIATES, OFFICERS, AGENTS, AND EMPLOYEES AGAINST ANY CLAIM OR DEMAND, INCLUDING REASONABLE ATTORNEYS' FEES, RELATED TO YOUR USE OF THESE DATA. THESE DATA ARE PROVIDED BY DOE/NREL/ALLIANCE "AS IS" AND ANY EXPRESS OR IMPLIED WARRANTIES, INCLUDING BUT NOT LIMITED TO, THE IMPLIED WARRANTIES OF MERCHANTABILITY AND FITNESS FOR A PARTICULAR PURPOSE ARE DISCLAIMED. IN NO EVENT SHALL THE GOVERNMENT OR DOE/NREL/ALLIANCE BE LIABLE FOR ANY SPECIAL, INDIRECT OR CONSEQUENTIAL DAMAGES OR ANY DAMAGES WHATSOEVER, INCLUDING BUT NOT LIMITED TO CLAIMS ASSOCIATED WITH THE LOSS OF DATA OR PROFITS, WHICH MAY RESULT FROM AN ACTION IN CONTRACT, NEGLIGENCE OR OTHER TORTIOUS CLAIM THAT ARISES OUT OF OR IN CONNECTION WITH THE ACCESS, USE OR PERFORMANCE OF THESE DATA.
copyright: false

## General comment
This attributional unit process LCI represents the estimated transport requirements per unit weight of postconsumer recyclables from commercial sources. The LCI study was conducted by Franklin Associates, Ltd. and sponsored jointly by NAPCOR, the American Chemistry Council (ACC), the Association of Postconsumer Plastic Recyclers (APR), and the PET Resin Association (PETRA). Using life cycle inventory (LCI) methodology, the study determines and quantifies the energy requirements, solid wastes, and atmospheric and waterborne emissions for the processes required to collect postconsumer PET and HDPE packaging, sort and separate the material, and reprocess it into clean recycled resin.

Important note: although most of the data in the US LCI database has undergone some sort of review, the database as a whole has not yet undergone a formal validation process. Please email comments to lci@nrel.gov.

## Technology
Typical commercial transport of postconsuer recyclables from commercial sources

## Geography
United States

## Time period
Data compiled 2010 from most recent sources

## Reference product
- Mixed recyclables, at collection, commercial [US]: 1 kg
  Applies to one kg of any material collected from a commercial location

## Inputs from technosphere
- Transport, combination truck, diesel powered [RNA]: 1.15848 t*km
  Fuel use per kg of material collected from commercial locations
- Mixed recyclables, at source: 1 kg
  Based on wastes removed at MRF, the collected material contains about 0.087 kg waste per kg of usable material.

## Inventory method
Attributional; data sets for the three recycling unit processes (collection, sorting/separation, reclaimer operations) were linked to cover the full sequence of processing steps required to produce recycled resins  gate-to-gate results; for cradle-to-gate LCI of recycled resin, the practitioner needs to make decision about virgin resin burdens associated with the postconsumer products that are feedstocks to recycling. Recycling occurs in the context of a product made from resin; use and end-of-life management of the material will depend on the product in which it is used

## Modelling constants
Based on information provided by a confidential source, transport of deposit containers to the IPC is modeled as a volume-limited load of loose bottles transported by a tractor-trailer truck. The distance is estimated as 150 miles, and a fuel economy of 6.5 mpg is used for the truck from http://www.bts.gov/publications/national_transportation_statistics/excel/table_04_14.xls. At the IPC or MRF some additional sorting may be done before the resin is baled for shipment to the next processing location.

## Completeness
TREATMENT OF MISSING ENVIRONMENTAL DATA
Elementary flows are cut-off at less than 1% based on environmental relevance.

TREATMENT OF MISSING TECHNOSPHERE DATA
Intermediate flows are cut-off at less than 1% based on environmental relevance. Capital equipment is not included in this unit process.

MASS BALANCE
Includes weight of co-collected wastes later removed at reclaimer.

## Data selection
Similar to the deposit dropoff system, no consumer transport burdens are assigned to postconsumer plastic recovered through the CRV program or from commercial sources. For this scenario, transport of bottles from the site to an IPC or to a material recovery facility (MRF) is also based on a volume-limited shipment of loose bottles; however, it is assumed that the accumulated quantities transported per pickup are larger so that a tractor-trailer truck is used , with a fuel economy of 6.5 mpg.

## Data treatment
Assumtions and calculations described in Modeling Constants.

## Sampling procedure
BOUNDARY CONDITIONS
The system boundary includes the commercial transport of accumulated quantities of containers recovered for recycling through a collection program from collection point to an intermediate processing center (IPC) and baling of the containers at the IPC for shipment to the next processing location.

DATA COLLECTION
Assumptions and calculations are described in Modeling Constants and the supporting documentation.

UNCERTAINTY ESTIMATION
No uncertainty estimations were included.

## Review details
The LCI study was conducted by Franklin Associates, Ltd. and sponsored jointly by NAPCOR, the American Chemistry Council (ACC), the Association of Postconsumer Plastic Recyclers (APR), and the PET Resin Association (PETRA). Using life cycle inventory (LCI) methodology, the study determines and quantifies the energy requirements, solid wastes, and atmospheric and waterborne emissions for the processes required to collect postconsumer PET and HDPE packaging, sort and separate the material, and reprocess it into clean recycled resin. The data has had a partial critical review by internal parties.

## Intended application
"Accounting, with system-external interactions" - The intended application is a purely descriptive accounting / documentation of the analysed system including existing interactions with other systems in the LCI model.

## Project
LIFE CYCLE INVENTORY OF 100% POSTCONSUMER HDPE AND PET RECYCLED RESIN FROM POSTCONSUMER CONTAINERS AND PACKAGING PREPARED FOR THE PLASTICS DIVISION OF THE AMERICAN CHEMISTRY COUNCIL, INC. THE ASSOCIATION OF POSTCONSUMER PLASTIC RECYCLERS (APR), THE NATIONAL ASSOCIATION FOR PET CONTAINER RESOURCES (NAPCOR), AND THE PET RESIN ASSOCIATION (PETRA) BY FRANKLIN ASSOCIATES, A DIVISION OF ERG PRAIRIE VILLAGE, KANSAS JANUARY 19, 2011.

## Sources
- Franklin Associates (2011) LCI HDPE & PET Recycled Resin
