# Electricity, at Grid, SERC, 2008

Dataset: openLCA process, unit process
Category: 22: Utilities/2211: Electric Power Generation, Transmission and Distribution
Geography: Northern America
Time period: 2007-12-31 to 2007-12-31
Allocation method: no allocation
Generated by: Alberta Carpenter
Published in: Chris Goemans, Athena Institute
restrictionsDescription: All information can be accessed by everybody.
copyright: false

## General comment
The methodology used to put together the grid information is outlined in reference 1.

## Technology
Typical

## Geography
Alabama, Georgia, Mississippi, North Carolina, South Carolina and parts of Arkansas, Florida, Illinois, Iowa, Kentucky, Louisiana, Missouri, Tennessee, Texas and Virginia.

## Reference product
- Electricity, at grid [RNA]: 1 kWh

## Inputs from technosphere
- Electricity, natural gas, at power plant [RNA]: 0.133673 kWh
  NG – Natural Gas
- Electricity, other fuels, unspecified, at power plant: 0.000348249 kWh
  OTH – Other (Batteries, Chemicals, Coke Breeze, Hydrogen, Pitch, Sulfur, Tar Coal, and miscellaneous technologies)
- Electricity, biomass, at power plant [RNA]: 0.00555235 kWh
  WDS – Wood/Wood Waste Solids (Paper Pellets, Railroad Ties, Utility Poles, Wood Chips, and other wood solids)
- Electricity, petroleum coke, at power plant: 0.00487368 kWh
  PC – Petroleum Coke
- Electricity, other gases, unspecified, at power plant: 9.239e-6 kWh
  PG – Propane
- Electricity, other gases, unspecified, at power plant: 0.00171579 kWh
  OG – Other Gas (Butane, Coal Processes, Coke-Oven, Refinery, and other processes)
- Electricity, biomass, gas, unspecified, at power plant: 9.53572e-6 kWh
  OBG – Other Biomass Gases (Digester Gas, Methane, and other biomass gases)
- Electricity, petroleum, waste oil, at power plant: 7.42486e-5 kWh
  WO – Waste/Other Oil (including Crude Oil, Liquid Butane, Liquid Propane, Oil Waste, Re-Refined Motor Oil, Sludge Oil, Tar Oil, or other petroleum-based liquid wastes)
- Electricity, bituminous coal, at power plant [RNA]: 0.000557107 kWh
  WC - Waste/Other Coal (Anthracite Culm, Bituminous Gob, Fine Coal, Lignite Waste, Waste Coal) .
- Electricity, MSW, non-biogenic, at power plant: 0.000421087 kWh
  MSN – Municipal Solid Waste – Non-biogenic components
- Electricity, bituminous coal, at power plant [RNA]: 0.375705 kWh
  BIT - Anthracite Coal, and Bituminous Coal.
- Electricity, biomass, gas, landfill, at power plant: 0.000683074 kWh
  LFG – Landfill Gas
- Electricity, other fuels, unspecified, at power plant: 0.000183745 kWh
  PUR – Purchased Steam
- Electricity, biomass, solid, agriculture by-products, at power plant: 7.8966e-5 kWh
  AB – Agriculture Crop By-products / Straw / Energy Crops
- Electricity, nuclear, at power plant [RNA]: 0.251896 kWh
  NUC – Nuclear (Uranium, Plutonium, Thorium)
- Electricity, biomass,solid, unspecified, at power plant: 7.19239e-5 kWh
  OBS – Other Biomass Solid (Animal Manure and Waste, Solid By-products, and other solid biomass not specified)
- Electricity, biomass, liquid, sludge, at power plant: 7.74175e-5 kWh
  SLW – Sludge Waste
- Electricity, at wind power plant, unspecified: 0.000236522 kWh
  WND – Wind
- Electricity, biomass, solid, biogenic MSW, at power plant: 0.000535938 kWh
  MSB – Municipal Solid Waste – Biogenic Component
- Electricity, bituminous coal, at power plant [RNA]: 8.06718e-6 kWh
  SC - Coal Synfuel. Coal-based solid fuel that has been processed by a coal synfuel plant, and coal-based fuels such as briquettes, pellets, or extrusions, which are formed from fresh or recycled coal and binding materials.
- Electricity, bituminous coal, at power plant [RNA]: 0.188321 kWh
  SUB – Subbituminous Coal
- Electricity, lignite coal, at power plant [RNA]: 0.00242832 kWh
  LIG – Lignite Coal
- Electricity, tire derived fuel, at power plant: 0.000253479 kWh
  TDF – Tired (tire derived fuel)
- Electricity, residual fuel oil, at power plant [RNA]: 0.00122361 kWh
  RFO – Residual Fuel Oil (includes No. 5 and No. 6 Fuel Oils and Bunker C Fuel Oil)
- Electricity, hydropower, at power plant, unspecified: 0.0197054 kWh
  WAT – Water (Conventional, Pumped Storage)
- Electricity, biomass,liquid, unspecified, at power plant: 2.60023e-6 kWh
  OBL – Other Biomass Liquid (Ethanol, Fish Oil, Liquid Acetonitrile Waste, Medical Waste, Tall Oil, Waste Alcohol, and other Biomass not specified)
- Electricity, other fuels, unspecified, at power plant: 1.49402e-5 kWh
  WH – Waste heat not directly attributed to a fuel source. Note that WH should only be reported where the fuel source for the waste heat is undetermined, and for combined cycle steam turbines that are not supplementary fired
- Electricity, biomass,liquid, unspecified, at power plant: 0.00987235 kWh
  BLQ – Black Liquor
- Electricity, diesel, at power plant [RNA]: 0.0013362 kWh
  DFO – Distillate Fuel Oil (includes all Diesel and No. 1, No. 2, and No. 4 Fuel Oils)
- Electricity, solar, unspecified, at power plant: 1.65542e-6 kWh
  SUN – Solar (Photovoltaic, Thermal)
- Electricity, other gases, unspecified, at power plant: 0.00012886 kWh
  BFG – Blast Furnace Gas

## Sampling procedure
based on EIA electricity reports for all power plants in the US.

## Sources
- USEPA
- EIA
- EIA
- Statistics Canada
- EIA
- EIA
- International Energy Agency
- US DOE
- unspecified
- EIA
- Statistics Canada
- EIA
- EIA
- Chris Goemans, Athena Institute
- USEPA
- EIA
- EIA
- EIA
- Statistics Canada
- Statistics Canada
- Statistics Canada
- Statistics Canada
- EIA
- US DOE
