# Tillage, conservation, corn production

Dataset: openLCA process, unit process
Category: 11: Agriculture, Forestry, Fishing and Hunting/1151: Support Activities for Crop Production
Geography: Northern America
Time period: 2004-12-31 to 2009-12-30
Allocation method: no allocation
Generated by: Daniel Inman
Published in: Hsu, D.
restrictionsDescription: All information can be accessed by everybody.
copyright: false

## General comment
This process includes all field operations associated with conservation tillage of one hectare of average US corn. Conservation tillage is defined as tillage and field operations that leave greater than 30% residue on the soil surface.

## Technology
Modern technology

## Geography
North America

## Time period
2005-2009

## Reference product
- Tillage, conservation, corn production [RNA]: 1 m2
  Chisel plowing is used for conservation tillage systems.

## Inputs from technosphere
- Tillage, cultivating, chiselling: 10000 m2; = 1.0*10000
- Fertilising, by broadcaster: 20000 m2; = 2.0*10000
  Assuming fertilizer is broad cast or applied through irrigation (irrigated only)

## Emissions to nature
- Carbon dioxide [emission, air]: 0 kg
  Soil organic mater CO2 respiration after O2 exposure.

## Sources
- Conservation Tech Info Ctr, Univ Purdue
- Hsu, D.
- USDA NASS
