# Wheat, at field

Dataset: openLCA process, unit process
Category: 11: Agriculture, Forestry, Fishing and Hunting/1111: Oilseed and Grain Farming
Geography: United States
Time period: 1996-12-31 to 1999-12-31
Allocation method: no allocation
Generated by: Olivier Muller
Published in: USDA/National Agricultural Statistics Se
restrictionsDescription: All information can be accessed by everybody.
copyright: false

## General comment
Agricultural Crop Production, Harvested acres are 85% of the planted acres (1998-2000 US average).
1 bu (wheat) = 60 lbs.
The impacts of producing 1 kg of seed are assumed equal to those of producing 1kg of grain.
For water, only consumptive use is taken into account (i.e. 60.7% of the total water consumption).
Important note: although most of the data in the US LCI database has
undergone some sort of review, the database as a whole has not yet
undergone a formal validation process.
Please email comments to lci@nrel.gov.

## Technology
US average

## Geography
USA

## Reference product
- Wheat grains, at field [US]: 1 kg

## By-products
- Wheat straw, at field [US]: 1.3 kg

## Inputs from technosphere
- Phosphorous fertilizer, production mix, at plant [RNA]: 0.010291 kg
- Transport, train, diesel powered [RNA]: 0.054289 t*km
- Gasoline, combusted in equipment [RNA]: 0.0039038 l
- Potash Fertilizer (K2O), at plant: 0.0037422 kg
- Agrochemicals, at plant: 0.00017116 kg
- Diesel, combusted in industrial equipment [RNA]: 0.017177 l
- Nitrogen fertilizer, production mix, at plant [RNA]: 0.028534 kg
- Quicklime, at plant [RNA]: 0.018711 kg
- Transport, single unit truck, diesel powered [RNA]: 0.020384 t*km

## Inputs from nature
- Water [resource, water, fresh water body, river]: 37610 kg
- Land use [resource, ground, human-dominated, agricultural]: 1.195, 1.837, 1.141 m2*a (3 entries)
- Water [resource, water, subterranean]: 21900 kg
- Carbon dioxide [resource, air]: 1.51 kg

## Emissions to nature
- 2,4-D [emission, water]: 8.2532e-7 kg
  Pesticides- consumption (19), Pesticides - application method (11), Runoff of pesticide (14)
- Bromoxynil [emission, air, troposphere, rural]: 4.8256e-6 kg
  Pesticides- consumption (19), Pesticides - application method (11), Pesticide - air emission factors (12), Pesticide - vapor pressure (13)
- Trifluralin [emission, air, troposphere, rural]: 4.0925e-6 kg
  (same comment as for Bromoxynil)
- Glyphosate [emission, air, troposphere, rural]: 4.5336e-6 kg
  (same comment as for Bromoxynil)
- Glyphosate [emission, water]: 1.943e-7 kg
  (same comment as for 2,4-D)
- Dicamba [emission, water]: 8.0538e-8 kg
  (same comment as for 2,4-D)
- Phorate [emission, air, troposphere, rural]: 1.9998e-7 kg
  (same comment as for Bromoxynil)
- Ammonia [emission, air, troposphere, rural]: 0.0017151 kg
  Air emissions of N2O and NH3 and NOx (4)
- Paraquat [emission, water]: 4.0793e-8 kg
  (same comment as for 2,4-D)
- Hydrocarbons [emission, air, troposphere, rural]: 0.00010269 kg
  Pesticides- consumption (19), Pesticides - application method (11)
- Chlorpyrifos [emission, air, troposphere, rural]: 1.3655e-6 kg
  (same comment as for Bromoxynil)
- Malathion [emission, water]: 1.995e-8 kg
  (same comment as for 2,4-D)
- Methyl parathion [emission, water]: 2.0052e-8 kg
  (same comment as for 2,4-D)
- Diuron [emission, air, troposphere, rural]: 1.2311e-7 kg
  (same comment as for Bromoxynil)
- Malathion [emission, air, troposphere, rural]: 4.655e-7 kg
  (same comment as for Bromoxynil)
- Nitrogen [emission, water]: 0.0034776 kg
  Runoff of fertilizers (15)
- Carbofuran [emission, water]: 4.6516e-9 kg
  (same comment as for 2,4-D)
- Nitrogen oxides [emission, air, troposphere, rural]: 0.0046409 kg
  Air emissions of N2O and NH3 and NOx (4)
- Mancozeb [emission, air, troposphere, rural]: 1.0525e-6 kg
  (same comment as for Bromoxynil)
- Disulfoton [emission, air, troposphere, rural]: 7.2631e-7 kg
  (same comment as for Bromoxynil)
- Carbaryl [emission, water]: 1.0886e-7 kg
  (same comment as for 2,4-D)
- Triallate [emission, water]: 1.3035e-7 kg
  (same comment as for 2,4-D)
- MCPA [emission, water]: 4.1506e-7 kg
  (same comment as for 2,4-D)
- Carbofuran [emission, air, troposphere, rural]: 1.0854e-7 kg
  (same comment as for Bromoxynil)
- Particulate matter [emission, air, troposphere, rural]: 1.2186e-6 kg
  Particulate emissions (16)
- Permethrin [emission, water]: 8.3196e-9 kg
  (same comment as for 2,4-D)
- Orthophosphate [emission, water]: 6.0659e-5 kg
  Runoff of fertilizers (15)
- Suspended solids, inorganic [emission, water]: 2.9 kg
  Erosion (6)
- Carbaryl [emission, air, troposphere, rural]: 2.54e-6 kg
  (same comment as for Bromoxynil)
- Methyl parathion [emission, air, troposphere, rural]: 4.6789e-7 kg
  (same comment as for Bromoxynil)
- MCPA [emission, air, troposphere, rural]: 9.6848e-6 kg
  (same comment as for Bromoxynil)
- 2,4-D [emission, air, troposphere, rural]: 1.9257e-5 kg
  (same comment as for Bromoxynil)
- Nitrous oxide [emission, air, troposphere, rural]: 0.00083664 kg
  Air emissions of N2O and NH3 and NOx (4)
- Chlorpyrifos [emission, water]: 5.8521e-8 kg
  (same comment as for 2,4-D)
- Mancozeb [emission, water]: 2.7219e-8 kg
  (same comment as for 2,4-D)
- Paraquat [emission, air, troposphere, rural]: 9.5183e-7 kg
  (same comment as for Bromoxynil)
- Metribuzin [emission, water]: 3.298e-8 kg
  (same comment as for 2,4-D)
- Bromoxynil [emission, water]: 1.248e-7 kg
  (same comment as for 2,4-D)
- Dicamba [emission, air, troposphere, rural]: 1.8792e-6 kg
  (same comment as for Bromoxynil)
- Disulfoton [emission, water]: 1.8784e-8 kg
  (same comment as for 2,4-D)
- Permethrin [emission, air, troposphere, rural]: 1.9412e-7 kg
  (same comment as for Bromoxynil)
- Metribuzin [emission, air, troposphere, rural]: 7.6953e-7 kg
  (same comment as for Bromoxynil)
- Diuron [emission, water]: 5.2763e-9 kg
  (same comment as for 2,4-D)
- Triallate [emission, air, troposphere, rural]: 5.0402e-6 kg
  (same comment as for Bromoxynil)
- Trifluralin [emission, water]: 1.0584e-7 kg
  (same comment as for 2,4-D)
- Phorate [emission, water]: 5.1719e-9 kg
  (same comment as for 2,4-D)

## Allocation factors
- causal, Wheat straw, at field, for Triallate: 0
- causal, Wheat grains, at field, for Potash Fertilizer (K2O), at plant: 1
- causal, Wheat straw, at field, for Diuron: 0
- causal, Wheat straw, at field, for Hydrocarbons: 0
- causal, Wheat grains, at field, for Methyl parathion: 1
- causal, Wheat grains, at field, for Diesel, combusted in industrial equipment: 1
- causal, Wheat grains, at field, for Phosphorous fertilizer, production mix, at plant: 1
- causal, Wheat straw, at field, for Triallate: 0
- causal, Wheat straw, at field, for Gasoline, combusted in equipment: 0
- causal, Wheat grains, at field, for Mancozeb: 1
- causal, Wheat straw, at field, for Mancozeb: 0
- causal, Wheat straw, at field, for Nitrogen fertilizer, production mix, at plant: 0
- causal, Wheat straw, at field, for Paraquat: 0
- causal, Wheat straw, at field, for Carbaryl: 0
- causal, Wheat grains, at field, for Carbofuran: 1
- causal, Wheat grains, at field, for Transport, train, diesel powered: 1
- causal, Wheat straw, at field, for Permethrin: 0
- causal, Wheat grains, at field, for Glyphosate: 1
- causal, Wheat grains, at field, for Nitrous oxide: 1
- causal, Wheat grains, at field, for Transport, single unit truck, diesel powered: 1
- causal, Wheat grains, at field, for MCPA: 1
- causal, Wheat grains, at field, for Carbaryl: 1
- causal, Wheat grains, at field, for Land use: 1
- causal, Wheat straw, at field, for Potash Fertilizer (K2O), at plant: 0
- causal, Wheat straw, at field, for Phosphorous fertilizer, production mix, at plant: 0
- causal, Wheat grains, at field, for Disulfoton: 1
- causal, Wheat grains, at field, for Gasoline, combusted in equipment: 1
- causal, Wheat straw, at field, for Water: 0
- causal, Wheat straw, at field, for Land use: 0
- causal, Wheat straw, at field, for Malathion: 0
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
## Sources
- U.S. EPA
- USDA/ERS
- U.S. EPA
- USDA/ERS
- USDA/NCRS
- National Center for Food and Agricultura
- USGS
- U.S. EPA
- USDA/National Agricultural Statistics Se
- USDA/ERS
- USDA/ERS
- USDA/ERS
- Conservation Technology Information Cent
- USGS
- USDA/ERS
- USDA/NCRS
- U.S. EPA
- USDA/NRI
- USDA/ERS
