# Tillage, intensive, corn production

Dataset: openLCA process, unit process
Category: 11: Agriculture, Forestry, Fishing and Hunting/1151: Support Activities for Crop Production
Geography: Northern America
Time period: 2004-12-31 to 2009-12-30
Allocation method: no allocation
Generated by: Daniel Inman
Published in: Hsu, D.
restrictionsDescription: All information can be accessed by everybody.
copyright: false

## General comment
Intensive tillage operations for one hectare of average US corn. Intensive tillage leaves less than 15% crop residue on the soil surface.

## Technology
Modern technology

## Geography
North America

## Time period
2005-2009

## Reference product
- Tillage, intensive, corn production [RNA]: 1 m2
  Seedbed preparation with roller

## Inputs from technosphere
- Tillage, rotary cultivator: 2 m2
  Includes disking and cultivator application of N
- Fertilising, by broadcaster: 1 m2
- Tillage, ploughing: 2 m2
  Includes 2 plowing operations prior to planting
- Tillage, rolling: 1 m2

## Sources
- Hsu, D.
- Conservation Tech Information Center
- USDA NASS
