# Transport, intercity bus, diesel powered, South

Dataset: openLCA process, unit process
Category: 48-49: Transportation and Warehousing/4852: Interurban and Rural Bus Transportation
Geography: Northern America
Time period: 2009-12-31 to 2009-12-31
Allocation method: no allocation
Generated by: Nathan Hardesty
Published in: U.S. Environmental Protection Agency (EP
restrictionsDescription: All information can be accessed by everybody.
copyright: false

## General comment
This dataset represents the Southern U.S. (AR, LA, KS, MS, OK, TX (Reference 10)) average airborne emissions for operating a diesel powered intercity bus. The inventory includes all vehicle operation processes, including off-network and refueling activities.
The refinery-to-pump transportation and distribution data are calculated from Argonne National Laboratory's GREET 1.8d.1 model.
The vehicle operation data are calculated from EPA's MOVES2010a model, using the assumptions described in the corresponding detailed spreadsheet. Emissions factors in MOVES2010a are largely based on EPA's Mobile Source Observation Database, which in turn includes data from a variety of vehicle studies (References 6-8).
MOVES2010a acknowledges sources of uncertainty in the model structure, the population and acitivty data, and other model parameters. As of July 2011, the uncertainty calculation function of the model has not been activated.

## Technology
Combustion of diesel in an intercity bus.

## Geography
US

## Reference product
- Transport, intercity bus, diesel powered [RNA]: 1 p*km

## Inputs from technosphere
- Transport, barge, average fuel mix [RNA]: 0.00479455 t*km
- Transport, train, diesel powered [RNA]: 0.00925032 t*km
- Transport, combination truck, average fuel mix [RNA]: 0.00495697 t*km
- Transport, ocean freighter, average fuel mix [RNA]: 0.0338879 t*km
- Transport, pipeline, unspecified petroleum products [RNA]: 0.0499646 t*km
- Diesel, at refinery: 0.0153772 l; provider Petroleum refining, at refinery

## Emissions to nature
- Particulate matter, ≤ 10μm [emission, air]: 1.89893e-6 kg
  PM10 from brakewear.
- Particulate matter, ≤ 10μm [emission, air]: 1.94579e-5 kg
  PM10 from organic carbon, elemental carbon, and sulfate particulates.
- Nitrogen oxides [emission, air]: 0.000312677, 0.000338748 kg (2 entries)
- Methane [emission, air]: 3.59469e-7 kg
- Hydrocarbons [emission, air]: 1.52281e-5 kg
- Particulate matter, ≤ 2.5μm [emission, air]: 1.88748e-5 kg
  PM2.5 from organic carbon, elemental carbon, and sulfate particulates.
- Particulate matter, ≤ 10μm [emission, air]: 4.63594e-7 kg
  PM10 from tirewear.
- Carbon monoxide [emission, air]: 9.37411e-5 kg
- Particulate matter, ≤ 2.5μm [emission, air]: 1.11174e-7 kg
  PM2.5 from tirewear.
- Particulate matter, ≤ 2.5μm [emission, air]: 4.97099e-7 kg
  PM2.5 from brakewear.
- Nitrous oxide [emission, air]: 5.40121e-8 kg
- Volatile organic compounds [emission, air]: 1.56924e-5 kg
- Ammonia [emission, air]: 5.48928e-7 kg
- Carbon dioxide [emission, air]: 0.040372 kg
- Nitrogen dioxide [emission, air]: 2.6071e-5 kg
- Sulfur dioxide [emission, air]: 6.75918e-7 kg

## Sources
- Wang, M.
- Assessment and Standards Division, Offic
- EPA
- National Climatic Data Center, National
- Assessment and Standards Division, Offic
- U.S. Environmental Protection Agency (EP
- Eastern Research Group
- National Institute of Standards and Tech
- J. Schwieterman
- U.S. Alternative Fuels and Advanced Vehi
