# Ethanol, denatured, forest residues, thermochem

Dataset: openLCA process, unit process
Category: 31-33: Manufacturing/3251: Basic Chemical Manufacturing
Geography: Northern America
Time period: 2004-12-31 to 2009-12-30
Allocation method: no allocation
Generated by: Daniel Inman
Published in: Hsu, D.
restrictionsDescription: All information can be accessed by everybody.
copyright: false

## Technology
modern

## Geography
North America

## Time period
2005-2009

## Reference product
- Mixed Alcohols, thermochemical process [RNA]: 3787 kg

## By-products
- Sulfur, thermochemical process [RNA]: 53.52 kg
- Ethanol, denatured, forest residues, thermochem [RNA]: 21183 kg

## Inputs from technosphere
- Energy, output: 11968 MJ
  From gasoline
- Forest residue, preprocessed, at conversion facility [RNA]: 1.1929e8 kg; = 119290.0*1000
- Combustion, dry wood residue, AP-42 [RNA]: 390670 MJ
  char combustor emissions. use heating value for graphite. calculated based on regression fit of several aspen sensitivity runs.
- Hydrochloric acid, without water, in 30% solution state, at plant [RNA]: 0.39916 kg
  boiler chemicals http://www.accepta.com/water_treatment_chemicals/boiler-water-treatment.asp
- Disposal, wood ash mixture, pure, 0% water, to sanitary landfill: 1102.2 kg
  add wood, ash, and char together and olivine. calculated based on regression fit of several aspen sensitivity runs.
- Thermochemical Conversion Plant: 5.95e-6 Item(s)
- Treatment, sewage, unpolluted, to wastewater treatment, class 3: 0.797 m3
  streams 305. calculated based on regression fit of several aspen sensitivity runs.
- Silica sand, at plant: 244.03 kg
  olivine added to make up for loss in recycle. calculated based on regression fit of several aspen sensitivity runs.
- Heat, indirect, heated zones, softwood, plywood veneer drying, AP-42 [RNA]: 41730 kg
  Use plywood drying as approximationg. area100 drying. mass is oven-dried wood mass. calculated based on regression fit of several aspen sensitivity runs.
- Monoethanolamine, at plant: 27.216 kg
  Amine in Aspen model
- Sulphite, at plant: 0.39916 kg
  (same comment as for Hydrochloric acid, without water, in 30% solution state, at plant)
- Gasoline, at refinery: 832 l
  About a 0.6% impurity content in product stream (water, CO2, alcohols)
- Chemicals inorganic, at plant: 0.45359 kg
- Zeolite, powder, at plant: 45.359 kg
  tar reformer catalyst
- Magnesium oxide, at plant: 3.1615 kg
  calculated based on regression fit of several aspen sensitivity runs.
- Diesel, at refinery: 82.9 l
  No. 2 Diesel fuel, for operating equipment.
- Disposal, inert material, 0% water, to sanitary landfill: 45.359 kg
  tar reformer catalyst. assumed all goes into landfill, even though some nickel is recovered from catalyst manufacturer.
- Sodium hydroxide, production mix, at plant [US]: 0.39916 kg
  boiler chemicals http://www.accepta.com/water_treatment_chemicals/boiler-water-treatment.asp. Proxy: Sodium hydroxide, 50% in H2O, production mix, at plant/RER with US electricity U

## Inputs from nature
- Water [resource, water]: 73936 kg
  cooling tower makeup. includes only streams 618,635,710,711. calculated based on regression fit of several aspen sensitivity runs.
- Oxygen [resource, air]: 77564 kg
  calculated based on regression fit of several aspen sensitivity runs.
- Nitrogen [resource, air]: 253560 kg
  calculated based on regression fit of several aspen sensitivity runs.
- Water [resource, water, subterranean]: 13336 kg
  boiler feed water makeup. calculated based on regression fit of several aspen sensitivity runs.

## Emissions to nature
- Sulfur dioxide [emission, air]: 39.054 kg
  calculated based on regression fit of several aspen sensitivity runs.
- Water [emission, air, troposphere, rural]: 63049 kg
  calculated based on regression fit of several aspen sensitivity runs.
- Nitrogen [emission, air]: 253560 kg
  calculated based on regression fit of several aspen sensitivity runs.
- Ammonia [emission, air]: 0.45359 kg
  Cooling tower chemicals. Assumed all were inorganic.
- Nitrogen dioxide [emission, air]: 83.915 kg
  calculated based on regression fit of several aspen sensitivity runs.
- Oxygen [emission, air]: 12020 kg
  calculated based on regression fit of several aspen sensitivity runs.
- Carbon dioxide [emission, air]: 107500 kg
  calculated based on regression fit of several aspen sensitivity runs.

## Allocation factors
- causal, Mixed Alcohols, thermochemical process, for Water: 1
- causal, Sulfur, thermochemical process, for Water: 0
- causal, Mixed Alcohols, thermochemical process, for Monoethanolamine, at plant: 1
- causal, Sulfur, thermochemical process, for Sulfur dioxide: 0
- causal, Ethanol, denatured, forest residues, thermochem, for Nitrogen: 0
- causal, Mixed Alcohols, thermochemical process, for Heat, indirect, heated zones, softwood, plywood veneer drying, AP-42: 1
- causal, Sulfur, thermochemical process, for Water: 0
- causal, Sulfur, thermochemical process, for Oxygen: 0
- causal, Sulfur, thermochemical process, for Thermochemical Conversion Plant: 0
- causal, Ethanol, denatured, forest residues, thermochem, for Thermochemical Conversion Plant: 0
- causal, Sulfur, thermochemical process, for Gasoline, at refinery: 0
- causal, Ethanol, denatured, forest residues, thermochem, for Diesel, at refinery: 0
- causal, Ethanol, denatured, forest residues, thermochem, for Hydrochloric acid, without water, in 30% solution state, at plant: 0
- physical, Mixed Alcohols, thermochemical process: 1
- causal, Mixed Alcohols, thermochemical process, for Disposal, inert material, 0% water, to sanitary landfill: 1
- causal, Sulfur, thermochemical process, for Forest residue, preprocessed, at conversion facility: 0
- causal, Mixed Alcohols, thermochemical process, for Treatment, sewage, unpolluted, to wastewater treatment, class 3: 1
- causal, Mixed Alcohols, thermochemical process, for Ammonia: 1
- causal, Mixed Alcohols, thermochemical process, for Nitrogen: 1
- causal, Sulfur, thermochemical process, for Nitrogen dioxide: 0
- causal, Sulfur, thermochemical process, for Sulphite, at plant: 0
- causal, Mixed Alcohols, thermochemical process, for Oxygen: 1
- causal, Sulfur, thermochemical process, for Magnesium oxide, at plant: 0
- causal, Mixed Alcohols, thermochemical process, for Energy, output: 1
- causal, Ethanol, denatured, forest residues, thermochem, for Forest residue, preprocessed, at conversion facility: 0
- causal, Ethanol, denatured, forest residues, thermochem, for Water: 0
- causal, Sulfur, thermochemical process, for Chemicals inorganic, at plant: 0
- causal, Ethanol, denatured, forest residues, thermochem, for Monoethanolamine, at plant: 0
- causal, Sulfur, thermochemical process, for Disposal, inert material, 0% water, to sanitary landfill: 0
- causal, Ethanol, denatured, forest residues, thermochem, for Energy, output: 0
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
## Sources
- Phillips, S.
- Hsu, D.
- Hess, J.
