# Electricity, residual fuel oil, at power plant

Dataset: openLCA process, unit process
Category: 22: Utilities/2211: Electric Power Generation, Transmission and Distribution
Geography: Northern America
Time period: 2001-12-31 to 2002-12-31
Allocation method: no allocation
Generated by: Franklin Associates
Published in: Franklin Associates (2003) Residual Oil Utility Combustion
restrictionsDescription: All information can be accessed by everybody.
copyright: false

## General comment
Important note: although most of the data in the US LCI database has
undergone some sort of review, the database as a whole has not yet
undergone a formal validation process.
Please email comments to lci@nrel.gov.

## Technology
Electricity production by residual oil steam generation

## Geography
United States

## Reference product
- Electricity, residual fuel oil, at power plant [RNA]: 1 kWh

## Inputs from technosphere
- Transport, train, diesel powered [RNA]: 0.00088378 t*km
  Represents transportation from petroleum refinery to utility combustion.
- Transport, barge, average fuel mix [RNA]: 0.0074867 t*km
  Represents transportation from petroleum refinery to utility combustion.
- Disposal, solid waste, unspecified, to unspecified treatment: 0.0003377 kg
- Transport, combination truck, average fuel mix [RNA]: 0.0013815 t*km
  Represents transportation from petroleum refinery to utility combustion.
- Residual fuel oil, at refinery [RNA]: 0.26339 l
  Fuel consumption: 0.263 liter/kWh (0.07 gal/kWh)

## Emissions to nature
- Volatile organic compounds [emission, air]: 2.3942e-5 kg
- Cobalt [emission, air]: 1.9e-7 kg
- Cadmium [emission, air]: 1.2561e-8 kg
- Lead [emission, air]: 4.7657e-8 kg
- PAH/POM, unspecified [emission, air, indoor]: 1.5736e-7 kg
- Tetrachloroethylene [emission, air]: 2.5951e-9 kg
- Chromium [emission, air]: 2.6669e-8 kg
- Chloride [emission, water]: 2.0981e-9 kg
- Manganese [emission, air]: 9.4682e-8 kg
- Selenium [emission, air]: 2.1556e-8 kg
- Hydrochloric acid [emission, air]: 2.2074e-5 kg
- 2,3,7,8-Tetrachlorodibenzo-p-dioxin [emission, air]: 4.7183e-13 kg
- Methane [emission, air]: 8.8565e-6 kg
- Naphthalene [emission, air]: 3.5664e-8 kg
- Sulfur oxides [emission, air]: 0.0012617 kg
- Carbon monoxide [emission, air]: 0.00015766 kg
- Radionuclides [emission, air]: 0.030737 kBq
- Copper(I) [emission, water]: 1.0491e-8 kg
- Methylene chloride [emission, air]: 1.5217e-7 kg
- Iron [emission, water]: 1.0491e-8 kg
- Formaldehyde [emission, air]: 1.0415e-6 kg
- Arsenic [emission, air]: 4.166e-8 kg
- Mercury [emission, air]: 3.5664e-9 kg
- Particulate matter, ≤ 10μm [emission, air]: 5.9854e-5 kg
- Nitrogen oxides [emission, air]: 0.0010092 kg
- Benzene [emission, air]: 6.754e-9 kg
- Phenols [emission, air]: 1.1466e-7 kg
- Nickel [emission, air]: 2.6669e-6 kg
- Nitrous oxide [emission, air]: 3.5037e-6 kg
- Beryllium [emission, air]: 8.7739e-10 kg
- Suspended solids, inorganic [emission, water]: 3.1472e-7 kg
- Carbon dioxide [emission, air]: 0.80464 kg

## Sources
- U.S. EPA
- Center for Transportation Research, Argo
- unspecified
- EIA
- Franklin Associates (2003) Residual Oil Utility Combustion
- U.S. EPA Office of Solid Waste and Emerg
- U.S. EPA
- U.S. EPA
