# Crude oil, extracted

Dataset: openLCA process, unit process
Category: 21: Mining, Quarrying, and Oil and Gas Extraction/2111: Oil and Gas Extraction
Geography: Northern America
Time period: 2002-12-31 to 2002-12-31
Allocation method: no allocation
Generated by: Franklin Associates
Published in: THE PLASTICS DIVISION OF THE AMERICAN C
restrictionsDescription: All information can be accessed by everybody.
copyright: false

## General comment
This module includes data for crude oil co-extracted with natural gas and as well as crude oil produced independently. Because crude oil is frequently produced along with natural gas, a portion of the data is allocated to natural gas production. No allocation was given if the data were specific to the crude oil extraction. Complete inventory data and metadata are available in full in the final report and appendices, Cradle-to-Gate Life Cycle Inventory of Nine Plastic Resins and Four Polyurethane Precursors. This report has been extensively reviewed within Franklin Associates and has undergone partial critical review by ACC Plastics Division members and is available at: www.americanchemistry.com. Quantities may vary slightly between the reference to main source and and this module due to rounding. Important note: although most of the data in the US LCI database has undergone some sort of review, the database as a whole has not yet undergone a formal validation process. Please email comments to lci@nrel.gov.

## Technology
Onshore and offshore drilling into underground porous rock structures using natural pressure or automated pump to surface oil, followed by water removal

## Geography
North America (US and Canada)

## Reference product
- Crude oil, extracted [RNA]: 1 kg

## Inputs from technosphere
- Electricity, at grid [RNA]: 0.0390078 kWh; provider Electricity, at Grid, US, 2010
- Diesel, combusted in industrial equipment [RNA]: 0.00129284 l
  Includes diesel fuel and distillate oil amounts.
- Natural gas, combusted in industrial boiler [RNA]: 0.0327732 m3
- Residual fuel oil, combusted in industrial boiler [RNA]: 0.000798118 l
- Gasoline, combusted in equipment [RNA]: 0.000684208 l
- Disposal, solid waste, unspecified, to sanitary landfill: 0.0261455 kg

## Inputs from nature
- Crude oil [resource, water, subterranean]: 45.2295 MJ
  This weight reflects material loss at extraction.

## Emissions to nature
- Titanium [emission, water]: 2.022e-7 kg
- Chloride [emission, water]: 0.006074 kg
- 2-Hexanone [emission, water]: 1.446e-9 kg
- Dodecane [emission, water]: 1.211e-8 kg
- Bromide [emission, water]: 3.113e-5 kg
- Naphthalenes, C3 [emission, air]: 7.035e-10 kg
- Methane [emission, air]: 0.0053 kg
- 2,4-Dimethylphenol [emission, water]: 6.203e-9 kg
- Yttrium [emission, water]: 1.482e-9 kg
- Vanadium [emission, water]: 5.731e-9 kg
- Carbon dioxide [emission, air]: 0.0011 kg
- Phenanthrene [emission, water]: 1.756e-10 kg
- Suspended solids, inorganic [emission, water]: 0.002324 kg
- Biphenyl [emission, water]: 2.78e-9 kg
- Tetradecane [emission, water]: 5.065e-9 kg
- Chloromethane [emission, water]: 1.833e-12 kg
- Hexacosane [emission, water]: 3.04e-11 kg
- Sulfate [emission, water]: 1.056e-5 kg
- Fluorene [emission, water]: 1.154e-9 kg
- Ethylbenzene [emission, water]: 1.445e-8 kg
- Acetone [emission, water]: 4.553e-10 kg
- Methyl isobutyl ketone [emission, water]: 1.914e-10 kg
- Total dissolved solids [emission, water]: 0.006472 kg
- Boron [emission, water]: 6.913e-7 kg
- Manganese [emission, water]: 1.458e-7 kg
- o-Cresol [emission, water]: 6.37e-9 kg
- Chromium [emission, water]: 5.616e-7 kg
- PAH/POM, unspecified [emission, air, indoor]: 4.264e-6 kg
- Cadmium(II) [emission, water]: 7.107e-9 kg
- Hexanoic acid [emission, water]: 4.652e-8 kg
- Strontium [emission, water]: 1.204e-5 kg
- Benzene, pentamethyl- [emission, water]: 3.413e-12 kg
- Toluene [emission, water]: 2.421e-7 kg
- Mercury [emission, water]: 2.308e-10 kg
- Octadecane [emission, water]: 3.302e-9 kg
- Beryllium [emission, water]: 2.87e-9 kg
- Calcium(II) [emission, water]: 0.0005012 kg
- Aroclor (unspecified) [emission, ground]: 2.488e-9 kg
- Zinc [emission, water]: 4.787e-7 kg
- Lead-210 [emission, water]: 6.4428e-5 kBq
- o-Xylene [emission, water]: 2.333e-9 kg
- Chemical Oxygen Demand [emission, water]: 4.18e-5 kg
- Dibenzothiophene [emission, water]: 7.01496e-12 kg
- 2-Methylnaphthalene [emission, water]: 3.308e-9 kg
- Cobalt [emission, water]: 4.904e-9 kg
- p-Cresol [emission, water]: 6.873e-9 kg
- Biological Oxygen Demand [emission, water]: 2.53e-5 kg
- Surfactants [emission, water]: 1.21e-7 kg
- Antimony [emission, water]: 1.316e-8 kg
- Aroclor (unspecified) [emission, water, fresh water body, river, urban]: 4.293e-8 kg
- Molybdenum [emission, water]: 5.075e-9 kg
- Benzoic acid [emission, water]: 2.246e-7 kg
- Lithium(I) [emission, water]: 1.56e-7 kg
- Tin [emission, water]: 5.172e-8 kg
- Dibenzofuran [emission, water]: 8.658e-12 kg
- Barium [emission, water]: 0.0002846 kg
- Radium-226 [emission, water]: 0.000296185 kBq
- Hexadecane [emission, water]: 1.327e-8 kg
- Naphthalene [emission, water]: 3.958e-9 kg
- Nickel [emission, water]: 5.4e-8 kg
- Methyl ethyl ketone [emission, water]: 3.665e-12 kg
- Sodium(I) [emission, water]: 0.001477 kg
- Copper(I) [emission, water]: 6.165e-8 kg
- Benzene [emission, water]: 2.612e-7 kg
- p-Cymene [emission, water]: 4.55e-12 kg
- Sulfur [emission, water]: 5.268e-7 kg
- m-Xylene [emission, water]: 6.273e-9 kg
- Iron [emission, water]: 3.932e-5 kg
- p-Xylene [emission, water]: 2.333e-9 kg
- Magnesium [emission, water]: 9.92e-5 kg
- Silver [emission, water]: 3.11e-7 kg
- Xylene [emission, water]: 1.163e-7 kg
  Additional unspeciated xylenes
- Lead [emission, water]: 1.18e-7 kg
- 1-Methylfluorene [emission, water]: 5.182e-12 kg
- Selenium [emission, water]: 2.542e-9 kg
- PAH/POM, unspecified [emission, air, troposphere, urban, low]: 2.917e-10 kg
- Aluminum [emission, water]: 2.102e-5 kg
- Eicosane [emission, water]: 3.317e-9 kg
- Cyanide [emission, water]: 3.286e-12 kg
- Ammonia [emission, water]: 2.779e-6 kg
- Decane [emission, water]: 6.388e-9 kg
- Phenol [emission, water]: 7.241e-8 kg
- Thallium [emission, water]: 2.771e-9 kg
- Radium-228 [emission, water]: 0.0004095 kBq
- Arsenic(V) [emission, water]: 4.643e-8 kg
- Docosane [emission, water]: 4.873e-11 kg

## Sampling procedure
Data collected from secondary sources.

## Sources
- THE PLASTICS DIVISION OF THE AMERICAN C
