# Natural gas, at extraction, Barnett Shale, kg

Dataset: openLCA process, unit process
Category: 21: Mining, Quarrying, and Oil and Gas Extraction/2111: Oil and Gas Extraction
Geography: United States
Time period: 2013-12-31 to 2014-11-30
Allocation method: no allocation
Data quality: US EPA - Process Pedigree Matrix (4;1)
Generated by: Franklin Associates, A Division of ERG
Owner: National Energy Technology Laboratory
Reviewer: Franklin Associates, A Division of ERG
restrictionsDescription: These U.S. LCI Database Project data ("Data") are provided by the National Renewable Energy Laboratory ("NREL"), operated by the Alliance for Sustainable Energy, LLC ("Alliance") for the US Department of Energy ("DOE") under Contract No. DE-AC36-08GO28308. The United States Government (the "Government") retains and the user acknowledges that the Government retains a non-exclusive, paid-up, irrevocable, worldwide license to publish or reproduce the published form of these data, or allow others to do so, for Government purposes.
Access to and use of these Data shall impose the following obligations on the user, as set forth in this Agreement. The user is granted the right, without any fee or cost, to use, copy, modify, alter, enhance and distribute these Data for any purpose whatsoever, provided that this entire notice appears in all copies of the Data. Any modification, alteration or enhancement of these data shall be identified and documented by the user. Further, the user agrees to credit the DOE/NREL/Alliance in any publication that results from the use of these Data. The names DOE/NREL/Alliance, however, may not be used in any advertising or publicity to endorse or promote any products or commercial entities unless specific written permission is obtained from DOE/NREL/Alliance. The user also understands that DOE/NREL/Alliance is not obligated to provide the user with any support, consulting, training or assistance of any kind with regard to the use of these Data or to provide the user with any updates, revisions or new versions of these Data.
YOU AGREE TO INDEMNIFY THE GOVERNMENT AND DOE/NREL/ALLIANCE, AND ITS SUBSIDIARIES, AFFILIATES, OFFICERS, AGENTS, AND EMPLOYEES AGAINST ANY CLAIM OR DEMAND, INCLUDING REASONABLE ATTORNEYS' FEES, RELATED TO YOUR USE OF THESE DATA. THESE DATA ARE PROVIDED BY DOE/NREL/ALLIANCE "AS IS" AND ANY EXPRESS OR IMPLIED WARRANTIES, INCLUDING BUT NOT LIMITED TO, THE IMPLIED WARRANTIES OF MERCHANTABILITY AND FITNESS FOR A PARTICULAR PURPOSE ARE DISCLAIMED. IN NO EVENT SHALL THE GOVERNMENT OR DOE/NREL/ALLIANCE BE LIABLE FOR ANY SPECIAL, INDIRECT OR CONSEQUENTIAL DAMAGES OR ANY DAMAGES WHATSOEVER, INCLUDING BUT NOT LIMITED TO CLAIMS ASSOCIATED WITH THE LOSS OF DATA OR PROFITS, WHICH MAY RESULT FROM AN ACTION IN CONTRACT, NEGLIGENCE OR OTHER TORTIOUS CLAIM THAT ARISES OUT OF OR IN CONNECTION WITH THE ACCESS, USE OR PERFORMANCE OF THESE DATA.
copyright: false

## General comment
NETL LCA Unit Process Library, Natural gas extraction processes 2010. Natural gas is dispersed throughout the Barnett Shale formation in northern Texas and the Marcellus Shale in the northern Appalachian Basin. Shale gas cannot be recovered using conventional extraction technologies but is recovered through the use of horizontal drilling and hydraulic fracturing (hydrofracking). Horizontal drilling creates a wellbore that runs the length of a shale formation, and hydrofracking uses high pressure fluid (a mixture of water, surfactants, and proppants) for breaking apart the shale reservoir and facilitating the flow of natural gas. Approximately 11 percent of new pipeline capacity in 2008 (4.8 billion cubic feet per day) was installed for natural gas from Barnett Shale (US EIA, 2009g).

## Technology
Unconventional natural gas extraction

## Time period
NETL LCA Unit Process Library, Natural gas extraction processes 2010. This dataset was used to model the aggregate natural gas extraction production mix process based on percentages from EIA, 2017.

## Reference product
- Natural gas, at extraction, Barnett Shale, kg: 1 kg
  Data from NETL 2014

## Inputs from technosphere
- Electricity, at grid [RNA]: 4.62e-5 MWh; provider Electricity, at Grid, US, 2010
  Data from NETL 2014

## Inputs from nature
- Natural gas [resource, air, subterranean]: 58.9329 MJ
  1.0321 kg gas in per kg gas out for shale; NETL reports natural gas density as 57.1 MJ/kg based on: 1028 btu/scf and a density of 18.92 kg/mscf
- Water [resource, water]: 0.551, 0.826 kg (2 entries)
  Data from NETL 2014

## Waste to treatment
- Disposal, solid waste, unspecified: 0.0247 kg
  Solid waste to landfill. Data from NETL 2014

## Emissions to nature
- Sulfate [emission, water]: 7.95e-6 kg
  Data from NETL 2014
- Calcium [emission, water]: 0.000203 kg
  Data from NETL 2014
- Methane [emission, air]: 0.00127 kg
  Data from NETL 2014
- Magnesium [emission, water]: 2.5e-5 kg
  Data from NETL 2014
- Silicate group [emission, water]: 7.4e-7 kg
  Data from NETL 2014
- Nitrous oxide [emission, air]: 1.05e-7 kg
  Data from NETL 2014
- Chloride [emission, water]: 0.00205 kg
  Data from NETL 2014
- Carbon dioxide [emission, air]: 0.0863 kg
  Data from NETL 2014
- Volatile organic compounds [emission, air]: 8.26e-5 kg
  Data from NETL 2014
- Sulfur dioxide [emission, air]: 4.12e-7 kg
  Data from NETL 2014
- Particulate matter, ≤ 10μm [emission, air]: 6.99e-6 kg
  Data from NETL 2014. Represents PM > 2.5 and <10.
- Total dissolved solids [emission, water]: 0.00372 kg
  Data from NETL 2014
- Iron [emission, water]: 1.09e-6 kg
  Data from NETL 2014
- Nitrogen oxides [emission, air]: 0.00286 kg
  Data from NETL 2014
- Carbon monoxide [emission, air]: 0.000222 kg
  Data from NETL 2014

## Inventory method
Attributional. Compatible with TRACI

## Modelling constants
The input and output data for each of the subprocesses is taken from NETL unit process library and the most recent data is from 2010. The inputs to this unit process are natural gas, ground water, and surface water. These three inputs are natural resources and thus enter the boundary of this unit process with no upstream environmental burdens. If the natural gas extraction site is near a source of electricity, it is financially preferable to use electrically-powered equipment instead of gas-powered equipment. The output of this unit process is dehydrated natural gas that is suitable for pipeline transport and subsequent processing steps such as sweetening or, in the case of imported natural gas, liquefaction. This unit process also accounts for environmental emissions to air and water but does not track wastewater.

## Completeness
TREATMENT OF MISSING ENVIRONMENTAL DATA: Elementary flows are cut-off at less than 1% based on environmental relevance.
TREATMENT OF MISSING TECHNOSPHERE DATA: Intermediate flows are cut-off is at 1% based on environmental relevance.
MASS BALANCE: The mass balance was calculated by a straight comparison of inputs and outputs

## Data selection
This dataset was used in the aggregate natural gas extraction production mix process.

## Data treatment
An estimated 60 percent of natural gas was sourced from unconventional natural gas resources including shale well and CBM extraction. This dataset was used to model the aggregate natural gas extraction production mix process based on percentages from EIA, 2017.

## Sampling procedure
BOUNDARY CONDITIONS: The scope of this unit process encompasses the energy inputs and material outputs for the extraction of natural gas from Barnett Shale. The inputs to this unit process are natural gas, ground water, and surface water. These three inputs are natural resources and thus enter the boundary of this unit process with no upstream environmental burdens. The output of this unit process is dehydrated natural gas that is suitable for pipeline transport and subsequent processing steps. In addition to resource inputs and outputs that are used by downstream unit processes, this unit process also accounts for environmental emissions to air and water but does not track wastewater.
DATA COLLECTION: NETL LCA Unit Process Library, Natural gas extraction processes 2010.
UNCERTAINTY ESTIMATION: No uncertainty analysis was carried out due to the lack of uncertainty data or probability distributions for key parameters, which are often only available as single point estimates from NETL.

## Review details
Internal review of data entry proofreading, mass balance verification and data documentation.

## Intended application
"Accounting, with system-external interactions" - The intended application is a purely descriptive accounting / documentation of the analysed system including existing interactions with other systems in the LCI model. These data are an update to a previously published dataset which is a generic unit process data.

## Project
https://www.netl.doe.gov/projects/files/DF_Stage1_O_BarnettShale_NG_Extraction_2010-01.pdf

## Sources
- National Energy Technology Laboratory (NETL). 2010. Extraction natural gas from Barnett Shale
- US EIA (2017a) Natural Gas Annual 2017
