# Mixed recyclables, recovered for material recycling facility (MRF)

Dataset: openLCA process, unit process
Category: 56: Administrative and Support and Waste Management and Remediation Services/5629: Remediation and Other Waste Management Services
Geography: United States
Time period: 2007-12-24 to 2009-12-24
Allocation method: no allocation
Data quality: US EPA - Process Pedigree Matrix (4;1)
Generated by: Franklin Associates
Owner: ACC, APR, NAPCOR, & PETRA
Reviewer: Beverly Sauer
Published in: Franklin Associates (2011) LCI HDPE & PET Recycled Resin
restrictionsDescription: These U.S. LCI Database Project data ("Data") are provided by the National Renewable Energy Laboratory ("NREL"), operated by the Alliance for Sustainable Energy, LLC ("Alliance") for the US Department of Energy ("DOE") under Contract No. DE-AC36-08GO28308. The United States Government (the "Government") retains and the user acknowledges that the Government retains a non-exclusive, paid-up, irrevocable, worldwide license to publish or reproduce the published form of these data, or allow others to do so, for Government purposes.
Access to and use of these Data shall impose the following obligations on the user, as set forth in this Agreement. The user is granted the right, without any fee or cost, to use, copy, modify, alter, enhance and distribute these Data for any purpose whatsoever, provided that this entire notice appears in all copies of the Data. Any modification, alteration or enhancement of these data shall be identified and documented by the user. Further, the user agrees to credit the DOE/NREL/Alliance in any publication that results from the use of these Data. The names DOE/NREL/Alliance, however, may not be used in any advertising or publicity to endorse or promote any products or commercial entities unless specific written permission is obtained from DOE/NREL/Alliance. The user also understands that DOE/NREL/Alliance is not obligated to provide the user with any support, consulting, training or assistance of any kind with regard to the use of these Data or to provide the user with any updates, revisions or new versions of these Data.
YOU AGREE TO INDEMNIFY THE GOVERNMENT AND DOE/NREL/ALLIANCE, AND ITS SUBSIDIARIES, AFFILIATES, OFFICERS, AGENTS, AND EMPLOYEES AGAINST ANY CLAIM OR DEMAND, INCLUDING REASONABLE ATTORNEYS' FEES, RELATED TO YOUR USE OF THESE DATA. THESE DATA ARE PROVIDED BY DOE/NREL/ALLIANCE "AS IS" AND ANY EXPRESS OR IMPLIED WARRANTIES, INCLUDING BUT NOT LIMITED TO, THE IMPLIED WARRANTIES OF MERCHANTABILITY AND FITNESS FOR A PARTICULAR PURPOSE ARE DISCLAIMED. IN NO EVENT SHALL THE GOVERNMENT OR DOE/NREL/ALLIANCE BE LIABLE FOR ANY SPECIAL, INDIRECT OR CONSEQUENTIAL DAMAGES OR ANY DAMAGES WHATSOEVER, INCLUDING BUT NOT LIMITED TO CLAIMS ASSOCIATED WITH THE LOSS OF DATA OR PROFITS, WHICH MAY RESULT FROM AN ACTION IN CONTRACT, NEGLIGENCE OR OTHER TORTIOUS CLAIM THAT ARISES OUT OF OR IN CONNECTION WITH THE ACCESS, USE OR PERFORMANCE OF THESE DATA.
copyright: false

## General comment
This attributional unit process LCI represents the breakdown in percentages of sources of postconsumer material collected for material recycling facilities (MRFs). The process only represents the source mix percentages per 1 kg; no incoming transport is included in this process. Transport to the MRF and energy requirements for sorting are included in the next step in this linked model. The LCI study was conducted by Franklin Associates, Ltd. and sponsored jointly by NAPCOR, the American Chemistry Council (ACC), the Association of Postconsumer Plastic Recyclers (APR), and the PET Resin Association (PETRA). Using life cycle inventory (LCI) methodology, the study determines and quantifies the energy requirements, solid wastes, and atmospheric and waterborne emissions for the processes required to collect postconsumer PET and HDPE packaging, sort and separate the material, and reprocess it into clean recycled resin.

Important note: although most of the data in the US LCI database has undergone some sort of review, the database as a whole has not yet undergone a formal validation process. Please email comments to lci@nrel.gov.

## Technology
Typical composition of sources of postconsumer material arriving at material recycling facilities (MRFs); MRF technology levels for non-fiber lines were separated into 4 categories and statistics were used to estimate the percentage of plastic handled under each category:
• Level 1 – manual separation only, with conveyor or balers;
• Level 2 – use of conveyor, baler, and magnetic separator;
• Level 3 – in addition to level 2 equipment, the use of other separator technology such as eddy current, air classifier, trommels, and screens, or an integrated sort system;
• Level 4 – the addition of computer-assisted technology, i.e., scanners.

## Geography
United States

## Time period
Data compiled 2010 from most recent sources

## Reference product
- Mixed recyclables, for material recycling facility (MRF) [US]: 1 kg

## Inputs from technosphere
- Mixed recyclables, at collection, commercial [US]: 0.0764206 kg
  Percent of material to MRF from commercial collection.
- Mixed recyclables, at collection, dropoff center [US]: 0.172782 kg
  Percent of material to MRF from dropoff centers.
- Mixed recyclables, at collection, curbside, weight basis [US]: 0.750797 kg
  Percent of material to MRF from curbside collection.

## Inventory method
Attributional; data sets for the three recycling unit processes (collection, sorting/separation, reclaimer operations) were linked to cover the full sequence of processing steps required to produce recycled resins  gate-to-gate results; for cradle-to-gate LCI of recycled resin, the practitioner needs to make decision about virgin resin burdens associated with the postconsumer products that are feedstocks to recycling. Recycling occurs in the context of a product made from resin; use and end-of-life management of the material will depend on the product in which it is used

## Modelling constants
See Section 2.2 and Table 2-1 in source report. Curbside includes deposit and non-deposit containers collected through curbside; Deposit includes deposit and non-deposit containers collected through deposit centers; Data collected on HDPE recovery excludes HDPE film packaging

## Completeness
TREATMENT OF MISSING ENVIRONMENTAL DATA
Elementary flows are cut-off at less than 1% based on environmental relevance.

TREATMENT OF MISSING TECHNOSPHERE DATA
Intermediate flows are cut-off at less than 1% based on environmental relevance. Capital equipment is not included in this unit process.

MASS BALANCE
Based on 1 kg recyclables by % from source type.

## Data selection
The percent of PET, HDPE and PP recovery through the various collection programs was determined from an analysis of the following data sources:

National PET, HDPE and PP Recovery for 2015: U.S. EPA. Advancing SustainableMaterials Management: Facts and Figures 2015. https://www.epa.gov/facts-and-figures-about-materials-waste-and-
recycling/advancing-sustainable-materials-management

Curbside/Drop-off/Deposit Mix:
 Governmental Advisory Associates, Inc. 2016-2017 Materials Recycling and Processing in the United States Database. 2016.
 California Department of Resources Recycling and Recovery. November 7, 2016. Biannual Report of Beverage Container Sales, Returns, Redemption, and Recycling Rates. Accessed 16 February 2017. http://www.calrecycle.ca.gov
 California Department of Conservation Division of Recycling. June 2009. Market Analysis for Recycled Beverage Container Materials: 2009 Update. Accessed 16 February 2017
http://www.calrecycle.ca.gov/Publications/Documents/BevContainer/2011024.pdf

Commercial Recovery:
 PET and HDPE containers calculated as total recovery minus residential recovery and deposit recovery
 PP commercial recovery assumed to be negligible.

## Data treatment
Assumtions and calculations described in Modeling Constants.

## Sampling procedure
BOUNDARY CONDITIONS
Includes the breakdown in percentages of sources of postconsumer material arriving at material recycling facilities (MRFs). The process only represents the source mix and Incoming transport is not included in this unit process.

DATA COLLECTION
Assumptions and calculations are described in Modeling Constants and the supporting documentation.

UNCERTAINTY ESTIMATION
No uncertainty estimations were included.

## Review details
The LCI study was conducted by Franklin Associates, Ltd. and sponsored jointly by NAPCOR, the American Chemistry Council (ACC), the Association of Postconsumer Plastic Recyclers (APR), and the PET Resin Association (PETRA). Using life cycle inventory (LCI) methodology, the study determines and quantifies the energy requirements, solid wastes, and atmospheric and waterborne emissions for the processes required to collect postconsumer PET and HDPE packaging, sort and separate the material, and reprocess it into clean recycled resin. The data has had a partial critical review by internal parties.

## Intended application
"Accounting, with system-external interactions" - The intended application is a purely descriptive accounting / documentation of the analysed system including existing interactions with other systems in the LCI model.

## Project
LIFE CYCLE INVENTORY OF 100% POSTCONSUMER HDPE AND PET RECYCLED RESIN FROM POSTCONSUMER CONTAINERS AND PACKAGING PREPARED FOR THE PLASTICS DIVISION OF THE AMERICAN CHEMISTRY COUNCIL, INC. THE ASSOCIATION OF POSTCONSUMER PLASTIC RECYCLERS (APR), THE NATIONAL ASSOCIATION FOR PET CONTAINER RESOURCES (NAPCOR), AND THE PET RESIN ASSOCIATION (PETRA) BY FRANKLIN ASSOCIATES, A DIVISION OF ERG PRAIRIE VILLAGE, KANSAS JANUARY 19, 2011.

## Sources
- Franklin Associates (2011) LCI HDPE & PET Recycled Resin
