# Metal panel, insulated, at plant

Dataset: openLCA process, unit process
Category: 31-33: Manufacturing/3323: Architectural and Structural Metals Manufacturing
Geography: Northern America
Time period: 2013-07-31 to 2015-02-27
Allocation method: no allocation
Generated by: PE INTERNATIONAL
Published in: PE INTERNATIONAL
restrictionsDescription: All information can be accessed by everybody.
copyright: false

## General comment
Continuous IMP production process entails forming the continuous metal facers while at the same time (at another point on the continuous line) injecting the foam mixture into the panel assembly. The foam then expands and fills the cavity between the metal skins as they enter a platen conveyor. Panels are then cut to length with an in-line cross cut saw. Post fabrication work, available through some manufacturers, can be performed on the product to treat the cut ends of the panels. The IMP production process includes all material and inbound transportation necessary for construction-ready products: coated steel coils, foaming agents, and packaging materials. Energy and utility inputs include electricity, natural gas, and propane. All known solid waste, air, and water emissions are captured in the output.

## Technology
Insulated metal panel (IMP) for external building surfaces. Technology based on companies identified by Metal Construction Association to be representative of industry.

## Geography
North America

## Reference product
- Metal panel, insulated, at plant [RNA]: 1 m2

## Inputs from technosphere
- Transport, single unit truck, long-haul, diesel powered [RNA]: 2798.54 kg*km
- Lubricant feedstock, at refinery: 0.000411543 kg
- Recycling, petroleum based wastes, unspecified: 9.43226e-5 kg
- Methylene diphenyl diisocyanate, MDI, resin, at plant [RNA]: 1.75918 kg
- Glue-adhesive(30-50% terpene,30-50% polybutene,5-10% polyolefin), at plant: 0.0568506 kg
- Disposal, chemical waste, unspecified, to residual materials landfill: 0.000895748 kg
- Recycling, Steel scrap: 0.477609 kg
- Liquefied petroleum gas, at refinery [RNA]: 0.000232732 m3
  m3 amount LPG replaces "CUTOFF Thermal energy from propane (MJ)" using HHV 49.1 MJ/kg for LPG and density 543.478 kg/m3 (per USLCI petroleum refining products densities)
- Polyol ether, for rigid foam polyurethane production, at plant [RNA]: 1.04916 kg
- Oriented strand board; at OSB mill [US]: 0.00125817 m3
- Natural gas, combusted in industrial equipment, 1.357 m3/kg, 52.13 MJ/kg [RNA]: 0.111499 m3
- Polystyrene, exapnded, EPS, virgin resin; batch suspension polymerization; industry average, at plant [RNA]: 0.0913025 kg
- Polypropylene, PP, virgin resin, at plant [RNA]: 0.00589972 kg
- Pentane: 0.349728 kg
- Tetrafluoroethane (R-134a): 0.0234438 kg
- Polyethylene, low-density, LDPE, virgin resin, at plant: 0.0871831, 0.0155705 kg (2 entries)
- Plywood; at plywood plant [US]: 1.64156 kg
- Electricity, at grid [RNA]: 13.9914 kWh
- Waste, industrial [RNA]: 0.184987 kg
- Galvanized steel coil, coated, at plant [RNA]: 11.6513 kg
- Disposal, resins, unspecified, to sanitary landfill: 0.00423623 kg
- Surfaced dried lumber; at planer mill [US]: 0.00393926 kg
- Galvanized steel sheet, at plant: 11.8466 kg
- Disposal, solid waste, unspecified, to unspecified treatment: 2.2607 kg
- Paper, woodcontaining, LWC, at plant: 0.000407158 kg

## Emissions to nature
- Xylene [emission, air]: 2.6599e-5 kg
- Particulate matter, > 10μm [emission, air]: 0.000416822 kg
- 4,4'-Methylenedi(phenyl isocyanate) [emission, air]: 0.00255545 kg
- Volatile organic compounds [emission, air]: 0.0144031 kg
- Acetone [emission, water]: 6.6891e-5 kg
- HFC-134a [emission, air]: 0.0146906 kg
- Particulate matter, > 10μm [emission, air, troposphere, rural]: 0.000508948 kg
- Priority pollutants, acidic [emission, water]: 0.00117955 kg
- Pentane [emission, air]: 0.000890658 kg
- Methanol [emission, air]: 0.000141913 kg
- Ethylbenzene [emission, air]: 8.87941e-6 kg
- Toluene [emission, air]: 0.000984437 kg
- Isocyanic acid [emission, air]: 7.63422e-7 kg
- Diethylene glycol [emission, air]: 0.00523867 kg
- Methyl isobutyl ketone [emission, air]: 2.6599e-5 kg

## Sources
- PE INTERNATIONAL
