# Transport, barge, residual fuel oil powered

Dataset: openLCA process, unit process
Category: 48-49: Transportation and Warehousing/4832: Inland Water Transportation
Geography: Northern America
Time period: 2000-12-31 to 2000-12-31
Allocation method: no allocation
Generated by: Franklin Associates
Published in: Franklin Associates (2006) Residual Oil Barge
restrictionsDescription: All information can be accessed by everybody.
copyright: false

## General comment
Important note: although most of the data in the US LCI database has
undergone some sort of review, the database as a whole has not yet
undergone a formal validation process.
Please email comments to lci@nrel.gov.

## Technology
Combustion of residual oil in barge.

## Geography
United States

## Reference product
- Transport, barge, residual fuel oil powered [RNA]: 1 t*km

## Inputs from technosphere
- Residual fuel oil, at refinery [RNA]: 0.0088155 l

## Emissions to nature
- Volatile organic compounds [emission, air]: 1.3128e-5 kg
- Carbon dioxide [emission, air]: 0.028712 kg
- Carbon monoxide [emission, air]: 3.4965e-5 kg
- Nitrous oxide [emission, air]: 6.9662e-7 kg
- Methane [emission, air]: 6.4329e-7 kg
- Sulfur oxides [emission, air]: 9.0312e-5 kg
- Particulate matter, ≤ 10μm [emission, air]: 8.7924e-6 kg
- Nitrogen oxides [emission, air]: 0.0003546 kg

## Sources
- Franklin Associates (2006) Residual Oil Barge
- Center for Transportation Research, Argo
- unspecified
