# Natural gas, at extraction, conventional onshore, kg

Dataset: openLCA process, unit process
Category: 21: Mining, Quarrying, and Oil and Gas Extraction/2111: Oil and Gas Extraction
Geography: United States
Time period: 2013-12-31 to 2014-11-30
Allocation method: no allocation
Data quality: US EPA - Process Pedigree Matrix (4;1)
Generated by: Franklin Associates, A Division of ERG
Owner: National Energy Technology Laboratory
Reviewer: Franklin Associates, A Division of ERG
restrictionsDescription: These U.S. LCI Database Project data ("Data") are provided by the National Renewable Energy Laboratory ("NREL"), operated by the Alliance for Sustainable Energy, LLC ("Alliance") for the US Department of Energy ("DOE") under Contract No. DE-AC36-08GO28308. The United States Government (the "Government") retains and the user acknowledges that the Government retains a non-exclusive, paid-up, irrevocable, worldwide license to publish or reproduce the published form of these data, or allow others to do so, for Government purposes.
Access to and use of these Data shall impose the following obligations on the user, as set forth in this Agreement. The user is granted the right, without any fee or cost, to use, copy, modify, alter, enhance and distribute these Data for any purpose whatsoever, provided that this entire notice appears in all copies of the Data. Any modification, alteration or enhancement of these data shall be identified and documented by the user. Further, the user agrees to credit the DOE/NREL/Alliance in any publication that results from the use of these Data. The names DOE/NREL/Alliance, however, may not be used in any advertising or publicity to endorse or promote any products or commercial entities unless specific written permission is obtained from DOE/NREL/Alliance. The user also understands that DOE/NREL/Alliance is not obligated to provide the user with any support, consulting, training or assistance of any kind with regard to the use of these Data or to provide the user with any updates, revisions or new versions of these Data.
YOU AGREE TO INDEMNIFY THE GOVERNMENT AND DOE/NREL/ALLIANCE, AND ITS SUBSIDIARIES, AFFILIATES, OFFICERS, AGENTS, AND EMPLOYEES AGAINST ANY CLAIM OR DEMAND, INCLUDING REASONABLE ATTORNEYS' FEES, RELATED TO YOUR USE OF THESE DATA. THESE DATA ARE PROVIDED BY DOE/NREL/ALLIANCE "AS IS" AND ANY EXPRESS OR IMPLIED WARRANTIES, INCLUDING BUT NOT LIMITED TO, THE IMPLIED WARRANTIES OF MERCHANTABILITY AND FITNESS FOR A PARTICULAR PURPOSE ARE DISCLAIMED. IN NO EVENT SHALL THE GOVERNMENT OR DOE/NREL/ALLIANCE BE LIABLE FOR ANY SPECIAL, INDIRECT OR CONSEQUENTIAL DAMAGES OR ANY DAMAGES WHATSOEVER, INCLUDING BUT NOT LIMITED TO CLAIMS ASSOCIATED WITH THE LOSS OF DATA OR PROFITS, WHICH MAY RESULT FROM AN ACTION IN CONTRACT, NEGLIGENCE OR OTHER TORTIOUS CLAIM THAT ARISES OUT OF OR IN CONNECTION WITH THE ACCESS, USE OR PERFORMANCE OF THESE DATA.
copyright: false

## General comment
NETL LCA Unit Process Library, Natural gas extraction processes 2010. Conventional onshore natural gas is recovered by vertical drilling techniques. Once a conventional onshore gas well has been discovered, the natural gas reservoir does not require significant preparation or stimulation for natural gas recovery. Approximately 63 percent of U.S. natural gas production is from conventional onshore gas wells (US EIA, 2009). The conventional onshore gas wells of this analysis are assumed to have a daily production rate between 400 and 1,550 thousand cubic feet, which is characteristic of approximately 40 percent of gas wells in the U.S. (US EIA, 2009b).

## Technology
Conventional natural gas extraction

## Geography
US onshore gas wells

## Time period
NETL LCA Unit Process Library, Natural gas extraction processes 2010. This dataset was used to model the aggregate natural gas extraction production mix process based on percentages from EIA, 2017.

## Reference product
- Natural gas, at extraction, conventional onshore, kg: 1 kg
  Data from NETL 2014

## Inputs from nature
- Water [resource, water]: 0.319, 0.319 kg (2 entries)
  Data from NETL 2014
- Natural gas [resource, air, subterranean]: 59.4982 MJ
  1.042 kg gas in per kg gas out for conventional onshore; NETL reports natural gas density as 57.1 MJ/kg based on: 1028 btu/scf and a density of 18.92 kg/mscf

## Waste to treatment
- Disposal, solid waste, unspecified: 0.0247 kg
  Solid waste to landfill. Data from NETL 2014

## Emissions to nature
- Carbon monoxide [emission, air]: 0.000281 kg
  Data from NETL 2014
- Particulate matter, ≤ 10μm [emission, air]: 8.86e-6 kg
  Data from NETL 2014. Represents PM > 2.5 and <10.
- Nitrogen oxides [emission, air]: 0.00362 kg
  Data from NETL 2014
- Volatile organic compounds [emission, air]: 0.000105 kg
  Data from NETL 2014
- Hydrocarbons [emission, water]: 2.67e-5 kg
  Data from NETL 2014
- Chloride [emission, water]: 0.000375 kg
  Data from NETL 2014
- Methane [emission, air]: 0.00153 kg
  Data from NETL 2014
- Total dissolved solids [emission, water]: 0.00391 kg
  Data from NETL 2014
- Nitrous oxide [emission, air]: 1.66e-7 kg
  Data from NETL 2014
- Boron [emission, water]: 1.9e-6 kg
  Data from NETL 2014
- Sulfur dioxide [emission, air]: 5.21e-7 kg
  Data from NETL 2014
- Sulfate [emission, water]: 0.00151 kg
  Data from NETL 2014
- Carbon dioxide [emission, air]: 0.112 kg
  Data from NETL 2014

## Inventory method
Attributional. Compatible with TRACI

## Modelling constants
The input and output data for each of the subprocesses is taken from NETL unit process library and the most recent data is from 2010. The inputs to this unit process are natural gas, ground water, and surface water. These three inputs are natural resources and thus enter the boundary of this unit process with no upstream environmental burdens. If the natural gas extraction site is near a source of electricity, it is financially preferable to use electrically-powered equipment instead of gas-powered equipment. The output of this unit process is dehydrated natural gas that is suitable for pipeline transport and subsequent processing steps such as sweetening or, in the case of imported natural gas, liquefaction. This unit process also accounts for environmental emissions to air and water but does not track wastewater.

## Completeness
TREATMENT OF MISSING ENVIRONMENTAL DATA: Elementary flows are cut-off at less than 1% based on environmental relevance.
TREATMENT OF MISSING TECHNOSPHERE DATA: Intermediate flows are cut-off is at 1% based on environmental relevance.
MASS BALANCE: The mass balance was calculated by a straight comparison of inputs and outputs

## Data selection
This dataset was used in the aggregate natural gas extraction production mix process.

## Data treatment
An estimated 40 percent of natural gas was sourced from conventional onshore and offshore sources including associated onshore natural gas production. This dataset was used to model the aggregate natural gas extraction production mix process based on percentages from EIA, 2017.

## Sampling procedure
BOUNDARY CONDITIONS: The system boundary includes (1) natural gas extraction (2) energy inputs for the process, and (3) water inputs for the process.
DATA COLLECTION: A weighted average was calculated from the data collected for 6 extraction methods and used to develop the composite natural gas extraction process.
UNCERTAINTY ESTIMATION: All data were carefully evaluated before compiling the production-weighted average data sets used to generate results. No uncertainty analysis was carried out due to the lack of uncertainty data or probability distributions for key parameters, which are often only available as single point estimates from the producers.

## Review details
Internal review of data entry proofreading, mass balance verification and data documentation.

## Intended application
"Accounting, with system-external interactions" - The intended application is a purely descriptive accounting / documentation of the analysed system including existing interactions with other systems in the LCI model. These data are an update to a previously published dataset which is a generic unit process data.

## Project
https://www.netl.doe.gov/projects/files/DF_Stage1_O_Conventional_Onshore_NG_Extraction_2010-01.pdf

## Sources
- US EIA (2017a) Natural Gas Annual 2017
- National Energy Technology Laboratory (NETL). 2010. Extraction of natural gas (NG) from a conventional onshore gas well
