# Transport, ocean freighter, residual fuel oil powered

Dataset: openLCA process, unit process
Category: 48-49: Transportation and Warehousing/4831: Deep Sea, Coastal, and Great Lakes Water Transportation
Geography: United States
Time period: 2000-12-31 to 2000-12-31
Allocation method: no allocation
Generated by: Franklin Associates
Published in: Franklin Associates (2006) Diesel Ocean Freighter
restrictionsDescription: All information can be accessed by everybody.
copyright: false

## General comment
Important note: although most of the data in the US LCI database has undergone some sort of review, the database as a whole has not yet undergone a formal validation process. Please email comments to lci@nrel.gov.

## Technology
Combustion of residual oil in an ocean freighter.

## Geography
United States

## Reference product
- Transport, ocean freighter, residual fuel oil powered [US]: 1 t*km

## Inputs from technosphere
- Residual fuel oil, at refinery [RNA]: 0.0049263 l; provider Petroleum refining, at refinery

## Emissions to nature
- Carbon dioxide [emission, air]: 0.01598 kg
- Particulate matter, ≤ 10μm [emission, air]: 1.0762e-5 kg
- Volatile organic compounds [emission, air]: 1.6069e-5 kg
- Sulfur oxides [emission, air]: 5.0468e-5 kg
- Methane [emission, air]: 7.8738e-7 kg
- Nitrogen oxides [emission, air]: 0.00043403 kg
- Nitrous oxide [emission, air]: 3.8929e-7 kg
- Carbon monoxide [emission, air]: 4.2797e-5 kg

## Sources
- Center for Transportation Research, Argo
- Franklin Associates (2006) Diesel Ocean Freighter
- unspecified
