# Fertilizer, switchgrass, 2022

Dataset: openLCA process, unit process
Category: 11: Agriculture, Forestry, Fishing and Hunting/1151: Support Activities for Crop Production
Geography: Northern America
Time period: 2009-12-31 to 2100-12-30
Allocation method: no allocation
Generated by: Daniel Inman
Published in: Hsu, D.
restrictionsDescription: All information can be accessed by everybody.
copyright: false

## General comment
Total Fertilizer input for one hectare of switchgrass annualized for a 10-yr production period. Projections based on published data and yeild projections to the year 2022.

## Technology
Modern technology

## Geography
North America

## Time period
2010 and after

## Reference product
- Fertilizer, switchgrass [RNA]: 10000 m2; = 1.0*10000

## Inputs from technosphere
- Nitrogen fertilizer, production mix, at plant [RNA]: 10.4 kg
  Proxy: Triple superphosphate, as P2O5, at regional storehouse/RER with US electricity U. Triple super phosphate is 48% P2O5
- Ammonia, steam reforming, liquid, at plant: 64.8 kg
  Proxy: Ammonium nitrate, as N, at regional storehouse/RER with US electricity U. N application is split equally, in terms of N applied, between ammonium nitrate and urea b/c they are the least expensive grannular N forms (USDA-ERS, 2007). Ammonium nitrate is 33% N
- Potassium chloride, as K2O, at regional storehouse: 122 kg
  Muriate of potash is 60% K2O
- Transport, combination truck, diesel powered [RNA]: 9.49 t*km
  transport to field. 2.61 tkm for ammonium nitrate, 0.181 tkm for triple phosphate, 4.09 tkm for potassium nitrate, 2.61 tkm for Urea as N.
- Fertilising, by broadcaster: 20000 m2; = 2.0*10000
  Assuming 2 fertilizer trips per year

## Emissions to nature
- Ammonia [emission, air]: 14.8 kg
  Assuming 10% of N applied volatalizes to NH3. IPCC 1997. Will likely need adjustmetn b/c N fertlizer will be applied to SG in granular form which does not volatalize as much.
- Nitrate [emission, water, subterranean]: 0.000414 kg
  NO3-N leaching, assuming 30% of fertilizer N applied leaches below the root zone. IPCC 1997. This will likely need adjustment because N will not leach as much due to the continuous cover of SG
- Nitrous oxide [emission, air]: 1.96 kg
  Assuming 1.25% of N applied is lost via denitrification as N2O. IPCC 1997. Will likely need to be adjusted.

## Sources
- R.K. Perrin
- H.W. Downs
- Hsu, D.
- C.D. Klein
