# Bottle assembly

Dataset: openLCA process, unit process
Category: Assemblers
Geography: Djibouti
Allocation method: physical allocation
copyright: false

## Reference product
- Bottle [DJ]: 1 number_of_items

## By-products
- Plastic [DJ]: 1 kg

## Inputs from technosphere
- Plastic [DJ]: 0.25 kg
- Stainless steel [DJ]: 0.3 kg

## Emissions to nature
- Bad stuff [emissions]: 0.1 kg

## Allocation factors
- physical, Bottle: 1
- causal, Bottle, for Plastic: 1
- economic, Bottle: 1
- causal, Bottle, for Stainless steel: 1
- economic, Plastic: 0
- causal, Bottle, for Bad stuff: 1
- causal, Plastic, for Bad stuff: 0
- physical, Plastic: 0
- causal, Plastic, for Stainless steel: 0
- causal, Plastic, for Plastic: 0
