# Coal; at mine

Dataset: openLCA process, unit process
Category: 2121: Coal Mining
Geography: United States
Time period: 2017-01-01 to 2017-12-31
Data quality: US EPA - Process Pedigree Matrix (1;1)
Exchange data quality scheme: US EPA - Flow Pedigree Matrix
Generated by: US EPA with CSRA and ERG
Owner: US EPA
Published in: Yang, Ingwersen et al. 2017
restrictionsDescription: This model shold be appropriately cited (see Yang, Ingwersen et al. 2017 source or Publication field) when used. Any changes or derivations of this model by the user should be documented. The model itself and any results from use of this model shall not be construed to consitute US EPA opinion or policy.
copyright: false

## General comment
BEA Code & Name is '212100:Coal mining'. Description of the primary industry producing this good or service, adapted from the Census Bureau NAICS 2007 descriptions: This industry comprises establishments primarily engaged in one or more of the following: (1) mining bituminous coal, anthracite, and lignite by underground mining, auger mining, strip mining, culm bank mining, and other surface mining; (2) developing coal mine sites; and (3) beneficiating (i.e., preparing) coal (e.g., cleaning, washing, screening, and sizing coal).

## Technology
The process describes the average US production of this good or service within this NAICS-based grouping defined in the BEA 2007 detailed input-output tables (BEA 2015). Distribution, wholesale and retailing of this good or service, use, and final disposal are not included. Creation of a product system with this process will enable modeling of all upstream (supply-chain) activities.

## Geography
Data represent the 50 US states

## Time period
2017 was the year in which this version of USEEIO was released and is the target date for the model

## Reference product
- Coal; at mine: 1 USD

## Inputs from technosphere
All rows: data quality (1,3,1,1,1)
- Rubber tires; at manufacturer: 0.00633728 USD
- Telecommunications: 0.000869273 USD
- Scenic and sightseeing transportation and support activities for transportation: 8.41232e-5 USD
- Accounting, tax preparation, bookkeeping, and payroll: 0.00215916 USD
- Cement; at manufacturer: 2.80411e-5 USD
- Dimensional stone; at mine: 0.0158152 USD
- Metal pipe fittings, ball and roller bearings, industrial patterns, metal bath fixtures, other misc. fabricated metals; at manufacturer: 0.000448657 USD
- Paper bags and coated paper; at manufacturer: 0.000448657 USD
- Fluid meters and counting devices; at manufacturer: 0.000280411 USD
- Sand, gravel, clay, phosphate, other nonmetallic minerals; at mine: 0.000448657 USD
- Primary iron, steel, and ferroalloy products; at manufacturer: 0.00297235 USD
- Timber and raw forest products; at forest: 0.00168246 USD
- Compressed Gases; at manufacturer: 0.000616903 USD
- Screws, nuts, and bolts; at manufacturer: 0.00529976 USD
- Lumber and treated lumber; at manufacturer: 0.000869273 USD
- Metal hinges, keys, lock, and other hardware; at manufacturer: 0.000224328 USD
- Securities and commodities brokerage and exchanges: 0.000841232 USD
- Metal coatings, engravings, and heat treatments; at manufacturer: 0.000672985 USD
- Legal services: 0.00577646 USD
- Civic, social, professional, and similar organizations: 0.000280411 USD
- Electronic equipment repair and maintenance: 0.000140205 USD
- Pipeline transport: 0.000476698 USD
- Cutting and machine tool accessory, rolling mill, and other metalworking machines; at manufacturer: 0.00145813 USD
- Truck transport: 0.00636532 USD
- Unrefined oil and gas; at extraction site: 2.80411e-5 USD
- Cardboard; at manufacturer: 0.000196287 USD
- Vehicles and parts sales: 0.000336493 USD
- Marketing research and all other miscellaneous professional, scientific, and technical services: 0.000364534 USD
- Passenger ground transport: 2.80411e-5 USD
- Drinking water and wastewater treatment; at consumer: 0.000252369 USD
- Specialized design: 0.000140205 USD
- Nondepository credit intermediation and related activities: 0.000897314 USD
- Cardboard containers; at manufacturer: 0.000196287 USD
- Ready-mix concrete; at manufacturer: 0.000448657 USD
- Electricity; at consumer: 0.00776737 USD
- Household goods repair: 0.000364534 USD
- Machine shops; at manufacturer: 0.000252369 USD
- Limited-service restaurants: 5.60821e-5 USD
- Postal service: 2.80411e-5 USD
- Architectural, engineering, and related services: 0.0103471 USD
- Petrochemicals; at manufacturer: 0.000280411 USD
- Light fixtures; at manufacturer: 0.000196287 USD
- Other rubber products; at manufacturer: 0.000616903 USD
- Rail transport: 0.0574 USD
- Insurance agencies and brokerages: 0.000140205 USD
- Management consulting: 0.000364534 USD
- Rubber and plastic belts and hoses; at manufacturer: 0.00370142 USD
- Computer terminals and other computer peripheral equipment; at manufacturer: 0.000112164 USD
- Concrete pipe, bricks, and blocks; at manufacturer: 0.000252369 USD
- Computer systems design: 2.80411e-5 USD
- Other petroleum and coal products; at manufacturer: 0.00608491 USD
- Warehousing: 0.000112164 USD
- Travel arrangement and reservation: 0.000280411 USD
- General merchandise stores: 5.60821e-5 USD
- Vehicle rental and leasing: 0.000644944 USD
- Plastic bags, films, and sheets; at manufacturer: 0.00053278 USD
- Investigation and security: 0.000196287 USD
- Company and enterprise management: 0.0199652 USD
- Vehicle repair: 0.000168246 USD
- Business support: 0.000448657 USD
- Other basic organic chemicals; at manufacturer: 0.000785149 USD
- Other support activities for mining: 0.0147496 USD
- Nonresidential building repair and maintanence: 0.0137401 USD
- Motor vehicle steering, suspension components (except spring), and brake systems; at manufacturer: 0.000925355 USD
- Water transport (boats, ships, ferries): 0.00420616 USD
- Gasoline, fuels, and by-products of petroleum refining; at manufacturer: 0.0627839 USD
- Investment advice, portfolio management, and other financial advising services: 0.0101789 USD
- Food and beverage stores: 2.80411e-5 USD
- Air transport: 0.000336493 USD
- Gaskets, seals, musical instruments, fasteners, brooms, brushes, mop and other misc. goods; at manufacturer: 0.000196287 USD
- Lessors of nonfinancial intangible assets: 0.00616903 USD
- Tobacco, cotton, sugarcane, peanuts, sugar beets, herbs and spices, and other crops; at farm: 0.000196287 USD
- Mining and oil/gas field machinery; at manufacturer: 0.0335651 USD
- Radio and television: 2.80411e-5 USD
- Ground or treated minerals and earth; at manufacturer: 0.00193483 USD
- Other vehicle parts; at manufacturer: 0.0010936 USD
- Coal; at mine: 0.159133 USD
- Other plastic products; at manufacturer: 0.00126185 USD
- Insurance carriers: 0.000701026 USD
- Other retail: 0.00252369 USD
- Material handling equipment; at manufacturer: 0.0090853 USD
- Other concrete products; at manufacturer: 2.80411e-5 USD
- Hotels and campgrounds: 5.60821e-5 USD
- Other basic inorganic chemicals; at manufacturer: 0.000140205 USD
- Environmental and other technical consulting services: 0.000140205 USD
- Full-service restaurants: 2.80411e-5 USD
- Books, newspapers, magazines, and other print media; at manufacturer: 0.000168246 USD
- Other support services: 8.41232e-5 USD
- Other real estate: 0.000140205 USD
- Transmission and power train parts; at manufacturer: 0.0010936 USD
- Employment services: 8.41232e-5 USD
- Buildings and dwellings services: 0.00190679 USD
- Chemicals (except basic chemicals, agrichemicals, polymers, paints, pharmaceuticals,soaps, cleaning compounds); at manufacturer: 0.00858056 USD
- Commercial equipment rental: 0.0171892 USD
- Monetary authorities and depository credit intermediation: 0.00356121 USD
- Paper; at manufacturer: 0.000336493 USD
- Vehicle electrical and electronic equipment; at manufacturer: 0.000616903 USD
- Vehicle engines and engine parts; at manufacturer: 0.000504739 USD
- Satellite, telecommunications resellers, and all other telecommunications: 5.60821e-5 USD
- Cutlery and handtools; at manufacturer: 0.000392575 USD
- Construction machinery; at manufacturer: 0.0108238 USD
- Natural gas; at consumer: 0.00100948 USD
- Railroad rolling stock; at manufacturer: 0.000420616 USD
- Wholesale trade: 0.036201 USD
- Wireless telecommunications: 0.000168246 USD
- Office administration: 0.000112164 USD
- Secondary steel products; at manufacturer: 0.000112164 USD
- Fabric; at manufacturer: 0.000140205 USD
- Advertising and public relations: 0.000168246 USD
- Waste management and remediation: 0.000981437 USD

## Inputs from nature
- Occupation, mineral extraction site: 0.0645048 m2*a; data quality (1,3,1,1,1)
- Coal: 372.441 MJ; data quality (1,1,1,1,1)
- Water, fresh: 0.000125223 m3; data quality (3,2,1,4,2)
- Occupation, urban, discontinuously built: 7.48543e-5 m2*a; data quality (4,2,1,1,1)
- Water, fresh: 0.000168384 m3; data quality (2,2,1,4,2)
- Water, saline: 0.000185718 m3; data quality (4,2,1,4,2)

## Emissions to nature
- fluorene: 2.14281e-10 kg; data quality (3,2,1,3,2)
- benzene, ethyl-: 8.87699e-9 kg; data quality (3,2,1,4,1)
- 2-methylnaphthalene: 2.11648e-15 kg; data quality (2,2,1,1,4)
- Dinitrogen monoxide: 1.01614e-5 kg; data quality (4,2,1,4,1)
- styrene: 1.56802e-9 kg; data quality (3,2,1,4,1)
- mercury: 1.08936e-8, 7.90329e-16 kg (2 entries, compartments not in this file); data quality (3,1,1,1,5)
- bromoform: 2.20467e-12 kg; data quality (3,2,1,1,4)
- Nitrogen: 4.41092e-7 kg; data quality (2,2,1,1,5)
- arsenic: 4.34198e-10 kg; data quality (3,2,1,2,4)
- phenol: 2.01826e-11 kg; data quality (4,2,1,1,4)
- benzyl chloride: 3.9684e-11 kg; data quality (2,2,1,1,4)
- lead: 3.0166e-7, 1.9799e-14 kg (2 entries, compartments not in this file); data quality (3,1,1,1,5)
- butadiene: 4.53236e-9 kg; data quality (3,2,1,4,1)
- HYDROCHLORIC ACID: 6.11079e-9 kg; data quality (2,1,1,1,5)
- Dimethyl sulfate: 2.71909e-12 kg; data quality (2,2,1,1,4)
- 2,2,4-trimethylpentane: 2.18144e-9 kg; data quality (3,2,1,3,2)
- acenaphthylene: 1.26903e-10 kg; data quality (3,2,1,4,1)
- Methane: 0.0508944 kg; data quality (2,1,1,1,1)
- Cresol: 5.70841e-12 kg; data quality (4,2,1,1,4)
- cyanide: 1.41609e-10 kg; data quality (3,2,1,1,4)
- VOC, volatile organic compounds: 2.24149e-5 kg; data quality (3,2,1,1,4)
- isophorone: 3.27761e-11 kg; data quality (2,2,1,1,4)
- acenaphthene: 1.47184e-10 kg; data quality (3,2,1,4,1)
- 2-chloro-1-phenylethanone: 3.9684e-13 kg; data quality (2,2,1,1,4)
- Hydrazine, methyl-: 9.62705e-12 kg; data quality (2,2,1,1,4)
- cumene: 5.66654e-10 kg; data quality (4,2,1,1,4)
- formaldehyde: 3.07489e-7 kg; data quality (3,2,1,4,1)
- chlorine: 4.62131e-9 kg; data quality (4,2,1,1,4)
- Chromium, ion: 7.41413e-10 kg; data quality (2,2,1,1,4)
- Benzo(g,h,i)perylene: 2.75695e-13 kg; data quality (3,2,1,4,1)
- Phosphorus: 2.22191e-8 kg; data quality (5,1,1,1,5)
- Xylene: 3.35027e-8 kg; data quality (3,2,1,3,2)
- antimony: 6.15534e-10 kg; data quality (3,2,1,1,4)
- t-butyl methyl ether: 3.54426e-10 kg; data quality (4,1,1,1,5)
- Cobalt: 3.15537e-8 kg; data quality (3,2,1,1,4)
- vinyl acetate: 4.30645e-13 kg; data quality (4,2,1,1,4)
- acrolein: 7.45628e-9 kg; data quality (3,2,1,4,1)
- anthracene: 5.36716e-12 kg; data quality (3,2,1,1,4)
- cadmium: 5.90898e-10 kg; data quality (3,2,1,1,4)
- hexane: 4.23617e-8 kg; data quality (3,2,1,1,4)
- Indeno(1,2,3-cd)pyrene: 1.17449e-13 kg; data quality (3,2,1,4,1)
- propanal: 2.87504e-8 kg; data quality (3,2,1,4,1)
- manganese: 3.45546e-9 kg; data quality (3,2,1,1,4)
- o-Xylene: 3.82142e-15 kg; data quality (3,2,1,1,4)
- Dibenz(a,h)anthracene: 4.18464e-15 kg; data quality (3,2,1,4,1)
- methane, monochloro-, r-40: 7.62227e-11 kg; data quality (3,2,1,1,4)
- Water, saline: 0.000163068 m3; data quality (4,2,1,1,2)
- chloroform: 3.3364e-12 kg; data quality (4,2,1,1,4)
- hydrogen fluoride: 7.41726e-8 kg; data quality (2,2,1,1,4)
- nitrogen oxides: 0.000489067 kg; data quality (2,2,1,1,4)
- AMMONIA: 3.79221e-6 kg; data quality (3,1,1,1,5)
- nickel: 2.05923e-10 kg; data quality (3,2,1,1,4)
- particulates, < 10 um: 0.00295852 kg; data quality (3,2,1,1,4)
- mercury: 9.3548e-11 kg; data quality (2,2,1,1,4)
- benzo(a)pyrene: 5.07188e-13 kg; data quality (3,2,1,4,1)
- Benzo(b)fluoranthene: 1.39163e-12 kg; data quality (3,2,1,3,2)
- biphenyl: 3.33215e-13 kg; data quality (4,2,1,1,4)
- sulfur dioxide: 2.92924e-5 kg; data quality (2,2,1,1,4)
- benzene: 7.96182e-8 kg; data quality (3,2,1,3,2)
- methane, dichloro-, hcc-30: 1.64615e-11 kg; data quality (4,2,1,1,4)
- PHOSPHORUS: 5.51735e-9 kg; data quality (2,2,1,1,4)
- acetophenone: 9.9651e-13 kg; data quality (4,2,1,1,4)
- pyrene: 1.66369e-11 kg; data quality (2,2,1,2,3)
- ammonia: 1.42645e-6 kg; data quality (3,1,1,1,5)
- selenium: 2.3929e-10 kg; data quality (2,2,1,1,4)
- particulates, < 2.5 um: 0.000561371 kg; data quality (3,2,1,1,4)
- hydrogen chloride: 2.09455e-7 kg; data quality (2,2,1,1,4)
- Benzo(k)fluoranthene: 5.05042e-13 kg; data quality (3,2,1,4,1)
- lead: 1.13752e-9 kg; data quality (3,2,1,1,4)
- ammonia: 8.30296e-7 kg; data quality (3,2,1,1,4)
- toluene: 4.81643e-8 kg; data quality (3,2,1,3,2)
- Chrysene: 4.44419e-12 kg; data quality (3,2,1,3,2)
- Water, fresh: 0.000208685 m3; data quality (2,2,1,3,2)
- carbon monoxide: 0.00042186 kg; data quality (2,2,1,1,4)
- benz[a]anthracene: 4.98067e-12 kg; data quality (2,2,1,2,3)
- benzene, chloro-: 1.24637e-12 kg; data quality (4,2,1,1,4)
- Carbon dioxide: 0.174231 kg; data quality (4,2,1,4,1)
- methyl methacrylate: 1.13173e-12 kg; data quality (4,2,1,1,4)
- beryllium: 6.21688e-12 kg; data quality (2,2,1,1,4)
- naphthalene: 9.30655e-10 kg; data quality (3,2,1,3,2)
- ethene, tetrachloro-: 1.00062e-11 kg; data quality (3,2,1,1,4)
- carbon disulfide: 3.00628e-11 kg; data quality (4,2,1,1,4)
- acetaldehyde: 1.29703e-7 kg; data quality (3,2,1,4,1)
- Chromium VI: 1.82874e-10 kg; data quality (3,2,1,1,4)
- Hydrocarbons, aromatic: 2.49174e-11 kg; data quality (4,2,1,1,4)
- phenanthrene: 4.63005e-10 kg; data quality (3,2,1,3,2)
- Nickel, ion: 4.40933e-12 kg; data quality (3,2,1,1,4)
- fluoranthene: 4.32268e-11 kg; data quality (3,2,1,3,2)

## Inventory method
Input-output

## Modelling constants
The reference unit of all processes is 1 USD2013 of the good or service. The technosphere inputs are based on the US BEA detailed input-output tables for 2007. The IO tables are combined to develop a commodity-by-commodity model based on the the industry-technology assumption (see Suh et al., 2010), which assumes all commodities produced by a given industry have the same input structure, but that multiple industries can produce the same commodity. Thus, model technosphere flows represent commodity outputs (and not industry outputs) from other processes in the model. There are no by-products included in these processes. All commodity production is based on US-conditions, despite in reality that some goods and services are produced overseas, as USEEIO v1.1 is a single-region IO model.

## Completeness
The input-output approach assures that all purchased inputs associated with the sectors making these commodities as reported in the US census for 2007 are included. The direct resources extracted including minerals, energy sources, water and land occupied are included. Emissions to air include all critieria air pollutants, greenhouse gases, and hazardous and toxic air pollutants as defined by US EPA. Releases to water include toxics, total nitrogen and total phosphorus, and water discharges. Releases to soil or groundwater include toxics and agriculutural pesticides. Some metal releases to air, water and soil are not included because they could not be speciated. Solid hazardous and non-hazardous wastes generated are not included as an elementary flows although purchases of waste services are included.

## Data treatment
Greenhouse gases are primarily from the US Greenhouse Gas Emission Inventory (USEPA 2016a). Biogenic C uptake is not included (change from version 1.0), as biogenic C emission are not included. Toxic releases to air, water and soil (except pesticides) are from the 2013 Toxic Release Inventory (USEPA 2015a). Criteria air pollutants and hazardous air pollutants are from the 2011 National Emissions Inventory (USEPA 2015b). All estimates are normalized by industry based on sector output in the data year, then converted to 2013 USD using relative sector-specific CPIs (if data year is not 2013). Energy use represent raw renewables or fossil fuel energies and is based on EIA data for 2014. See Table 1 in Yang, Ingwersen et al. 2017 and Supporting Information 1, and the v1.1 data update notes (Ingwersen et al. 2017) for all details on environmental data sources used.Mineral use is based on the Mineral Commodity Survey (USDA 2016). Only minerals extracted or imported in raw form by these sectors for further processing are included. Total mining water use is from the USGS report Water Use in the US (Maupin et al. 2014) and allocated to the eight mining sectors with employment-based factors provided by Blackhurst and colleagues (Blackhurst et al. 2010) and 2007 employment levels by mining sector provided by the U.S. Bureau of Labor Statistics. Land use for mining, oil, and gas extraction activities was estimated based on the Bureau of Land Management (BLM) Public Land Statistics 2007 report (BLM 2008). In all cases except hard rock leases, the BLM data could be mapped to a sector in the EEIO model without allocation. Land for hard rock leases were allocated to relevant mining sectors based on shares of employee compensation from the 2007 Use tables (BEA 2015).

## Data collection
2015-2016

## Sampling procedure
US federal government sources, including surveys and US EPA emissions databases are used as the primary sources. From these sources, data for US reporting establishments/facilities are aggregated by the NAICS sector as defined in the BEA detailed 2007 input-output tables. When level of sector aggregation differs, or when direct emissions are not reported but modeled, additional sources are used to make allocations and estimates.

## Review details
In regard to quality assurance and peer-review, each dataset created went through Quality Assurance as defined in a quality assurance project plans at US EPA, CSRA or ERG. The model was assembled with the IO model builder model (USEPA 2016c). Validation functions were used to check that all the model components were properly assembled and harmonized. Bayou Demeke and Santosh Ghimire provided internal peer review of the model methodology and the manuscript underwent standard EPA management review. An editor and two anonymous reviewers at the Journal of Cleaner Production reviewed the model. In regard to data quality evaluation, data quality assessment was performed at the flow and process levels according to the updated US EPA data quality assessment guidelines as defined in US EPA (2016b).

## Intended application
The primary application is for use in the US Environmentally-Extended Input-Ouput model, USEEIO, version 1.1. This model is being used by the US EPA for supporting tools that prioritize goods and services based on potential environmental impacts, resource use or emissions for large regions, including the US and US states, and as a strealined tool for organizations as a starting point to consider sustainable materials management. Model results are designed to provide meso/macro-level decision support.

## Project
USEEIO v1.1 was developed by the US EPA with CSRA and ERG with Wesley W. Ingwersen and David E. Meyer as research leads. Yi Yang was the technical lead on the work for CSRA (contract EP-C-15-012); Troy Hawkins was lead for ERG (contract EP-C-12-021).

## Sources
- BEA 2015
- Macknick et al. 2011
- USGS 2015
- Goebes et al. 2003
- Blackhurst et al. 2010
- EIA 2013
- Yienger et al. 1995
- Kim et el. 2013
- USEPA 2015b
- Ingwersen et al. DRAFT
- Statistics Canada 2010
- USEPA 2015a
- Maupin et al. 2014
- USDA 2006
- USGS 2016
- Ingwersen et al. 2017
- USDA 2009b
- USEPA 2016a
- Nickerson et al. 2011
- EIA 2015
- EIA 2017
- USDA 2014
- EIA 2016
- BLM 2008
- Lovelace 2009
- USDA 2016
- USDA 2009a
- USEPA 2016b
- Edelen and Ingwersen 2017
- Torcellini et al. 2003
- USEPA 2016c
