# Other support services

Dataset: openLCA process, unit process
Category: 5619: Other Support Services
Geography: United States
Time period: 2017-01-01 to 2017-12-31
Data quality: US EPA - Process Pedigree Matrix (1;1)
Exchange data quality scheme: US EPA - Flow Pedigree Matrix
Generated by: US EPA with CSRA and ERG
Owner: US EPA
Published in: Yang, Ingwersen et al. 2017
restrictionsDescription: This model shold be appropriately cited (see Yang, Ingwersen et al. 2017 source or Publication field) when used. Any changes or derivations of this model by the user should be documented. The model itself and any results from use of this model shall not be construed to consitute US EPA opinion or policy.
copyright: false

## General comment
BEA Code & Name is '561900:Other support services'. Description of the primary industry producing this good or service, adapted from the Census Bureau NAICS 2007 descriptions: This industry group comprises establishments primarily engaged in providing day-to-day business and other organizational support services (except office administrative services; facilities support services; employment services; business support services; travel arrangement and reservation services; security and investigation services; and services to buildings and dwellings).

## Technology
The process describes the average US production of this good or service within this NAICS-based grouping defined in the BEA 2007 detailed input-output tables (BEA 2015). Distribution, wholesale and retailing of this good or service, use, and final disposal are not included. Creation of a product system with this process will enable modeling of all upstream (supply-chain) activities.

## Geography
Data represent the 50 US states

## Time period
2017 was the year in which this version of USEEIO was released and is the target date for the model

## Reference product
- Other support services: 1 USD

## Inputs from technosphere
All rows: data quality (1,3,1,1,1)
- Printing support; at manufacturer: 0.000338759 USD
- Securities and commodities brokerage and exchanges: 0.00858978 USD
- Adhesives; at manufacturer: 1.4562e-7 USD
- General merchandise stores: 0.000166351 USD
- Consumer goods and general rental centers: 0.00248767 USD
- Insurance agencies and brokerages: 0.00128647 USD
- Other support services: 0.00411223 USD
- Finished and coated fabric; at manufacturer: 0.000354612 USD
- Metal coatings, engravings, and heat treatments; at manufacturer: 0.000158526 USD
- Satellite, telecommunications resellers, and all other telecommunications: 0.000926668 USD
- Photography and photocopying equipment; at manufacturer: 6.84416e-6 USD
- Coal; at mine: 2.35745e-5 USD
- Accounting, tax preparation, bookkeeping, and payroll: 0.00947713 USD
- Other retail: 0.000904558 USD
- State and local government enterprises: 0.00213233 USD
- Hotels and campgrounds: 0.00542251 USD
- Cutlery and handtools; at manufacturer: 0.000198488 USD
- Investment advice, portfolio management, and other financial advising services: 0.000695155 USD
- Pet care, photofinishing, parking and other sundry services: 0.00266084 USD
- Office administration: 0.00376162 USD
- Lumber and treated lumber; at manufacturer: 7.10971e-5 USD
- Independent artists, writers, and performers: 0.000766001 USD
- Other educational services: 0.000307505 USD
- Electronic capacitors, resistors, coils, transformers, connectors and other components (except semiconductors and printed circuit assemblies); at manufacturer: 5.40307e-6 USD
- Motor vehicle steering, suspension components (except spring), and brake systems; at manufacturer: 0.000738108 USD
- Storage batteries; at manufacturer: 0.000213728 USD
- Other real estate: 0.0390634 USD
- Office supplies (not paper); at manufacturer: 5.11216e-5 USD
- Switchgear and switchboards; at manufacturer: 6.84416e-6 USD
- Semiconductor machinery; at manufacturer: 5.07491e-7 USD
- Automatic controls for HVAC and refrigeration equipment; at manufacturer: 2.1843e-6 USD
- External hard drives, CDs, other storage media; at manufacturer: 0.0105614 USD
- Truck transport: 0.00331272 USD
- Cutting and machine tool accessory, rolling mill, and other metalworking machines; at manufacturer: 9.16013e-7 USD
- Machinery for the paper, textile, food or other industries (except semiconductor machinery); at manufacturer: 2.3699e-5 USD
- Architectural, engineering, and related services: 0.00656176 USD
- Veneer, plywood, and engineered wood; at manufacturer: 0.000309731 USD
- Other textiles; at manufacturer: 2.35534e-5 USD
- Light gauge metal cans, boxes, and containers; at manufacturer: 2.35534e-5 USD
- Other basic inorganic chemicals; at manufacturer: 7.09515e-5 USD
- Printed circuit and electronic assembly; at manufacturer: 3.05803e-6 USD
- Data processing and hosting: 0.00424441 USD
- Postal service: 0.00595033 USD
- Communication and energy wire and cable; at manufacturer: 5.19123e-5 USD
- Civic, social, professional, and similar organizations: 0.00106056 USD
- Abrasive products; at manufacturer: 9.47961e-5 USD
- Legal services: 0.00724113 USD
- Telecommunications: 0.00667583 USD
- Watches, clocks, and other measuring and controlling devices; at manufacturer: 2.3699e-5 USD
- Ink and ink cartridges; at manufacturer: 9.11142e-5 USD
- Limited-service restaurants: 0.00530307 USD
- Other basic organic chemicals; at manufacturer: 0.000452515 USD
- Vehicle engines and engine parts; at manufacturer: 0.000266707 USD
- Air transport: 0.0065363 USD
- Paper; at manufacturer: 0.00115682 USD
- Valve and fittings (except for plumbing); at manufacturer: 1.34199e-5 USD
- Specialty transformers; at manufacturer: 1.60182e-6 USD
- Performances: 0.00354364 USD
- Fluid meters and counting devices; at manufacturer: 2.37202e-5 USD
- Management consulting: 0.00895844 USD
- Synthetic dyes and pigments; at manufacturer: 4.76893e-5 USD
- Magazines and journals; at publisher: 0.000971873 USD
- Company and enterprise management: 0.00976898 USD
- Waste management and remediation: 0.00333971 USD
- Greenhouse crops, mushrooms, nurseries, and flowers; at farm: 2.3699e-5 USD
- Employment services: 0.0179612 USD
- Welding and Soldering Equipment, Scales and Balances, and other general purpose machinery; at manufacturer: 7.10971e-5 USD
- Nonresidential building repair and maintanence: 0.000435301 USD
- All other food and drinking places: 0.011045 USD
- Secondary steel products; at manufacturer: 4.7128e-5 USD
- Ambulances: 0.00150742 USD
- Drinking water and wastewater treatment; at consumer: 0.00043043 USD
- Food and beverage stores: 4.75437e-5 USD
- Copper, nickel, lead, and zinc; at mine: 4.01763e-7 USD
- Speed changers, industrial high-speed drives, and gears; at manufacturer: 2.7193e-5 USD
- Wireless communications; at manufacturer: 0.000927045 USD
- Glass and glass products; at manufacturer: 0.000358918 USD
- Plastic pipe, fittings, and sausage casings; at manufacturer: 0.000496307 USD
- Water transport (boats, ships, ferries): 0.000142174 USD
- Software: 0.000805236 USD
- Wholesale trade: 0.00892291 USD
- Scenic and sightseeing transportation and support activities for transportation: 0.00457728 USD
- Couriers and messengers: 0.00630891 USD
- Laminated plastic plates and shapes; at manufacturer: 0.000143796 USD
- Paints and coatings; at manufacturer: 9.47985e-5 USD
- Paper bags and coated paper; at manufacturer: 0.00253503 USD
- Other rubber products; at manufacturer: 3.53156e-6 USD
- Wooden windows, door, and flooring; at manufacturer: 0.00106926 USD
- Vehicle rental and leasing: 0.00620886 USD
- Vehicle electrical and electronic equipment; at manufacturer: 0.000529772 USD
- Light bulbs; at manufacturer: 1.4562e-7 USD
- Warehousing: 0.00197288 USD
- Directory, mailing list, and other publishers; at publisher: 0.00236339 USD
- Urethane and other foam products; at manufacturer: 0.00136714 USD
- Air conditioning, refrigeration, and warm air heating equipment; at manufacturer: 0.000118808 USD
- Aluminum; at manufacturer: 2.326e-7 USD
- Communications equipment; at manufacturer: 0.000163384 USD
- Fabric; at manufacturer: 4.58883e-7 USD
- Movies and film: 0.000495786 USD
- Vehicles and parts sales: 0.00026072 USD
- Semiconductors; at manufacturer: 3.64051e-6 USD
- All other forging, stamping, and sintering; at manufacturer: 2.3699e-5 USD
- Household goods repair: 0.00263555 USD
- Buildings and dwellings services: 0.00389656 USD
- Metal windows, doors, and architectural products; at manufacturer: 2.11894e-5 USD
- Screws, nuts, and bolts; at manufacturer: 0.000340301 USD
- Machine shops; at manufacturer: 0.000603293 USD
- Full-service restaurants: 0.00653845 USD
- Gaskets, seals, musical instruments, fasteners, brooms, brushes, mop and other misc. goods; at manufacturer: 0.000284492 USD
- Compressed Gases; at manufacturer: 0.00014365 USD
- Transmission and power train parts; at manufacturer: 0.000672306 USD
- Dry-cleaning and laundry: 0.000850398 USD
- Computer storage device readers; at manufacturer: 0.000219216 USD
- Commercial machinery repair: 0.00448692 USD
- Other vehicle parts; at manufacturer: 0.00149647 USD
- Carbon and graphite products; at manufacturer: 7.1354e-6 USD
- Clothing; at manufacturer: 0.000635942 USD
- Insurance carriers: 0.018337 USD
- Advertising and public relations: 0.0286198 USD
- Metal hinges, keys, lock, and other hardware; at manufacturer: 0.000142819 USD
- All other converted paper products; at manufacturer: 2.35534e-5 USD
- Unrefined oil and gas; at extraction site: 0.000118206 USD
- Business support: 0.00419254 USD
- Other concrete products; at manufacturer: 5.00297e-7 USD
- Electronic equipment repair and maintenance: 0.0017879 USD
- Amusement parks and arcades: 0.00155452 USD
- Other plastic products; at manufacturer: 0.00330231 USD
- Cardboard containers; at manufacturer: 0.00287275 USD
- Chemicals (except basic chemicals, agrichemicals, polymers, paints, pharmaceuticals,soaps, cleaning compounds); at manufacturer: 0.00193665 USD
- News syndicates, libraries, archives, Internet publishing and all other information services: 0.000182109 USD
- Books, newspapers, magazines, and other print media; at manufacturer: 0.0356506 USD
- Investigation and security: 0.00176641 USD
- Wireless telecommunications: 0.00335189 USD
- Monetary authorities and depository credit intermediation: 0.015963 USD
- Rubber and plastic belts and hoses; at manufacturer: 2.47209e-6 USD
- Cardboard; at manufacturer: 0.00124405 USD
- Rubber tires; at manufacturer: 0.000617863 USD
- Other computer related services, including facilities management: 0.00480583 USD
- Specialized design: 0.000802998 USD
- Sporting and athletic goods; at manufacturer: 2.3699e-5 USD
- Computer systems design: 0.00553641 USD
- Corn products; at manufacturer: 1.27136e-5 USD
- Primary iron, steel, and ferroalloy products; at manufacturer: 2.326e-7 USD
- Nondepository credit intermediation and related activities: 0.00760509 USD
- Gasoline, fuels, and by-products of petroleum refining; at manufacturer: 0.00199752 USD
- Sports: 0.000763919 USD
- Travel arrangement and reservation: 0.0205442 USD
- Light fixtures; at manufacturer: 0.000806349 USD
- Commercial equipment rental: 0.00292429 USD
- Springs and wires; at manufacturer: 9.45049e-5 USD
- Metal structural products; at manufacturer: 2.47555e-6 USD
- Books; at publisher: 2.38446e-5 USD
- Passenger ground transport: 0.00311349 USD
- Audio and video equipment; at manufacturer: 2.47395e-5 USD
- Custom computer programming: 0.000118874 USD
- Polystyrene foam products; at manufacturer: 0.00482945 USD
- Petrochemicals; at manufacturer: 0.000260835 USD
- Photographers: 0.0100162 USD
- Other engine equipment; at manufacturer: 2.37625e-5 USD
- Analytical laboratory instruments; at manufacturer: 1.60182e-6 USD
- Facilities support: 0.00164727 USD
- Lessors of nonfinancial intangible assets: 0.00525375 USD
- Metal pipe fittings, ball and roller bearings, industrial patterns, metal bath fixtures, other misc. fabricated metals; at manufacturer: 0.000252173 USD
- Promoters and agents: 0.00243099 USD
- Jewelry and silverware; at manufacturer: 0.000118495 USD
- Golf courses, marinas, ski resorts, fitness and other rec centers and industries: 0.00256978 USD
- Natural gas; at consumer: 0.00080443 USD
- Material handling equipment; at manufacturer: 0.000142735 USD
- Computer terminals and other computer peripheral equipment; at manufacturer: 0.00214921 USD
- Environmental and other technical consulting services: 0.00181458 USD
- Stationery; at manufacturer: 4.87086e-5 USD
- Other petroleum and coal products; at manufacturer: 7.58463e-5 USD
- Marketing research and all other miscellaneous professional, scientific, and technical services: 0.00341546 USD
- Vehicle repair: 0.00236194 USD
- Plastic bottles; at manufacturer: 0.000520359 USD
- Newspapers; at publisher: 3.019e-6 USD
- Plastic bags, films, and sheets; at manufacturer: 0.00115865 USD
- Rail transport: 0.000525379 USD
- Electricity; at consumer: 0.0052574 USD
- Soap and cleaning compounds; at manufacturer: 0.000543039 USD
- Pipeline transport: 2.37202e-5 USD
- Industrial process variable instruments; at manufacturer: 0.000533791 USD
- Sound recording: 2.35534e-5 USD
- Internet publishing and broadcasting: 0.00917641 USD
- Noncomparable imports: 0.000661347 USD

## Inputs from nature
- Water, fresh: 0.000163144, 0.000282337 m3 (2 entries, compartments not in this file); data quality (1,2,1,4,2)
- Energy, solar: 7.93411e-6 MJ; data quality (3,1,1,1,1)
- Energy, wind: 0.00447426 MJ; data quality (3,1,1,1,1)
- Occupation, urban, discontinuously built: 0.000278774 m2*a; data quality (4,2,1,1,1)

## Emissions to nature
- diethanolamine: 2.21217e-12 kg; data quality (3,2,1,1,5)
- hydrogen fluoride: 1.33334e-12 kg; data quality (2,2,1,1,5)
- ethylene oxide: 3.75617e-8 kg; data quality (3,2,1,1,5)
- nitrogen oxides: 1.7074e-6 kg; data quality (3,2,1,1,1)
- benzene, chloro-: 6.66668e-14 kg; data quality (4,2,1,1,5)
- benzene: 5.37116e-8 kg; data quality (3,2,1,4,1)
- Diethylene glycol butyl ether: 4.09265e-12 kg; data quality (4,2,1,1,5)
- Xylene: 1.18064e-7 kg; data quality (3,2,1,3,3)
- chloroform: 1.33334e-13 kg; data quality (4,2,1,1,5)
- methane, dichloro-, hcc-30: 4.00073e-7 kg; data quality (4,2,1,1,5)
- Benzo(b)fluoranthene: 2.41072e-12 kg; data quality (3,2,1,4,1)
- m-xylene: 2.833e-9 kg; data quality (3,2,1,4,1)
- Phthalate, dibutyl-: 3.32001e-14 kg; data quality (4,2,1,1,5)
- cumene: 1.18795e-10 kg; data quality (4,2,1,1,5)
- nickel: 2.01091e-11 kg; data quality (3,2,1,3,3)
- particulates, < 2.5 um: 9.05149e-7 kg; data quality (3,2,1,1,4)
- acetaldehyde: 1.40149e-8 kg; data quality (3,2,1,4,1)
- aniline: 1.33334e-13 kg; data quality (4,2,1,1,5)
- acetonitrile: 1.6e-12 kg; data quality (3,2,1,1,5)
- anthracene: 1.61265e-11 kg; data quality (3,2,1,4,1)
- o-Xylene: 1.01594e-9 kg; data quality (3,2,1,4,1)
- Benzo(k)fluoranthene: 2.36811e-12 kg; data quality (3,2,1,4,1)
- Chromium, ion: 3.24304e-11 kg; data quality (2,2,1,1,5)
- carbon monoxide: 3.20117e-5 kg; data quality (3,2,1,1,1)
- ethylene glycol: 5.93475e-9 kg; data quality (5,2,1,1,5)
- Benzo(a)anthracene: 6.14495e-15 kg; data quality (2,2,1,1,5)
- Water, fresh: 0.000377195 m3; data quality (1,2,1,4,2)
- Indeno(1,2,3-cd)pyrene: 1.95398e-12 kg; data quality (3,2,1,4,1)
- 1,2,4-trichlorobenzene: 2.21076e-11 kg; data quality (4,2,1,1,5)
- Dinitrogen monoxide: 1.19046e-8 kg; data quality (4,2,1,4,1)
- butadiene: 8.71059e-9 kg; data quality (3,2,1,4,1)
- Chromium VI: 1.54955e-11 kg; data quality (3,2,1,1,5)
- Phosphorus: 9.21044e-10 kg; data quality (3,1,1,1,5)
- Ethylene glycol monoethyl ether: 2.59627e-12 kg; data quality (4,2,1,1,5)
- beryllium: 5.12779e-15 kg; data quality (2,2,1,1,5)
- Carbon dioxide: 0.00449517 kg; data quality (4,2,1,4,1)
- lead: 4.37126e-9 kg; data quality (3,2,1,1,5)
- o-toluidine: 2e-13 kg; data quality (4,2,1,1,5)
- m-cresol: 4.00001e-13 kg; data quality (4,2,1,1,5)
- ammonia: 9.60632e-9 kg; data quality (3,2,1,2,3)
- benzo(a)pyrene: 2.23937e-12 kg; data quality (3,2,1,4,1)
- Dibenz(a,h)anthracene: 1.59517e-14 kg; data quality (3,2,1,4,1)
- ethene, tetrachloro-: 1.46474e-7 kg; data quality (3,2,1,1,5)
- acrylic acid: 1.30453e-12 kg; data quality (4,2,1,1,5)
- acenaphthene: 2.08174e-11 kg; data quality (3,2,1,4,1)
- 1,1,1-trichloroethane: 9.66669e-12 kg; data quality (4,2,1,1,5)
- propanal: 2.99983e-9 kg; data quality (3,2,1,4,1)
- ethane, 1,1,2-trichloro-: 2.5579e-13 kg; data quality (4,2,1,1,5)
- particulates, < 10 um: 1.94817e-7 kg; data quality (3,2,1,1,5)
- BUTYL ISOCYANATE: 5.11581e-15 kg; data quality (4,2,1,1,5)
- Chrysene: 2.24233e-12 kg; data quality (3,2,1,4,1)
- chlorine: 7.40265e-8 kg; data quality (4,2,1,1,5)
- styrene: 8.25042e-10 kg; data quality (3,2,1,4,1)
- pyrene: 2.70303e-11 kg; data quality (3,2,1,4,1)
- Methane: 4.08369e-7 kg; data quality (4,2,1,4,1)
- trichloroethylene: 9.8188e-9 kg; data quality (4,2,1,1,5)
- para-xylene: 5.30367e-11 kg; data quality (3,2,1,4,1)
- VOC, volatile organic compounds: 3.7079e-6 kg; data quality (3,2,1,1,3)
- acenaphthylene: 8.08129e-11 kg; data quality (3,2,1,4,1)
- mercury: 2.70188e-13 kg; data quality (2,2,1,2,4)
- Cobalt: 3.27378e-12 kg; data quality (3,2,1,1,5)
- 2,2,4-trimethylpentane: 3.18236e-8 kg; data quality (3,2,1,4,1)
- phenol: 1.46667e-12 kg; data quality (4,2,1,1,5)
- Ethane, 1,1,1,2-tetrafluoro-, HFC-134a: 9.70073e-7 kg; data quality (4,2,1,4,1)
- methyl methacrylate: 8.00002e-13 kg; data quality (4,2,1,1,5)
- Ethane, pentafluoro-, HFC-125: 2.57373e-7 kg; data quality (4,2,1,4,1)
- ethyl acrylate: 2e-13 kg; data quality (4,2,1,1,5)
- fluoranthene: 2.15106e-11 kg; data quality (3,2,1,4,1)
- formaldehyde: 2.95619e-8 kg; data quality (3,2,1,4,1)
- manganese: 3.73504e-10 kg; data quality (3,2,1,1,5)
- benz[a]anthracene: 2.34433e-12 kg; data quality (3,2,1,4,1)
- hexachlorobenzene: 6.66668e-14 kg; data quality (3,2,1,1,5)
- phenanthrene: 6.86302e-11 kg; data quality (3,2,1,4,1)
- selenium: 1.12302e-14 kg; data quality (2,2,1,1,5)
- toluene: 1.2919e-7 kg; data quality (3,2,1,3,3)
- Benzo(g,h,i)perylene: 1.80603e-11 kg; data quality (3,2,1,2,4)
- Hydrocarbons, aromatic: 5.91731e-10 kg; data quality (3,2,1,4,1)
- hydroquinone: 8.95267e-14 kg; data quality (3,2,1,1,5)
- cadmium: 8.79568e-13 kg; data quality (3,2,1,1,5)
- 2-methylnaphthalene: 1.86715e-14 kg; data quality (2,2,1,1,5)
- maleic anhydride: 2.96001e-12 kg; data quality (2,2,1,1,5)
- hexane: 1.19952e-7 kg; data quality (3,2,1,1,4)
- Methane, difluoro-, HFC-32: 1.49882e-7 kg; data quality (4,2,1,4,1)
- fluorene: 3.82489e-11 kg; data quality (3,2,1,4,1)
- benzene, ethyl-: 9.80989e-8 kg; data quality (4,2,1,2,4)
- Propane, 1,1,1,3,3,3-hexafluoro-, HCFC-236fa: 2.97491e-9 kg; data quality (4,2,1,4,1)
- acrolein: 1.38535e-9 kg; data quality (3,2,1,3,2)
- hydrogen chloride: 8.11005e-9 kg; data quality (2,2,1,1,5)
- sulfur dioxide: 1.52799e-8 kg; data quality (2,2,1,2,4)
- naphthalene: 7.07085e-9 kg; data quality (3,2,1,2,4)
- arsenic: 4.55737e-12 kg; data quality (3,2,1,5,1)
- Ethane, 1,1,1-trifluoro-, HFC-143a: 1.10119e-7 kg; data quality (4,2,1,4,1)
- methyl isobutyl ketone: 1.37378e-9 kg; data quality (4,2,1,1,5)
- 3-methylcholanthrene: 6.92629e-16 kg; data quality (2,2,1,1,5)
- methanol: 1.71438e-8 kg; data quality (4,2,1,1,5)
- biphenyl: 6.64001e-14 kg; data quality (4,2,1,1,5)
- Nitrogen: 4.09046e-9 kg; data quality (3,2,1,1,5)

## Inventory method
Input-output

## Modelling constants
The reference unit of all processes is 1 USD2013 of the good or service. The technosphere inputs are based on the US BEA detailed input-output tables for 2007. The IO tables are combined to develop a commodity-by-commodity model based on the the industry-technology assumption (see Suh et al., 2010), which assumes all commodities produced by a given industry have the same input structure, but that multiple industries can produce the same commodity. Thus, model technosphere flows represent commodity outputs (and not industry outputs) from other processes in the model. There are no by-products included in these processes. All commodity production is based on US-conditions, despite in reality that some goods and services are produced overseas, as USEEIO v1.1 is a single-region IO model.

## Completeness
The input-output approach assures that all purchased inputs associated with the sectors making these commodities as reported in the US census for 2007 are included. The direct resources extracted including minerals, energy sources, water and land occupied are included. Emissions to air include all critieria air pollutants, greenhouse gases, and hazardous and toxic air pollutants as defined by US EPA. Releases to water include toxics, total nitrogen and total phosphorus, and water discharges. Releases to soil or groundwater include toxics and agriculutural pesticides. Some metal releases to air, water and soil are not included because they could not be speciated. Solid hazardous and non-hazardous wastes generated are not included as an elementary flows although purchases of waste services are included.

## Data treatment
Greenhouse gases are primarily from the US Greenhouse Gas Emission Inventory (USEPA 2016a). Biogenic C uptake is not included (change from version 1.0), as biogenic C emission are not included. Toxic releases to air, water and soil (except pesticides) are from the 2013 Toxic Release Inventory (USEPA 2015a). Criteria air pollutants and hazardous air pollutants are from the 2011 National Emissions Inventory (USEPA 2015b). All estimates are normalized by industry based on sector output in the data year, then converted to 2013 USD using relative sector-specific CPIs (if data year is not 2013). Energy use represent raw renewables or fossil fuel energies and is based on EIA data for 2014. See Table 1 in Yang, Ingwersen et al. 2017 and Supporting Information 1, and the v1.1 data update notes (Ingwersen et al. 2017) for all details on environmental data sources used.Land occupation for commercial buildings was estimated based on the building floorspace data provided by the U.S. Energy Information Administration 2012 Commercial Building Energy Consumption Survey (CBECS) (EIA 2015). Total commercial public supply water use is reported by USGS (Maupin et al. 2014). Water use is allocated across commercial sectors based on their use of water, sewage, and other services in USD based on the 2007 Benchmark Use Table before redefinitions (BEA 2015).

## Data collection
2015-2016

## Sampling procedure
US federal government sources, including surveys and US EPA emissions databases are used as the primary sources. From these sources, data for US reporting establishments/facilities are aggregated by the NAICS sector as defined in the BEA detailed 2007 input-output tables. When level of sector aggregation differs, or when direct emissions are not reported but modeled, additional sources are used to make allocations and estimates.

## Review details
In regard to quality assurance and peer-review, each dataset created went through Quality Assurance as defined in a quality assurance project plans at US EPA, CSRA or ERG. The model was assembled with the IO model builder model (USEPA 2016c). Validation functions were used to check that all the model components were properly assembled and harmonized. Bayou Demeke and Santosh Ghimire provided internal peer review of the model methodology and the manuscript underwent standard EPA management review. An editor and two anonymous reviewers at the Journal of Cleaner Production reviewed the model. In regard to data quality evaluation, data quality assessment was performed at the flow and process levels according to the updated US EPA data quality assessment guidelines as defined in US EPA (2016b).

## Intended application
The primary application is for use in the US Environmentally-Extended Input-Ouput model, USEEIO, version 1.1. This model is being used by the US EPA for supporting tools that prioritize goods and services based on potential environmental impacts, resource use or emissions for large regions, including the US and US states, and as a strealined tool for organizations as a starting point to consider sustainable materials management. Model results are designed to provide meso/macro-level decision support.

## Project
USEEIO v1.1 was developed by the US EPA with CSRA and ERG with Wesley W. Ingwersen and David E. Meyer as research leads. Yi Yang was the technical lead on the work for CSRA (contract EP-C-15-012); Troy Hawkins was lead for ERG (contract EP-C-12-021).

## Sources
- Blackhurst et al. 2010
- USEPA 2015b
- USDA 2009b
- Goebes et al. 2003
- Ingwersen et al. DRAFT
- USGS 2015
- Lovelace 2009
- Maupin et al. 2014
- USGS 2016
- USDA 2006
- Torcellini et al. 2003
- EIA 2013
- Kim et el. 2013
- Macknick et al. 2011
- Statistics Canada 2010
- USEPA 2016c
- USEPA 2016b
- Edelen and Ingwersen 2017
- Yienger et al. 1995
- EIA 2017
- EIA 2016
- USDA 2016
- BEA 2015
- BLM 2008
- USEPA 2016a
- USDA 2009a
- Nickerson et al. 2011
- Ingwersen et al. 2017
- USEPA 2015a
- USDA 2014
- EIA 2015
