# Drinking water and wastewater treatment; at consumer

Dataset: openLCA process, unit process
Category: 2213: Water, Sewage and Other Systems
Geography: United States
Time period: 2017-01-01 to 2017-12-31
Data quality: US EPA - Process Pedigree Matrix (1;1)
Exchange data quality scheme: US EPA - Flow Pedigree Matrix
Generated by: US EPA with CSRA and ERG
Owner: US EPA
Published in: Yang, Ingwersen et al. 2017
restrictionsDescription: This model shold be appropriately cited (see Yang, Ingwersen et al. 2017 source or Publication field) when used. Any changes or derivations of this model by the user should be documented. The model itself and any results from use of this model shall not be construed to consitute US EPA opinion or policy.
copyright: false

## General comment
BEA Code & Name is '221300:Water, sewage and other systems'. Description of the primary industry producing this good or service, adapted from the Census Bureau NAICS 2007 descriptions: This industry comprises establishments primarily engaged in operating water treatment plants and/or operating water supply systems. The water supply system may include pumping stations, aqueducts, and/or distribution mains. The water may be used for drinking, irrigation, or other uses.

## Technology
The process describes the average US production of this good or service within this NAICS-based grouping defined in the BEA 2007 detailed input-output tables (BEA 2015). Distribution, wholesale and retailing of this good or service, use, and final disposal are not included. Creation of a product system with this process will enable modeling of all upstream (supply-chain) activities.

## Geography
Data represent the 50 US states

## Time period
2017 was the year in which this version of USEEIO was released and is the target date for the model

## Reference product
- Drinking water and wastewater treatment; at consumer: 1 USD

## Inputs from technosphere
All rows: data quality (1,3,1,1,1)
- Lids, jars, bottle caps, other metal closures and crowns; at manufacturer: 2.10689e-6 USD
- Office supplies (not paper); at manufacturer: 8.859e-6 USD
- Magazines and journals; at publisher: 1.84565e-5 USD
- Asphalt pavement; at manufacturer: 3.56879e-5 USD
- Fresh soybeans, canola, flaxseeds, and other oilseeds; at farm: -2.25206e-6 USD
- General merchandise stores: 1.77302e-7 USD
- Couriers and messengers: 5.24163e-6 USD
- Paper bags and coated paper; at manufacturer: 1.18728e-5 USD
- Bread and other baked goods; at manufacturer: 2.58076e-5 USD
- Stationery; at manufacturer: 4.85206e-5 USD
- Civic, social, professional, and similar organizations: 7.91745e-5 USD
- Postal service: 0.000266461 USD
- Drinking water and wastewater treatment; at consumer: 0.00135418 USD
- Cutting and machine tool accessory, rolling mill, and other metalworking machines; at manufacturer: 1.07981e-7 USD
- other miscellaneous electrical equipment and components; at manufacturer: 6.36117e-7 USD
- Poultry farms: 1.55493e-6 USD
- Other secondary nonferrous metal products; at manufacturer: 1.45002e-7 USD
- Toiletries; at manufacturer: 2.83991e-6 USD
- Leather; at manufacturer: 3.69933e-7 USD
- Ice cream and frozen desserts; at manufacturer: 1.36273e-5 USD
- Golf courses, marinas, ski resorts, fitness and other rec centers and industries: 1.07947e-5 USD
- Fabric; at manufacturer: 1.62367e-6 USD
- Gaskets, seals, musical instruments, fasteners, brooms, brushes, mop and other misc. goods; at manufacturer: 1.01409e-5 USD
- News syndicates, libraries, archives, Internet publishing and all other information services: 2.80006e-5 USD
- Fresh fruits and tree nuts; at farm: 2.9155e-7 USD
- Insurance carriers: 0.000696114 USD
- Packaged meat (except poultry); at manufacturer: 7.42157e-5 USD
- Pet care, photofinishing, parking and other sundry services: 2.14559e-5 USD
- Relay and industrial controls; at manufacturer: 1.75844e-6 USD
- Individual and family services: 6.48969e-6 USD
- Specialty transformers; at manufacturer: 1.85783e-7 USD
- Welding and Soldering Equipment, Scales and Balances, and other general purpose machinery; at manufacturer: 3.06589e-8 USD
- Colleges, universities, junior colleges, and professional schools: 5.61828e-5 USD
- Flavored drink concentrates; at manufacturer: 8.7465e-7 USD
- Dental equipment and supplies; at manufacturer: 4.85917e-7 USD
- Cheese; at manufacturer: 3.04508e-6 USD
- Dentists: 8.71948e-7 USD
- Pipeline transport: 3.70027e-5 USD
- Breweries and beer; at manufacturer: 1.1554e-6 USD
- Other computer related services, including facilities management: 0.000319041 USD
- Telephones; at manufacturer: 4.95647e-7 USD
- Rubber and plastic belts and hoses; at manufacturer: 2.3324e-6 USD
- Soft drinks, bottled water, and ice; at manufacturer: 2.73193e-6 USD
- Community food, housing, and other relief services, including rehabilitation services: 6.80668e-7 USD
- Greenhouse crops, mushrooms, nurseries, and flowers; at farm: 1.32709e-5 USD
- Railroad rolling stock; at manufacturer: 1.61972e-7 USD
- Urethane and other foam products; at manufacturer: 1.23311e-7 USD
- Office administration: 4.04041e-5 USD
- Curtains and linens; at manufacturer: 5.42182e-6 USD
- Securities and commodities brokerage and exchanges: 0.000229816 USD
- External hard drives, CDs, other storage media; at manufacturer: 4.62679e-7 USD
- Fresh wheat, corn, rice, and other grains; at farm: -1.9066e-6 USD
- Metal cutting and forming machine tools; at manufacturer: 2.26761e-7 USD
- Legal services: 0.00134936 USD
- Tobacco products; at manufacturer: 1.0377e-5 USD
- Dog and cat food; at manufacturer: 2.03429e-7 USD
- Fruit and vegetable preservation; at manufacturer: 4.01259e-5 USD
- Pesticides; at manufacturer: 6.61791e-6 USD
- Food and beverage stores: 1.07981e-8 USD
- Corn products; at manufacturer: 2.15963e-8 USD
- Child day care: 7.72067e-6 USD
- Vehicle electrical and electronic equipment; at manufacturer: 8.41947e-6 USD
- Watches, clocks, and other measuring and controlling devices; at manufacturer: 2.19857e-6 USD
- Specialized design: 7.49689e-5 USD
- Employment services: 0.000308502 USD
- Metal hinges, keys, lock, and other hardware; at manufacturer: 1.73831e-7 USD
- Nonresidential building repair and maintanence: 0.0134066 USD
- Sand, gravel, clay, phosphate, other nonmetallic minerals; at mine: 0.00138579 USD
- Wooden windows, door, and flooring; at manufacturer: 1.40829e-6 USD
- Storage batteries; at manufacturer: 5.72302e-7 USD
- Investment advice, portfolio management, and other financial advising services: 3.32895e-5 USD
- Ground or treated minerals and earth; at manufacturer: 9.0626e-9 USD
- Sports: 1.58349e-5 USD
- Movies and film: 1.19763e-6 USD
- Full-service restaurants: 9.4624e-5 USD
- Other engine equipment; at manufacturer: 1.69531e-6 USD
- Vehicle rental and leasing: 0.000339753 USD
- Light fixtures; at manufacturer: 2.62011e-5 USD
- Heating equipment other than warm air furnaces; at manufacturer: 7.10942e-7 USD
- Scientific research and development: 7.97036e-5 USD
- Monetary authorities and depository credit intermediation: 0.00251817 USD
- Cardboard containers; at manufacturer: 4.00475e-6 USD
- Fertilizers; at manufacturer: 7.78936e-5 USD
- Truck transport: 0.000384489 USD
- Chemicals (except basic chemicals, agrichemicals, polymers, paints, pharmaceuticals,soaps, cleaning compounds); at manufacturer: 0.000254878 USD
- Office machinery; at manufacturer: 2.03005e-6 USD
- Books, newspapers, magazines, and other print media; at manufacturer: 0.000122844 USD
- Lawn and garden equipment; at manufacturer: 3.02348e-7 USD
- Other concrete products; at manufacturer: 0.000317184 USD
- Sound recording: 3.32524e-6 USD
- Waste management and remediation: 0.000468236 USD
- Vehicle engines and engine parts; at manufacturer: 3.31503e-6 USD
- Satellite, telecommunications resellers, and all other telecommunications: 6.59507e-5 USD
- Motors and generators; at manufacturer: 1.50663e-6 USD
- Dry-cleaning and laundry: 2.16128e-5 USD
- Secondary steel products; at manufacturer: 2.78804e-6 USD
- Nondepository credit intermediation and related activities: 0.000437745 USD
- Other retail: 1.81541e-5 USD
- Books; at publisher: 4.42105e-5 USD
- Facilities support: 4.76268e-5 USD
- Pumps and pumping equipment; at manufacturer: 2.3216e-6 USD
- Other basic organic chemicals; at manufacturer: 0.000492144 USD
- Architectural, engineering, and related services: 0.00761055 USD
- Polystyrene foam products; at manufacturer: 2.19029e-6 USD
- Noncomparable imports: 0.000219923 USD
- Investigation and security: 9.20825e-5 USD
- Glass and glass products; at manufacturer: 4.97581e-6 USD
- Passenger ground transport: 0.000145824 USD
- Other textiles; at manufacturer: 3.98258e-6 USD
- Limited-service restaurants: 0.000151318 USD
- Hydraulic pumps, motors, cylinders and actuators; at manufacturer: 2.71878e-8 USD
- Vaccines and other biological medical products; at manufacturer: 2.6087e-6 USD
- Warehousing: 0.00188202 USD
- Flours and malts; at manufacturer: 5.93898e-7 USD
- Cut stone and stone products; at manufacturer: 1.177e-6 USD
- Residential mental retardation, mental health, substance abuse and other facilities: 1.23099e-6 USD
- Dimensional stone; at mine: 0.000300863 USD
- Vending, commercial laundry, and other commercial and service industry machinery; at manufacturer: 5.93271e-6 USD
- Other petroleum and coal products; at manufacturer: 0.0001991 USD
- Other vehicle parts; at manufacturer: 1.25339e-5 USD
- Advertising and public relations: 0.000117239 USD
- Springs and wires; at manufacturer: 1.34109e-7 USD
- All other foods; at manufacturer: 1.05822e-6 USD
- Semiconductors; at manufacturer: 6.55986e-7 USD
- Surgical and medical instruments; at manufacturer: 1.36612e-5 USD
- Heavy duty trucks; at manufacturer: 6.47889e-8 USD
- Paper; at manufacturer: 4.4101e-5 USD
- Ball and roller bearings; at manufacturer: 4.5313e-9 USD
- Veterinarians: 5.39907e-6 USD
- Air transport: 0.000135541 USD
- Other basic inorganic chemicals; at manufacturer: 0.00169378 USD
- Sanitary paper (tissues, napkins, diapers, etc.); at manufacturer: 8.11701e-6 USD
- Adhesives; at manufacturer: 2.15963e-6 USD
- Ophthalmic goods; at manufacturer: 2.15963e-8 USD
- Refined vegetable, olive, and seed oils; at manufacturer: 7.77467e-7 USD
- Petrochemicals; at manufacturer: 2.66164e-5 USD
- Jewelry and silverware; at manufacturer: 3.17678e-7 USD
- Metal windows, doors, and architectural products; at manufacturer: 2.98945e-6 USD
- Special tools, dies, jigs, and fixtures; at manufacturer: 8.63852e-8 USD
- Agriculture and forestry support: 4.54602e-6 USD
- Primary batteries; at manufacturer: 2.80752e-7 USD
- Metal structural products; at manufacturer: 2.78273e-6 USD
- Computer terminals and other computer peripheral equipment; at manufacturer: 1.18335e-5 USD
- Insurance agencies and brokerages: 0.000205908 USD
- Gasoline, fuels, and by-products of petroleum refining; at manufacturer: 0.00393077 USD
- Power tools; at manufacturer: 2.05165e-7 USD
- Seafood; at manufacturer: 1.43615e-5 USD
- Lessors of nonfinancial intangible assets: 0.000554221 USD
- Consumer goods and general rental centers: 2.72545e-5 USD
- Machine shops; at manufacturer: 1.45775e-6 USD
- Management consulting: 0.000577207 USD
- Fiber, yarn, and thread; at manufacturer: 2.26565e-8 USD
- Screws, nuts, and bolts; at manufacturer: 7.73995e-7 USD
- Independent artists, writers, and performers: 6.93328e-5 USD
- Electromedical appartuses; at manufacturer: 2.99066e-7 USD
- Plywood and veneer; at manufacturer: 1.33078e-5 USD
- Cutlery and handtools; at manufacturer: 1.01961e-5 USD
- Plastic bags, films, and sheets; at manufacturer: 8.29741e-6 USD
- Wholesale trade: 0.00127679 USD
- Travel arrangement and reservation: 0.000230762 USD
- Ammunition, arms, ordnance, and related accessories; at manufacturer: 6.42075e-6 USD
- Rubber tires; at manufacturer: 4.3637e-6 USD
- All other forging, stamping, and sintering; at manufacturer: 2.71878e-8 USD
- Directory, mailing list, and other publishers; at publisher: 5.93676e-6 USD
- Water transport (boats, ships, ferries): 0.000210026 USD
- Frozen food; at manufacturer: 4.36245e-6 USD
- Performances: 8.42255e-7 USD
- Other educational services: 2.57246e-5 USD
- Air conditioning, refrigeration, and warm air heating equipment; at manufacturer: 1.10585e-5 USD
- Aluminum; at manufacturer: 6.79695e-8 USD
- Other real estate: 0.00191116 USD
- Software: 1.34581e-5 USD
- Used and secondhand goods: 0.000110844 USD
- Electricity; at consumer: 0.00250219 USD
- Other support services: 9.50992e-5 USD
- Cardboard; at manufacturer: 1.58349e-5 USD
- Carpets and rugs; at manufacturer: 4.07817e-8 USD
- Vehicle seating and interior trim (upholstery); at manufacturer: 1.98898e-7 USD
- Clay and ceramic products; at manufacturer: 6.95613e-7 USD
- Synthetic dyes and pigments; at manufacturer: 8.14951e-6 USD
- Compressed Gases; at manufacturer: 0.00139031 USD
- Travel trailer and campers; at manufacturer: 6.11175e-6 USD
- Abrasive products; at manufacturer: 3.01798e-6 USD
- Motor vehicle steering, suspension components (except spring), and brake systems; at manufacturer: 4.99954e-6 USD
- Heavy gauge metal tanks; at manufacturer: 1.66299e-6 USD
- Sugar, candy, and chocolate; at manufacturer: 4.84837e-6 USD
- Coal; at mine: 5.33936e-6 USD
- Hotels and campgrounds: 8.1225e-5 USD
- Clothing; at manufacturer: 2.28562e-5 USD
- Healthcare practitioners (except physicians and dentists): 5.92192e-6 USD
- Ink and ink cartridges; at manufacturer: 2.9155e-7 USD
- Other plastic products; at manufacturer: 3.86753e-5 USD
- Pharmaceutical products (pills, powders, solutions, etc.); at manufacturer: 4.96019e-5 USD
- Fluid milk and butter; at manufacturer: 4.16384e-5 USD
- Internet publishing and broadcasting: 5.2263e-6 USD
- Data processing and hosting: 0.000118798 USD
- Nonferrous metal casts; at manufacturer: 4.72708e-7 USD
- Household goods repair: 8.59785e-5 USD
- Animal farms and aquaculture ponds (except cattle and poultry): 6.15494e-7 USD
- Salons and barber shops: 1.7277e-7 USD
- Power boilers and heat exchangers; at manufacturer: 2.40159e-7 USD
- Propulsion units and parts for space vehicles and guided missiles; at manufacturer: 9.19853e-7 USD
- Industrial process furnaces and ovens; at manufacturer: 8.15634e-8 USD
- Wild-caught fish and game; at place of capture: 2.00846e-6 USD
- Computer storage device readers; at manufacturer: 6.05082e-6 USD
- Metal pipe fittings, ball and roller bearings, industrial patterns, metal bath fixtures, other misc. fabricated metals; at manufacturer: 2.48357e-7 USD
- Wireless communications; at manufacturer: 1.67515e-6 USD
- Photography and photocopying equipment; at manufacturer: 3.23944e-8 USD
- Buildings and dwellings services: 0.000372617 USD
- Aluminum products; at manufacturer: 4.5313e-9 USD
- Commercial equipment rental: 0.000390273 USD
- Electronic equipment repair and maintenance: 0.0011926 USD
- Primary copper; at manufacturer: 2.31096e-7 USD
- Telecommunications: 0.000750444 USD
- Seasonings and dressings; at manufacturer: 9.33143e-6 USD
- Accounting, tax preparation, bookkeeping, and payroll: 0.00284361 USD
- Machinery for the paper, textile, food or other industries (except semiconductor machinery); at manufacturer: 1.37136e-6 USD
- Coffee and tea; at manufacturer: 8.49814e-6 USD
- Communication and energy wire and cable; at manufacturer: 4.5313e-9 USD
- Printing support; at manufacturer: 7.92275e-6 USD
- Electronic capacitors, resistors, coils, transformers, connectors and other components (except semiconductors and printed circuit assemblies); at manufacturer: 1.79845e-6 USD
- Natural gas; at consumer: 0.00116839 USD
- Breakfast cereals; at manufacturer: 1.90047e-6 USD
- Transmission and power train parts; at manufacturer: 2.35166e-5 USD
- Distilleries and spirits; at manufacturer: 9.71833e-8 USD
- Veneer, plywood, and engineered wood; at manufacturer: 2.22418e-5 USD
- Secondary copper products; at manufacturer: 2.22034e-7 USD
- Business support: 0.000163338 USD
- Surgical appliance and supplies; at manufacturer: 5.24724e-5 USD
- Air purification and ventilation equipment; at manufacturer: 7.0188e-7 USD
- Wiring devices; at manufacturer: 5.936e-7 USD
- State and local government enterprises: 0.00163541 USD
- Light bulbs; at manufacturer: 1.09714e-5 USD
- Metal coatings, engravings, and heat treatments; at manufacturer: 1.58576e-5 USD
- Finished and coated fabric; at manufacturer: 5.1484e-7 USD
- Farm machinery and equipment; at manufacturer: 3.20705e-6 USD
- Dry, condensed, and evaporated dairy; at manufacturer: 1.48259e-5 USD
- Snack foods; at manufacturer: 1.45775e-6 USD
- Lumber and treated lumber; at manufacturer: 9.00487e-7 USD
- Packaged poultry; at manufacturer: 4.72959e-6 USD
- Other rubber products; at manufacturer: 1.90611e-5 USD
- Vehicle repair: 1.88308e-5 USD
- Other animal food; at manufacturer: 4.1033e-7 USD
- Medical laboratories: 8.79181e-7 USD
- Physicians: 3.88491e-6 USD
- Tobacco, cotton, sugarcane, peanuts, sugar beets, herbs and spices, and other crops; at farm: -9.57824e-7 USD
- Switchgear and switchboards; at manufacturer: 1.35939e-7 USD
- Timber and raw forest products; at forest: 1.07981e-8 USD
- Rail transport: 0.000456855 USD
- Marketing research and all other miscellaneous professional, scientific, and technical services: 0.000413441 USD
- Plastic pipe, fittings, and sausage casings; at manufacturer: 1.37136e-6 USD
- Fresh vegetables, melons, and potatoes; at farm: 3.05588e-6 USD
- Dolls, toys, and games; at manufacturer: 9.72151e-6 USD
- All other converted paper products; at manufacturer: 7.98022e-6 USD
- Other residential structures: 1.73549e-6 USD
- Radio and television: 1.20103e-5 USD
- Valve and fittings (except for plumbing); at manufacturer: 3.39274e-7 USD
- Commercial machinery repair: 0.000452452 USD
- Lime and gypsum products; at manufacturer: 2.0661e-7 USD
- Scenic and sightseeing transportation and support activities for transportation: 0.000159061 USD
- Vehicle bodies; at manufacturer: 3.23944e-8 USD
- Fluid meters and counting devices; at manufacturer: 0.000142614 USD
- Outpatient healthcare: 7.01087e-6 USD
- Plastics; at manufacturer: 2.61276e-8 USD
- Residential building repair and maintanence: 2.34721e-6 USD
- Cookies, crackers, pastas, and tortillas; at manufacturer: 2.82911e-6 USD
- Sporting and athletic goods; at manufacturer: 1.77369e-6 USD
- Aircraft engines and parts; at manufacturer: 3.94223e-7 USD
- Wineries and wine; at manufacturer: 5.39907e-8 USD
- Paints and coatings; at manufacturer: 7.57336e-6 USD
- Nursing and community care facilities: 8.54066e-6 USD
- Audio and video equipment; at manufacturer: 6.01348e-6 USD
- Newspapers; at publisher: 4.27779e-7 USD
- Industrial process variable instruments; at manufacturer: 2.81137e-7 USD
- Computer systems design: 0.000351517 USD
- Soap and cleaning compounds; at manufacturer: 4.50646e-5 USD
- Environmental and other technical consulting services: 0.000859405 USD
- Wireless telecommunications: 9.80502e-5 USD
- Printed circuit and electronic assembly; at manufacturer: 9.71833e-8 USD
- All other food and drinking places: 2.90398e-5 USD

## Inputs from nature
- Water, fresh: 0.000403235, 0.000697839 m3 (2 entries, compartments not in this file); data quality (1,2,1,4,2)
- Energy, hydraulic potential: 0.00156107 MJ; data quality (3,1,1,1,1)
- Occupation, urban, discontinuously built: 4.70565e-5 m2*a; data quality (4,2,1,1,1)
- Energy, biomass: 0.0181895 MJ; data quality (3,1,1,1,1)
- Energy, wind: 0.00216223 MJ; data quality (3,1,1,1,1)
- Energy, solar: 0.00461011 MJ; data quality (3,1,1,1,1)

## Emissions to nature
- 7-OXABICYCLO[2,2,1]HEPTANE-2,3-DICARBOXYLIC ACID, DIPOTASSIUM SALT: 4.18789e-11 kg; data quality (5,1,1,1,5)
- bromoform: 7.53819e-10 kg; data quality (3,2,1,1,4)
- PYRENE, 1-NITRO-: 3.66494e-17 kg; data quality (2,2,1,1,5)
- Propane sultone: 5.09566e-16 kg; data quality (5,2,1,1,5)
- hexachloroethane: 2.12939e-10 kg; data quality (4,2,1,1,4)
- chromium: 3.3579e-13, 3.95255e-11, 4.08586e-14 kg (3 entries, compartments not in this file); data quality (4,1,1,1,5)
- trichloroethylene: 7.08806e-8 kg; data quality (4,2,1,1,4)
- toluene, 2,4-dinitro-: 7.6152e-9 kg; data quality (5,2,1,1,4)
- manganese: 5.85321e-8 kg; data quality (3,2,1,1,4)
- ammonia: 2.46896e-9 kg; data quality (3,1,1,1,5)
- acrylonitrile: 5.56053e-8 kg; data quality (4,2,1,1,4)
- styrene: 2.43671e-7 kg; data quality (4,2,1,1,4)
- N,N-DIMETHYLANILINE: 4.66022e-10 kg; data quality (5,2,1,1,4)
- lead: 6.21947e-8 kg; data quality (3,2,1,1,4)
- toluene: 4.85448e-7 kg; data quality (4,2,1,1,4)
- benzyl chloride: 2.87315e-9 kg; data quality (2,2,1,1,4)
- 1,1,1-trichloroethane: 1.60481e-7 kg; data quality (4,2,1,1,4)
- methyl isobutyl ketone: 2.16086e-6 kg; data quality (4,2,1,1,4)
- Aluminum: 6.9297e-13 kg; data quality (4,1,1,1,5)
- nickel: 5.94359e-11, 1.11398e-15 kg (2 entries, compartments not in this file); data quality (4,1,1,1,5)
- 2,4,5,2',5'-PENTACHLOROBIPHENYL: 5.94873e-14 kg; data quality (2,2,1,1,4)
- acetonitrile: 3.77859e-8 kg; data quality (3,2,1,1,4)
- Chrysene: 6.01479e-10 kg; data quality (2,2,1,1,4)
- Benzo(g,h,i)perylene: 6.41224e-11 kg; data quality (3,2,1,1,4)
- ethylene glycol: 3.6823e-9 kg; data quality (5,2,1,1,4)
- cyanide: 8.12908e-9 kg; data quality (3,2,1,1,4)
- m-xylene: 4.59259e-9 kg; data quality (3,2,1,3,2)
- monochloroethane: 2.09688e-9 kg; data quality (3,2,1,1,4)
- maleic anhydride: 1.19627e-12 kg; data quality (2,2,1,1,4)
- benzene, ethyl-: 6.65462e-8 kg; data quality (4,2,1,1,4)
- Dibenz(a,h)anthracene: 2.86421e-12 kg; data quality (2,2,1,1,4)
- Dinitrotoluene, technical grade (2,4 (77%)- and 2,6 (19%)-): 2.61498e-15, 2.44843e-10 kg (2 entries, compartments not in this file); data quality (5,1,1,1,5)
- Phosphorus: 0.00340506 kg; data quality (4,1,1,1,1)
- phenol: 1.53086e-7 kg; data quality (4,2,1,1,4)
- Methane: 0.00857112 kg; data quality (4,2,1,4,1)
- Ethane, 1,1,1,2-tetrafluoro-, HFC-134a: 7.63443e-9 kg; data quality (4,2,1,4,1)
- barium: 6.55498e-15 kg; data quality (4,1,1,1,5)
- chlorine: 3.76557e-13 kg; data quality (2,1,1,1,5)
- Dimethyl sulfate: 3.98906e-10 kg; data quality (2,2,1,1,4)
- VOC, volatile organic compounds: 5.66625e-5 kg; data quality (3,2,1,1,4)
- selenium: 5.90498e-9 kg; data quality (2,2,1,1,4)
- dibenzofuran: 2.46071e-10 kg; data quality (4,2,1,1,4)
- beryllium: 3.22395e-10 kg; data quality (2,2,1,1,4)
- p-phenylenediamine: 1.17359e-9 kg; data quality (5,2,1,1,4)
- Urethane: 2.97979e-16 kg; data quality (5,2,1,1,5)
- acetaldehyde: 5.22734e-7 kg; data quality (3,2,1,1,4)
- antimony: 1.51793e-9 kg; data quality (3,2,1,1,4)
- 1-Methyl-2-pyrrolidinone: 2.70308e-11, 2.03184e-12 kg (2 entries, compartments not in this file); data quality (5,1,1,1,5)
- lead: 4.56321e-9, 3.68685e-13 kg (2 entries, compartments not in this file); data quality (3,1,1,1,5)
- TOXAPHENE (EXAMPLE ISOMER SHOWN BELOW): 1.3159e-11 kg; data quality (4,2,1,1,4)
- ethane, 1,2-dibromo-: 3.04053e-9 kg; data quality (2,2,1,1,4)
- 1,2-BUTYLENE OXIDE: 3.00491e-13 kg; data quality (4,2,1,1,5)
- ethane, 1,2-dichloro-: 3.13673e-8 kg; data quality (3,2,1,1,4)
- benzo(a)pyrene: 3.05761e-11 kg; data quality (2,2,1,1,4)
- ALLYL CHLORIDE: 1.70509e-10 kg; data quality (3,2,1,1,4)
- phthalate, dioctyl-: 3.68755e-8 kg; data quality (3,2,1,1,4)
- epichlorohydrin: 9.02908e-12 kg; data quality (3,2,1,1,4)
- phenol: 3.13798e-14 kg; data quality (3,1,1,1,5)
- Hydrazine: 1.29941e-12 kg; data quality (4,2,1,1,4)
- Carbon dioxide: 0.000998331 kg; data quality (4,2,1,4,1)
- acrylic acid: 6.83072e-10 kg; data quality (4,2,1,1,4)
- biphenyl: 5.05206e-10 kg; data quality (4,2,1,1,4)
- toluene-2,4-diisocyante: 2.76586e-14 kg; data quality (3,2,1,1,5)
- Asbestos: 1.78512e-13 kg; data quality (5,2,1,1,4)
- Triethyl amine: 1.17343e-10 kg; data quality (4,2,1,1,4)
- 1,2,4-trichlorobenzene: 8.33765e-9 kg; data quality (4,2,1,1,4)
- anthracene: 9.24605e-11 kg; data quality (3,2,1,1,4)
- pentachlorophenol: 1.38764e-9 kg; data quality (3,2,1,1,4)
- 1,4-dioxane: 6.40586e-9 kg; data quality (4,2,1,1,4)
- acenaphthylene: 2.44706e-10 kg; data quality (3,2,1,1,4)
- mercury: 7.58907e-9 kg; data quality (2,2,1,1,4)
- Benzo(b)fluoranthene: 9.18413e-12 kg; data quality (2,2,1,1,4)
- acrolein: 2.99732e-7 kg; data quality (2,2,1,1,4)
- polychlorinated biphenyls: 7.86418e-10 kg; data quality (3,2,1,1,4)
- formic acid: 9.07399e-13 kg; data quality (3,1,1,1,5)
- 1,1,2,2-tetrachloroethane: 1.38511e-8 kg; data quality (3,2,1,1,4)
- 1,4-dichlorobenzene: 6.63427e-8 kg; data quality (2,2,1,1,4)
- phenanthrene: 6.14794e-10 kg; data quality (3,2,1,1,4)
- Chrysene, 5-methyl-: 2.8084e-14 kg; data quality (2,2,1,1,4)
- 2,3,4'-TRICHLOROBIPHENYL: 2.83875e-14 kg; data quality (2,2,1,1,4)
- Propene, 1,3-dichloro-: 5.30331e-9 kg; data quality (3,2,1,1,4)
- AMMONIA: 3.26578e-7 kg; data quality (3,1,1,1,5)
- methane, monochloro-, r-40: 6.14985e-9 kg; data quality (3,2,1,1,4)
- methylene diphenyl diisocyanate: 2.47684e-9 kg; data quality (4,2,1,1,4)
- 2-methylnaphthalene: 2.13988e-10 kg; data quality (2,2,1,1,4)
- dimethyl formamide: 3.75979e-11 kg; data quality (4,2,1,1,4)
- nitric acid: 7.45844e-10, 2.61498e-15 kg (2 entries, compartments not in this file); data quality (3,1,1,1,5)
- benzene, chloro-: 2.36799e-8 kg; data quality (4,2,1,1,4)
- methanol: 4.12561e-6 kg; data quality (4,2,1,1,4)
- Phthalate, dibutyl-: 5.81552e-9 kg; data quality (4,2,1,1,4)
- Xylene: 3.0824e-7 kg; data quality (4,2,1,1,4)
- Ethylene glycol monoethyl ether: 7.51647e-9, 6.9333e-9 kg (2 entries, compartments not in this file); data quality (5,1,1,1,5)
- carbonyl sulfide: 3.2881e-8 kg; data quality (4,2,1,1,4)
- ethylene glycol: 8.49869e-13 kg; data quality (5,1,1,1,5)
- phosgene: 4.54642e-8 kg; data quality (5,2,1,1,4)
- NITROGLYCERIN: 1.51292e-10, 3.67933e-10, 9.67629e-11 kg (3 entries, compartments not in this file); data quality (5,1,1,1,5)
- naphthalene: 4.6378e-8 kg; data quality (3,2,1,1,4)
- hexane: 6.68877e-7 kg; data quality (3,2,1,1,4)
- fluorene: 2.74275e-10 kg; data quality (2,2,1,1,4)
- carbon disulfide: 1.77204e-8 kg; data quality (4,2,1,1,4)
- nickel: 2.16359e-8 kg; data quality (3,2,1,1,4)
- Cobalt: 2.20086e-9 kg; data quality (3,2,1,1,4)
- vinyl acetate: 1.33103e-9 kg; data quality (4,2,1,1,4)
- Nitrogen: 0.0272519 kg; data quality (2,2,1,1,1)
- Phosphorus: 2.58883e-12 kg; data quality (4,1,1,1,5)
- HYDROGEN SULFIDE: 3.23986e-11, 2.35862e-8 kg (2 entries, compartments not in this file); data quality (3,1,1,1,5)
- ethene, tetrachloro-: 1.80822e-7 kg; data quality (3,2,1,1,4)
- Cresol: 1.20269e-7 kg; data quality (4,2,1,1,4)
- copper: 5.25964e-11, 1.13287e-8, 5.33084e-12 kg (3 entries, compartments not in this file); data quality (4,1,1,1,5)
- 2-NITROPROPANE: 1.30749e-14 kg; data quality (5,1,1,1,5)
- 2-chloro-1-phenylethanone: 1.79566e-11 kg; data quality (2,2,1,1,4)
- ETHYLENETHIOUREA: 8.15306e-16 kg; data quality (5,2,1,1,5)
- cumene: 1.76287e-8 kg; data quality (4,2,1,1,4)
- formaldehyde: 1.53325e-6 kg; data quality (2,2,1,1,4)
- hydrogen sulfide: 1.03571e-7 kg; data quality (3,2,1,1,4)
- propylene oxide: 1.26903e-9 kg; data quality (3,2,1,1,4)
- CARBAZOLE: 5.12623e-12 kg; data quality (2,2,1,1,4)
- methyl methacrylate: 5.16795e-10 kg; data quality (4,2,1,1,4)
- 2,4,5-trichlorophenol: 3.61324e-12 kg; data quality (2,2,1,1,4)
- butadiene: 9.69401e-9 kg; data quality (2,2,1,3,2)
- hexachlorobenzene: 5.53977e-9 kg; data quality (3,2,1,1,4)
- Phthalate, dimethyl-: 3.77823e-9 kg; data quality (4,2,1,1,4)
- diethanolamine: 1.16693e-12 kg; data quality (3,2,1,1,5)
- isophorone: 2.33424e-9 kg; data quality (2,2,1,1,4)
- Propane, 1,2-dichloro-: 2.26083e-9 kg; data quality (4,2,1,1,4)
- NITRIC ACID: 1.94346e-12 kg; data quality (3,1,1,1,5)
- Ethene, chloro-: 2.78573e-8 kg; data quality (3,2,1,1,4)
- acenaphthene: 1.56459e-9 kg; data quality (3,2,1,1,4)
- 2,2,4-trimethylpentane: 1.35414e-8 kg; data quality (3,2,1,4,1)
- particulates, < 2.5 um: 4.16212e-5 kg; data quality (3,2,1,1,4)
- 2-ethoxyethyl acetate: 9.97549e-13 kg; data quality (5,2,1,1,5)
- o-toluidine: 2.37406e-11 kg; data quality (4,2,1,1,4)
- hydroquinone: 7.92966e-13 kg; data quality (3,2,1,1,5)
- PCB-1: 2.40211e-15 kg; data quality (2,2,1,1,4)
- hexachloro-1,3-butadiene: 2.43412e-9 kg; data quality (4,2,1,1,4)
- Chromium, ion: 8.93748e-9 kg; data quality (2,2,1,1,4)
- benz[a]anthracene: 5.15743e-9 kg; data quality (2,2,1,1,4)
- Hexachlorocyclopentadiene: 8.53202e-13 kg; data quality (3,2,1,1,4)
- NITROUS ACID: 2.61498e-15 kg; data quality (5,1,1,1,5)
- Hydrazine, methyl-: 4.35526e-10 kg; data quality (2,2,1,1,4)
- benzene: 1.49054e-15 kg; data quality (3,1,1,1,5)
- Hydrocarbons, aromatic: 1.25184e-8 kg; data quality (4,2,1,1,4)
- 2,4-dinitrophenol: 4.83513e-11 kg; data quality (5,2,1,1,4)
- DNOC: 2.74574e-8 kg; data quality (2,2,1,1,4)
- Ethylene glycol: 8.82583e-11 kg; data quality (5,1,1,1,5)
- 1,4-BENZOQUINONE: 4.19891e-10 kg; data quality (3,2,1,1,4)
- cadmium: 8.29632e-9 kg; data quality (3,2,1,1,4)
- para-xylene: 8.40743e-10 kg; data quality (4,2,1,1,4)
- CHLOROPRENE: 3.48166e-11 kg; data quality (2,2,1,1,4)
- CHLORONAPHTHALENE: 4.77447e-14 kg; data quality (1,2,1,1,4)
- acetophenone: 7.10349e-11 kg; data quality (4,2,1,1,4)
- fluoranthene: 1.46139e-10 kg; data quality (2,2,1,1,4)
- carbon tetrachloride: 1.57459e-8 kg; data quality (4,2,1,1,4)
- m-cresol: 2.39254e-12 kg; data quality (4,2,1,1,4)
- particulates, < 10 um: 7.62083e-6 kg; data quality (3,2,1,1,4)
- acetamide: 5.09566e-16 kg; data quality (5,2,1,1,5)
- Xylene: 9.67544e-15 kg; data quality (4,1,1,1,5)
- p-cresol: 5.19863e-9 kg; data quality (4,2,1,1,4)
- cyclohexane: 2.61498e-15 kg; data quality (4,1,1,1,5)
- bis(2-chloroethyl)ether: 3.82806e-11 kg; data quality (3,2,1,1,4)
- manganese: 5.1127e-13, 3.17093e-11 kg (2 entries, compartments not in this file); data quality (4,1,1,1,5)
- Indeno(1,2,3-cd)pyrene: 3.91962e-12 kg; data quality (2,2,1,1,4)
- Propane, 1,1,1,3,3,3-hexafluoro-, HCFC-236fa: 2.34124e-11 kg; data quality (4,2,1,4,1)
- carbon monoxide: 0.000283389 kg; data quality (2,2,1,1,4)
- ethane, 1,1,2-trichloro-: 2.2549e-9 kg; data quality (4,2,1,1,4)
- Dimethylcarbamyl chloride: 3.9657e-18 kg; data quality (5,2,1,1,5)
- 3,3'-dimethylbenzidine: 6.06993e-16 kg; data quality (1,2,1,1,5)
- Methyl iodide: 2.10256e-9 kg; data quality (4,2,1,1,4)
- 1-METHYLNAPTHALENE: 7.79326e-16 kg; data quality (2,2,1,1,5)
- t-butyl methyl ether: 1.18375e-9 kg; data quality (3,2,1,1,4)
- 3-methylcholanthrene: 8.22804e-13 kg; data quality (2,2,1,1,4)
- 2-nitropropane: 4.16243e-13 kg; data quality (5,2,1,1,4)
- Diethylene glycol butyl ether: 1.10069e-9 kg; data quality (3,2,1,1,4)
- 4-nitrophenol: 3.36686e-8 kg; data quality (2,2,1,1,4)
- butanol: 2.10846e-10 kg; data quality (5,1,1,1,5)
- aniline: 1.08382e-9 kg; data quality (4,2,1,1,4)
- 2,4-D: 3.16275e-12 kg; data quality (3,2,1,1,5)
- Propene: 1.30749e-13 kg; data quality (3,1,1,1,5)
- sulfur dioxide: 0.000324587 kg; data quality (2,2,1,1,4)
- 1,1-DICHLOROETHYLENE: 3.47145e-9 kg; data quality (3,2,1,1,4)
- Dinitrogen monoxide: 0.000234892 kg; data quality (2,1,1,1,1)
- 2,4,6-trichlorophenol: 1.20018e-9 kg; data quality (2,2,1,1,4)
- o-Xylene: 1.91901e-9 kg; data quality (3,2,1,2,3)
- Ethylene glycol monoethyl ether: 3.80737e-13 kg; data quality (4,2,1,1,5)
- ammonia: 4.82148e-5 kg; data quality (3,2,1,1,4)
- Nitrobenzene: 2.36098e-10 kg; data quality (4,2,1,1,4)
- ethylbenzene: 1.83415e-11 kg; data quality (4,1,1,1,5)
- Methane, difluoro-, HFC-32: 1.17957e-9 kg; data quality (4,2,1,4,1)
- Propoxur: 5.09566e-16 kg; data quality (5,2,1,1,5)
- Chromium VI: 1.90917e-9 kg; data quality (3,2,1,1,4)
- ethyl acrylate: 2.51862e-11 kg; data quality (4,2,1,1,4)
- 2-(2-BUTOXYETHOXY) ETHYL ACETATE: 1.12412e-12 kg; data quality (5,2,1,1,5)
- methane, dichloro-, hcc-30: 3.76694e-7 kg; data quality (4,2,1,1,4)
- o-cresol: 3.72753e-16 kg; data quality (4,2,1,1,5)
- chloroform: 3.95886e-7 kg; data quality (4,2,1,1,4)
- Water, fresh: 0.000896046 m3; data quality (1,2,1,4,2)
- nitrogen oxides: 0.000261661 kg; data quality (2,2,1,1,4)
- Phthalate, dibutyl-: 8.9788e-11 kg; data quality (4,1,1,1,5)
- Benzo(k)fluoranthene: 2.21111e-12 kg; data quality (2,2,1,3,2)
- hydrogen fluoride: 8.99014e-7 kg; data quality (2,2,1,1,4)
- Benzo(a)anthracene: 1.34819e-12 kg; data quality (2,2,1,1,4)
- PHOSPHORUS: 2.68962e-7 kg; data quality (2,2,1,1,4)
- BUTYL ISOCYANATE: 2.51812e-12 kg; data quality (4,2,1,1,5)
- methane, bromo-, halon 1001: 3.87589e-9 kg; data quality (3,2,1,1,4)
- Toluene, 2,4-dinitro-: 5.22997e-15 kg; data quality (5,1,1,1,5)
- 2-METHOXYETHANOL: 1.18398e-15 kg; data quality (4,2,1,1,5)
- pyrene: 1.497e-10 kg; data quality (2,2,1,1,4)
- 1,2,4-trimethylbenzene: 1.99262e-12 kg; data quality (5,1,1,1,5)
- arsenic: 1.20709e-8 kg; data quality (3,2,1,1,4)
- 2-Acetylaminofluorene: 5.09566e-14 kg; data quality (5,2,1,1,5)
- hydrogen chloride: 7.77437e-6 kg; data quality (2,2,1,1,4)
- benzidine: 1.01913e-13 kg; data quality (2,2,1,1,5)
- Sulfuric acid: 3.96235e-10 kg; data quality (2,1,1,1,5)
- benzene: 3.91026e-7 kg; data quality (3,2,1,1,4)
- Ethane, 1,1,1-trifluoro-, HFC-143a: 8.66635e-10 kg; data quality (4,2,1,4,1)
- ethylene oxide: 6.77255e-10 kg; data quality (3,2,1,1,4)
- Ethane, pentafluoro-, HFC-125: 2.02552e-9 kg; data quality (4,2,1,4,1)
- Naphthalene: 3.0924e-12 kg; data quality (4,1,1,1,5)
- propanal: 2.22921e-8 kg; data quality (3,2,1,1,4)
- chlorine: 1.72726e-7 kg; data quality (4,2,1,1,4)
- Triethylene glycol: 3.66378e-16 kg; data quality (5,2,1,1,5)

## Inventory method
Input-output

## Modelling constants
The reference unit of all processes is 1 USD2013 of the good or service. The technosphere inputs are based on the US BEA detailed input-output tables for 2007. The IO tables are combined to develop a commodity-by-commodity model based on the the industry-technology assumption (see Suh et al., 2010), which assumes all commodities produced by a given industry have the same input structure, but that multiple industries can produce the same commodity. Thus, model technosphere flows represent commodity outputs (and not industry outputs) from other processes in the model. There are no by-products included in these processes. All commodity production is based on US-conditions, despite in reality that some goods and services are produced overseas, as USEEIO v1.1 is a single-region IO model.

## Completeness
The input-output approach assures that all purchased inputs associated with the sectors making these commodities as reported in the US census for 2007 are included. The direct resources extracted including minerals, energy sources, water and land occupied are included. Emissions to air include all critieria air pollutants, greenhouse gases, and hazardous and toxic air pollutants as defined by US EPA. Releases to water include toxics, total nitrogen and total phosphorus, and water discharges. Releases to soil or groundwater include toxics and agriculutural pesticides. Some metal releases to air, water and soil are not included because they could not be speciated. Solid hazardous and non-hazardous wastes generated are not included as an elementary flows although purchases of waste services are included.

## Data treatment
Greenhouse gases are primarily from the US Greenhouse Gas Emission Inventory (USEPA 2016a). Biogenic C uptake is not included (change from version 1.0), as biogenic C emission are not included. Toxic releases to air, water and soil (except pesticides) are from the 2013 Toxic Release Inventory (USEPA 2015a). Criteria air pollutants and hazardous air pollutants are from the 2011 National Emissions Inventory (USEPA 2015b). All estimates are normalized by industry based on sector output in the data year, then converted to 2013 USD using relative sector-specific CPIs (if data year is not 2013). Energy use represent raw renewables or fossil fuel energies and is based on EIA data for 2014. See Table 1 in Yang, Ingwersen et al. 2017 and Supporting Information 1, and the v1.1 data update notes (Ingwersen et al. 2017) for all details on environmental data sources used.Land occupation associated with manufacturing buildings was estimated based on the building floorspace data provided by the U.S. Energy Information Administration in the 2010 Manufacturing Energy Consumption Survey (EIA 2013). Portions of total renewable energy (EIA 2016) based on EIA-923 reports for 2014 (EIA 2017) are included. Nitrogen and Phosphorus releases are modeled in total N and total P equivalents as estimated by the Discharge Monitoring Report Nutrient Loading tool (USEPA 2016b). Self-supplied withdrawals were assigned to industrial sectors based on water use statistics for Canadian industries by NAICS 3-digit sector scaled to US production levels based on gross domestic product by industry (BEA 2015; Statistics Canada 2010), and further disaggregated to the manufacturing sectors based on compensation of employees as provided by the 2007 IO tables (BEA 2015). Water withdrawals associated with public supply were allocated to sectors based on their use of water, sewage, and other services in USD based on the IO tables (BEA 2015). Portions of total renewable energy (EIA 2016) by type are assigned to sectors (hydro, wind, solar, or) based on EIA-923 reports for 2014 (EIA 2017).

## Data collection
2015-2016

## Sampling procedure
US federal government sources, including surveys and US EPA emissions databases are used as the primary sources. From these sources, data for US reporting establishments/facilities are aggregated by the NAICS sector as defined in the BEA detailed 2007 input-output tables. When level of sector aggregation differs, or when direct emissions are not reported but modeled, additional sources are used to make allocations and estimates.

## Review details
In regard to quality assurance and peer-review, each dataset created went through Quality Assurance as defined in a quality assurance project plans at US EPA, CSRA or ERG. The model was assembled with the IO model builder model (USEPA 2016c). Validation functions were used to check that all the model components were properly assembled and harmonized. Bayou Demeke and Santosh Ghimire provided internal peer review of the model methodology and the manuscript underwent standard EPA management review. An editor and two anonymous reviewers at the Journal of Cleaner Production reviewed the model. In regard to data quality evaluation, data quality assessment was performed at the flow and process levels according to the updated US EPA data quality assessment guidelines as defined in US EPA (2016b).

## Intended application
The primary application is for use in the US Environmentally-Extended Input-Ouput model, USEEIO, version 1.1. This model is being used by the US EPA for supporting tools that prioritize goods and services based on potential environmental impacts, resource use or emissions for large regions, including the US and US states, and as a strealined tool for organizations as a starting point to consider sustainable materials management. Model results are designed to provide meso/macro-level decision support.

## Project
USEEIO v1.1 was developed by the US EPA with CSRA and ERG with Wesley W. Ingwersen and David E. Meyer as research leads. Yi Yang was the technical lead on the work for CSRA (contract EP-C-15-012); Troy Hawkins was lead for ERG (contract EP-C-12-021).

## Sources
- Edelen and Ingwersen 2017
- Lovelace 2009
- BLM 2008
- Statistics Canada 2010
- USEPA 2016a
- Macknick et al. 2011
- USEPA 2016c
- BEA 2015
- Nickerson et al. 2011
- USEPA 2015a
- Ingwersen et al. 2017
- USDA 2009a
- Goebes et al. 2003
- USDA 2009b
- EIA 2013
- USDA 2006
- Maupin et al. 2014
- Kim et el. 2013
- EIA 2017
- Torcellini et al. 2003
- USGS 2015
- USEPA 2015b
- USDA 2014
- EIA 2015
- Ingwersen et al. DRAFT
- USGS 2016
- Blackhurst et al. 2010
- USEPA 2016b
- USDA 2016
- Yienger et al. 1995
- EIA 2016
