# Urethane and other foam products; at manufacturer

Dataset: openLCA process, unit process
Category: 3261: Plastics Product Manufacturing
Geography: United States
Time period: 2017-01-01 to 2017-12-31
Data quality: US EPA - Process Pedigree Matrix (1;1)
Exchange data quality scheme: US EPA - Flow Pedigree Matrix
Generated by: US EPA with CSRA and ERG
Owner: US EPA
Published in: Yang, Ingwersen et al. 2017
restrictionsDescription: This model shold be appropriately cited (see Yang, Ingwersen et al. 2017 source or Publication field) when used. Any changes or derivations of this model by the user should be documented. The model itself and any results from use of this model shall not be construed to consitute US EPA opinion or policy.
copyright: false

## General comment
BEA Code & Name is '326150:Urethane and other foam product (except polystyrene) manufacturing'. Description of the primary industry producing this good or service, adapted from the Census Bureau NAICS 2007 descriptions: This industry comprises establishments primarily engaged in manufacturing plastics foam products (except polystyrene).

## Technology
The process describes the average US production of this good or service within this NAICS-based grouping defined in the BEA 2007 detailed input-output tables (BEA 2015). Distribution, wholesale and retailing of this good or service, use, and final disposal are not included. Creation of a product system with this process will enable modeling of all upstream (supply-chain) activities.

## Geography
Data represent the 50 US states

## Time period
2017 was the year in which this version of USEEIO was released and is the target date for the model

## Reference product
- Urethane and other foam products; at manufacturer: 1 USD

## Inputs from technosphere
All rows: data quality (1,3,1,1,1)
- Machinery for the paper, textile, food or other industries (except semiconductor machinery); at manufacturer: 2.18998e-7 USD
- Other retail: 3.38871e-5 USD
- Special tools, dies, jigs, and fixtures; at manufacturer: 4.54519e-7 USD
- Fluid meters and counting devices; at manufacturer: 4.68553e-7 USD
- Light gauge metal cans, boxes, and containers; at manufacturer: 5.92703e-5 USD
- Plastics; at manufacturer: 0.0847405 USD
- Custom metal rolls; at manufacturer: 3.85476e-5 USD
- Metal cutting and forming machine tools; at manufacturer: 1.36356e-6 USD
- Fertilizers; at manufacturer: 0.000509352 USD
- Fabric; at manufacturer: 0.00393973 USD
- Nondepository credit intermediation and related activities: 0.00242057 USD
- Air and gas compressors; at manufacturer: 0.00253644 USD
- Petrochemicals; at manufacturer: 0.00372902 USD
- Aluminum; at manufacturer: 4.94407e-6 USD
- Small electrical appliances; at manufacturer: 1.24235e-5 USD
- Other basic organic chemicals; at manufacturer: 0.0264295 USD
- Compressed Gases; at manufacturer: 0.00983623 USD
- Ground or treated minerals and earth; at manufacturer: 1.78254e-8 USD
- Accounting, tax preparation, bookkeeping, and payroll: 0.00222957 USD
- Satellite, telecommunications resellers, and all other telecommunications: 0.000108213 USD
- Other vehicle parts; at manufacturer: 8.6313e-5 USD
- Rubber tires; at manufacturer: 6.58993e-8 USD
- Vending, commercial laundry, and other commercial and service industry machinery; at manufacturer: 2.88472e-6 USD
- Ophthalmic goods; at manufacturer: 0.00171448 USD
- Lumber and treated lumber; at manufacturer: 2.72711e-5 USD
- Plastic bags, films, and sheets; at manufacturer: 0.0570729 USD
- Other real estate: 0.00127657 USD
- Other textiles; at manufacturer: 7.57532e-7 USD
- Glass and glass products; at manufacturer: 0.00342891 USD
- Material handling equipment; at manufacturer: 0.000222515 USD
- Mechanical power transmission equipment; at manufacturer: 0.00796727 USD
- Air purification and ventilation equipment; at manufacturer: 1.14597e-5 USD
- Wholesale trade: 0.0573912 USD
- Commercial equipment rental: 0.000533787 USD
- Semiconductors; at manufacturer: 0.00282215 USD
- Food and beverage stores: 2.53082e-6 USD
- Office administration: 0.000113968 USD
- Light fixtures; at manufacturer: 1.57706e-5 USD
- Civic, social, professional, and similar organizations: 0.00052687 USD
- Air conditioning, refrigeration, and warm air heating equipment; at manufacturer: 0.0309844 USD
- Ink and ink cartridges; at manufacturer: 4.33036e-5 USD
- Architectural, engineering, and related services: 0.00459675 USD
- Hotels and campgrounds: 0.00122726 USD
- Adhesives; at manufacturer: 0.00854403 USD
- Power boilers and heat exchangers; at manufacturer: 4.00589e-6 USD
- Legal services: 0.00180704 USD
- Jewelry and silverware; at manufacturer: 3.10196e-6 USD
- Plastic pipe, fittings, and sausage casings; at manufacturer: 0.0243811 USD
- Heavy gauge metal tanks; at manufacturer: 4.15426e-6 USD
- Laminated plastic plates and shapes; at manufacturer: 0.00353679 USD
- Scenic and sightseeing transportation and support activities for transportation: 0.0016271 USD
- Clothing; at manufacturer: 6.11255e-7 USD
- Asphalt pavement; at manufacturer: 1.03024e-5 USD
- Warehousing: 0.00120406 USD
- Machine shops; at manufacturer: 0.00289926 USD
- Consumer goods and general rental centers: 0.000106644 USD
- Relay and industrial controls; at manufacturer: 0.00649097 USD
- Lime and gypsum products; at manufacturer: 1.81808e-5 USD
- All other forging, stamping, and sintering; at manufacturer: 1.11839e-5 USD
- Golf courses, marinas, ski resorts, fitness and other rec centers and industries: 0.00022335 USD
- Industrial molds; at manufacturer: 4.24218e-6 USD
- Communication and energy wire and cable; at manufacturer: 2.87846e-5 USD
- Drinking water and wastewater treatment; at consumer: 0.00042929 USD
- All other food and drinking places: 0.000120281 USD
- Other secondary nonferrous metal products; at manufacturer: 8.94516e-6 USD
- Office supplies (not paper); at manufacturer: 2.17406e-7 USD
- Specialty transformers; at manufacturer: 4.10705e-7 USD
- Cardboard containers; at manufacturer: 0.00621325 USD
- Industrial process variable instruments; at manufacturer: 4.01009e-5 USD
- Paper; at manufacturer: 0.00623524 USD
- Vehicles and parts sales: 9.99566e-6 USD
- Heating equipment other than warm air furnaces; at manufacturer: 4.90189e-7 USD
- Paper bags and coated paper; at manufacturer: 0.0136508 USD
- Ready-mix concrete; at manufacturer: 1.36356e-6 USD
- Wood pulp; at manufacturer: 3.13022e-5 USD
- Metal hinges, keys, lock, and other hardware; at manufacturer: 3.67374e-5 USD
- Metal structural products; at manufacturer: 7.68587e-5 USD
- Passenger ground transport: 0.000547586 USD
- Wiring devices; at manufacturer: 4.54519e-7 USD
- Finished and coated fabric; at manufacturer: 0.000160129 USD
- Computer terminals and other computer peripheral equipment; at manufacturer: 0.00939075 USD
- Gasoline, fuels, and by-products of petroleum refining; at manufacturer: 0.0381198 USD
- Software: 0.000102623 USD
- Sports: 0.00010732 USD
- General merchandise stores: 5.01286e-6 USD
- Securities and commodities brokerage and exchanges: 0.00145998 USD
- Cardboard; at manufacturer: 0.00132882 USD
- Travel arrangement and reservation: 1.28264e-5 USD
- Soap and cleaning compounds; at manufacturer: 0.000215031 USD
- Primary iron, steel, and ferroalloy products; at manufacturer: 0.000710182 USD
- Insurance carriers: 0.00168495 USD
- Transmission and power train parts; at manufacturer: 1.17778e-6 USD
- Truck transport: 0.0107419 USD
- Synthetic dyes and pigments; at manufacturer: 0.000449971 USD
- Vegetable oils and by-products; at manufacturer: 4.72345e-7 USD
- Vehicle rental and leasing: 0.000964293 USD
- Ball and roller bearings; at manufacturer: 3.87733e-5 USD
- Performances: 1.3306e-5 USD
- Cement; at manufacturer: 1.03024e-5 USD
- Monetary authorities and depository credit intermediation: 0.00740267 USD
- Surgical appliance and supplies; at manufacturer: 7.5482e-8 USD
- Clay and ceramic products; at manufacturer: 2.04814e-5 USD
- Pipeline transport: 0.000307336 USD
- Vehicle repair: 0.000653985 USD
- Buildings and dwellings services: 0.003122 USD
- Business support: 0.00114249 USD
- Metal coatings, engravings, and heat treatments; at manufacturer: 0.00368146 USD
- Wireless communications; at manufacturer: 2.55147e-7 USD
- Other support services: 0.000541725 USD
- Polystyrene foam products; at manufacturer: 0.000521091 USD
- Household goods repair: 0.00021842 USD
- Motor vehicle steering, suspension components (except spring), and brake systems; at manufacturer: 6.27195e-7 USD
- Abrasive products; at manufacturer: 0.000218234 USD
- Specialized design: 0.000764211 USD
- Screws, nuts, and bolts; at manufacturer: 0.000899124 USD
- Independent artists, writers, and performers: 0.00031284 USD
- Metal plumbing drains, faucets, valves, and other fittings; at manufacturer: 2.81802e-5 USD
- Secondary steel products; at manufacturer: 0.000102316 USD
- Limited-service restaurants: 0.00210371 USD
- Employment services: 0.000475435 USD
- Coal; at mine: 0.000543557 USD
- Printed circuit and electronic assembly; at manufacturer: 0.00121154 USD
- Valve and fittings (except for plumbing); at manufacturer: 0.003307 USD
- Waste management and remediation: 0.00139321 USD
- Wireless telecommunications: 0.000753453 USD
- Telecommunications: 0.00223122 USD
- Other basic inorganic chemicals; at manufacturer: 0.0973127 USD
- Springs and wires; at manufacturer: 6.30126e-6 USD
- Advertising and public relations: 0.00291995 USD
- Chemicals (except basic chemicals, agrichemicals, polymers, paints, pharmaceuticals,soaps, cleaning compounds); at manufacturer: 0.0133384 USD
- Promoters and agents: 0.000103383 USD
- Facilities support: 0.000118916 USD
- Company and enterprise management: 0.0166095 USD
- Corn products; at manufacturer: 0.00847672 USD
- Metal pipe fittings, ball and roller bearings, industrial patterns, metal bath fixtures, other misc. fabricated metals; at manufacturer: 0.0011009 USD
- Wood kitchen cabinets and countertops; at manufacturer: 5.66634e-5 USD
- Secondary copper products; at manufacturer: 1.70695e-5 USD
- Other rubber products; at manufacturer: 0.00608384 USD
- Colleges, universities, junior colleges, and professional schools: 1.55098e-6 USD
- Metal windows, doors, and architectural products; at manufacturer: 0.000236327 USD
- Rail transport: 0.00765789 USD
- Books, newspapers, magazines, and other print media; at manufacturer: 8.5668e-8 USD
- Aluminum products; at manufacturer: 0.000112333 USD
- Vehicle engines and engine parts; at manufacturer: 5.06987e-7 USD
- Computer systems design: 0.00104829 USD
- Couriers and messengers: 1.55098e-6 USD
- Cutting and machine tool accessory, rolling mill, and other metalworking machines; at manufacturer: 0.000534315 USD
- Wooden windows, door, and flooring; at manufacturer: 6.28752e-5 USD
- Nonferrous metal casts; at manufacturer: 9.8504e-6 USD
- Plastic bottles; at manufacturer: 4.45732e-5 USD
- Carbon and graphite products; at manufacturer: 0.00544598 USD
- Environmental and other technical consulting services: 0.000113432 USD
- Management consulting: 0.00055934 USD
- Electricity; at consumer: 0.00618354 USD
- Marketing research and all other miscellaneous professional, scientific, and technical services: 0.0058453 USD
- Other petroleum and coal products; at manufacturer: 0.000963355 USD
- Light bulbs; at manufacturer: 1.15706e-6 USD
- Full-service restaurants: 0.00116397 USD
- Other computer related services, including facilities management: 0.000419749 USD
- Vehicle electrical and electronic equipment; at manufacturer: 5.86318e-7 USD
- Synthetic rubber and artificial and synthetic fibers; at manufacturer: 0.0186539 USD
- Refined vegetable, olive, and seed oils; at manufacturer: 2.54649e-9 USD
- Plywood and veneer; at manufacturer: 8.89621e-5 USD
- Concrete pipe, bricks, and blocks; at manufacturer: 4.03007e-5 USD
- Switchgear and switchboards; at manufacturer: 3.21194e-5 USD
- Sand, gravel, clay, phosphate, other nonmetallic minerals; at mine: 2.01778e-5 USD
- Sanitary paper (tissues, napkins, diapers, etc.); at manufacturer: 1.51506e-7 USD
- Communications equipment; at manufacturer: 3.68912e-7 USD
- Gaskets, seals, musical instruments, fasteners, brooms, brushes, mop and other misc. goods; at manufacturer: 9.97528e-6 USD
- Lessors of nonfinancial intangible assets: 0.00280591 USD
- Other concrete products; at manufacturer: 5.8936e-5 USD
- Scientific research and development: 0.000107734 USD
- Investment advice, portfolio management, and other financial advising services: 0.000416595 USD
- Electronic capacitors, resistors, coils, transformers, connectors and other components (except semiconductors and printed circuit assemblies); at manufacturer: 0.000447645 USD
- State and local government enterprises: 0.000431696 USD
- Urethane and other foam products; at manufacturer: 0.00454695 USD
- Water transport (boats, ships, ferries): 0.00081897 USD
- Postal service: 2.75509e-6 USD
- Air transport: 0.00312617 USD
- Plastics and rubber industry machinery; at manufacturer: 0.000361656 USD
- Investigation and security: 0.000467267 USD
- Rubber and plastic belts and hoses; at manufacturer: 0.00302625 USD
- Unrefined oil and gas; at extraction site: 0.000105985 USD
- Veneer, plywood, and engineered wood; at manufacturer: 4.8246e-5 USD
- Cutlery and handtools; at manufacturer: 0.000260038 USD
- All other converted paper products; at manufacturer: 3.8548e-6 USD
- Natural gas; at consumer: 0.00499339 USD
- Timber and raw forest products; at forest: 0.00029396 USD
- Nonresidential building repair and maintanence: 0.00174504 USD
- Magazines and journals; at publisher: 0.000104118 USD
- Other plastic products; at manufacturer: 0.00158561 USD
- Paints and coatings; at manufacturer: 2.29637e-5 USD
- Electronic equipment repair and maintenance: 0.000431266 USD
- Lids, jars, bottle caps, other metal closures and crowns; at manufacturer: 0.000157557 USD
- Insurance agencies and brokerages: 0.000526972 USD
- Commercial machinery repair: 0.00130693 USD
- Cast iron and steel; at manufacturer: 1.75496e-5 USD
- Welding and Soldering Equipment, Scales and Balances, and other general purpose machinery; at manufacturer: 6.1422e-7 USD
- Dry-cleaning and laundry: 6.06026e-7 USD
- Noncomparable imports: 0.00011498 USD
- Data processing and hosting: 0.00318353 USD

## Inputs from nature
- Water, fresh: 0.000277122 m3; data quality (2,2,1,4,2)
- Energy, wind: 2.83293e-5 MJ; data quality (3,1,1,1,1)
- Occupation, industrial area: 0.00117562 m2*a; data quality (4,2,1,1,1)
- Energy, hydraulic potential: 2.37491e-6 MJ; data quality (3,1,1,1,1)
- Occupation, industrial area, built up: 0.000391875 m2*a; data quality (4,2,1,1,1)
- Water, saline: 3.43123e-5 m3; data quality (4,2,1,4,2)
- Water, fresh: 0.000725727 m3; data quality (3,2,1,4,2)
- Energy, biomass: 0.00708501 MJ; data quality (3,1,1,1,1)
- Occupation, urban, discontinuously built: 0.000115912 m2*a; data quality (4,2,1,1,1)

## Emissions to nature
- benzo(a)pyrene: 9.03712e-10 kg; data quality (2,2,1,1,5)
- acrylic acid: 1.55554e-10 kg; data quality (4,2,1,1,5)
- Cumene hydroperoxide: 4.64037e-14 kg; data quality (2,1,1,1,4)
- Carbon disulfide: 4.65435e-11 kg; data quality (4,1,1,1,5)
- SEC-BUTYL ALCOHOL: 5.15597e-15, 1.03119e-15 kg (2 entries, compartments not in this file); data quality (5,1,1,1,4)
- styrene: 1.54953e-9 kg; data quality (3,1,1,1,5)
- Ethene, chloro-: 9.62889e-10 kg; data quality (3,2,1,1,4)
- Chromium VI: 1.18073e-10 kg; data quality (3,2,1,1,5)
- Methane, dichlorodifluoro-, CFC-12: 4.56613e-12, 1.31993e-13 kg (2 entries, compartments not in this file); data quality (4,1,1,1,4)
- toluene-2,4-diisocyante: 1.13366e-9 kg; data quality (2,1,1,1,4)
- toluene, 2,4-dinitro-: 5.46653e-17 kg; data quality (5,2,1,1,4)
- Benzo(b,j,k)fluoranthene: 3.59993e-19 kg; data quality (5,2,1,1,4)
- Styrene: 3.38237e-11 kg; data quality (3,1,1,1,5)
- Bisphenol A: 7.75602e-13 kg; data quality (4,1,1,1,4)
- dibenzofuran: 8.14312e-12 kg; data quality (4,2,1,1,5)
- 2-Mercaptobenzothiazole: 1.80343e-10, 2.33424e-12, 1.40054e-12 kg (3 entries, compartments not in this file); data quality (3,1,1,1,5)
- 2,2-BIS(4-HYDROXY-3,5-DIBROMOPHENYL)PROPANE: 7.21836e-15, 1.81708e-11 kg (2 entries, compartments not in this file); data quality (5,1,1,1,4)
- chlorine: 4.09384e-13 kg; data quality (2,1,1,1,4)
- Creosol: 4.76436e-13, 5.20477e-14 kg (2 entries, compartments not in this file); data quality (5,1,1,1,5)
- Methane: 3.34848e-6 kg; data quality (4,2,1,4,1)
- Methyl iodide: 5.88976e-18 kg; data quality (4,2,1,1,4)
- methanol: 9.53949e-8 kg; data quality (4,2,1,1,5)
- hydrogen fluoride: 7.44544e-10 kg; data quality (2,2,1,1,4)
- benzidine: 1.23212e-13 kg; data quality (2,2,1,1,5)
- ethylene glycol: 3.05965e-8 kg; data quality (5,2,1,1,5)
- VOC, volatile organic compounds: 0.000470078 kg; data quality (3,2,1,1,5)
- CHLOROPRENE: 2.74028e-12 kg; data quality (2,2,1,1,4)
- Ethene, tetrachloro-: 7.42459e-14 kg; data quality (3,1,1,1,4)
- Triethylene glycol: 2.36318e-10 kg; data quality (5,2,1,1,5)
- naphthalene: 1.09521e-7 kg; data quality (3,2,1,1,5)
- formaldehyde: 6.71598e-7 kg; data quality (3,2,1,4,2)
- benzene: 2.57798e-14 kg; data quality (3,1,1,1,4)
- Hydrazine: 1.764e-13 kg; data quality (4,2,1,1,4)
- Propane, 1,1,1,3,3,3-hexafluoro-, HCFC-236fa: 7.51566e-8 kg; data quality (4,2,1,4,1)
- ALUMINUM OXIDE: 4.43018e-11 kg; data quality (5,1,1,1,4)
- Dinitrogen monoxide: 5.28778e-7 kg; data quality (4,2,1,4,1)
- BUTYL ISOCYANATE: 1.77292e-9 kg; data quality (4,2,1,1,5)
- tertiary-Butyl Acetate: 3.2387e-7 kg; data quality (3,2,1,1,5)
- Cresol: 2.57798e-13 kg; data quality (2,1,1,1,4)
- 3-methylcholanthrene: 8.55919e-16 kg; data quality (2,2,1,1,4)
- Diglycidyl resorcinol ether, technical grade: 2.06239e-15 kg; data quality (5,1,1,1,4)
- Asbestos: 7.87318e-15 kg; data quality (5,2,1,1,4)
- Propene: 1.52015e-9 kg; data quality (3,1,1,1,4)
- ethane, 1,1,2-trichloro-: 7.04283e-12 kg; data quality (4,2,1,1,4)
- Methane, dichloro-, HCC-30: 3.10802e-13, 1.83129e-8 kg (2 entries, compartments not in this file); data quality (5,1,1,1,4)
- Ethane, 1,1,2-trichloro-1,2,2-trifluoro-, CFC-113: 1.07224e-11 kg; data quality (4,1,1,1,4)
- HCFC-142b: 6.12632e-12, 5.90874e-13 kg (2 entries, compartments not in this file); data quality (2,1,1,1,4)
- 4,4'-DIAMINODIPHENYL ETHER: 3.24135e-12 kg; data quality (5,1,1,1,4)
- TERT-BUTYL ALCOHOL: 6.0237e-11 kg; data quality (4,1,1,1,5)
- Ethylene glycol: 6.76463e-13 kg; data quality (5,1,1,1,4)
- propylene oxide: 2.47604e-8 kg; data quality (3,2,1,1,5)
- fluorene: 4.24651e-10 kg; data quality (3,2,1,4,1)
- Titanium: 1.39309e-13 kg; data quality (5,2,1,1,4)
- diisocyanates: 4.05232e-7 kg; data quality (4,1,1,1,4)
- Ethane, 1,2-dichloro-: 6.08404e-14 kg; data quality (4,1,1,1,4)
- Xylene: 4.85952e-7 kg; data quality (4,2,1,2,4)
- methylene diphenyl diisocyanate: 1.79324e-7 kg; data quality (4,2,1,1,5)
- dicyclopentadiene: 5.15597e-15 kg; data quality (4,1,1,1,4)
- phthalate, dioctyl-: 5.97136e-10 kg; data quality (3,2,1,1,5)
- manganese: 3.98657e-14, 7.97314e-14 kg (2 entries, compartments not in this file); data quality (4,1,1,1,5)
- 2-ethoxyethyl acetate: 4.8497e-11 kg; data quality (5,2,1,1,5)
- Ethylene glycol monoethyl ether: 1.59835e-13, 2.78422e-12 kg (2 entries, compartments not in this file); data quality (5,1,1,1,4)
- mercury: 2.13982e-11 kg; data quality (2,2,1,2,4)
- ETHYLENETHIOUREA: 2.4212e-12 kg; data quality (5,2,1,1,5)
- beryllium: 1.34939e-11 kg; data quality (2,2,1,1,5)
- 4,4'-METHYLENEBIS(2-CHLOROANALINE): 4.88451e-10 kg; data quality (4,2,1,1,5)
- 4,4'-METHYLENEBIS(2-CHLOROANALINE): 6.54032e-9 kg; data quality (1,1,1,1,4)
- ethyl acrylate: 4.02448e-10 kg; data quality (4,2,1,1,4)
- toluene: 1.51508e-12, 1.33431e-11 kg (2 entries, compartments not in this file); data quality (5,1,1,1,4)
- 1,2,4-trichlorobenzene: 3.66885e-12 kg; data quality (3,2,1,1,5)
- Pentachloroethane: 1.04903e-12 kg; data quality (3,1,1,1,4)
- Water, fresh: 0.000847275 m3; data quality (2,2,1,4,2)
- Ethane, 1,1-dichloro-1-fluoro-, HCFC-141b: 1.36943e-12 kg; data quality (2,1,1,1,4)
- epichlorohydrin: 1.46075e-11 kg; data quality (3,2,1,1,4)
- para-xylene: 7.44278e-8 kg; data quality (3,2,1,1,5)
- ETHENE: 5.673e-9, 5.15597e-15 kg (2 entries, compartments not in this file); data quality (3,1,1,1,4)
- Methyl acrylate: 3.08761e-13, 2.43884e-10 kg (2 entries, compartments not in this file); data quality (3,1,1,1,4)
- Triethyl amine: 4.37226e-13 kg; data quality (5,1,1,1,4)
- 1,3-PROPANEDIOL, 2,2-BIS(BRME)-: 1.46429e-13 kg; data quality (2,1,1,1,4)
- Benzene, 1,2,4-trimethyl-: 1.27868e-15 kg; data quality (5,1,1,1,4)
- arsenic: 1.99632e-10 kg; data quality (3,2,1,4,2)
- trichloroethylene: 5.54079e-8 kg; data quality (4,2,1,1,5)
- hexachlorobenzene: 2.08363e-14 kg; data quality (3,2,1,1,5)
- HYDROFLUORIC ACID: 2.78422e-14 kg; data quality (3,1,1,1,4)
- 1,1,1-trichloroethane: 8.83826e-7 kg; data quality (4,2,1,1,5)
- aniline: 6.33485e-11 kg; data quality (4,2,1,1,5)
- ALLYL ALCOHOL: 7.85017e-12, 4.54344e-12 kg (2 entries, compartments not in this file); data quality (4,1,1,1,4)
- methane, monochloro-, r-40: 2.45297e-9 kg; data quality (3,2,1,1,5)
- Aniline: 2.54705e-13 kg; data quality (3,1,1,1,4)
- maleic anhydride: 9.86656e-11 kg; data quality (2,2,1,1,5)
- Ethylene oxide: 2.06239e-15 kg; data quality (4,1,1,1,4)
- o-cresol: 9.2184e-12 kg; data quality (4,2,1,1,4)
- phenol: 1.7274e-8 kg; data quality (4,2,1,1,5)
- Cumene hydroperoxide: 4.27039e-10 kg; data quality (2,1,1,1,5)
- HYDROCHLORIC ACID: 1.86924e-11 kg; data quality (2,1,1,1,4)
- Hexane: 3.01965e-13 kg; data quality (4,1,1,1,4)
- Aluminum: 2.95345e-13, 7.99419e-11 kg (2 entries, compartments not in this file); data quality (4,1,1,1,4)
- hydrogen sulfide: 9.80546e-8 kg; data quality (3,1,1,1,5)
- n-nitrosomorpholine: 4.31195e-16 kg; data quality (4,2,1,1,4)
- Cyclohexanol: 3.12658e-12 kg; data quality (4,1,1,1,4)
- 1,1,2,2-tetrachloroethane: 7.03231e-13 kg; data quality (3,2,1,1,4)
- Phthalate, dibutyl-: 3.40777e-9 kg; data quality (4,2,1,1,5)
- nickel: 4.20868e-13 kg; data quality (4,1,1,1,5)
- Methyl methacrylate: 3.48637e-13, 5.19808e-12 kg (2 entries, compartments not in this file); data quality (3,1,1,1,4)
- hexane: 3.84089e-6 kg; data quality (3,2,1,1,5)
- Epichlorohydrin: 2.06239e-15 kg; data quality (2,1,1,1,4)
- Phenol, 2,4-dimethyl-: 5.15597e-15 kg; data quality (4,1,1,1,4)
- Decabromodiphenyl oxide: 4.45672e-10 kg; data quality (4,1,1,1,5)
- MALEIC ANHYDRIDE: 5.15597e-15, 4.12477e-14 kg (2 entries, compartments not in this file); data quality (4,1,1,1,4)
- nickel: 5.15597e-15 kg; data quality (4,1,1,1,4)
- Nitrogen: 2.66192e-8 kg; data quality (5,2,1,1,5)
- isobutyraldehyde: 5.15597e-15, 1.97711e-11 kg (2 entries, compartments not in this file); data quality (2,1,1,1,4)
- naphthalene: 3.19773e-14 kg; data quality (4,1,1,1,4)
- Triethyl amine: 8.51215e-9 kg; data quality (3,2,1,1,5)
- 2,4/2,6-toluenediisocyanate (mixture): 1.09005e-8 kg; data quality (1,1,1,1,4)
- PYRIDINE: 1.12978e-11 kg; data quality (4,1,1,1,4)
- Carboxin: 2.65532e-14 kg; data quality (5,1,1,1,4)
- hydrogen chloride: 1.1681e-7 kg; data quality (2,2,1,1,5)
- bromine: 3.86957e-10 kg; data quality (5,1,1,1,4)
- methane, dichloro-, hcc-30: 2.2255e-7 kg; data quality (4,2,1,1,4)
- Chloroacetic acid: 4.69502e-13 kg; data quality (3,1,1,1,4)
- Carbon dioxide: 0.130091 kg; data quality (4,2,1,4,1)
- carbon monoxide: 0.000419447 kg; data quality (3,2,1,1,1)
- 1,4-BENZOQUINONE: 2.21126e-16 kg; data quality (3,2,1,1,4)
- NITROUS ACID: 8.84609e-11 kg; data quality (5,1,1,1,4)
- 1,3-PHENYLENEDIAMINE: 5.45902e-11 kg; data quality (4,1,1,1,5)
- 1,2-DICHLOROBENZENE: 2.57798e-13, 2.69142e-11 kg (2 entries, compartments not in this file); data quality (5,1,1,1,4)
- Diethylene glycol butyl ether: 1.31722e-9 kg; data quality (3,2,1,1,5)
- 2-chloro-1-phenylethanone: 2.14733e-14 kg; data quality (2,2,1,1,5)
- carbonyl sulfide: 9.03693e-10 kg; data quality (4,2,1,1,5)
- benzene, chloro-: 1.70712e-10 kg; data quality (4,2,1,1,4)
- 2,4/2,6-toluenediisocyanate (mixture): 6.68395e-7 kg; data quality (3,1,1,1,4)
- 1,4-dichlorobenzene: 5.15597e-15 kg; data quality (2,1,1,1,4)
- methane, bromo-, halon 1001: 7.43674e-11 kg; data quality (3,2,1,1,4)
- 2-nitropropane: 2.45737e-10 kg; data quality (3,2,1,1,5)
- hexachloro-1,3-butadiene: 1.97727e-13 kg; data quality (4,2,1,1,5)
- Sodium formate: 5.9069e-13 kg; data quality (3,1,1,1,4)
- Xylene: 3.49575e-13, 3.61784e-13 kg (2 entries, compartments not in this file); data quality (4,1,1,1,4)
- Methane, monochloro-, R-40: 1.54679e-14 kg; data quality (3,1,1,1,4)
- Tetrafluoroethylene (TFE): 1.38356e-9 kg; data quality (4,1,1,1,5)
- cyanide: 2.46977e-9 kg; data quality (3,2,1,1,5)
- vinyl acetate: 3.96756e-8 kg; data quality (4,2,1,1,4)
- ethane, 1,2-dichloro-: 1.39458e-10 kg; data quality (3,2,1,1,4)
- 2,4/2,6-toluenediisocyanate (mixture): 3.39661e-8 kg; data quality (4,1,1,1,4)
- Propene, 1,3-dichloro-: 4.25342e-14 kg; data quality (3,2,1,1,4)
- pentachlorophenol: 3.52939e-14 kg; data quality (3,2,1,1,5)
- Benzo(a)anthracene: 2.35583e-15 kg; data quality (2,2,1,1,4)
- styrene: 4.5587e-6 kg; data quality (4,2,1,1,5)
- butadiene: 2.74663e-8 kg; data quality (3,2,1,4,1)
- biphenyl: 2.04372e-13 kg; data quality (3,1,1,1,4)
- methanol: 2.57941e-11 kg; data quality (3,1,1,1,4)
- chlorine: 2.72625e-9 kg; data quality (3,2,1,1,5)
- Ethylene glycol monoethyl ether: 6.05265e-10 kg; data quality (4,2,1,1,5)
- ethene, tetrachloro-: 1.79516e-9 kg; data quality (3,2,1,1,5)
- methanol: 5.90801e-10 kg; data quality (3,1,1,1,5)
- Ethene, chloro-: 2.23769e-14 kg; data quality (4,1,1,1,4)
- acetonitrile: 7.55852e-11 kg; data quality (3,2,1,1,5)
- 1,4-dioxane: 1.15668e-7 kg; data quality (4,2,1,1,5)
- Ethane, 1,1,1-trichloro-, HCFC-140: 1.03119e-14 kg; data quality (3,1,1,1,4)
- 1,2,4-trimethylbenzene: 2.12398e-9 kg; data quality (5,1,1,1,5)
- bromoform: 5.99252e-13 kg; data quality (3,2,1,1,5)
- Propane, 1,2-dichloro-: 1.00368e-12 kg; data quality (4,2,1,1,5)
- methane, chlorodifluoro-, hcfc-22: 2.13525e-10 kg; data quality (4,1,1,1,4)
- 4,4'-isopropylidenediphenol: 9.40441e-11 kg; data quality (4,1,1,1,5)
- acetamide: 4.43413e-14 kg; data quality (4,1,1,1,4)
- Hydrocarbons, aromatic: 1.6123e-8 kg; data quality (3,2,1,4,1)
- acenaphthene: 3.92573e-10 kg; data quality (3,2,1,4,1)
- 3,3'-dimethylbenzidine: 1.74449e-12 kg; data quality (1,2,1,1,5)
- t-butyl methyl ether: 2.18747e-11 kg; data quality (3,2,1,1,5)
- acrylonitrile: 1.07524e-9 kg; data quality (4,2,1,1,5)
- Decabromodiphenyl oxide: 1.03119e-17 kg; data quality (4,1,1,1,4)
- AZIRIDINE: 9.8401e-14 kg; data quality (4,2,1,1,4)
- phosgene: 9.72953e-15 kg; data quality (5,2,1,1,4)
- Nitrobenzene: 4.17865e-14 kg; data quality (4,2,1,1,5)
- 4-Methyl-2-pentanone: 3.42356e-13 kg; data quality (4,1,1,1,4)
- PHOSPHORUS: 5.77883e-12 kg; data quality (2,2,1,1,5)
- monochloroethane: 2.20514e-11 kg; data quality (3,2,1,1,4)
- benzyl chloride: 1.58796e-13 kg; data quality (2,2,1,1,4)
- methyl isobutyl ketone: 9.4445e-7 kg; data quality (3,2,1,1,5)
- Thiram: 2.33424e-12, 3.7394e-10, 1.24835e-10 kg (3 entries, compartments not in this file); data quality (4,1,1,1,5)
- PCB-1: 1.26836e-18 kg; data quality (2,2,1,1,4)
- CHLORONAPHTHALENE: 1.38388e-17 kg; data quality (1,2,1,1,4)
- 1,4-dichlorobenzene: 5.12765e-11 kg; data quality (2,2,1,1,4)
- ammonia: 5.8317e-7 kg; data quality (3,2,1,2,3)
- Benzene, ethyl-: 3.66043e-13, 1.39211e-13 kg (2 entries, compartments not in this file); data quality (4,1,1,1,4)
- 1,1-DICHLOROETHYLENE: 6.06351e-10 kg; data quality (3,2,1,1,4)
- Ethene, trichloro-: 1.00092e-13 kg; data quality (5,1,1,1,5)
- chloroform: 5.38179e-11 kg; data quality (4,2,1,1,4)
- TERT-BUTYL ALCOHOL: 2.09435e-12 kg; data quality (4,1,1,1,4)
- ethylene glycol: 2.12217e-10 kg; data quality (5,1,1,1,4)
- BUTYL ACRYLATE: 6.75542e-10, 3.08111e-13, 5.19808e-12 kg (3 entries, compartments not in this file); data quality (4,1,1,1,4)
- TRICHLOROACETIC ACID: 7.42459e-15 kg; data quality (5,1,1,1,4)
- CFC-114: 1.03119e-13 kg; data quality (5,1,1,1,4)
- 2,3,4'-TRICHLOROBIPHENYL: 1.49953e-17 kg; data quality (2,2,1,1,4)
- Vinyl acetate: 3.39101e-11 kg; data quality (4,1,1,1,4)
- manganese: 3.5907e-10 kg; data quality (3,2,1,2,4)
- 4-nitrophenol: 2.09536e-14 kg; data quality (2,2,1,1,5)
- m-cresol: 9.95066e-15 kg; data quality (4,2,1,1,4)
- 1,2-BUTYLENE OXIDE: 3.736e-10 kg; data quality (4,2,1,1,4)
- formaldehyde: 9.08489e-12 kg; data quality (2,1,1,1,4)
- Butyraldehyde: 8.86018e-10, 3.48456e-9 kg (2 entries, compartments not in this file); data quality (4,1,1,1,5)
- antimony: 2.25853e-10 kg; data quality (3,2,1,1,5)
- carbon disulfide: 1.4408e-6 kg; data quality (4,2,1,1,5)
- NITROGEN TRIFLUORIDE: 2.62954e-13 kg; data quality (3,1,1,1,4)
- Methane, tetrachloro-, R-10: 6.3604e-14 kg; data quality (3,1,1,1,4)
- o-toluidine: 1.09213e-12 kg; data quality (4,2,1,1,5)
- particulates, < 10 um: 3.41757e-6 kg; data quality (3,2,1,1,5)
- Butadiene: 5.15597e-15 kg; data quality (3,1,1,1,4)
- ammonia: 3.2469e-9 kg; data quality (3,1,1,1,5)
- Acetaldehyde: 7.78551e-13 kg; data quality (3,1,1,1,4)
- Sulfuric acid: 4.6135e-10 kg; data quality (2,1,1,1,4)
- 1,1-DICHLOROETHYLENE: 1.12232e-12 kg; data quality (4,1,1,1,4)
- Ethane, pentafluoro-, HFC-125: 6.50216e-6 kg; data quality (4,2,1,4,1)
- cyclohexane: 1.00938e-6 kg; data quality (4,1,1,1,4)
- ethylene oxide: 2.24418e-11 kg; data quality (3,2,1,1,5)
- Ethane, 2-chloro-1,1,1,2-tetrafluoro-, HCFC-124: 3.14514e-13 kg; data quality (4,1,1,1,4)
- Phenol: 5.52589e-11 kg; data quality (3,1,1,1,4)
- Dibenz(a,h)anthracene: 2.33953e-14 kg; data quality (3,2,1,3,2)
- Dimethylamine: 1.88708e-13, 1.2993e-13 kg (2 entries, compartments not in this file); data quality (3,1,1,1,4)
- ACETONE CYANOHYDRIN: 1.75303e-13 kg; data quality (3,1,1,1,4)
- cumene: 5.45121e-9 kg; data quality (4,2,1,1,5)
- carbon tetrachloride: 2.62094e-10 kg; data quality (4,2,1,1,5)
- Urethane: 1.03119e-14 kg; data quality (4,1,1,1,4)
- 1-Methyl-2-pyrrolidinone: 3.7484e-8, 8.28091e-12, 1.03119e-15 kg (3 entries, compartments not in this file); data quality (5,1,1,1,4)
- O-ANISIDINE: 2.5883e-13 kg; data quality (2,1,1,1,4)
- phenol: 1.81918e-12 kg; data quality (3,1,1,1,4)
- Methane, bromo-, Halon 1001: 4.43413e-14 kg; data quality (5,1,1,1,4)
- AMMONIA: 5.45281e-10 kg; data quality (3,1,1,1,4)
- bis(2-chloroethyl)ether: 4.53308e-17 kg; data quality (3,2,1,1,4)
- Cobalt: 9.98289e-10 kg; data quality (3,2,1,1,5)
- Chromium, ion: 2.99046e-10 kg; data quality (2,2,1,2,4)
- ACRYLAMIDE: 1.54679e-14 kg; data quality (4,1,1,1,4)
- Cresol, p-: 1.03119e-17 kg; data quality (3,1,1,1,4)
- 1,2-DICHLOROETHYLENE: 1.02906e-8 kg; data quality (5,1,1,1,4)
- chromium: 8.67554e-14, 6.82861e-11 kg (2 entries, compartments not in this file); data quality (4,1,1,1,5)
- toluene: 4.70482e-6 kg; data quality (3,2,1,1,5)
- formic acid: 3.81327e-11 kg; data quality (3,1,1,1,4)
- copper: 9.36969e-11, 6.01543e-11, 6.68226e-14 kg (3 entries, compartments not in this file); data quality (4,1,1,1,5)
- Methane, difluoro-, HFC-32: 3.78656e-6 kg; data quality (4,2,1,4,1)
- isophorone: 8.39742e-11 kg; data quality (2,2,1,1,4)
- Water, saline: 1.73859e-5 m3; data quality (4,2,1,4,2)
- PHTHALIC ANHYDRIDE: 1.64991e-14 kg; data quality (3,1,1,1,4)
- p-cresol: 6.63377e-15 kg; data quality (4,2,1,1,4)
- benzene, ethyl-: 3.05724e-7 kg; data quality (4,2,1,2,4)
- benzene: 2.00785e-7 kg; data quality (3,2,1,4,1)
- Dimethipin: 4.27301e-9 kg; data quality (5,1,1,1,4)
- Benzo(g,h,i)perylene: 8.13761e-11 kg; data quality (3,2,1,1,4)
- selenium: 7.23309e-11 kg; data quality (2,2,1,1,5)
- diethanolamine: 8.57812e-8 kg; data quality (3,2,1,1,5)
- 2,4,5,2',5'-PENTACHLOROBIPHENYL: 2.54678e-17 kg; data quality (2,2,1,1,4)
- hydroquinone: 1.56886e-10 kg; data quality (3,2,1,1,5)
- Formic acid: 1.83721e-10, 2.57798e-13 kg (2 entries, compartments not in this file); data quality (3,1,1,1,4)
- Acrylic acid: 6.55666e-12, 3.09782e-13 kg (2 entries, compartments not in this file); data quality (4,1,1,1,4)
- HCFC-225ca: 1.05437e-10 kg; data quality (5,1,1,1,5)
- pyrene: 6.07648e-11 kg; data quality (3,2,1,4,1)
- ACRYLAMIDE: 3.58062e-13 kg; data quality (4,2,1,1,4)
- DIETHANOLAMINE: 1.09005e-8 kg; data quality (4,1,1,1,4)
- 2-methylnaphthalene: 1.07688e-12 kg; data quality (2,2,1,1,5)
- Butanol: 6.66509e-12 kg; data quality (5,1,1,1,4)
- m-xylene: 1.94556e-7 kg; data quality (3,2,1,1,4)
- Ethane, 1,1,1,2-tetrafluoro-, HFC-134a: 2.45075e-5 kg; data quality (4,2,1,4,1)
- n-nitrosodimethylamine: 3.87171e-15 kg; data quality (5,2,1,1,5)
- 4,4'-METHYLENEDIANILINE: 9.14234e-10 kg; data quality (4,2,1,1,5)
- Chrysene: 1.1391e-11 kg; data quality (3,2,1,4,1)
- Cresol: 2.23655e-13 kg; data quality (4,2,1,1,4)
- NITRIC ACID: 1.49496e-11 kg; data quality (3,1,1,1,5)
- ethylbenzene: 1.79255e-8 kg; data quality (4,1,1,1,5)
- polychlorinated biphenyls: 1.15248e-17 kg; data quality (3,2,1,1,5)
- toluene-2,4-diisocyante: 7.45477e-8 kg; data quality (3,2,1,1,5)
- Phosphorus: 3.13421e-8 kg; data quality (5,1,1,1,5)
- anthracene: 3.49943e-11 kg; data quality (3,2,1,4,1)
- ethane, 1,2-dibromo-: 1.67027e-12 kg; data quality (2,2,1,1,5)
- catechol: 6.8549e-13 kg; data quality (5,2,1,1,4)
- QUINOLINE: 3.19035e-11 kg; data quality (3,2,1,1,5)
- particulates, < 2.5 um: 1.54804e-5 kg; data quality (3,2,1,2,4)
- o-Xylene: 8.43006e-8 kg; data quality (3,2,1,1,4)
- biphenyl: 1.01712e-10 kg; data quality (4,2,1,1,5)
- benz[a]anthracene: 7.25527e-12 kg; data quality (3,2,1,4,1)
- M-CRESOL: 1.03119e-17 kg; data quality (3,1,1,1,4)
- acetaldehyde: 2.35009e-12 kg; data quality (3,1,1,1,4)
- Cresol, o-: 3.09358e-17 kg; data quality (2,1,1,1,4)
- Acrylonitrile: 4.03609e-14, 1.03119e-15 kg (2 entries, compartments not in this file); data quality (3,1,1,1,4)
- 4-aminobiphenyl: 9.24954e-17 kg; data quality (5,2,1,1,5)
- Dimethyl sulfate: 3.32705e-14 kg; data quality (2,2,1,1,4)
- Hydrazine, methyl-: 3.32088e-14 kg; data quality (2,2,1,1,4)
- Hexachlorocyclopentadiene: 5.63303e-13 kg; data quality (3,2,1,1,5)
- lead: 2.73175e-14, 9.22418e-13 kg (2 entries, compartments not in this file); data quality (3,1,1,1,5)
- N-Methylolacrylamide: 9.42191e-12, 1.44367e-14 kg (2 entries, compartments not in this file); data quality (5,1,1,1,4)
- Phthalate, dimethyl-: 6.21704e-9 kg; data quality (4,2,1,1,5)
- ETHYL ACRYLATE: 3.0079e-13 kg; data quality (3,1,1,1,4)
- 2,4-dinitrophenol: 3.4262e-14 kg; data quality (5,2,1,1,5)
- 1,4-dioxane: 1.8677e-11 kg; data quality (4,1,1,1,4)
- sulfur dioxide: 1.28073e-6 kg; data quality (2,2,1,2,4)
- 2,4-dimethylphenol: 5.15597e-13 kg; data quality (4,1,1,1,4)
- OXIRANEMETHANOL: 3.29982e-14 kg; data quality (5,1,1,1,4)
- VINYLFLUORIDE: 1.58313e-9 kg; data quality (4,1,1,1,5)
- silver: 3.4002e-12 kg; data quality (4,1,1,1,5)
- acenaphthylene: 4.64965e-10 kg; data quality (3,2,1,4,1)
- SEC-BUTYL ALCOHOL: 4.56211e-10 kg; data quality (5,1,1,1,5)
- Zinc: 1.18092e-10 kg; data quality (5,1,1,1,5)
- PICRIC ACID: 3.09358e-14 kg; data quality (5,1,1,1,4)
- Formaldehyde: 4.78474e-14 kg; data quality (2,1,1,1,4)
- Propanal: 4.43413e-14 kg; data quality (2,1,1,1,4)
- ETHYLENETHIOUREA: 2.33424e-13 kg; data quality (2,1,1,1,5)
- fluoranthene: 9.87936e-11 kg; data quality (3,2,1,4,1)
- N,N-DIMETHYLANILINE: 1.68717e-10 kg; data quality (5,2,1,1,5)
- 2-METHOXYETHANOL: 3.45939e-11 kg; data quality (4,2,1,1,5)
- Acrolein: 3.09358e-15, 5.15597e-15 kg (2 entries, compartments not in this file); data quality (2,1,1,1,4)
- ALLYL CHLORIDE: 1.04924e-12 kg; data quality (3,2,1,1,4)
- Naphthalene: 1.03119e-15 kg; data quality (4,1,1,1,4)
- Phthalate, dioctyl-: 4.67851e-9, 4.38509e-12 kg (2 entries, compartments not in this file); data quality (4,1,1,1,5)
- Acetophenone: 6.04279e-13 kg; data quality (4,1,1,1,4)
- Vinyl acetate: 1.47344e-12 kg; data quality (4,1,1,1,5)
- isoprene: 6.85434e-12 kg; data quality (3,1,1,1,4)
- Propylene oxide: 2.57798e-13 kg; data quality (3,1,1,1,4)
- nickel: 5.78913e-10 kg; data quality (3,2,1,2,4)
- acetophenone: 3.06284e-9 kg; data quality (4,2,1,1,5)
- nitric acid: 4.97641e-10 kg; data quality (3,1,1,1,4)
- hexachloroethane: 2.80173e-12 kg; data quality (4,2,1,1,5)
- propanal: 5.32291e-8 kg; data quality (3,2,1,4,1)
- ozone: 1.02022e-8 kg; data quality (4,1,1,1,5)
- 2,2,4-trimethylpentane: 4.65455e-7 kg; data quality (3,2,1,1,5)
- acetaldehyde: 2.81257e-7 kg; data quality (3,2,1,4,1)
- Methyl iodide: 4.12477e-15 kg; data quality (2,1,1,1,4)
- Benzo(k)fluoranthene: 1.17386e-9 kg; data quality (2,2,1,1,5)
- HYDROQUINONE: 2.74298e-12 kg; data quality (2,1,1,1,4)
- DIMETHYLAMINOAZOBENZENE: 3.35902e-14 kg; data quality (5,2,1,1,5)
- phthalic anhydride: 1.9943e-10 kg; data quality (2,2,1,1,5)
- Benzo(b)fluoranthene: 7.91846e-10 kg; data quality (2,2,1,1,5)
- butanol: 3.00296e-9 kg; data quality (5,1,1,1,5)
- Cumene: 3.09358e-15 kg; data quality (3,1,1,1,4)
- Ethane, 1,1,1-trifluoro-, HFC-143a: 2.782e-6 kg; data quality (4,2,1,4,1)
- NITROUS ACID: 3.33265e-10 kg; data quality (5,1,1,1,5)
- Indeno(1,2,3-cd)pyrene: 3.48434e-12 kg; data quality (3,2,1,4,1)
- Benzene, chloro-: 9.28074e-15 kg; data quality (3,1,1,1,4)
- P-PHENYLENEDIAMINE: 2.57798e-13 kg; data quality (5,1,1,1,4)
- p-phenylenediamine: 4.64419e-11 kg; data quality (5,2,1,1,4)
- dicyclopentadiene: 3.82878e-10 kg; data quality (4,1,1,1,5)
- acrolein: 1.73218e-8 kg; data quality (3,2,1,4,1)
- Chloroform: 3.29982e-14 kg; data quality (3,1,1,1,4)
- phenanthrene: 1.05069e-9 kg; data quality (3,2,1,4,1)
- nitrogen oxides: 0.000106931 kg; data quality (3,2,1,1,1)
- dimethyl formamide: 3.69035e-8 kg; data quality (4,2,1,1,5)
- Biphenyl: 5.15597e-15 kg; data quality (3,1,1,1,4)
- methyl methacrylate: 4.12928e-8 kg; data quality (4,2,1,1,4)
- cadmium: 2.55026e-10 kg; data quality (3,2,1,1,5)
- lead: 2.80464e-10 kg; data quality (3,2,1,1,5)

## Inventory method
Input-output

## Modelling constants
The reference unit of all processes is 1 USD2013 of the good or service. The technosphere inputs are based on the US BEA detailed input-output tables for 2007. The IO tables are combined to develop a commodity-by-commodity model based on the the industry-technology assumption (see Suh et al., 2010), which assumes all commodities produced by a given industry have the same input structure, but that multiple industries can produce the same commodity. Thus, model technosphere flows represent commodity outputs (and not industry outputs) from other processes in the model. There are no by-products included in these processes. All commodity production is based on US-conditions, despite in reality that some goods and services are produced overseas, as USEEIO v1.1 is a single-region IO model.

## Completeness
The input-output approach assures that all purchased inputs associated with the sectors making these commodities as reported in the US census for 2007 are included. The direct resources extracted including minerals, energy sources, water and land occupied are included. Emissions to air include all critieria air pollutants, greenhouse gases, and hazardous and toxic air pollutants as defined by US EPA. Releases to water include toxics, total nitrogen and total phosphorus, and water discharges. Releases to soil or groundwater include toxics and agriculutural pesticides. Some metal releases to air, water and soil are not included because they could not be speciated. Solid hazardous and non-hazardous wastes generated are not included as an elementary flows although purchases of waste services are included.

## Data treatment
Greenhouse gases are primarily from the US Greenhouse Gas Emission Inventory (USEPA 2016a). Biogenic C uptake is not included (change from version 1.0), as biogenic C emission are not included. Toxic releases to air, water and soil (except pesticides) are from the 2013 Toxic Release Inventory (USEPA 2015a). Criteria air pollutants and hazardous air pollutants are from the 2011 National Emissions Inventory (USEPA 2015b). All estimates are normalized by industry based on sector output in the data year, then converted to 2013 USD using relative sector-specific CPIs (if data year is not 2013). Energy use represent raw renewables or fossil fuel energies and is based on EIA data for 2014. See Table 1 in Yang, Ingwersen et al. 2017 and Supporting Information 1, and the v1.1 data update notes (Ingwersen et al. 2017) for all details on environmental data sources used.Land occupation associated with manufacturing buildings was estimated based on the building floorspace data provided by the U.S. Energy Information Administration in the 2010 Manufacturing Energy Consumption Survey (EIA 2013). Portions of total renewable energy (EIA 2016) based on EIA-923 reports for 2014 (EIA 2017) are included. Nitrogen and Phosphorus releases are modeled in total N and total P equivalents as estimated by the Discharge Monitoring Report Nutrient Loading tool (USEPA 2016b). Self-supplied withdrawals were assigned to industrial sectors based on water use statistics for Canadian industries by NAICS 3-digit sector scaled to US production levels based on gross domestic product by industry (BEA 2015; Statistics Canada 2010), and further disaggregated to the manufacturing sectors based on compensation of employees as provided by the 2007 IO tables (BEA 2015). Water withdrawals associated with public supply were allocated to sectors based on their use of water, sewage, and other services in USD based on the IO tables (BEA 2015). Portions of total renewable energy (EIA 2016) by type are assigned to sectors (hydro, wind, solar, or) based on EIA-923 reports for 2014 (EIA 2017).

## Data collection
2015-2016

## Sampling procedure
US federal government sources, including surveys and US EPA emissions databases are used as the primary sources. From these sources, data for US reporting establishments/facilities are aggregated by the NAICS sector as defined in the BEA detailed 2007 input-output tables. When level of sector aggregation differs, or when direct emissions are not reported but modeled, additional sources are used to make allocations and estimates.

## Review details
In regard to quality assurance and peer-review, each dataset created went through Quality Assurance as defined in a quality assurance project plans at US EPA, CSRA or ERG. The model was assembled with the IO model builder model (USEPA 2016c). Validation functions were used to check that all the model components were properly assembled and harmonized. Bayou Demeke and Santosh Ghimire provided internal peer review of the model methodology and the manuscript underwent standard EPA management review. An editor and two anonymous reviewers at the Journal of Cleaner Production reviewed the model. In regard to data quality evaluation, data quality assessment was performed at the flow and process levels according to the updated US EPA data quality assessment guidelines as defined in US EPA (2016b).

## Intended application
The primary application is for use in the US Environmentally-Extended Input-Ouput model, USEEIO, version 1.1. This model is being used by the US EPA for supporting tools that prioritize goods and services based on potential environmental impacts, resource use or emissions for large regions, including the US and US states, and as a strealined tool for organizations as a starting point to consider sustainable materials management. Model results are designed to provide meso/macro-level decision support.

## Project
USEEIO v1.1 was developed by the US EPA with CSRA and ERG with Wesley W. Ingwersen and David E. Meyer as research leads. Yi Yang was the technical lead on the work for CSRA (contract EP-C-15-012); Troy Hawkins was lead for ERG (contract EP-C-12-021).

## Sources
- USDA 2009b
- Kim et el. 2013
- Nickerson et al. 2011
- Edelen and Ingwersen 2017
- USDA 2006
- USGS 2016
- USEPA 2016c
- Blackhurst et al. 2010
- Statistics Canada 2010
- Lovelace 2009
- Ingwersen et al. 2017
- EIA 2017
- BLM 2008
- USEPA 2016b
- USDA 2009a
- EIA 2016
- Torcellini et al. 2003
- Maupin et al. 2014
- Macknick et al. 2011
- USDA 2016
- USEPA 2015a
- BEA 2015
- USEPA 2015b
- EIA 2015
- EIA 2013
- USGS 2015
- Goebes et al. 2003
- USDA 2014
- USEPA 2016a
- Yienger et al. 1995
- Ingwersen et al. DRAFT
