# Passenger ground transport

Dataset: openLCA process, unit process
Category: 48-49: Transportation and Warehousing
Geography: United States
Time period: 2017-01-01 to 2017-12-31
Data quality: US EPA - Process Pedigree Matrix (1;1)
Exchange data quality scheme: US EPA - Flow Pedigree Matrix
Generated by: US EPA with CSRA and ERG
Owner: US EPA
Published in: Yang, Ingwersen et al. 2017
restrictionsDescription: This model shold be appropriately cited (see Yang, Ingwersen et al. 2017 source or Publication field) when used. Any changes or derivations of this model by the user should be documented. The model itself and any results from use of this model shall not be construed to consitute US EPA opinion or policy.
copyright: false

## General comment
BEA Code & Name is '485000:Transit and ground passenger transportation'. Description of the primary industry producing this good or service, adapted from the Census Bureau NAICS 2007 descriptions: Industries in the Transit and Ground Passenger Transportation subsector include a variety of passenger transportation activities, such as urban transit systems; chartered bus, school bus, and interurban bus transportation; and taxis. These activities are distinguished based primarily on such production process factors as vehicle types, routes, and schedules. In this subsector, the principal splits identify scheduled transportation as separate from nonscheduled transportation. The scheduled transportation industry groups are Urban Transit Systems, Interurban and Rural Bus Transportation, and School and Employee Bus Transportation. The nonscheduled industry groups are the Charter Bus Industry and Taxi and Limousine Service. The Other Transit and Ground Passenger Transportation industry group includes both scheduled and nonscheduled transportation. Scenic and sightseeing ground transportation services are not included in this subsector but are included in Subsector 487, Scenic and Sightseeing Transportation. Sightseeing does not usually involve place-toplace transportation; the passenger's trip starts and ends at the same location.

## Technology
The process describes the average US production of this good or service within this NAICS-based grouping defined in the BEA 2007 detailed input-output tables (BEA 2015). Distribution, wholesale and retailing of this good or service, use, and final disposal are not included. Creation of a product system with this process will enable modeling of all upstream (supply-chain) activities.

## Geography
Data represent the 50 US states

## Time period
2017 was the year in which this version of USEEIO was released and is the target date for the model

## Reference product
- Passenger ground transport: 1 USD

## Inputs from technosphere
All rows: data quality (1,3,1,1,1)
- Wild-caught fish and game; at place of capture: 1.953e-8 USD
- Advertising and public relations: 0.00460347 USD
- Data processing and hosting: 0.000691475 USD
- Insurance agencies and brokerages: 0.011226 USD
- Chemicals (except basic chemicals, agrichemicals, polymers, paints, pharmaceuticals,soaps, cleaning compounds); at manufacturer: 0.000126072 USD
- Storage batteries; at manufacturer: 3.62024e-8 USD
- Veneer, plywood, and engineered wood; at manufacturer: 2.7704e-7 USD
- Vehicles and parts sales: 8.91101e-5 USD
- Other rubber products; at manufacturer: 0.00030151 USD
- News syndicates, libraries, archives, Internet publishing and all other information services: 3.62024e-9 USD
- Promoters and agents: 1.45827e-6 USD
- Unrefined oil and gas; at extraction site: 0.000265433 USD
- Cutting and machine tool accessory, rolling mill, and other metalworking machines; at manufacturer: 2.1483e-7 USD
- Water transport (boats, ships, ferries): 0.000266147 USD
- Computer storage device readers; at manufacturer: 1.953e-8 USD
- Railroad rolling stock; at manufacturer: 0.000375686 USD
- Primary iron, steel, and ferroalloy products; at manufacturer: 8.13781e-7 USD
- Mattresses, blinds and shades; at manufacturer: 2.1483e-7 USD
- Rubber tires; at manufacturer: 0.00136644 USD
- Warehousing: 0.0015104 USD
- Newspapers; at publisher: 7.24047e-9 USD
- Wireless communications; at manufacturer: 1.76767e-5 USD
- Cardboard; at manufacturer: 0.000195913 USD
- Motors and generators; at manufacturer: 0.00576327 USD
- Legal services: 0.00603226 USD
- Pipeline transport: 0.00104555 USD
- Household goods repair: 0.000412703 USD
- Golf courses, marinas, ski resorts, fitness and other rec centers and industries: 1.79395e-5 USD
- Carpets and rugs; at manufacturer: 3.62024e-9 USD
- Secondary copper products; at manufacturer: 1.77392e-7 USD
- Other secondary nonferrous metal products; at manufacturer: 1.08607e-8 USD
- Soap and cleaning compounds; at manufacturer: 1.78845e-5 USD
- other miscellaneous electrical equipment and components; at manufacturer: 9.76499e-8 USD
- Compressed Gases; at manufacturer: 3.7107e-6 USD
- External hard drives, CDs, other storage media; at manufacturer: 1.953e-8 USD
- Aluminum products; at manufacturer: 2.17214e-8 USD
- Aircraft; at manufacturer: 1.953e-8 USD
- Books, newspapers, magazines, and other print media; at manufacturer: 0.000814171 USD
- Cheese; at manufacturer: 1.953e-8 USD
- Welding and Soldering Equipment, Scales and Balances, and other general purpose machinery; at manufacturer: 0.0010819 USD
- Investigation and security: 0.000533852 USD
- Electricity; at consumer: 0.00584305 USD
- Wooden windows, door, and flooring; at manufacturer: 3.14961e-7 USD
- Metal pipe fittings, ball and roller bearings, industrial patterns, metal bath fixtures, other misc. fabricated metals; at manufacturer: 0.00194698 USD
- Ball and roller bearings; at manufacturer: 0.00125512 USD
- Marketing research and all other miscellaneous professional, scientific, and technical services: 0.000974008 USD
- Vehicle engines and engine parts; at manufacturer: 0.000496911 USD
- Monetary authorities and depository credit intermediation: 0.0164432 USD
- Vehicle seating and interior trim (upholstery); at manufacturer: 0.000142507 USD
- Communications equipment; at manufacturer: 3.98226e-8 USD
- Primary batteries; at manufacturer: 1.77354e-5 USD
- Other support services: 0.000195562 USD
- Asphalt pavement; at manufacturer: 0.000159619 USD
- Lessors of nonfinancial intangible assets: 2.38933e-6 USD
- Valve and fittings (except for plumbing); at manufacturer: 0.000282827 USD
- Commercial machinery repair: 0.000199423 USD
- Vehicle electrical and electronic equipment; at manufacturer: 0.000479322 USD
- Nonresidential building repair and maintanence: 0.0119591 USD
- Colleges, universities, junior colleges, and professional schools: 1.78917e-5 USD
- Other petroleum and coal products; at manufacturer: 0.000125697 USD
- Seafood; at manufacturer: 1.953e-8 USD
- Ships and ship repair; at manufacturer: 4.29659e-7 USD
- Internet publishing and broadcasting: 0.000124263 USD
- Motor vehicle steering, suspension components (except spring), and brake systems; at manufacturer: 0.00159245 USD
- Company and enterprise management: 0.0028049 USD
- Nondepository credit intermediation and related activities: 0.0189184 USD
- Air conditioning, refrigeration, and warm air heating equipment; at manufacturer: 1.77499e-5 USD
- Couriers and messengers: 0.00386858 USD
- Breweries and beer; at manufacturer: 7.81199e-8 USD
- Business support: 0.00225214 USD
- Light fixtures; at manufacturer: 0.000106413 USD
- Securities and commodities brokerage and exchanges: 0.00543386 USD
- Passenger ground transport: 0.00218192 USD
- Laminated plastic plates and shapes; at manufacturer: 1.77354e-5 USD
- Coal; at mine: 6.65931e-8 USD
- Machine shops; at manufacturer: 0.00195132 USD
- Fruit and vegetable preservation; at manufacturer: 1.953e-8 USD
- Limited-service restaurants: 0.000372387 USD
- Employment services: 0.00531354 USD
- Other support activities for mining: 8.5346e-6 USD
- Electronic capacitors, resistors, coils, transformers, connectors and other components (except semiconductors and printed circuit assemblies); at manufacturer: 1.953e-8 USD
- Software: 8.85705e-5 USD
- Metal coatings, engravings, and heat treatments; at manufacturer: 0.00039351 USD
- Stationery; at manufacturer: 1.953e-8 USD
- Nonferrous metal casts; at manufacturer: 1.953e-8 USD
- Full-service restaurants: 0.000230964 USD
- Natural gas; at consumer: 0.00339902 USD
- Other aircraft parts; at manufacturer: 4.08176e-6 USD
- Animal farms and aquaculture ponds (except cattle and poultry): 1.09368e-6 USD
- Wholesale trade: 0.0441249 USD
- Movies and film: 1.7577e-7 USD
- Accounting, tax preparation, bookkeeping, and payroll: 0.0051678 USD
- Speed changers, industrial high-speed drives, and gears; at manufacturer: 7.11175e-5 USD
- Other basic organic chemicals; at manufacturer: 0.00456128 USD
- Architectural, engineering, and related services: 0.0227029 USD
- Food and beverage stores: 1.76999e-5 USD
- Truck transport: 0.00304638 USD
- Paper; at manufacturer: 0.00263548 USD
- Hotels and campgrounds: 0.00102827 USD
- Springs and wires; at manufacturer: 0.000495487 USD
- Metal hinges, keys, lock, and other hardware; at manufacturer: 0.000141859 USD
- Dry-cleaning and laundry: 0.00744982 USD
- Other real estate: 0.0080678 USD
- Paints and coatings; at manufacturer: 0.000656727 USD
- Cement; at manufacturer: 5.32063e-5 USD
- Scientific research and development: 7.81199e-8 USD
- Petrochemicals; at manufacturer: 1.953e-8 USD
- All other converted paper products; at manufacturer: 1.953e-7 USD
- Office machinery; at manufacturer: 2.57405e-5 USD
- Hydraulic pumps, motors, cylinders and actuators; at manufacturer: 1.953e-8 USD
- Used and secondhand goods: 3.24198e-6 USD
- Waste management and remediation: 0.0208779 USD
- Polystyrene foam products; at manufacturer: 1.98324e-5 USD
- Coffee and tea; at manufacturer: 1.953e-8 USD
- Plastic pipe, fittings, and sausage casings; at manufacturer: 0.000141887 USD
- Travel arrangement and reservation: 0.00316528 USD
- Other basic inorganic chemicals; at manufacturer: 9.37439e-7 USD
- Buildings and dwellings services: 0.010617 USD
- Other plastic products; at manufacturer: 0.00141998 USD
- Other retail: 0.000937603 USD
- Environmental and other technical consulting services: 0.00359057 USD
- Pickup trucks, vans, and SUVs; at manufacturer: 9.76499e-8 USD
- Other vehicle parts; at manufacturer: 0.00518913 USD
- Other computer related services, including facilities management: 0.000514369 USD
- Vehicle rental and leasing: 0.0163192 USD
- Synthetic dyes and pigments; at manufacturer: 6.44489e-7 USD
- Other textiles; at manufacturer: 5.47795e-7 USD
- Urethane and other foam products; at manufacturer: 0.000443503 USD
- Semiconductors; at manufacturer: 3.5373e-5 USD
- Noncomparable imports: 0.00014567 USD
- Civic, social, professional, and similar organizations: 0.000265919 USD
- Watches, clocks, and other measuring and controlling devices; at manufacturer: 5.85899e-8 USD
- Telecommunications: 0.00495543 USD
- Consumer goods and general rental centers: 0.000903419 USD
- Rubber and plastic belts and hoses; at manufacturer: 0.000494948 USD
- Packaged meat (except poultry); at manufacturer: 3.90599e-8 USD
- Management consulting: 0.015122 USD
- Screws, nuts, and bolts; at manufacturer: 3.74663e-5 USD
- Light gauge metal cans, boxes, and containers; at manufacturer: 5.85899e-8 USD
- Fluid meters and counting devices; at manufacturer: 0.000673966 USD
- Magazines and journals; at publisher: 1.1878e-6 USD
- Books; at publisher: 3.62024e-9 USD
- Copper, nickel, lead, and zinc; at mine: 5.43036e-8 USD
- Paper bags and coated paper; at manufacturer: 0.000106813 USD
- Independent artists, writers, and performers: 0.00014193 USD
- Semiconductor machinery; at manufacturer: 2.42556e-7 USD
- Audio and video equipment; at manufacturer: 3.90599e-7 USD
- Secondary steel products; at manufacturer: 1.44809e-8 USD
- Abrasive products; at manufacturer: 5.06833e-8 USD
- Bread and other baked goods; at manufacturer: 5.85899e-8 USD
- Vehicle metal stamping; at manufacturer: 0.000372444 USD
- Computer systems design: 0.000602657 USD
- Aluminum; at manufacturer: 3.25821e-8 USD
- Fresh vegetables, melons, and potatoes; at farm: 1.953e-8 USD
- Air and gas compressors; at manufacturer: 1.30851e-6 USD
- Air purification and ventilation equipment; at manufacturer: 2.48841e-7 USD
- Metal structural products; at manufacturer: 1.08969e-6 USD
- Computer terminals and other computer peripheral equipment; at manufacturer: 5.45339e-5 USD
- Relay and industrial controls; at manufacturer: 0.000744595 USD
- Pumps and pumping equipment; at manufacturer: 0.000142255 USD
- All other food and drinking places: 1.81e-5 USD
- Ready-mix concrete; at manufacturer: 0.000638476 USD
- Metal windows, doors, and architectural products; at manufacturer: 1.77354e-5 USD
- Industrial process variable instruments; at manufacturer: 6.29728e-8 USD
- Directory, mailing list, and other publishers; at publisher: 1.3671e-7 USD
- State and local government enterprises: 7.19931e-5 USD
- Postal service: 0.00305928 USD
- Other transportation equipment; at manufacturer: 0.000689665 USD
- Transmission and power train parts; at manufacturer: 0.00469001 USD
- Ice cream and frozen desserts; at manufacturer: 1.953e-8 USD
- Drinking water and wastewater treatment; at consumer: 0.00541172 USD
- Investment advice, portfolio management, and other financial advising services: 0.000389126 USD
- Performances: 3.40109e-8 USD
- Vehicle repair: 0.000214339 USD
- Wireless telecommunications: 0.00191134 USD
- Other engine equipment; at manufacturer: 0.00233427 USD
- Facilities support: 0.000726996 USD
- Carbon and graphite products; at manufacturer: 0.000636502 USD
- Satellite, telecommunications resellers, and all other telecommunications: 0.00168368 USD
- Concrete pipe, bricks, and blocks; at manufacturer: 7.09418e-5 USD
- Rail transport: 0.000496725 USD
- Office administration: 0.000673087 USD
- Heating equipment other than warm air furnaces; at manufacturer: 4.70631e-8 USD
- Scenic and sightseeing transportation and support activities for transportation: 0.00330536 USD
- Other concrete products; at manufacturer: 1.44809e-8 USD
- Plastic bottles; at manufacturer: 1.77427e-5 USD
- Air transport: 0.000563095 USD
- Material handling equipment; at manufacturer: 7.42139e-7 USD
- Sports: 5.57323e-8 USD
- Vending, commercial laundry, and other commercial and service industry machinery; at manufacturer: 1.7755e-5 USD
- Wiring devices; at manufacturer: 1.19468e-7 USD
- Gasoline, fuels, and by-products of petroleum refining; at manufacturer: 0.169851 USD
- General merchandise stores: 3.54214e-5 USD
- Seasonings and dressings; at manufacturer: 3.90599e-8 USD
- Mechanical power transmission equipment; at manufacturer: 8.86772e-5 USD
- Insurance carriers: 0.0219936 USD
- Gaskets, seals, musical instruments, fasteners, brooms, brushes, mop and other misc. goods; at manufacturer: 0.000106487 USD
- Cardboard containers; at manufacturer: 9.17413e-5 USD
- Cutlery and handtools; at manufacturer: 0.000124419 USD
- Synthetic rubber and artificial and synthetic fibers; at manufacturer: 8.86772e-5 USD
- Communication and energy wire and cable; at manufacturer: 2.17214e-8 USD
- Glass and glass products; at manufacturer: 3.55155e-5 USD
- Commercial equipment rental: 0.00896528 USD
- Plastic bags, films, and sheets; at manufacturer: 8.95083e-5 USD
- Electronic equipment repair and maintenance: 0.000182724 USD
- Cast iron and steel; at manufacturer: 2.94903e-6 USD
- Specialized design: 0.001207 USD
- Plastics; at manufacturer: 5.32063e-5 USD
- Office supplies (not paper); at manufacturer: 3.46491e-7 USD

## Inputs from nature
- Occupation, urban, discontinuously built: 0.00102038 m2*a; data quality (4,2,1,1,1)
- Energy, solar: 0.00175726 MJ; data quality (3,1,1,1,1)
- Water, fresh: 0.00286652, 0.00165637 m3 (2 entries, compartments not in this file); data quality (1,2,1,4,2)
- Occupation, traffic area, road network: 0.228974 m2*a; data quality (2,3,1,1,1)

## Emissions to nature
- 2-methylnaphthalene: 8.22079e-10 kg; data quality (2,2,1,1,3)
- Triethyl amine: 1.54734e-11 kg; data quality (4,2,1,1,3)
- Dimethylcarbamyl chloride: 4.31465e-17 kg; data quality (5,2,1,1,5)
- Phosphorus: 2.81776e-11 kg; data quality (4,1,1,1,5)
- Propoxur: 5.54404e-15 kg; data quality (5,2,1,1,5)
- manganese: 3.45133e-10, 5.56481e-12 kg (2 entries, compartments not in this file); data quality (4,1,1,1,5)
- Dibenz(a,h)anthracene: 4.01163e-10 kg; data quality (3,2,1,4,1)
- BUTYL ISOCYANATE: 3.22953e-11 kg; data quality (4,2,1,1,5)
- hydroquinone: 8.63229e-12 kg; data quality (3,2,1,1,5)
- Ethylene glycol: 9.6063e-10 kg; data quality (5,1,1,1,5)
- phenanthrene: 1.47764e-7 kg; data quality (3,2,1,4,1)
- Propane, 1,2-dichloro-: 2.25675e-12 kg; data quality (4,2,1,1,5)
- phenol: 4.18795e-9 kg; data quality (4,2,1,1,4)
- methylene diphenyl diisocyanate: 1.93417e-10 kg; data quality (4,2,1,1,5)
- ALLYL CHLORIDE: 3.1707e-12 kg; data quality (3,2,1,1,3)
- ETHYLENETHIOUREA: 8.87047e-15 kg; data quality (5,2,1,1,5)
- copper: 5.80225e-11, 5.72476e-10, 1.23305e-7 kg (3 entries, compartments not in this file); data quality (4,1,1,1,5)
- ethylene glycol: 9.25024e-12 kg; data quality (5,1,1,1,5)
- mercury: 3.23491e-11 kg; data quality (3,2,1,4,1)
- particulates, < 2.5 um: 8.85215e-5 kg; data quality (3,2,1,1,1)
- acetonitrile: 7.33388e-12 kg; data quality (3,2,1,1,5)
- ethyl acrylate: 6.38974e-11 kg; data quality (4,2,1,1,5)
- Chromium VI: 1.0889e-10 kg; data quality (3,2,1,3,2)
- lead: 5.09687e-9 kg; data quality (3,2,1,1,3)
- toluene, 2,4-dinitro-: 4.54481e-15 kg; data quality (5,2,1,1,5)
- 2-NITROPROPANE: 1.42311e-13 kg; data quality (5,1,1,1,5)
- VOC, volatile organic compounds: 0.000184174 kg; data quality (3,2,1,1,1)
- hexachloroethane: 2.77202e-14 kg; data quality (4,2,1,1,5)
- 1,2,4-trimethylbenzene: 2.25374e-11 kg; data quality (5,1,1,1,5)
- Methane: 2.76079e-6 kg; data quality (4,2,1,4,1)
- Water, fresh: 0.00382959 m3; data quality (1,2,1,4,2)
- 1,4-dichlorobenzene: 1.2336e-11 kg; data quality (2,2,1,1,5)
- NITROUS ACID: 2.84623e-14 kg; data quality (5,1,1,1,5)
- sulfur dioxide: 3.10462e-6 kg; data quality (3,2,1,3,3)
- 1-METHYLNAPTHALENE: 9.84902e-10 kg; data quality (2,2,1,1,3)
- chlorine: 4.09857e-12 kg; data quality (2,1,1,1,5)
- lead: 4.02039e-12, 4.96674e-8 kg (2 entries, compartments not in this file); data quality (3,1,1,1,5)
- phthalate, dioctyl-: 2.6573e-11 kg; data quality (3,2,1,1,4)
- methane, dichloro-, hcc-30: 1.91811e-8 kg; data quality (3,2,1,1,5)
- ethane, 1,1,2-trichloro-: 3.54805e-13 kg; data quality (4,2,1,1,5)
- butadiene: 8.47586e-7 kg; data quality (3,2,1,2,1)
- hydrogen fluoride: 7.95771e-10 kg; data quality (2,2,1,1,5)
- benzene: 1.62235e-14 kg; data quality (3,1,1,1,5)
- Aluminum: 7.5425e-12 kg; data quality (4,1,1,1,5)
- pentachlorophenol: 3.45641e-17 kg; data quality (3,2,1,1,5)
- chlorine: 1.16282e-9 kg; data quality (4,2,1,1,5)
- methanol: 1.89672e-8 kg; data quality (4,2,1,1,4)
- Ethylene glycol monoethyl ether: 6.40165e-10 kg; data quality (3,2,1,1,5)
- Cresol: 3.83943e-12 kg; data quality (4,2,1,1,5)
- Triethylene glycol: 3.98617e-15 kg; data quality (5,2,1,1,5)
- 1,1,2,2-tetrachloroethane: 1.71283e-11 kg; data quality (3,2,1,1,4)
- chromium: 4.44717e-13, 4.30207e-10, 3.85871e-12 kg (3 entries, compartments not in this file); data quality (4,1,1,1,5)
- 1,1,1-trichloroethane: 3.69703e-8 kg; data quality (3,2,1,1,5)
- antimony: 2.56409e-11 kg; data quality (3,2,1,1,5)
- n-nitrosodimethylamine: 1.46492e-16 kg; data quality (5,2,1,1,3)
- selenium: 1.85116e-11 kg; data quality (2,2,1,1,5)
- benzene, chloro-: 5.41309e-12 kg; data quality (4,2,1,1,5)
- ethene, tetrachloro-: 4.26711e-9 kg; data quality (3,2,1,1,5)
- carbon monoxide: 0.00234543 kg; data quality (3,2,1,1,1)
- 2-chloro-1-phenylethanone: 7.86915e-14 kg; data quality (2,2,1,1,5)
- 1-Methyl-2-pyrrolidinone: 2.94212e-10, 2.21152e-11 kg (2 entries, compartments not in this file); data quality (5,1,1,1,5)
- biphenyl: 1.03185e-11 kg; data quality (4,2,1,1,5)
- butanol: 2.29491e-9 kg; data quality (5,1,1,1,5)
- Propane sultone: 5.54404e-15 kg; data quality (5,2,1,1,5)
- chloroform: 1.33218e-10 kg; data quality (4,2,1,1,5)
- ethane, 1,2-dichloro-: 5.72543e-11 kg; data quality (3,2,1,1,5)
- formaldehyde: 1.35049e-5 kg; data quality (3,2,1,1,1)
- ammonia: 3.4252e-6 kg; data quality (3,2,1,4,1)
- Hexachlorocyclopentadiene: 1.09166e-13 kg; data quality (3,2,1,1,5)
- Nitrobenzene: 5.74707e-14 kg; data quality (4,2,1,1,5)
- isophorone: 1.90916e-11 kg; data quality (2,2,1,1,5)
- m-xylene: 1.23452e-7 kg; data quality (3,2,1,4,1)
- trichloroethylene: 2.57137e-8 kg; data quality (3,2,1,1,5)
- Naphthalene: 3.36586e-11 kg; data quality (4,1,1,1,5)
- styrene: 2.15757e-7 kg; data quality (3,2,1,4,1)
- Indeno(1,2,3-cd)pyrene: 1.45523e-9 kg; data quality (3,2,1,4,1)
- cadmium: 1.36351e-11 kg; data quality (3,2,1,1,5)
- Dinitrogen monoxide: 2.10019e-7 kg; data quality (4,2,1,4,1)
- acetamide: 5.54404e-15 kg; data quality (5,2,1,1,5)
- Nitrogen: 1.59226e-7 kg; data quality (4,2,1,1,5)
- ethylene oxide: 4.14855e-13 kg; data quality (3,2,1,1,5)
- manganese: 1.10564e-9 kg; data quality (3,2,1,3,2)
- acetophenone: 1.71119e-13 kg; data quality (4,2,1,1,5)
- hydrogen chloride: 1.02857e-8 kg; data quality (2,2,1,1,5)
- 2,4-D: 3.44106e-11 kg; data quality (3,2,1,1,5)
- 1,1-DICHLOROETHYLENE: 1.60968e-12 kg; data quality (3,2,1,1,5)
- acenaphthylene: 6.92442e-8 kg; data quality (3,2,1,4,1)
- ethylbenzene: 2.00582e-10 kg; data quality (4,1,1,1,5)
- ethane, 1,2-dibromo-: 3.15732e-13 kg; data quality (2,2,1,1,5)
- 2-ethoxyethyl acetate: 1.08533e-11 kg; data quality (5,2,1,1,5)
- 1,4-dioxane: 4.69093e-13 kg; data quality (4,2,1,1,5)
- NITROGLYCERIN: 1.64671e-9, 4.0047e-9, 1.0532e-9 kg (3 entries, compartments not in this file); data quality (5,1,1,1,5)
- methane, bromo-, halon 1001: 4.59511e-11 kg; data quality (3,2,1,1,5)
- Sulfuric acid: 4.31275e-9 kg; data quality (2,1,1,1,5)
- Hydrocarbons, aromatic: 2.55885e-8 kg; data quality (3,2,1,4,1)
- hexachloro-1,3-butadiene: 4.96428e-13 kg; data quality (4,2,1,1,5)
- benzene: 3.97578e-6 kg; data quality (3,2,1,3,1)
- barium: 7.13464e-14 kg; data quality (4,1,1,1,5)
- nitric acid: 2.84623e-14, 8.11799e-9 kg (2 entries, compartments not in this file); data quality (3,1,1,1,5)
- benzene, ethyl-: 1.6868e-6 kg; data quality (3,2,1,4,1)
- vinyl acetate: 3.6816e-11 kg; data quality (4,2,1,1,3)
- Xylene: 1.0531e-13, 3.75735e-14 kg (2 entries, compartments not in this file); data quality (4,1,1,1,5)
- methyl methacrylate: 1.02797e-11 kg; data quality (4,2,1,1,3)
- Nickel, ion: 1.32404e-13 kg; data quality (3,2,1,1,3)
- t-butyl methyl ether: 8.49856e-10 kg; data quality (3,2,1,1,5)
- fluorene: 8.51246e-8 kg; data quality (3,2,1,4,1)
- carbonyl sulfide: 2.22176e-12 kg; data quality (4,2,1,1,5)
- NITRIC ACID: 2.11532e-11 kg; data quality (3,1,1,1,5)
- maleic anhydride: 9.10364e-15 kg; data quality (2,2,1,1,3)
- o-cresol: 4.05552e-15 kg; data quality (4,2,1,1,5)
- Phthalate, dibutyl-: 2.15482e-11 kg; data quality (4,2,1,1,4)
- Chloramben: 4.50055e-16 kg; data quality (2,2,1,1,3)
- 3-methylcholanthrene: 2.23135e-15 kg; data quality (2,2,1,1,5)
- benzyl chloride: 7.8691e-12 kg; data quality (2,2,1,1,5)
- 2,2,4-trimethylpentane: 2.02392e-6 kg; data quality (3,2,1,4,1)
- PHOSPHORUS: 3.16012e-10 kg; data quality (2,2,1,1,5)
- Benzo(b)fluoranthene: 3.33885e-9 kg; data quality (3,2,1,4,1)
- acrylonitrile: 3.04376e-11 kg; data quality (4,2,1,1,5)
- 2,4,5-trichlorophenol: 5.54404e-15 kg; data quality (2,2,1,1,5)
- bromoform: 4.42729e-13 kg; data quality (3,2,1,1,5)
- Chrysene, 5-methyl-: 2.02294e-16 kg; data quality (2,2,1,1,5)
- phenol: 3.41547e-13 kg; data quality (3,1,1,1,5)
- Dinitrotoluene, technical grade (2,4 (77%)- and 2,6 (19%)-): 2.66495e-9, 2.84623e-14 kg (2 entries, compartments not in this file); data quality (5,1,1,1,5)
- Carbon dioxide: 0.252037 kg; data quality (4,2,1,4,1)
- methyl isobutyl ketone: 4.14887e-9 kg; data quality (4,2,1,1,5)
- arsenic: 5.64099e-10 kg; data quality (3,2,1,4,1)
- Diethylene glycol butyl ether: 1.10479e-10 kg; data quality (4,2,1,1,5)
- diethanolamine: 1.27028e-11 kg; data quality (3,2,1,1,5)
- o-Xylene: 4.465e-8 kg; data quality (3,2,1,4,1)
- acetaldehyde: 5.64713e-6 kg; data quality (3,2,1,1,1)
- particulates, < 10 um: 2.6513e-5 kg; data quality (3,2,1,4,1)
- epichlorohydrin: 1.10943e-12 kg; data quality (3,2,1,1,5)
- Ethane, 1,1,1-trifluoro-, HFC-143a: 2.11734e-7 kg; data quality (4,2,1,4,1)
- Bis-(chloromethyl)ether: 8.13842e-19 kg; data quality (5,2,1,1,3)
- Chrysene: 1.84472e-8 kg; data quality (3,2,1,4,1)
- hexachlorobenzene: 1.35363e-12 kg; data quality (3,2,1,1,5)
- toluene: 3.75735e-14 kg; data quality (5,1,1,1,5)
- Urethane: 3.29245e-15 kg; data quality (5,2,1,1,5)
- Chromium, ion: 2.14195e-10 kg; data quality (3,2,1,4,2)
- Hexane: 3.75735e-18 kg; data quality (4,1,1,1,5)
- Phosphorus: 1.42486e-7 kg; data quality (2,1,1,1,5)
- Hydrazine: 1.12537e-12 kg; data quality (4,2,1,1,5)
- Ethane, 1,1,1,2-tetrafluoro-, HFC-134a: 1.86522e-6 kg; data quality (4,2,1,4,1)
- 1,2-BUTYLENE OXIDE: 3.28024e-12 kg; data quality (4,2,1,1,5)
- hexane: 1.49686e-6 kg; data quality (3,2,1,4,1)
- cyclohexane: 2.84623e-14 kg; data quality (4,1,1,1,5)
- Benzo(k)fluoranthene: 8.98509e-10 kg; data quality (3,2,1,4,1)
- cumene: 8.01126e-11 kg; data quality (4,2,1,1,4)
- toluene: 6.42896e-6 kg; data quality (3,2,1,4,1)
- carbon disulfide: 6.1016e-12 kg; data quality (4,2,1,1,5)
- polychlorinated biphenyls: 6.10103e-18 kg; data quality (3,2,1,1,5)
- acenaphthene: 3.82898e-8 kg; data quality (3,2,1,4,1)
- benz[a]anthracene: 3.09831e-8 kg; data quality (3,2,1,4,1)
- beryllium: 2.10044e-12 kg; data quality (2,2,1,1,4)
- 2-(2-BUTOXYETHOXY) ETHYL ACETATE: 1.22304e-11 kg; data quality (5,2,1,1,5)
- benzo(a)pyrene: 1.02198e-8 kg; data quality (3,2,1,4,1)
- p-phenylenediamine: 5.54404e-13 kg; data quality (5,2,1,1,5)
- naphthalene: 1.2854e-6 kg; data quality (3,2,1,4,1)
- 2-METHOXYETHANOL: 9.40216e-14 kg; data quality (4,2,1,1,3)
- 1,4-BENZOQUINONE: 1.2425e-16 kg; data quality (3,2,1,1,5)
- hydrogen sulfide: 2.82572e-11 kg; data quality (3,2,1,1,5)
- CHLOROPRENE: 7.81288e-16 kg; data quality (2,2,1,1,3)
- dibenzofuran: 7.78595e-13 kg; data quality (4,2,1,1,5)
- 2-Acetylaminofluorene: 5.54404e-13 kg; data quality (5,2,1,1,5)
- Methane, difluoro-, HFC-32: 2.88188e-7 kg; data quality (4,2,1,4,1)
- Benzo(g,h,i)perylene: 7.51469e-17 kg; data quality (2,1,1,1,5)
- Xylene: 5.17804e-6 kg; data quality (3,2,1,4,1)
- PYRENE, 1-NITRO-: 3.98742e-16 kg; data quality (2,2,1,1,5)
- benzidine: 1.20484e-12 kg; data quality (2,2,1,1,5)
- acrylic acid: 2.31929e-11 kg; data quality (4,2,1,1,5)
- 1,2,4-trichlorobenzene: 3.76213e-13 kg; data quality (4,2,1,1,5)
- Toluene, 2,4-dinitro-: 5.69245e-14 kg; data quality (5,1,1,1,5)
- Propene: 2.82836e-12 kg; data quality (3,1,1,1,5)
- 3,3'-dimethylbenzidine: 6.60404e-15 kg; data quality (1,2,1,1,5)
- Propane, 1,1,1,3,3,3-hexafluoro-, HCFC-236fa: 5.72004e-9 kg; data quality (4,2,1,4,1)
- Propene, 1,3-dichloro-: 2.24924e-12 kg; data quality (3,2,1,1,5)
- nickel: 6.46919e-10, 1.21249e-14 kg (2 entries, compartments not in this file); data quality (4,1,1,1,5)
- propylene oxide: 5.63393e-12 kg; data quality (3,2,1,1,4)
- naphthalene: 3.75735e-15 kg; data quality (4,1,1,1,5)
- acrolein: 9.19324e-7 kg; data quality (3,2,1,4,1)
- Hydrazine, methyl-: 1.73743e-12 kg; data quality (2,2,1,1,5)
- carbon tetrachloride: 3.52222e-11 kg; data quality (4,2,1,1,5)
- aniline: 9.7735e-16 kg; data quality (4,2,1,1,4)
- Ethane, pentafluoro-, HFC-125: 4.94868e-7 kg; data quality (4,2,1,4,1)
- pyrene: 1.25339e-7 kg; data quality (3,2,1,4,1)
- 2,4-dinitrophenol: 4.49761e-15 kg; data quality (5,2,1,1,5)
- anthracene: 4.29538e-8 kg; data quality (3,2,1,4,1)
- Benzo(a)anthracene: 1.95475e-14 kg; data quality (2,2,1,1,5)
- methane, monochloro-, r-40: 9.34246e-12 kg; data quality (3,2,1,1,5)
- CHLOROMETHYL METHYL ETHER: 9.18258e-15 kg; data quality (5,2,1,1,3)
- monochloroethane: 3.3031e-11 kg; data quality (3,2,1,1,5)
- Phthalate, dibutyl-: 9.7728e-10 kg; data quality (4,1,1,1,5)
- Dimethyl sulfate: 8.63113e-13 kg; data quality (2,2,1,1,5)
- Cobalt: 8.13671e-11 kg; data quality (3,2,1,1,5)
- ethylene glycol: 8.40696e-10 kg; data quality (5,2,1,1,5)
- 7-OXABICYCLO[2,2,1]HEPTANE-2,3-DICARBOXYLIC ACID, DIPOTASSIUM SALT: 4.55823e-10 kg; data quality (5,1,1,1,5)
- toluene-2,4-diisocyante: 3.76359e-13 kg; data quality (3,2,1,1,5)
- para-xylene: 2.3054e-9 kg; data quality (3,2,1,4,1)
- ammonia: 7.2566e-11 kg; data quality (3,1,1,1,5)
- CHLORONAPHTHALENE: 3.44143e-19 kg; data quality (1,2,1,1,5)
- cyanide: 2.6554e-10 kg; data quality (2,2,1,1,5)
- Ethene, chloro-: 1.20899e-10 kg; data quality (3,2,1,1,5)
- fluoranthene: 9.44893e-8 kg; data quality (3,2,1,4,1)
- AZIRIDINE: 2.27387e-15 kg; data quality (5,2,1,1,3)
- nitrogen oxides: 0.00154989 kg; data quality (3,2,1,1,1)
- Asbestos: 6.86361e-14 kg; data quality (5,2,1,1,5)
- bis(2-chloroethyl)ether: 7.42902e-18 kg; data quality (3,2,1,1,5)
- nickel: 1.91445e-9 kg; data quality (3,2,1,4,1)
- Phthalate, dimethyl-: 1.85784e-12 kg; data quality (4,2,1,1,5)
- Benzo(g,h,i)perylene: 2.58165e-9 kg; data quality (3,2,1,4,1)
- dimethyl formamide: 1.36597e-10 kg; data quality (4,2,1,1,5)
- 2-nitropropane: 9.99139e-13 kg; data quality (5,2,1,1,3)
- 4-nitrophenol: 3.89816e-15 kg; data quality (2,2,1,1,5)
- formic acid: 9.87641e-12 kg; data quality (3,1,1,1,5)
- propanal: 7.74588e-7 kg; data quality (3,2,1,4,1)
- Methyl iodide: 5.80269e-15 kg; data quality (4,2,1,1,3)

## Inventory method
Input-output

## Modelling constants
The reference unit of all processes is 1 USD2013 of the good or service. The technosphere inputs are based on the US BEA detailed input-output tables for 2007. The IO tables are combined to develop a commodity-by-commodity model based on the the industry-technology assumption (see Suh et al., 2010), which assumes all commodities produced by a given industry have the same input structure, but that multiple industries can produce the same commodity. Thus, model technosphere flows represent commodity outputs (and not industry outputs) from other processes in the model. There are no by-products included in these processes. All commodity production is based on US-conditions, despite in reality that some goods and services are produced overseas, as USEEIO v1.1 is a single-region IO model.

## Completeness
The input-output approach assures that all purchased inputs associated with the sectors making these commodities as reported in the US census for 2007 are included. The direct resources extracted including minerals, energy sources, water and land occupied are included. Emissions to air include all critieria air pollutants, greenhouse gases, and hazardous and toxic air pollutants as defined by US EPA. Releases to water include toxics, total nitrogen and total phosphorus, and water discharges. Releases to soil or groundwater include toxics and agriculutural pesticides. Some metal releases to air, water and soil are not included because they could not be speciated. Solid hazardous and non-hazardous wastes generated are not included as an elementary flows although purchases of waste services are included.

## Data treatment
Greenhouse gases are primarily from the US Greenhouse Gas Emission Inventory (USEPA 2016a). Biogenic C uptake is not included (change from version 1.0), as biogenic C emission are not included. Toxic releases to air, water and soil (except pesticides) are from the 2013 Toxic Release Inventory (USEPA 2015a). Criteria air pollutants and hazardous air pollutants are from the 2011 National Emissions Inventory (USEPA 2015b). All estimates are normalized by industry based on sector output in the data year, then converted to 2013 USD using relative sector-specific CPIs (if data year is not 2013). Energy use represent raw renewables or fossil fuel energies and is based on EIA data for 2014. See Table 1 in Yang, Ingwersen et al. 2017 and Supporting Information 1, and the v1.1 data update notes (Ingwersen et al. 2017) for all details on environmental data sources used.Total transportation land use is reported in the USGA Major Uses of Land for 2007 (Nickerson et al. 2011). Land use for roads was allocated to relevant transportation sectors based on the shares of Federal Highway Administration fees. Transportation land use for airports and railroads were each assumed 5% of the total use of urban land.

## Data collection
2015-2016

## Sampling procedure
US federal government sources, including surveys and US EPA emissions databases are used as the primary sources. From these sources, data for US reporting establishments/facilities are aggregated by the NAICS sector as defined in the BEA detailed 2007 input-output tables. When level of sector aggregation differs, or when direct emissions are not reported but modeled, additional sources are used to make allocations and estimates.

## Review details
In regard to quality assurance and peer-review, each dataset created went through Quality Assurance as defined in a quality assurance project plans at US EPA, CSRA or ERG. The model was assembled with the IO model builder model (USEPA 2016c). Validation functions were used to check that all the model components were properly assembled and harmonized. Bayou Demeke and Santosh Ghimire provided internal peer review of the model methodology and the manuscript underwent standard EPA management review. An editor and two anonymous reviewers at the Journal of Cleaner Production reviewed the model. In regard to data quality evaluation, data quality assessment was performed at the flow and process levels according to the updated US EPA data quality assessment guidelines as defined in US EPA (2016b).

## Intended application
The primary application is for use in the US Environmentally-Extended Input-Ouput model, USEEIO, version 1.1. This model is being used by the US EPA for supporting tools that prioritize goods and services based on potential environmental impacts, resource use or emissions for large regions, including the US and US states, and as a strealined tool for organizations as a starting point to consider sustainable materials management. Model results are designed to provide meso/macro-level decision support.

## Project
USEEIO v1.1 was developed by the US EPA with CSRA and ERG with Wesley W. Ingwersen and David E. Meyer as research leads. Yi Yang was the technical lead on the work for CSRA (contract EP-C-15-012); Troy Hawkins was lead for ERG (contract EP-C-12-021).

## Sources
- Yienger et al. 1995
- USGS 2015
- Statistics Canada 2010
- USEPA 2016b
- USEPA 2015b
- Edelen and Ingwersen 2017
- Blackhurst et al. 2010
- EIA 2016
- Macknick et al. 2011
- USDA 2009b
- Kim et el. 2013
- BEA 2015
- Torcellini et al. 2003
- USEPA 2016a
- Nickerson et al. 2011
- USEPA 2016c
- USDA 2014
- EIA 2013
- EIA 2015
- Goebes et al. 2003
- Ingwersen et al. 2017
- Ingwersen et al. DRAFT
- BLM 2008
- USDA 2016
- Lovelace 2009
- Maupin et al. 2014
- USEPA 2015a
- USDA 2006
- EIA 2017
- USGS 2016
- USDA 2009a
