# Electricity; at consumer

Dataset: openLCA process, unit process
Category: 2211: Electric Power Generation, Transmission and Distribution
Geography: United States
Time period: 2017-01-01 to 2017-12-31
Data quality: US EPA - Process Pedigree Matrix (1;1)
Exchange data quality scheme: US EPA - Flow Pedigree Matrix
Generated by: US EPA with CSRA and ERG
Owner: US EPA
Published in: Yang, Ingwersen et al. 2017
restrictionsDescription: This model shold be appropriately cited (see Yang, Ingwersen et al. 2017 source or Publication field) when used. Any changes or derivations of this model by the user should be documented. The model itself and any results from use of this model shall not be construed to consitute US EPA opinion or policy.
copyright: false

## General comment
BEA Code & Name is '221100:Electric power generation, transmission, and distribution'. Description of the primary industry producing this good or service, adapted from the Census Bureau NAICS 2007 descriptions: This industry group comprises establishments primarily engaged in generating, transmitting, and/or distributing electric power. Establishments in this industry group may perform one or more of the following activities: (1) operate generation facilities that produce electric energy; (2) operate transmission systems that convey the electricity from the generation facility to the distribution system; and (3) operate distribution systems that convey electric power received from the generation facility or the transmission system to the final consumer.

## Technology
The process describes the average US production of this good or service within this NAICS-based grouping defined in the BEA 2007 detailed input-output tables (BEA 2015). Distribution, wholesale and retailing of this good or service, use, and final disposal are not included. Creation of a product system with this process will enable modeling of all upstream (supply-chain) activities.

## Geography
Data represent the 50 US states

## Time period
2017 was the year in which this version of USEEIO was released and is the target date for the model

## Reference product
- Electricity; at consumer: 1 USD

## Inputs from technosphere
All rows: data quality (1,3,1,1,1)
- Electronic equipment repair and maintenance: 0.000122377 USD
- State and local government enterprises: 0.00074369 USD
- Wireless telecommunications: 0.000424762 USD
- Soft drinks, bottled water, and ice; at manufacturer: 6.14092e-6 USD
- Facilities support: 5.76174e-6 USD
- Investment advice, portfolio management, and other financial advising services: 0.000324043 USD
- Switchgear and switchboards; at manufacturer: 5.78306e-6 USD
- Software: 0.000107786 USD
- Cutlery and handtools; at manufacturer: 1.72852e-5 USD
- Data processing and hosting: 0.00399659 USD
- Other basic inorganic chemicals; at manufacturer: 0.00114431 USD
- Other textiles; at manufacturer: 9.22854e-6 USD
- Leather; at manufacturer: 8.6426e-6 USD
- Asphalt shingles; at manufacturer: 6.15236e-6 USD
- Natural gas; at consumer: 0.000824068 USD
- Dimensional stone; at mine: 0.000613646 USD
- Advertising and public relations: 0.00648623 USD
- Nonresidential building repair and maintanence: 0.0220564 USD
- Sand, gravel, clay, phosphate, other nonmetallic minerals; at mine: 0.000875784 USD
- Lumber and treated lumber; at manufacturer: 5.97837e-6 USD
- Industrial process variable instruments; at manufacturer: 2.61658e-5 USD
- Nondepository credit intermediation and related activities: 0.00141175 USD
- General merchandise stores: 4.03321e-5 USD
- Electronic capacitors, resistors, coils, transformers, connectors and other components (except semiconductors and printed circuit assemblies); at manufacturer: 8.6426e-6 USD
- Polystyrene foam products; at manufacturer: 2.88087e-6 USD
- Vehicle rental and leasing: 0.000481209 USD
- News syndicates, libraries, archives, Internet publishing and all other information services: 0.00023857 USD
- Motor vehicle steering, suspension components (except spring), and brake systems; at manufacturer: 5.76174e-6 USD
- Drinking water and wastewater treatment; at consumer: 0.00925149 USD
- Other rubber products; at manufacturer: 1.23047e-5 USD
- Clothing; at manufacturer: 8.60187e-5 USD
- Other support services: 0.00145467 USD
- Compressed Gases; at manufacturer: 0.00261009 USD
- Metal coatings, engravings, and heat treatments; at manufacturer: 0.000417726 USD
- Office administration: 0.000126758 USD
- Monetary authorities and depository credit intermediation: 0.0214814 USD
- Waste management and remediation: 0.00191609 USD
- Wholesale trade: 0.0128114 USD
- Specialized design: 0.000669688 USD
- Satellite, telecommunications resellers, and all other telecommunications: 0.000107462 USD
- Gasoline, fuels, and by-products of petroleum refining; at manufacturer: 0.077246 USD
- Hotels and campgrounds: 0.00160115 USD
- Screws, nuts, and bolts; at manufacturer: 0.000129639 USD
- Bread and other baked goods; at manufacturer: 3.07046e-6 USD
- Coal; at mine: 0.0291533 USD
- Travel trailer and campers; at manufacturer: 6.15236e-6 USD
- Other basic organic chemicals; at manufacturer: 0.00298504 USD
- Frozen food; at manufacturer: 3.68455e-5 USD
- Cement; at manufacturer: 2.88087e-6 USD
- Securities and commodities brokerage and exchanges: 0.00304254 USD
- Limited-service restaurants: 0.000965648 USD
- Other plastic products; at manufacturer: 0.000268712 USD
- Packaged meat (except poultry); at manufacturer: 3.07046e-5 USD
- Commercial machinery repair: 3.74513e-5 USD
- Fluid meters and counting devices; at manufacturer: 0.000290968 USD
- Surgical appliance and supplies; at manufacturer: 9.84378e-5 USD
- Fresh vegetables, melons, and potatoes; at farm: 3.07046e-6 USD
- All other foods; at manufacturer: 3.07046e-6 USD
- Vehicle engines and engine parts; at manufacturer: 1.51856e-5 USD
- Ready-mix concrete; at manufacturer: 2.30469e-5 USD
- Other transportation equipment; at manufacturer: 6.15236e-6 USD
- Aluminum; at manufacturer: 3.07618e-6 USD
- Fertilizers; at manufacturer: 2.88087e-6 USD
- Other computer related services, including facilities management: 0.00140046 USD
- Machine shops; at manufacturer: 0.000357607 USD
- Computer terminals and other computer peripheral equipment; at manufacturer: 0.000146924 USD
- Urethane and other foam products; at manufacturer: 2.88087e-6 USD
- Employment services: 0.00736405 USD
- Water transport (boats, ships, ferries): 0.000799652 USD
- Rubber tires; at manufacturer: 9.03323e-6 USD
- Travel arrangement and reservation: 0.00085261 USD
- Scenic and sightseeing transportation and support activities for transportation: 0.0237924 USD
- Fruit and vegetable preservation; at manufacturer: 0.000113607 USD
- Cardboard; at manufacturer: 0.000390244 USD
- Vehicle electrical and electronic equipment; at manufacturer: 2.88087e-6 USD
- Used and secondhand goods: 0.000270802 USD
- Other engine equipment; at manufacturer: 8.66427e-5 USD
- Air purification and ventilation equipment; at manufacturer: 4.22853e-5 USD
- Investigation and security: 0.0010177 USD
- Passenger ground transport: 0.000428366 USD
- Cookies, crackers, pastas, and tortillas; at manufacturer: 9.21138e-6 USD
- Environmental and other technical consulting services: 7.91337e-5 USD
- Plywood and veneer; at manufacturer: 2.13256e-8 USD
- Light bulbs; at manufacturer: 8.6426e-6 USD
- Metal structural products; at manufacturer: 8.83792e-6 USD
- Commercial equipment rental: 0.000871028 USD
- All other food and drinking places: 0.000195287 USD
- Paper bags and coated paper; at manufacturer: 4.3799e-5 USD
- Telecommunications: 0.00039649 USD
- Full-service restaurants: 0.00609168 USD
- Plastic bags, films, and sheets; at manufacturer: 2.88087e-6 USD
- Plastic bottles; at manufacturer: 2.88087e-6 USD
- Pipeline transport: 0.0114039 USD
- Truck transport: 0.00164303 USD
- Other real estate: 0.00839238 USD
- Wiring devices; at manufacturer: 1.15235e-5 USD
- Lids, jars, bottle caps, other metal closures and crowns; at manufacturer: 3.07618e-6 USD
- Warehousing: 0.00156623 USD
- Power boilers and heat exchangers; at manufacturer: 4.89748e-5 USD
- Household goods repair: 0.000322155 USD
- Management consulting: 0.000419174 USD
- Metal hinges, keys, lock, and other hardware; at manufacturer: 9.03323e-6 USD
- Food and beverage stores: 2.30469e-5 USD
- Performances: 4.04388e-5 USD
- Accounting, tax preparation, bookkeeping, and payroll: 0.0035975 USD
- Other educational services: 0.000644797 USD
- Welding and Soldering Equipment, Scales and Balances, and other general purpose machinery; at manufacturer: 0.00015561 USD
- Other retail: 0.00141169 USD
- Electricity; at consumer: 0.00692854 USD
- Other secondary nonferrous metal products; at manufacturer: 1.44043e-5 USD
- Seasonings and dressings; at manufacturer: 6.14092e-6 USD
- Business support: 0.00282772 USD
- Civic, social, professional, and similar organizations: 0.000561071 USD
- Fluid milk and butter; at manufacturer: 9.21138e-6 USD
- Secondary copper products; at manufacturer: 8.6426e-6 USD
- Other petroleum and coal products; at manufacturer: 2.59278e-5 USD
- Insurance agencies and brokerages: 0.000297282 USD
- Buildings and dwellings services: 0.00151846 USD
- Noncomparable imports: 0.0019933 USD
- Other concrete products; at manufacturer: 0.000536253 USD
- Vehicles and parts sales: 4.03321e-5 USD
- Insurance carriers: 0.00137748 USD
- Rubber and plastic belts and hoses; at manufacturer: 8.93069e-5 USD
- Postal service: 0.000740147 USD
- Internet publishing and broadcasting: 1.53809e-5 USD
- Light fixtures; at manufacturer: 2.92206e-5 USD
- Carbon and graphite products; at manufacturer: 3.07618e-6 USD
- Plastic pipe, fittings, and sausage casings; at manufacturer: 1.76972e-5 USD
- Motors and generators; at manufacturer: 1.17401e-5 USD
- Lessors of nonfinancial intangible assets: 0.00205256 USD
- Unrefined oil and gas; at extraction site: 0.0829159 USD
- Adhesives; at manufacturer: 2.88087e-6 USD
- Flours and malts; at manufacturer: 2.76342e-5 USD
- Cardboard containers; at manufacturer: 6.04982e-5 USD
- Vehicle repair: 1.74985e-5 USD
- Independent artists, writers, and performers: 6.35923e-5 USD
- Communications equipment; at manufacturer: 1.44043e-5 USD
- Golf courses, marinas, ski resorts, fitness and other rec centers and industries: 0.000312067 USD
- Springs and wires; at manufacturer: 6.15236e-6 USD
- Books, newspapers, magazines, and other print media; at manufacturer: 2.60771e-5 USD
- Other vehicle parts; at manufacturer: 0.000224192 USD
- Promoters and agents: 2.59918e-5 USD
- Turbines and turbine generator sets; at manufacturer: 0.00222734 USD
- Paints and coatings; at manufacturer: 8.6426e-6 USD
- Pumps and pumping equipment; at manufacturer: 3.07618e-6 USD
- Magazines and journals; at publisher: 2.30896e-5 USD
- External hard drives, CDs, other storage media; at manufacturer: 2.88087e-6 USD
- Colleges, universities, junior colleges, and professional schools: 0.000142655 USD
- Directory, mailing list, and other publishers; at publisher: 1.91931e-7 USD
- Scientific research and development: 0.000986535 USD
- Mineral wool; at manufacturer: 6.15236e-6 USD
- Secondary steel products; at manufacturer: 2.88087e-6 USD
- All other forging, stamping, and sintering; at manufacturer: 6.15236e-6 USD
- Metal pipe fittings, ball and roller bearings, industrial patterns, metal bath fixtures, other misc. fabricated metals; at manufacturer: 1.27637e-5 USD
- Wireless communications; at manufacturer: 2.88087e-5 USD
- Dry-cleaning and laundry: 6.25899e-6 USD
- Computer systems design: 0.000698085 USD
- Stationery; at manufacturer: 5.76174e-6 USD
- Chemicals (except basic chemicals, agrichemicals, polymers, paints, pharmaceuticals,soaps, cleaning compounds); at manufacturer: 8.42666e-5 USD
- Ice cream and frozen desserts; at manufacturer: 3.07046e-6 USD
- Rail transport: 0.0108861 USD
- Valve and fittings (except for plumbing); at manufacturer: 4.84566e-5 USD
- Legal services: 0.0151341 USD
- Metal windows, doors, and architectural products; at manufacturer: 5.4654e-5 USD
- Relay and industrial controls; at manufacturer: 4.05275e-5 USD
- Transmission and power train parts; at manufacturer: 5.76174e-6 USD
- Marketing research and all other miscellaneous professional, scientific, and technical services: 0.0136247 USD
- Architectural, engineering, and related services: 0.0039884 USD
- Veneer, plywood, and engineered wood; at manufacturer: 3.07046e-6 USD
- Office supplies (not paper); at manufacturer: 1.15235e-5 USD
- Communication and energy wire and cable; at manufacturer: 0.000189289 USD
- Sports: 0.000157869 USD
- Petrochemicals; at manufacturer: 0.000455348 USD
- Air transport: 0.00240339 USD

## Inputs from nature
- Water, saline: 0.156332 m3; data quality (4,2,1,4,2)
- Occupation, mineral extraction site: 0.00750755 m2*a; data quality (1,3,1,1,1)
- Energy, nuclear fission: 26.1454 MJ; data quality (3,1,1,1,1)
- Occupation, urban, discontinuously built: 9.15679e-5 m2*a; data quality (4,2,1,1,1)
- Water, fresh: 0.443666 m3; data quality (4,2,1,4,2)
- Energy, hydraulic potential: 3.04375 MJ; data quality (3,1,1,1,1)
- Water, fresh: 0.00535314 m3; data quality (3,2,1,4,2)
- Energy, biomass: 5.10071 MJ; data quality (3,1,1,1,1)
- Energy, solar: 2.07516 MJ; data quality (3,1,1,1,1)
- Energy, wind: 7.41109 MJ; data quality (3,1,1,1,1)

## Emissions to nature
- 2-chloro-1-phenylethanone: 8.71836e-9 kg; data quality (2,2,1,1,4)
- Carbon dioxide: 6.0889 kg; data quality (2,1,1,1,1)
- heptachlor: 2.02327e-12 kg; data quality (5,2,1,1,4)
- ammonia: 7.45796e-5 kg; data quality (3,2,1,1,4)
- trifluralin: 5.2319e-12 kg; data quality (5,2,1,1,4)
- hexachloro-1,3-butadiene: 3.94317e-13 kg; data quality (4,2,1,1,5)
- acetophenone: 1.90619e-8 kg; data quality (4,2,1,1,4)
- toluene, 2,4-dinitro-: 8.53975e-10 kg; data quality (5,2,1,1,4)
- manganese: 2.15812e-10, 3.47967e-12 kg (2 entries, compartments not in this file); data quality (4,1,1,1,5)
- Asbestos: 1.66472e-12 kg; data quality (5,2,1,1,4)
- ethylbenzene: 1.72527e-9 kg; data quality (4,1,1,1,5)
- NITROGLYCERIN: 2.50413e-9, 1.02969e-9, 6.58563e-10 kg (3 entries, compartments not in this file); data quality (5,1,1,1,5)
- biphenyl: 2.26162e-8 kg; data quality (4,2,1,1,4)
- 1,4-BENZOQUINONE: 7.76943e-17 kg; data quality (3,2,1,1,5)
- carbonyl sulfide: 1.05233e-10 kg; data quality (4,2,1,1,4)
- Xylene: 9.6939e-7 kg; data quality (4,2,1,2,3)
- bis(2-chloroethyl)ether: 2.85346e-12 kg; data quality (3,2,1,1,4)
- Dinitrotoluene, technical grade (2,4 (77%)- and 2,6 (19%)-): 1.66639e-9, 1.77974e-14 kg (2 entries, compartments not in this file); data quality (5,1,1,1,5)
- carbon monoxide: 0.00286739 kg; data quality (2,2,1,1,3)
- hexane: 2.82217e-6 kg; data quality (3,2,1,1,4)
- Benzene, ethyl-: 2.74753e-12, 1.37377e-12 kg (2 entries, compartments not in this file); data quality (4,1,1,1,5)
- naphthalene: 1.78425e-10 kg; data quality (4,1,1,1,5)
- 4-aminobiphenyl: 1.02243e-12 kg; data quality (5,2,1,1,4)
- Methyl iodide: 5.20762e-9 kg; data quality (4,2,1,1,4)
- Hydrocarbons, aromatic: 6.68228e-8 kg; data quality (4,2,1,2,3)
- 1,4-dioxane: 1.04165e-9 kg; data quality (4,2,1,1,4)
- ethane, 1,2-dibromo-: 1.02198e-8 kg; data quality (2,2,1,1,4)
- Quintozene: 9.13978e-12 kg; data quality (5,2,1,1,4)
- Phthalate, dibutyl-: 5.66637e-10 kg; data quality (4,2,1,1,4)
- vanadium: 6.59572e-8, 1.05057e-9 kg (2 entries, compartments not in this file); data quality (5,1,1,1,5)
- Hexane: 6.86883e-12 kg; data quality (4,1,1,1,5)
- acrylonitrile: 2.42138e-9 kg; data quality (4,2,1,1,4)
- Chlordane: 3.10235e-12 kg; data quality (5,2,1,1,4)
- ethylene oxide: 2.59311e-13 kg; data quality (3,2,1,1,5)
- Sulfuric acid: 0.000119324, 2.74753e-12 kg (2 entries, compartments not in this file); data quality (2,1,1,1,5)
- Benzo(k)fluoranthene: 2.65469e-11 kg; data quality (2,2,1,2,3)
- CHLORONAPHTHALENE: 1.94368e-11 kg; data quality (1,2,1,1,4)
- Hydrazine: 8.68255e-11 kg; data quality (4,2,1,1,4)
- manganese: 4.56209e-7 kg; data quality (3,2,1,1,4)
- Ethane, 1,1,1,2-tetrafluoro-, HFC-134a: 8.31993e-10 kg; data quality (4,2,1,4,1)
- chromium: 6.2048e-10, 2.78081e-13, 2.69008e-10 kg (3 entries, compartments not in this file); data quality (4,1,1,1,5)
- Toluene, 2,4-dinitro-: 3.55949e-14 kg; data quality (5,1,1,1,5)
- particulates, < 10 um: 0.000232621 kg; data quality (3,2,1,1,4)
- Benzo(a)anthracene: 1.46448e-11 kg; data quality (2,2,1,1,4)
- Hydrazine, methyl-: 2.14042e-7 kg; data quality (2,2,1,1,4)
- phthalic anhydride: 5.55433e-10 kg; data quality (2,2,1,1,4)
- 2,4-Diaminotoluene: 1.34885e-19 kg; data quality (2,2,1,1,4)
- copper: 1.2695e-10, 7.71028e-8, 9.39097e-9 kg (3 entries, compartments not in this file); data quality (4,1,1,1,5)
- ammonia: 4.58634e-7 kg; data quality (3,1,1,1,5)
- Aluminum: 4.71632e-12 kg; data quality (4,1,1,1,5)
- 2,4-dinitrophenol: 9.78799e-11 kg; data quality (5,2,1,1,4)
- m-cresol: 3.44813e-10 kg; data quality (4,2,1,1,4)
- acrylic acid: 1.44226e-14 kg; data quality (4,2,1,1,5)
- ethane, 1,2-dichloro-: 6.1756e-8 kg; data quality (3,2,1,1,4)
- 3-methylcholanthrene: 1.67346e-12 kg; data quality (2,2,1,1,4)
- nickel: 7.58171e-15, 4.04518e-10 kg (2 entries, compartments not in this file); data quality (4,1,1,1,5)
- 7-OXABICYCLO[2,2,1]HEPTANE-2,3-DICARBOXYLIC ACID, DIPOTASSIUM SALT: 2.85026e-10 kg; data quality (5,1,1,1,5)
- selenium: 5.2697e-7 kg; data quality (2,2,1,1,4)
- hydrogen fluoride: 5.40517e-5 kg; data quality (2,2,1,1,4)
- carbon disulfide: 1.50841e-7 kg; data quality (4,2,1,1,4)
- toluene-2,4-diisocyante: 1.88169e-13 kg; data quality (3,2,1,1,5)
- benz[a]anthracene: 1.71289e-9 kg; data quality (2,2,1,1,4)
- aniline: 1.68436e-12 kg; data quality (4,2,1,1,4)
- mercury: 5.54864e-12, 8.01043e-10 kg (2 entries, compartments not in this file); data quality (3,1,1,1,5)
- NITROUS ACID: 1.77974e-14 kg; data quality (5,1,1,1,5)
- 1,2-dibromo-3-chloropropane: 7.11381e-12 kg; data quality (4,2,1,1,4)
- formic acid: 9.1253e-11 kg; data quality (3,1,1,1,5)
- 2-(2-BUTOXYETHOXY) ETHYL ACETATE: 7.6477e-12 kg; data quality (5,2,1,1,5)
- lead: 4.98837e-8, 2.40636e-11 kg (2 entries, compartments not in this file); data quality (3,1,1,1,5)
- antimony: 2.60865e-8 kg; data quality (3,2,1,1,4)
- acenaphthene: 1.24146e-9 kg; data quality (3,2,1,3,2)
- acrolein: 7.09851e-7 kg; data quality (2,2,1,1,4)
- O-ANISIDINE: 4.99154e-12 kg; data quality (3,2,1,1,4)
- Dibenz(a,h)anthracene: 7.76792e-12 kg; data quality (2,2,1,1,4)
- vinyl acetate: 3.31185e-8 kg; data quality (4,2,1,1,4)
- o-Xylene: 3.34544e-8 kg; data quality (3,2,1,3,2)
- benzo(a)pyrene: 1.80249e-9 kg; data quality (2,2,1,1,4)
- formaldehyde: 6.61802e-6 kg; data quality (2,2,1,1,4)
- benzidine: 1.5838e-11 kg; data quality (2,2,1,1,4)
- phenanthrene: 1.3257e-8 kg; data quality (3,2,1,1,4)
- Nitrogen: 3.45245e-5 kg; data quality (2,2,1,1,5)
- Ethylene glycol: 1.21403e-8 kg; data quality (5,1,1,1,5)
- 1,4-dichlorobenzene: 3.1882e-9 kg; data quality (2,2,1,1,4)
- t-butyl methyl ether: 4.29619e-8 kg; data quality (3,2,1,1,4)
- MOLYBDENUM(VI): 3.5031e-10, 3.3671e-9 kg (2 entries, compartments not in this file); data quality (3,1,1,1,5)
- phenol: 7.38342e-8 kg; data quality (4,2,1,1,4)
- butanol: 1.43501e-9 kg; data quality (5,1,1,1,5)
- Cresol: 6.34899e-9 kg; data quality (4,2,1,1,4)
- particulates, < 2.5 um: 0.000598286 kg; data quality (3,2,1,1,4)
- ethylene glycol: 6.30005e-8 kg; data quality (5,2,1,1,4)
- 3,3'-dimethylbenzidine: 9.66396e-13 kg; data quality (1,2,1,1,4)
- epichlorohydrin: 6.59498e-13 kg; data quality (3,2,1,1,5)
- fluorine: 1.08115e-9 kg; data quality (4,1,1,1,5)
- nitric acid: 5.07617e-9, 1.77974e-14 kg (2 entries, compartments not in this file); data quality (3,1,1,1,5)
- acetonitrile: 4.47854e-9 kg; data quality (3,2,1,1,5)
- chloroform: 1.7135e-7 kg; data quality (4,2,1,1,4)
- Chrysene: 1.84236e-9 kg; data quality (2,2,1,1,4)
- Chloroacetic acid: 2.00034e-11 kg; data quality (3,2,1,1,4)
- hexachlorobenzene: 1.32951e-10 kg; data quality (3,2,1,1,4)
- 2,4,5-trichlorophenol: 3.22413e-12 kg; data quality (2,2,1,1,4)
- ethane, 1,1,2-trichloro-: 4.65035e-10 kg; data quality (4,2,1,1,4)
- Anthracene: 1.25013e-11 kg; data quality (4,1,1,1,5)
- bromoform: 5.88937e-8 kg; data quality (3,2,1,1,4)
- ethene, tetrachloro-: 5.92489e-8 kg; data quality (3,2,1,1,4)
- TOXAPHENE (EXAMPLE ISOMER SHOWN BELOW): 5.39538e-12 kg; data quality (4,2,1,1,4)
- N,N-DIMETHYLANILINE: 1.6839e-12 kg; data quality (5,2,1,1,4)
- VOC, volatile organic compounds: 0.000140266 kg; data quality (3,2,1,1,3)
- Propene, 1,3-dichloro-: 1.46636e-9 kg; data quality (3,2,1,1,4)
- BENZ(A)ACRIDINE: 1.10531e-14 kg; data quality (2,2,1,1,4)
- para-xylene: 2.39421e-9 kg; data quality (3,2,1,4,1)
- polychlorinated biphenyls: 9.37125e-10 kg; data quality (3,2,1,1,4)
- o-toluidine: 1.86437e-12 kg; data quality (4,2,1,1,4)
- STYRENE OXIDE: 2.69769e-11 kg; data quality (5,2,1,1,4)
- Phenanthrene: 1.79963e-11 kg; data quality (3,1,1,1,5)
- 4-nitrophenol: 7.83803e-11 kg; data quality (2,2,1,1,4)
- arsenic: 1.2375e-7 kg; data quality (3,2,1,1,4)
- nickel: 7.33874e-7 kg; data quality (3,2,1,1,4)
- Urethane: 2.02723e-15 kg; data quality (5,2,1,1,5)
- methanol: 1.94663e-9 kg; data quality (3,1,1,1,5)
- Dimethyl sulfate: 6.8884e-8 kg; data quality (2,2,1,1,4)
- 1,1,2,2-tetrachloroethane: 5.90783e-10 kg; data quality (3,2,1,1,4)
- 4,4'-METHYLENEDIANILINE: 1.80422e-12 kg; data quality (4,2,1,1,4)
- PYRENE, 1-NITRO-: 2.49336e-16 kg; data quality (2,2,1,1,5)
- dibenzofuran: 1.53307e-9 kg; data quality (4,2,1,1,4)
- acetaldehyde: 2.6232e-6 kg; data quality (3,2,1,2,3)
- 2,2,4-trimethylpentane: 1.64517e-7 kg; data quality (3,2,1,4,1)
- isophorone: 6.35027e-7 kg; data quality (2,2,1,1,4)
- Benzo(g,h,i)perylene: 6.29597e-12, 3.84022e-11 kg (2 entries, compartments not in this file); data quality (2,1,1,1,5)
- 1,1-DICHLOROETHYLENE: 1.13942e-9 kg; data quality (3,2,1,1,4)
- 2,4-D: 2.1517e-11 kg; data quality (3,2,1,1,5)
- DIMETHYLAMINOAZOBENZENE: 1.56358e-12 kg; data quality (5,2,1,1,4)
- barium: 4.46128e-14, 1.9041e-8 kg (2 entries, compartments not in this file); data quality (4,1,1,1,5)
- Water, fresh: 0.473291 m3; data quality (3,2,1,1,1)
- Phthalate, dimethyl-: 2.34026e-10 kg; data quality (4,2,1,1,4)
- chlorine: 3.36966e-7 kg; data quality (4,2,1,1,4)
- Chromium VI: 6.58744e-8 kg; data quality (3,2,1,1,4)
- 2-Acetylaminofluorene: 3.46672e-13 kg; data quality (5,2,1,1,5)
- Diethylene glycol butyl ether: 6.90833e-11 kg; data quality (4,2,1,1,5)
- Phosphine: 5.79277e-10 kg; data quality (4,2,1,1,4)
- cyanide: 3.03131e-6 kg; data quality (3,2,1,1,4)
- PHOSPHORUS: 1.55929e-7 kg; data quality (2,2,1,1,4)
- n-nitrosodimethylamine: 1.96297e-10 kg; data quality (5,2,1,1,4)
- Chromium, ion: 4.74469e-7 kg; data quality (2,2,1,1,4)
- Indeno(1,2,3-cd)pyrene: 6.54734e-11 kg; data quality (2,2,1,1,4)
- o-cresol: 1.86923e-9 kg; data quality (4,2,1,1,4)
- Ethane, 1,1,1-trifluoro-, HFC-143a: 9.4445e-11 kg; data quality (4,2,1,4,1)
- methanol: 1.62965e-6 kg; data quality (4,2,1,1,4)
- benzene: 2.19561e-6 kg; data quality (3,2,1,1,4)
- Propoxur: 3.46672e-15 kg; data quality (5,2,1,1,5)
- Cobalt: 1.1541e-8 kg; data quality (4,1,1,1,5)
- beryllium: 5.6492e-9 kg; data quality (2,2,1,1,4)
- benzene: 1.01445e-14 kg; data quality (3,1,1,1,5)
- methane, monochloro-, r-40: 5.8893e-7 kg; data quality (3,2,1,1,4)
- naphthalene: 7.88802e-8 kg; data quality (3,2,1,2,3)
- 1-Methyl-2-pyrrolidinone: 1.8397e-10, 1.38286e-11 kg (2 entries, compartments not in this file); data quality (5,1,1,1,5)
- 2-methylnaphthalene: 1.16786e-10 kg; data quality (2,2,1,1,4)
- phthalate, dioctyl-: 1.0128e-7 kg; data quality (3,2,1,1,4)
- methylene diphenyl diisocyanate: 1.11663e-10 kg; data quality (4,2,1,1,5)
- benzene, ethyl-: 5.032e-7 kg; data quality (4,2,1,2,3)
- CYANAMIDE: 3.23723e-9 kg; data quality (2,2,1,1,4)
- lead: 1.04121e-7 kg; data quality (3,2,1,1,4)
- 1-METHYLNAPTHALENE: 5.30196e-15 kg; data quality (2,2,1,1,5)
- anthracene: 4.6229e-10 kg; data quality (3,2,1,1,4)
- monochloroethane: 7.65336e-8 kg; data quality (3,2,1,1,4)
- toluene: 1.92444e-6 kg; data quality (4,2,1,2,3)
- Nitrobenzene: 4.31952e-12 kg; data quality (4,2,1,1,4)
- acetamide: 3.46672e-15 kg; data quality (5,2,1,1,5)
- 2-nitropropane: 2.92079e-9 kg; data quality (5,2,1,1,4)
- Propene: 4.62241e-11 kg; data quality (3,1,1,1,5)
- Methoxychlor: 2.02327e-12 kg; data quality (5,2,1,1,4)
- Triethylene glycol: 2.49257e-15 kg; data quality (5,2,1,1,5)
- 2,4,6-trichlorophenol: 4.78496e-12 kg; data quality (2,2,1,1,4)
- ALLYL CHLORIDE: 2.47991e-8 kg; data quality (3,2,1,1,4)
- 1,2,4-trichlorobenzene: 6.45932e-9 kg; data quality (4,2,1,1,4)
- Chrysene, 5-methyl-: 1.55752e-11 kg; data quality (2,2,1,1,4)
- n-nitrosomorpholine: 5.34059e-12 kg; data quality (4,2,1,1,4)
- Benzo(g,h,i)perylene: 1.42479e-9 kg; data quality (3,2,1,1,4)
- butadiene: 7.49634e-8 kg; data quality (3,2,1,4,1)
- 1,1,1-trichloroethane: 1.06301e-8 kg; data quality (4,2,1,1,4)
- pentachlorophenol: 1.35327e-10 kg; data quality (3,2,1,1,4)
- Ethane, pentafluoro-, HFC-125: 2.20739e-10 kg; data quality (4,2,1,4,1)
- HYDROFLUORIC ACID: 2.47278e-12 kg; data quality (3,1,1,1,5)
- 1,2,4-trimethylbenzene: 9.45086e-8 kg; data quality (5,1,1,1,5)
- Ethene, chloro-: 5.91837e-9 kg; data quality (3,2,1,1,4)
- dimethyl formamide: 8.48794e-11 kg; data quality (4,2,1,1,5)
- acenaphthylene: 1.51877e-9 kg; data quality (3,2,1,3,2)
- 2,4,5,2',5'-PENTACHLOROBIPHENYL: 9.01431e-14 kg; data quality (2,2,1,1,4)
- Zinc: 1.71219e-9 kg; data quality (5,1,1,1,5)
- Ethylene glycol monoethyl ether: 2.59026e-12 kg; data quality (4,2,1,1,5)
- diethanolamine: 2.45434e-9 kg; data quality (3,2,1,1,4)
- ETHYLENETHIOUREA: 5.54675e-15 kg; data quality (5,2,1,1,5)
- Phosphorus: 1.76195e-11 kg; data quality (4,1,1,1,5)
- ethyl acrylate: 4.02898e-11 kg; data quality (4,2,1,1,5)
- Naphthalene: 3.22344e-11 kg; data quality (4,1,1,1,5)
- cyclohexane: 1.44263e-10 kg; data quality (4,1,1,1,5)
- styrene: 2.46129e-7 kg; data quality (4,2,1,1,4)
- benzene, chloro-: 3.17051e-8 kg; data quality (4,2,1,1,4)
- 2,3,4'-TRICHLOROBIPHENYL: 5.07348e-14 kg; data quality (2,2,1,1,4)
- AMMONIA: 2.04732e-7 kg; data quality (3,1,1,1,5)
- cumene: 9.89033e-9 kg; data quality (4,2,1,1,4)
- methyl methacrylate: 2.40396e-8 kg; data quality (4,2,1,1,4)
- benzyl chloride: 7.29832e-7 kg; data quality (2,2,1,1,4)
- Methane: 8.48057e-5 kg; data quality (3,1,1,2,1)
- Sulfur hexafluoride: 6.77446e-7 kg; data quality (2,1,1,1,1)
- hydrogen sulfide: 3.68844e-8 kg; data quality (3,2,1,1,4)
- 2-ethoxyethyl acetate: 6.91579e-12 kg; data quality (5,2,1,1,5)
- methyl isobutyl ketone: 1.45063e-8 kg; data quality (4,2,1,1,4)
- pyrene: 6.42681e-10 kg; data quality (2,2,1,2,3)
- Propane, 1,2-dichloro-: 3.8848e-9 kg; data quality (4,2,1,1,4)
- fluorene: 3.89765e-9 kg; data quality (2,2,1,2,3)
- Methane, difluoro-, HFC-32: 1.28548e-10 kg; data quality (4,2,1,4,1)
- Propane sultone: 3.46672e-15 kg; data quality (5,2,1,1,5)
- bromine: 1.22265e-10 kg; data quality (5,1,1,1,5)
- p-phenylenediamine: 3.46672e-13 kg; data quality (5,2,1,1,5)
- catechol: 3.11583e-10 kg; data quality (5,2,1,1,4)
- Dinitrogen monoxide: 0.000191281 kg; data quality (2,1,1,1,1)
- nitrogen oxides: 0.00578395 kg; data quality (2,2,1,1,4)
- methane, bromo-, halon 1001: 1.81198e-7 kg; data quality (3,2,1,1,4)
- sulfur dioxide: 0.0125595 kg; data quality (2,2,1,1,4)
- ACRYLAMIDE: 2.44141e-13 kg; data quality (4,2,1,1,4)
- Water, saline: 0.154754 m3; data quality (3,2,1,1,1)
- Cobalt: 3.24412e-8 kg; data quality (3,2,1,1,4)
- carbon tetrachloride: 7.15473e-9 kg; data quality (4,2,1,1,4)
- hexachloroethane: 4.99118e-12 kg; data quality (4,2,1,1,4)
- PCB-1: 4.29297e-15 kg; data quality (2,2,1,1,4)
- CARBAZOLE: 3.54482e-11 kg; data quality (2,2,1,1,4)
- ETHENE: 4.94556e-11 kg; data quality (3,1,1,1,5)
- NITRIC ACID: 1.32271e-11 kg; data quality (3,1,1,1,5)
- QUINOLINE: 9.40016e-12 kg; data quality (3,2,1,1,4)
- 1,2-BUTYLENE OXIDE: 3.75034e-12 kg; data quality (4,2,1,1,5)
- Xylene: 6.58505e-14 kg; data quality (4,1,1,1,5)
- methane, dichloro-, hcc-30: 3.88663e-7 kg; data quality (4,2,1,1,4)
- Phosphorus: 0.000117571 kg; data quality (2,1,1,1,5)
- phenol: 2.13569e-13 kg; data quality (3,1,1,1,5)
- Benzo(b)fluoranthene: 1.01564e-10 kg; data quality (2,2,1,1,4)
- m-xylene: 6.07516e-8 kg; data quality (3,2,1,4,1)
- 2-NITROPROPANE: 8.89872e-14 kg; data quality (5,1,1,1,5)
- 3,3'-Dichlorobenzidine: 5.22003e-11 kg; data quality (3,2,1,1,4)
- Dimethylcarbamyl chloride: 2.69797e-17 kg; data quality (5,2,1,1,5)
- p-cresol: 2.32268e-9 kg; data quality (4,2,1,1,4)
- mercury: 7.6366e-8 kg; data quality (2,2,1,1,4)
- chlorine: 7.94937e-11 kg; data quality (2,1,1,1,5)
- propylene oxide: 1.7727e-7 kg; data quality (3,2,1,1,4)
- cadmium: 1.24557e-8 kg; data quality (3,2,1,1,4)
- hydrogen chloride: 0.000181974 kg; data quality (2,2,1,1,4)
- Triethyl amine: 7.35255e-13 kg; data quality (4,2,1,1,5)
- trichloroethylene: 5.78393e-9 kg; data quality (4,2,1,1,4)
- Propane, 1,1,1,3,3,3-hexafluoro-, HCFC-236fa: 2.55146e-12 kg; data quality (4,2,1,4,1)
- Formic acid: 9.45151e-12 kg; data quality (3,1,1,1,5)
- ethylene glycol: 5.78417e-12 kg; data quality (5,1,1,1,5)
- propanal: 5.34683e-7 kg; data quality (3,2,1,2,3)
- fluoranthene: 4.54236e-9 kg; data quality (2,2,1,1,4)
- 2-METHOXYETHANOL: 8.05492e-15 kg; data quality (4,2,1,1,5)
- Phthalate, dibutyl-: 6.11093e-10 kg; data quality (4,1,1,1,5)
- hydroquinone: 8.52219e-12 kg; data quality (3,2,1,1,5)
- BUTYL ISOCYANATE: 1.71419e-11 kg; data quality (4,2,1,1,5)
- Hexachlorocyclopentadiene: 2.97827e-9 kg; data quality (3,2,1,1,4)

## Inventory method
Input-output

## Modelling constants
The reference unit of all processes is 1 USD2013 of the good or service. The technosphere inputs are based on the US BEA detailed input-output tables for 2007. The IO tables are combined to develop a commodity-by-commodity model based on the the industry-technology assumption (see Suh et al., 2010), which assumes all commodities produced by a given industry have the same input structure, but that multiple industries can produce the same commodity. Thus, model technosphere flows represent commodity outputs (and not industry outputs) from other processes in the model. There are no by-products included in these processes. All commodity production is based on US-conditions, despite in reality that some goods and services are produced overseas, as USEEIO v1.1 is a single-region IO model.

## Completeness
The input-output approach assures that all purchased inputs associated with the sectors making these commodities as reported in the US census for 2007 are included. The direct resources extracted including minerals, energy sources, water and land occupied are included. Emissions to air include all critieria air pollutants, greenhouse gases, and hazardous and toxic air pollutants as defined by US EPA. Releases to water include toxics, total nitrogen and total phosphorus, and water discharges. Releases to soil or groundwater include toxics and agriculutural pesticides. Some metal releases to air, water and soil are not included because they could not be speciated. Solid hazardous and non-hazardous wastes generated are not included as an elementary flows although purchases of waste services are included.

## Data treatment
Greenhouse gases are primarily from the US Greenhouse Gas Emission Inventory (USEPA 2016a). Biogenic C uptake is not included (change from version 1.0), as biogenic C emission are not included. Toxic releases to air, water and soil (except pesticides) are from the 2013 Toxic Release Inventory (USEPA 2015a). Criteria air pollutants and hazardous air pollutants are from the 2011 National Emissions Inventory (USEPA 2015b). All estimates are normalized by industry based on sector output in the data year, then converted to 2013 USD using relative sector-specific CPIs (if data year is not 2013). Energy use represent raw renewables or fossil fuel energies and is based on EIA data for 2014. See Table 1 in Yang, Ingwersen et al. 2017 and Supporting Information 1, and the v1.1 data update notes (Ingwersen et al. 2017) for all details on environmental data sources used.Land occupation associated with manufacturing buildings was estimated based on the building floorspace data provided by the U.S. Energy Information Administration in the 2010 Manufacturing Energy Consumption Survey (EIA 2013). Portions of total renewable energy (EIA 2016) based on EIA-923 reports for 2014 (EIA 2017) are included. Nitrogen and Phosphorus releases are modeled in total N and total P equivalents as estimated by the Discharge Monitoring Report Nutrient Loading tool (USEPA 2016b). Self-supplied withdrawals were assigned to industrial sectors based on water use statistics for Canadian industries by NAICS 3-digit sector scaled to US production levels based on gross domestic product by industry (BEA 2015; Statistics Canada 2010), and further disaggregated to the manufacturing sectors based on compensation of employees as provided by the 2007 IO tables (BEA 2015). Water withdrawals associated with public supply were allocated to sectors based on their use of water, sewage, and other services in USD based on the IO tables (BEA 2015). Portions of total renewable energy (EIA 2016) by type are assigned to sectors (hydro, wind, solar, or) based on EIA-923 reports for 2014 (EIA 2017).

## Data collection
2015-2016

## Sampling procedure
US federal government sources, including surveys and US EPA emissions databases are used as the primary sources. From these sources, data for US reporting establishments/facilities are aggregated by the NAICS sector as defined in the BEA detailed 2007 input-output tables. When level of sector aggregation differs, or when direct emissions are not reported but modeled, additional sources are used to make allocations and estimates.

## Review details
In regard to quality assurance and peer-review, each dataset created went through Quality Assurance as defined in a quality assurance project plans at US EPA, CSRA or ERG. The model was assembled with the IO model builder model (USEPA 2016c). Validation functions were used to check that all the model components were properly assembled and harmonized. Bayou Demeke and Santosh Ghimire provided internal peer review of the model methodology and the manuscript underwent standard EPA management review. An editor and two anonymous reviewers at the Journal of Cleaner Production reviewed the model. In regard to data quality evaluation, data quality assessment was performed at the flow and process levels according to the updated US EPA data quality assessment guidelines as defined in US EPA (2016b).

## Intended application
The primary application is for use in the US Environmentally-Extended Input-Ouput model, USEEIO, version 1.1. This model is being used by the US EPA for supporting tools that prioritize goods and services based on potential environmental impacts, resource use or emissions for large regions, including the US and US states, and as a strealined tool for organizations as a starting point to consider sustainable materials management. Model results are designed to provide meso/macro-level decision support.

## Project
USEEIO v1.1 was developed by the US EPA with CSRA and ERG with Wesley W. Ingwersen and David E. Meyer as research leads. Yi Yang was the technical lead on the work for CSRA (contract EP-C-15-012); Troy Hawkins was lead for ERG (contract EP-C-12-021).

## Sources
- USEPA 2015b
- USDA 2006
- Ingwersen et al. DRAFT
- USDA 2009b
- USEPA 2016c
- USEPA 2016b
- EIA 2016
- USEPA 2016a
- USDA 2014
- USDA 2009a
- EIA 2017
- Edelen and Ingwersen 2017
- EIA 2013
- EIA 2015
- Yienger et al. 1995
- USEPA 2015a
- Nickerson et al. 2011
- Goebes et al. 2003
- BLM 2008
- Maupin et al. 2014
- Ingwersen et al. 2017
- BEA 2015
- USGS 2016
- Blackhurst et al. 2010
- USDA 2016
- Lovelace 2009
- USGS 2015
- Statistics Canada 2010
- Kim et el. 2013
- Torcellini et al. 2003
- Macknick et al. 2011
