# Well drilling

Dataset: openLCA process, unit process
Category: 2131: Support Activities for Mining
Geography: United States
Time period: 2017-01-01 to 2017-12-31
Data quality: US EPA - Process Pedigree Matrix (1;1)
Exchange data quality scheme: US EPA - Flow Pedigree Matrix
Generated by: US EPA with CSRA and ERG
Owner: US EPA
Published in: Yang, Ingwersen et al. 2017
restrictionsDescription: This model shold be appropriately cited (see Yang, Ingwersen et al. 2017 source or Publication field) when used. Any changes or derivations of this model by the user should be documented. The model itself and any results from use of this model shall not be construed to consitute US EPA opinion or policy.
copyright: false

## General comment
BEA Code & Name is '213111:Drilling oil and gas wells'. Description of the primary industry producing this good or service, adapted from the Census Bureau NAICS 2007 descriptions: This U.S. industry comprises establishments primarily engaged in drilling oil and gas wells for others on a contract or fee basis. This industry includes contractors that specialize in spudding in, drilling in, redrilling, and directional drilling.

## Technology
The process describes the average US production of this good or service within this NAICS-based grouping defined in the BEA 2007 detailed input-output tables (BEA 2015). Distribution, wholesale and retailing of this good or service, use, and final disposal are not included. Creation of a product system with this process will enable modeling of all upstream (supply-chain) activities.

## Geography
Data represent the 50 US states

## Time period
2017 was the year in which this version of USEEIO was released and is the target date for the model

## Reference product
- Well drilling: 1 USD

## Inputs from technosphere
All rows: data quality (1,3,1,1,1)
- Screws, nuts, and bolts; at manufacturer: 0.000155119 USD
- Scenic and sightseeing transportation and support activities for transportation: 4.93434e-7 USD
- Travel arrangement and reservation: 1.15957e-5 USD
- Nonresidential building repair and maintanence: 0.00335936 USD
- Commercial equipment rental: 0.00901616 USD
- Motor vehicle steering, suspension components (except spring), and brake systems; at manufacturer: 0.000174478 USD
- Plastic pipe, fittings, and sausage casings; at manufacturer: 9.58083e-5 USD
- Other basic inorganic chemicals; at manufacturer: 2.25664e-5 USD
- Metal structural products; at manufacturer: 0.00060814 USD
- Other computer related services, including facilities management: 3.92115e-5 USD
- Light fixtures; at manufacturer: 0.000230828 USD
- Other retail: 1.91123e-5 USD
- Securities and commodities brokerage and exchanges: 0.000706416 USD
- News syndicates, libraries, archives, Internet publishing and all other information services: 3.84714e-5 USD
- Legal services: 0.0335887 USD
- Telecommunications: 0.00131235 USD
- Secondary steel products; at manufacturer: 0.000228608 USD
- Marketing research and all other miscellaneous professional, scientific, and technical services: 0.000366095 USD
- Natural gas; at consumer: 0.000136385 USD
- Communications equipment; at manufacturer: 2.46717e-7 USD
- Business support: 0.000183607 USD
- Watches, clocks, and other measuring and controlling devices; at manufacturer: 0.00165218 USD
- Ground or treated minerals and earth; at manufacturer: 0.000536625 USD
- Other vehicle parts; at manufacturer: 0.000307524 USD
- Cardboard; at manufacturer: 7.74361e-5 USD
- Wooden windows, door, and flooring; at manufacturer: 5.75837e-5 USD
- Metal windows, doors, and architectural products; at manufacturer: 0.000284728 USD
- Computer systems design: 7.8423e-5 USD
- Full-service restaurants: 6.30114e-5 USD
- Transmission and power train parts; at manufacturer: 0.00024994 USD
- Paper; at manufacturer: 7.6696e-5 USD
- Architectural, engineering, and related services: 0.00585247 USD
- Wholesale trade: 0.00853153 USD
- Management consulting: 0.000598897 USD
- Gasoline, fuels, and by-products of petroleum refining; at manufacturer: 0.0106382 USD
- Investigation and security: 0.000401359 USD
- Coal; at mine: 9.75353e-5 USD
- Commercial machinery repair: 0.000302836 USD
- Vehicle engines and engine parts; at manufacturer: 0.000134773 USD
- Office administration: 1.72702e-6 USD
- Company and enterprise management: 0.00704299 USD
- Lessors of nonfinancial intangible assets: 0.00219535 USD
- Wireless telecommunications: 0.000316899 USD
- Motors and generators; at manufacturer: 5.65968e-5 USD
- Pipeline transport: 7.79296e-5 USD
- Machine shops; at manufacturer: 7.74361e-5 USD
- Vehicles and parts sales: 9.67952e-5 USD
- Fertilizers; at manufacturer: 3.77312e-5 USD
- Other petroleum and coal products; at manufacturer: 0.00368105 USD
- Welding and Soldering Equipment, Scales and Balances, and other general purpose machinery; at manufacturer: 0.000938724 USD
- Gaskets, seals, musical instruments, fasteners, brooms, brushes, mop and other misc. goods; at manufacturer: 7.6696e-5 USD
- Performances: 2.46717e-7 USD
- Vehicle rental and leasing: 0.000356604 USD
- Specialized design: 4.16787e-5 USD
- Primary iron, steel, and ferroalloy products; at manufacturer: 0.00405477 USD
- Other support services: 0.000456228 USD
- Paints and coatings; at manufacturer: 2.65138e-5 USD
- Environmental and other technical consulting services: 0.000549323 USD
- Data processing and hosting: 2.00992e-5 USD
- Compressed Gases; at manufacturer: 0.000174116 USD
- Other basic organic chemicals; at manufacturer: 0.000360683 USD
- Advertising and public relations: 0.000452906 USD
- Satellite, telecommunications resellers, and all other telecommunications: 7.86697e-5 USD
- Chemicals (except basic chemicals, agrichemicals, polymers, paints, pharmaceuticals,soaps, cleaning compounds); at manufacturer: 0.0016209 USD
- Mining and oil/gas field machinery; at manufacturer: 0.00359305 USD
- Rubber tires; at manufacturer: 9.58083e-5 USD
- Construction machinery; at manufacturer: 0.00346193 USD
- Limited-service restaurants: 0.000219167 USD
- Material handling equipment; at manufacturer: 0.0031544 USD
- Petrochemicals; at manufacturer: 6.49852e-5 USD
- Asphalt pavement; at manufacturer: 9.6055e-5 USD
- Valve and fittings (except for plumbing); at manufacturer: 0.000230088 USD
- Hotels and campgrounds: 0.00010617 USD
- Lumber and treated lumber; at manufacturer: 9.58083e-5 USD
- Vehicle electrical and electronic equipment; at manufacturer: 7.64493e-5 USD
- Other real estate: 0.000368315 USD
- Civic, social, professional, and similar organizations: 0.000251421 USD
- Electronic capacitors, resistors, coils, transformers, connectors and other components (except semiconductors and printed circuit assemblies); at manufacturer: 2.46717e-7 USD
- Pumps and pumping equipment; at manufacturer: 0.00132196 USD
- Truck transport: 0.00300644 USD
- Sports: 9.86869e-7 USD
- Golf courses, marinas, ski resorts, fitness and other rec centers and industries: 2.18262e-5 USD
- Computer terminals and other computer peripheral equipment; at manufacturer: 0.000115414 USD
- Other plastic products; at manufacturer: 0.000163639 USD
- Rail transport: 0.000406046 USD
- Metal pipe fittings, ball and roller bearings, industrial patterns, metal bath fixtures, other misc. fabricated metals; at manufacturer: 0.000117388 USD
- Waste management and remediation: 0.000408267 USD
- Used and secondhand goods: 0.000547102 USD
- Tobacco, cotton, sugarcane, peanuts, sugar beets, herbs and spices, and other crops; at farm: 7.74361e-5 USD
- Buildings and dwellings services: 0.00664748 USD
- Software: 2.46717e-7 USD
- Noncomparable imports: 0.00106524 USD
- Paper bags and coated paper; at manufacturer: 9.58083e-5 USD
- Storage batteries; at manufacturer: 0.000153392 USD
- Other support activities for mining: 0.0233587 USD
- Insurance carriers: 0.00280509 USD
- Air transport: 0.00028879 USD
- Springs and wires; at manufacturer: 9.58083e-5 USD
- Household goods repair: 0.000773983 USD
- Cardboard containers; at manufacturer: 7.6696e-5 USD
- Cutting and machine tool accessory, rolling mill, and other metalworking machines; at manufacturer: 0.0160104 USD
- Employment services: 0.000164034 USD
- Accounting, tax preparation, bookkeeping, and payroll: 0.00100817 USD
- Water transport (boats, ships, ferries): 0.000232802 USD
- Nondepository credit intermediation and related activities: 0.000997048 USD
- Drinking water and wastewater treatment; at consumer: 0.000246486 USD
- Insurance agencies and brokerages: 0.000154132 USD
- Vehicle repair: 0.00111603 USD
- Passenger ground transport: 6.22713e-5 USD
- Sand, gravel, clay, phosphate, other nonmetallic minerals; at mine: 0.000229841 USD
- Veneer, plywood, and engineered wood; at manufacturer: 0.000474847 USD
- Metal coatings, engravings, and heat treatments; at manufacturer: 0.000232802 USD
- Cement; at manufacturer: 0.00099792 USD
- Dimensional stone; at mine: 9.86869e-7 USD
- Monetary authorities and depository credit intermediation: 0.00346403 USD
- Unrefined oil and gas; at extraction site: 3.84714e-5 USD
- Wireless communications; at manufacturer: 2.46717e-7 USD
- All other food and drinking places: 9.86869e-7 USD
- Electricity; at consumer: 0.000726893 USD
- Electronic equipment repair and maintenance: 0.00280518 USD
- Investment advice, portfolio management, and other financial advising services: 0.00395956 USD

## Inputs from nature
- Water, saline: 0.0010324 m3; data quality (4,2,1,4,2)
- Water, fresh: 0.000722978, 0.000572996 m3 (2 entries, compartments not in this file); data quality (3,2,1,4,2)
- Occupation, urban, discontinuously built: 0.000130619 m2*a; data quality (4,2,1,1,1)

## Emissions to nature
- 1,2,4-trimethylbenzene: 7.63446e-12 kg; data quality (5,1,1,1,5)
- nickel: 4.26609e-11 kg; data quality (3,2,1,1,5)
- hydrogen chloride: 1.18012e-11 kg; data quality (2,2,1,1,5)
- Propene, 1,3-dichloro-: 1.31283e-11 kg; data quality (3,2,1,1,5)
- Water, saline: 0.00090649 m3; data quality (4,2,1,1,2)
- ethylbenzene: 3.27191e-12 kg; data quality (4,1,1,1,5)
- Dibenz(a,h)anthracene: 1.16071e-13 kg; data quality (2,2,1,1,5)
- 2,4-Diaminotoluene: 2.58218e-11 kg; data quality (2,2,1,1,5)
- Ethene, chloro-: 4.21874e-11 kg; data quality (3,2,1,1,5)
- Ethylene glycol: 1.46473e-10 kg; data quality (5,1,1,1,5)
- Chromium, ion: 3.25994e-13 kg; data quality (2,2,1,1,5)
- acenaphthylene: 6.60181e-11 kg; data quality (3,2,1,4,1)
- antimony: 7.64643e-16 kg; data quality (3,2,1,1,5)
- propylene oxide: 1.85737e-11 kg; data quality (3,2,1,1,5)
- benz[a]anthracene: 7.31514e-13 kg; data quality (3,2,1,3,2)
- ammonia: 9.48535e-9 kg; data quality (3,2,1,3,3)
- fluoranthene: 1.3483e-11 kg; data quality (3,2,1,4,1)
- butadiene: 5.90537e-9 kg; data quality (2,2,1,2,3)
- 2,2,4-trimethylpentane: 4.04353e-9 kg; data quality (3,2,1,2,4)
- mercury: 1.03955e-11 kg; data quality (2,2,1,1,5)
- Phosphorus: 3.8099e-10 kg; data quality (5,1,1,1,5)
- Benzo(g,h,i)perylene: 2.75228e-13 kg; data quality (3,2,1,3,3)
- propanal: 1.54633e-8 kg; data quality (3,2,1,4,1)
- particulates, < 10 um: 2.27478e-7 kg; data quality (3,2,1,1,5)
- chloroform: 1.41196e-11 kg; data quality (4,2,1,1,5)
- Chromium VI: 2.18749e-13 kg; data quality (3,2,1,1,5)
- Nitrogen: 5.56818e-10 kg; data quality (2,2,1,1,5)
- Carbon dioxide: 0.054949 kg; data quality (4,2,1,4,1)
- formaldehyde: 3.06679e-7 kg; data quality (3,2,1,2,3)
- Indeno(1,2,3-cd)pyrene: 1.77035e-13 kg; data quality (2,2,1,2,4)
- acrolein: 3.12294e-8 kg; data quality (2,2,1,1,5)
- Cobalt: 1.85367e-14 kg; data quality (3,2,1,1,5)
- cadmium: 2.06531e-12 kg; data quality (3,2,1,1,5)
- particulates, < 2.5 um: 1.53196e-6 kg; data quality (3,2,1,3,3)
- cumene: 5.15936e-11 kg; data quality (4,2,1,1,5)
- manganese: 1.67912e-12 kg; data quality (3,2,1,5,1)
- ethene, tetrachloro-: 5.84175e-12 kg; data quality (3,2,1,1,5)
- cyanide: 4.17908e-16 kg; data quality (3,2,1,1,5)
- biphenyl: 4.21956e-10 kg; data quality (4,2,1,1,5)
- methane, dichloro-, hcc-30: 2.51573e-10 kg; data quality (4,2,1,1,5)
- hydrogen sulfide: 2.18587e-8 kg; data quality (3,2,1,1,5)
- 1,1,2,2-tetrachloroethane: 1.18955e-10 kg; data quality (3,2,1,1,5)
- phenanthrene: 2.03018e-10 kg; data quality (3,2,1,4,1)
- fluorene: 7.83279e-11 kg; data quality (3,2,1,4,1)
- nitrogen oxides: 1.82073e-5 kg; data quality (2,2,1,1,3)
- Dinitrogen monoxide: 6.98933e-6 kg; data quality (4,2,1,4,1)
- sulfur dioxide: 5.80411e-7 kg; data quality (2,2,1,1,5)
- Benzo(a)anthracene: 8.36203e-17 kg; data quality (2,2,1,1,5)
- Benzo(b)fluoranthene: 4.99403e-13 kg; data quality (3,2,1,3,2)
- phenol: 1.60484e-10 kg; data quality (4,2,1,1,5)
- acetaldehyde: 1.10657e-7 kg; data quality (3,2,1,3,3)
- PHOSPHORUS: 7.74031e-12 kg; data quality (2,2,1,1,5)
- carbon monoxide: 1.37378e-5 kg; data quality (2,2,1,1,3)
- methanol: 2.16543e-8 kg; data quality (4,2,1,1,5)
- benzene: 3.75545e-8 kg; data quality (3,2,1,3,2)
- monochloroethane: 4.40485e-12 kg; data quality (3,2,1,1,5)
- ethane, 1,2-dibromo-: 2.73674e-11 kg; data quality (2,2,1,1,5)
- VOC, volatile organic compounds: 2.42719e-6 kg; data quality (3,2,1,1,4)
- ethane, 1,1,2-trichloro-: 1.57966e-11 kg; data quality (4,2,1,1,5)
- benzene, chloro-: 1.33847e-11 kg; data quality (4,2,1,1,5)
- Methane: 1.48694e-5 kg; data quality (4,2,1,4,1)
- Xylene: 3.41449e-8 kg; data quality (3,2,1,2,3)
- Water, fresh: 0.000886956 m3; data quality (3,2,1,2,2)
- anthracene: 5.8025e-13 kg; data quality (3,2,1,3,3)
- selenium: 1.66247e-16 kg; data quality (2,2,1,1,5)
- Hydrocarbons, aromatic: 3.16879e-10 kg; data quality (4,2,1,1,5)
- arsenic: 3.13031e-11 kg; data quality (3,2,1,5,1)
- 2-methylnaphthalene: 4.39532e-12 kg; data quality (2,2,1,1,5)
- benzene, ethyl-: 9.32905e-9 kg; data quality (3,2,1,2,4)
- pyrene: 2.51869e-12 kg; data quality (3,2,1,4,1)
- carbonyl sulfide: 5.55483e-7 kg; data quality (4,2,1,1,5)
- 3-methylcholanthrene: 9.4068e-18 kg; data quality (2,2,1,1,5)
- ethane, 1,2-dichloro-: 2.43313e-11 kg; data quality (3,2,1,1,5)
- styrene: 4.34232e-9 kg; data quality (4,2,1,2,4)
- toluene: 4.65387e-8 kg; data quality (3,2,1,2,4)
- beryllium: 2.99212e-13 kg; data quality (2,2,1,1,5)
- lead: 2.6015e-13 kg; data quality (3,2,1,1,5)
- hexane: 1.44753e-8 kg; data quality (3,2,1,1,4)
- Chrysene: 1.72569e-12 kg; data quality (3,2,1,4,1)
- benzo(a)pyrene: 3.99527e-13 kg; data quality (3,2,1,3,2)
- carbon tetrachloride: 1.81959e-11 kg; data quality (4,2,1,1,5)
- naphthalene: 7.99889e-10 kg; data quality (3,2,1,2,3)
- Benzo(k)fluoranthene: 3.86415e-13 kg; data quality (3,2,1,3,2)
- Propane, 1,2-dichloro-: 1.33683e-11 kg; data quality (4,2,1,1,5)
- acenaphthene: 7.80374e-11 kg; data quality (3,2,1,4,1)

## Inventory method
Input-output

## Modelling constants
The reference unit of all processes is 1 USD2013 of the good or service. The technosphere inputs are based on the US BEA detailed input-output tables for 2007. The IO tables are combined to develop a commodity-by-commodity model based on the the industry-technology assumption (see Suh et al., 2010), which assumes all commodities produced by a given industry have the same input structure, but that multiple industries can produce the same commodity. Thus, model technosphere flows represent commodity outputs (and not industry outputs) from other processes in the model. There are no by-products included in these processes. All commodity production is based on US-conditions, despite in reality that some goods and services are produced overseas, as USEEIO v1.1 is a single-region IO model.

## Completeness
The input-output approach assures that all purchased inputs associated with the sectors making these commodities as reported in the US census for 2007 are included. The direct resources extracted including minerals, energy sources, water and land occupied are included. Emissions to air include all critieria air pollutants, greenhouse gases, and hazardous and toxic air pollutants as defined by US EPA. Releases to water include toxics, total nitrogen and total phosphorus, and water discharges. Releases to soil or groundwater include toxics and agriculutural pesticides. Some metal releases to air, water and soil are not included because they could not be speciated. Solid hazardous and non-hazardous wastes generated are not included as an elementary flows although purchases of waste services are included.

## Data treatment
Greenhouse gases are primarily from the US Greenhouse Gas Emission Inventory (USEPA 2016a). Biogenic C uptake is not included (change from version 1.0), as biogenic C emission are not included. Toxic releases to air, water and soil (except pesticides) are from the 2013 Toxic Release Inventory (USEPA 2015a). Criteria air pollutants and hazardous air pollutants are from the 2011 National Emissions Inventory (USEPA 2015b). All estimates are normalized by industry based on sector output in the data year, then converted to 2013 USD using relative sector-specific CPIs (if data year is not 2013). Energy use represent raw renewables or fossil fuel energies and is based on EIA data for 2014. See Table 1 in Yang, Ingwersen et al. 2017 and Supporting Information 1, and the v1.1 data update notes (Ingwersen et al. 2017) for all details on environmental data sources used.

## Data collection
2015-2016

## Sampling procedure
US federal government sources, including surveys and US EPA emissions databases are used as the primary sources. From these sources, data for US reporting establishments/facilities are aggregated by the NAICS sector as defined in the BEA detailed 2007 input-output tables. When level of sector aggregation differs, or when direct emissions are not reported but modeled, additional sources are used to make allocations and estimates.

## Review details
In regard to quality assurance and peer-review, each dataset created went through Quality Assurance as defined in a quality assurance project plans at US EPA, CSRA or ERG. The model was assembled with the IO model builder model (USEPA 2016c). Validation functions were used to check that all the model components were properly assembled and harmonized. Bayou Demeke and Santosh Ghimire provided internal peer review of the model methodology and the manuscript underwent standard EPA management review. An editor and two anonymous reviewers at the Journal of Cleaner Production reviewed the model. In regard to data quality evaluation, data quality assessment was performed at the flow and process levels according to the updated US EPA data quality assessment guidelines as defined in US EPA (2016b).

## Intended application
The primary application is for use in the US Environmentally-Extended Input-Ouput model, USEEIO, version 1.1. This model is being used by the US EPA for supporting tools that prioritize goods and services based on potential environmental impacts, resource use or emissions for large regions, including the US and US states, and as a strealined tool for organizations as a starting point to consider sustainable materials management. Model results are designed to provide meso/macro-level decision support.

## Project
USEEIO v1.1 was developed by the US EPA with CSRA and ERG with Wesley W. Ingwersen and David E. Meyer as research leads. Yi Yang was the technical lead on the work for CSRA (contract EP-C-15-012); Troy Hawkins was lead for ERG (contract EP-C-12-021).

## Sources
- BEA 2015
- Ingwersen et al. DRAFT
- Blackhurst et al. 2010
- USEPA 2016c
- USDA 2016
- USEPA 2016b
- Kim et el. 2013
- USEPA 2015b
- Nickerson et al. 2011
- USDA 2009a
- USDA 2014
- Torcellini et al. 2003
- USGS 2016
- Maupin et al. 2014
- Yienger et al. 1995
- Lovelace 2009
- EIA 2017
- USDA 2009b
- Goebes et al. 2003
- Macknick et al. 2011
- Statistics Canada 2010
- USDA 2006
- EIA 2015
- EIA 2016
- Edelen and Ingwersen 2017
- USGS 2015
- EIA 2013
- USEPA 2015a
- Ingwersen et al. 2017
- BLM 2008
- USEPA 2016a
