# Dog and cat food; at manufacturer

Dataset: openLCA process, unit process
Category: 3111: Animal Food Manufacturing
Geography: United States
Time period: 2017-01-01 to 2017-12-31
Data quality: US EPA - Process Pedigree Matrix (1;1)
Exchange data quality scheme: US EPA - Flow Pedigree Matrix
Generated by: US EPA with CSRA and ERG
Owner: US EPA
Published in: Yang, Ingwersen et al. 2017
restrictionsDescription: This model shold be appropriately cited (see Yang, Ingwersen et al. 2017 source or Publication field) when used. Any changes or derivations of this model by the user should be documented. The model itself and any results from use of this model shall not be construed to consitute US EPA opinion or policy.
copyright: false

## General comment
BEA Code & Name is '311111:Dog and cat food manufacturing'. Description of the primary industry producing this good or service, adapted from the Census Bureau NAICS 2007 descriptions: This U.S. industry comprises establishments primarily engaged in manufacturing dog and cat food from ingredients, such as grains, oilseed mill products, and meat products.

## Technology
The process describes the average US production of this good or service within this NAICS-based grouping defined in the BEA 2007 detailed input-output tables (BEA 2015). Distribution, wholesale and retailing of this good or service, use, and final disposal are not included. Creation of a product system with this process will enable modeling of all upstream (supply-chain) activities.

## Geography
Data represent the 50 US states

## Time period
2017 was the year in which this version of USEEIO was released and is the target date for the model

## Reference product
- Dog and cat food; at manufacturer: 1 USD

## Inputs from technosphere
All rows: data quality (1,3,1,1,1)
- Marketing research and all other miscellaneous professional, scientific, and technical services: 0.00140243 USD
- Electronic equipment repair and maintenance: 0.000296414 USD
- Independent artists, writers, and performers: 0.000221204 USD
- Dry, condensed, and evaporated dairy; at manufacturer: 0.00516584 USD
- Plastic bags, films, and sheets; at manufacturer: 0.0115578 USD
- Corn products; at manufacturer: 0.0222332 USD
- Civic, social, professional, and similar organizations: 7.44726e-5 USD
- Sand, gravel, clay, phosphate, other nonmetallic minerals; at mine: 0.00101249 USD
- Employment services: 0.00190012 USD
- Fresh wheat, corn, rice, and other grains; at farm: 0.0517327 USD
- Office administration: 7.29965e-5 USD
- Household goods repair: 0.000295676 USD
- Investigation and security: 0.0013921 USD
- Natural gas; at consumer: 0.0112947 USD
- Chemicals (except basic chemicals, agrichemicals, polymers, paints, pharmaceuticals,soaps, cleaning compounds); at manufacturer: 0.000875958 USD
- Dog and cat food; at manufacturer: 0.0020439 USD
- Wireless telecommunications: 0.000299366 USD
- Paper; at manufacturer: 7.29965e-5 USD
- Telecommunications: 0.00110897 USD
- Rail transport: 0.00820192 USD
- Breweries and beer; at manufacturer: 0.00189791 USD
- Veneer, plywood, and engineered wood; at manufacturer: 0.000729965 USD
- Scenic and sightseeing transportation and support activities for transportation: 7.38036e-7 USD
- Warehousing: 0.000443883 USD
- Flours and malts; at manufacturer: 0.0110022 USD
- Transmission and power train parts; at manufacturer: 7.37345e-5 USD
- Other support services: 0.00146141 USD
- Other real estate: 0.000220466 USD
- Metal pipe fittings, ball and roller bearings, industrial patterns, metal bath fixtures, other misc. fabricated metals; at manufacturer: 0.000836173 USD
- Waste management and remediation: 0.00139579 USD
- Other petroleum and coal products; at manufacturer: 0.00175487 USD
- Noncomparable imports: 0.0027481 USD
- Passenger ground transport: 0.000227108 USD
- Vehicle rental and leasing: 0.00081477 USD
- Motor vehicle steering, suspension components (except spring), and brake systems; at manufacturer: 7.38036e-7 USD
- Wild-caught fish and game; at place of capture: 0.000926951 USD
- Packaged meat (except poultry); at manufacturer: 0.121356 USD
- Promoters and agents: 7.37345e-5 USD
- Other computer related services, including facilities management: 0.0002942 USD
- Commercial equipment rental: 0.00051688 USD
- Relay and industrial controls; at manufacturer: 0.000452002 USD
- Vehicle electrical and electronic equipment; at manufacturer: 7.38036e-7 USD
- Commercial machinery repair: 0.00155285 USD
- Facilities support: 0.00102343 USD
- Electronic capacitors, resistors, coils, transformers, connectors and other components (except semiconductors and printed circuit assemblies); at manufacturer: 0.000442407 USD
- Cardboard containers; at manufacturer: 0.0138811 USD
- All other food and drinking places: 1.47607e-6 USD
- Wholesale trade: 0.0534605 USD
- Material handling equipment; at manufacturer: 0.000220466 USD
- Seasonings and dressings; at manufacturer: 0.00679472 USD
- Nondepository credit intermediation and related activities: 0.00257259 USD
- Coal; at mine: 0.00214052 USD
- Advertising and public relations: 0.00447345 USD
- Other animal food; at manufacturer: 6.49471e-5 USD
- Paper bags and coated paper; at manufacturer: 0.0313119 USD
- Securities and commodities brokerage and exchanges: 0.000295676 USD
- Investment advice, portfolio management, and other financial advising services: 0.000221204 USD
- Company and enterprise management: 0.0184912 USD
- Drinking water and wastewater treatment; at consumer: 0.000586924 USD
- Vehicle repair: 0.000813294 USD
- Legal services: 0.00117828 USD
- Specialized design: 0.0021958 USD
- Insurance carriers: 0.00249664 USD
- Distilleries and spirits; at manufacturer: 0.0211134 USD
- Performances: 7.38036e-7 USD
- Satellite, telecommunications resellers, and all other telecommunications: 7.37345e-5 USD
- Environmental and other technical consulting services: 0.000146731 USD
- Computer systems design: 0.000662135 USD
- Seafood; at manufacturer: 0.00351128 USD
- Electricity; at consumer: 0.00475517 USD
- Air conditioning, refrigeration, and warm air heating equipment; at manufacturer: 0.00058471 USD
- Cardboard; at manufacturer: 0.000522784 USD
- Medicinal and botanical ingredients; at manufacturer: 0.0109065 USD
- Full-service restaurants: 0.000670253 USD
- Vehicles and parts sales: 8.11839e-6 USD
- Rubber tires; at manufacturer: 7.38036e-7 USD
- Lessors of nonfinancial intangible assets: 0.0036727 USD
- Other retail: 0.000151159 USD
- Data processing and hosting: 0.00125349 USD
- Truck transport: 0.0137556 USD
- Nonresidential building repair and maintanence: 0.00207121 USD
- Business support: 0.00271194 USD
- Other basic inorganic chemicals; at manufacturer: 0.00171589 USD
- Light gauge metal cans, boxes, and containers; at manufacturer: 0.12344 USD
- Architectural, engineering, and related services: 0.00913865 USD
- Monetary authorities and depository credit intermediation: 0.00235729 USD
- Consumer goods and general rental centers: 7.44726e-5 USD
- All other converted paper products; at manufacturer: 0.00300171 USD
- Water transport (boats, ships, ferries): 0.00482409 USD
- General merchandise stores: 7.38036e-7 USD
- Air transport: 0.00134715 USD
- Gasoline, fuels, and by-products of petroleum refining; at manufacturer: 0.00214347 USD
- Golf courses, marinas, ski resorts, fitness and other rec centers and industries: 7.66867e-5 USD
- Other plastic products; at manufacturer: 0.000375315 USD
- Other textiles; at manufacturer: 0.00010178 USD
- Hotels and campgrounds: 0.000381219 USD
- Management consulting: 0.000804437 USD
- Refined vegetable, olive, and seed oils; at manufacturer: 0.0216589 USD
- Lids, jars, bottle caps, other metal closures and crowns; at manufacturer: 7.29965e-5 USD
- State and local government enterprises: 0.000659921 USD
- Sugar, candy, and chocolate; at manufacturer: 0.00406063 USD
- Sports: 7.44726e-5 USD
- Other vehicle parts; at manufacturer: 3.91159e-5 USD
- Buildings and dwellings services: 0.00310128 USD
- Insurance agencies and brokerages: 0.000808128 USD
- Other basic organic chemicals; at manufacturer: 0.000148207 USD
- Vegetable oils and by-products; at manufacturer: 0.0212031 USD
- Soap and cleaning compounds; at manufacturer: 0.000510975 USD
- Limited-service restaurants: 0.00111709 USD
- Accounting, tax preparation, bookkeeping, and payroll: 0.00132575 USD
- Machine shops; at manufacturer: 0.000147469 USD

## Inputs from nature
- Occupation, industrial area: 0.000108225 m2*a; data quality (4,2,1,1,1)
- Water, fresh: 0.00123362, 0.000381009 m3 (2 entries, compartments not in this file); data quality (3,2,1,4,2)
- Occupation, industrial area, built up: 3.6075e-5 m2*a; data quality (4,2,1,1,1)
- Occupation, urban, discontinuously built: 4.07746e-5 m2*a; data quality (4,2,1,1,1)
- Water, saline: 8.00503e-5 m3; data quality (4,2,1,4,2)

## Emissions to nature
- benzo(a)pyrene: 4.61344e-11 kg; data quality (2,2,1,1,5)
- phenanthrene: 2.57514e-10 kg; data quality (3,2,1,1,4)
- 1,1,2,2-tetrachloroethane: 1.03516e-11 kg; data quality (3,2,1,1,5)
- ammonia: 5.00196e-8 kg; data quality (3,1,1,1,4)
- nickel: 1.1311e-9 kg; data quality (3,2,1,1,4)
- 2,4,5,2',5'-PENTACHLOROBIPHENYL: 9.42853e-17 kg; data quality (2,2,1,1,4)
- 2,2,4-trimethylpentane: 8.3155e-9 kg; data quality (3,2,1,2,4)
- p-cresol: 5.99962e-11 kg; data quality (3,2,1,1,5)
- formaldehyde: 5.21527e-8 kg; data quality (2,2,1,2,3)
- Hydrocarbons, aromatic: 5.96187e-10 kg; data quality (3,2,1,4,1)
- pentachlorophenol: 2.51444e-15 kg; data quality (3,2,1,1,4)
- 3-methylcholanthrene: 5.69733e-14 kg; data quality (2,2,1,1,5)
- Dibenz(a,h)anthracene: 1.96116e-13 kg; data quality (2,2,1,1,5)
- 2-methylnaphthalene: 1.22516e-11 kg; data quality (2,2,1,1,5)
- carbon tetrachloride: 1.44348e-11 kg; data quality (4,2,1,1,5)
- ethene, tetrachloro-: 2.51578e-12 kg; data quality (3,2,1,1,4)
- hexane: 1.67239e-7 kg; data quality (3,2,1,1,5)
- Propane, 1,2-dichloro-: 8.57869e-12 kg; data quality (4,2,1,1,5)
- Benzo(k)fluoranthene: 3.50945e-11 kg; data quality (2,2,1,1,5)
- Nitrogen: 4.5173e-6 kg; data quality (4,2,1,1,5)
- Xylene: 5.34478e-9 kg; data quality (3,2,1,4,1)
- butadiene: 1.06691e-9 kg; data quality (3,2,1,4,1)
- monochloroethane: 3.46362e-18 kg; data quality (3,2,1,1,4)
- methane, bromo-, halon 1001: 2.50724e-10 kg; data quality (3,2,1,1,4)
- acrolein: 4.02377e-9 kg; data quality (2,2,1,2,4)
- Benzo(b)fluoranthene: 3.87378e-13 kg; data quality (3,2,1,3,3)
- acrylonitrile: 5.68897e-11 kg; data quality (4,2,1,1,4)
- Ethane, pentafluoro-, HFC-125: 7.97075e-8 kg; data quality (4,2,1,4,1)
- Phosphine: 1.69377e-14 kg; data quality (4,2,1,1,4)
- sulfur dioxide: 6.44457e-6 kg; data quality (2,2,1,1,5)
- Water, fresh: 0.00138767 m3; data quality (3,2,1,4,2)
- acenaphthylene: 2.04227e-10 kg; data quality (3,2,1,1,5)
- Ethene, chloro-: 4.74365e-12 kg; data quality (3,2,1,1,5)
- AMMONIA: 1.80104e-10 kg; data quality (3,1,1,1,4)
- antimony: 9.60287e-13 kg; data quality (3,2,1,1,4)
- Ethane, 1,1,1-trifluoro-, HFC-143a: 3.41035e-8 kg; data quality (4,2,1,4,1)
- trichloroethylene: 1.47904e-12 kg; data quality (4,2,1,1,4)
- beryllium: 2.2921e-12 kg; data quality (2,2,1,1,5)
- ammonia: 5.89147e-7 kg; data quality (3,2,1,1,5)
- Methane: 7.87889e-7 kg; data quality (4,2,1,4,1)
- PHENOTHRIN: 4.6659e-12 kg; data quality (5,1,1,1,4)
- Phosphorus: 1.71318e-6 kg; data quality (2,1,1,1,5)
- para-xylene: 4.46528e-11 kg; data quality (3,2,1,4,1)
- PHOSPHORUS: 3.83892e-11 kg; data quality (2,2,1,1,4)
- benzene, ethyl-: 2.6303e-9 kg; data quality (3,2,1,3,2)
- 2,4-dinitrophenol: 8.87317e-15 kg; data quality (5,2,1,1,4)
- particulates, < 10 um: 9.5501e-6 kg; data quality (3,2,1,1,5)
- hydrogen chloride: 1.1704e-8 kg; data quality (2,2,1,1,4)
- selenium: 4.7907e-11 kg; data quality (2,2,1,1,4)
- 2,3,4'-TRICHLOROBIPHENYL: 5.34448e-17 kg; data quality (2,2,1,1,4)
- Phthalate, dibutyl-: 3.54678e-11 kg; data quality (3,2,1,1,5)
- acetaldehyde: 4.96878e-8 kg; data quality (3,2,1,2,4)
- naphthalene: 1.30662e-9 kg; data quality (3,2,1,2,4)
- ethylene oxide: 1.77463e-9 kg; data quality (3,2,1,1,4)
- CHLORONAPHTHALENE: 1.58923e-16 kg; data quality (1,2,1,1,4)
- Cobalt: 5.76591e-11 kg; data quality (3,2,1,1,4)
- Indeno(1,2,3-cd)pyrene: 4.45568e-11 kg; data quality (2,2,1,1,5)
- ACRYLAMIDE: 1.19425e-10 kg; data quality (4,2,1,1,4)
- fluorene: 7.26231e-11 kg; data quality (3,2,1,2,4)
- Ethane, 1,1,1,2-tetrafluoro-, HFC-134a: 3.00428e-7 kg; data quality (4,2,1,4,1)
- manganese: 5.90253e-9 kg; data quality (3,2,1,1,4)
- benzene: 2.72742e-8 kg; data quality (3,2,1,2,4)
- Zinc: 2.27299e-11 kg; data quality (5,1,1,1,4)
- Water, saline: 4.05613e-5 m3; data quality (4,2,1,4,2)
- mercury: 1.85311e-11 kg; data quality (2,2,1,1,5)
- ethane, 1,2-dibromo-: 1.25993e-11 kg; data quality (2,2,1,1,5)
- toluene: 2.28492e-8 kg; data quality (3,2,1,2,4)
- 1,4-dichlorobenzene: 3.11004e-15 kg; data quality (2,2,1,1,4)
- nitric acid: 2.33295e-11 kg; data quality (3,1,1,1,4)
- VOC, volatile organic compounds: 4.07157e-6 kg; data quality (3,2,1,1,4)
- Methane, difluoro-, HFC-32: 4.6418e-8 kg; data quality (4,2,1,4,1)
- hydrogen sulfide: 8.46887e-10 kg; data quality (3,2,1,1,4)
- cumene: 3.24002e-12 kg; data quality (4,2,1,1,4)
- 1,1,1-trichloroethane: 1.70186e-12 kg; data quality (4,2,1,1,4)
- fluoranthene: 5.44982e-11 kg; data quality (3,2,1,1,5)
- Chrysene: 7.44364e-13 kg; data quality (3,2,1,3,3)
- chlorine: 1.22271e-10 kg; data quality (4,2,1,1,4)
- Carbon dioxide: 0.0421141 kg; data quality (4,2,1,4,1)
- arsenic: 7.9823e-11 kg; data quality (3,2,1,1,4)
- phthalate, dioctyl-: 3.11195e-15 kg; data quality (3,2,1,1,4)
- methanol: 2.15759e-8 kg; data quality (4,2,1,1,5)
- 2,4,6-trichlorophenol: 5.82582e-16 kg; data quality (2,2,1,1,4)
- Chromium, ion: 2.02131e-10 kg; data quality (2,2,1,1,5)
- cadmium: 2.00985e-10 kg; data quality (3,2,1,1,5)
- ethane, 1,1,2-trichloro-: 8.22051e-12 kg; data quality (4,2,1,1,5)
- chloroform: 8.76342e-12 kg; data quality (4,2,1,1,5)
- propanal: 3.19816e-9 kg; data quality (3,2,1,3,3)
- propylene oxide: 4.15314e-14 kg; data quality (3,2,1,1,4)
- anthracene: 8.09828e-11 kg; data quality (3,2,1,1,5)
- Benzo(g,h,i)perylene: 4.51818e-11 kg; data quality (4,2,1,1,5)
- nitrogen oxides: 2.27387e-5 kg; data quality (2,2,1,1,4)
- ethylene glycol: 1.58641e-12 kg; data quality (5,1,1,1,4)
- pyrene: 7.05903e-11 kg; data quality (3,2,1,1,5)
- PCB-1: 4.52391e-18 kg; data quality (2,2,1,1,4)
- carbon monoxide: 2.89942e-5 kg; data quality (3,2,1,1,3)
- m-xylene: 1.11473e-9 kg; data quality (3,2,1,4,1)
- benzene, chloro-: 1.63149e-12 kg; data quality (4,2,1,1,4)
- styrene: 3.64353e-9 kg; data quality (3,2,1,1,5)
- methane, dichloro-, hcc-30: 2.55815e-11 kg; data quality (4,2,1,1,4)
- o-cresol: 2.98353e-11 kg; data quality (3,2,1,1,5)
- acenaphthene: 2.71652e-11 kg; data quality (3,2,1,3,3)
- benz[a]anthracene: 4.86736e-11 kg; data quality (2,2,1,1,5)
- methane, monochloro-, r-40: 1.52272e-12 kg; data quality (3,2,1,1,4)
- acetophenone: 4.27598e-11 kg; data quality (3,2,1,1,5)
- biphenyl: 1.08902e-10 kg; data quality (3,2,1,1,5)
- particulates, < 2.5 um: 1.49145e-5 kg; data quality (3,2,1,1,5)
- o-Xylene: 9.65192e-10 kg; data quality (3,2,1,2,3)
- Propane, 1,1,1,3,3,3-hexafluoro-, HCFC-236fa: 9.21316e-10 kg; data quality (4,2,1,4,1)
- Captan: 9.56934e-13 kg; data quality (5,2,1,1,4)
- lead: 8.19547e-11 kg; data quality (3,2,1,1,5)
- carbon disulfide: 7.04257e-14 kg; data quality (4,2,1,1,4)
- Benzo(a)anthracene: 5.06406e-13 kg; data quality (2,2,1,1,5)
- phenol: 3.8437e-10 kg; data quality (3,2,1,1,5)
- Chromium VI: 2.93526e-11 kg; data quality (3,2,1,1,4)
- 4-nitrophenol: 1.1361e-10 kg; data quality (3,2,1,1,5)
- ethane, 1,2-dichloro-: 2.37336e-10 kg; data quality (3,2,1,1,5)
- Propene, 1,3-dichloro-: 6.82489e-12 kg; data quality (3,2,1,1,5)
- Dinitrogen monoxide: 7.54206e-8 kg; data quality (4,2,1,4,1)

## Inventory method
Input-output

## Modelling constants
The reference unit of all processes is 1 USD2013 of the good or service. The technosphere inputs are based on the US BEA detailed input-output tables for 2007. The IO tables are combined to develop a commodity-by-commodity model based on the the industry-technology assumption (see Suh et al., 2010), which assumes all commodities produced by a given industry have the same input structure, but that multiple industries can produce the same commodity. Thus, model technosphere flows represent commodity outputs (and not industry outputs) from other processes in the model. There are no by-products included in these processes. All commodity production is based on US-conditions, despite in reality that some goods and services are produced overseas, as USEEIO v1.1 is a single-region IO model.

## Completeness
The input-output approach assures that all purchased inputs associated with the sectors making these commodities as reported in the US census for 2007 are included. The direct resources extracted including minerals, energy sources, water and land occupied are included. Emissions to air include all critieria air pollutants, greenhouse gases, and hazardous and toxic air pollutants as defined by US EPA. Releases to water include toxics, total nitrogen and total phosphorus, and water discharges. Releases to soil or groundwater include toxics and agriculutural pesticides. Some metal releases to air, water and soil are not included because they could not be speciated. Solid hazardous and non-hazardous wastes generated are not included as an elementary flows although purchases of waste services are included.

## Data treatment
Greenhouse gases are primarily from the US Greenhouse Gas Emission Inventory (USEPA 2016a). Biogenic C uptake is not included (change from version 1.0), as biogenic C emission are not included. Toxic releases to air, water and soil (except pesticides) are from the 2013 Toxic Release Inventory (USEPA 2015a). Criteria air pollutants and hazardous air pollutants are from the 2011 National Emissions Inventory (USEPA 2015b). All estimates are normalized by industry based on sector output in the data year, then converted to 2013 USD using relative sector-specific CPIs (if data year is not 2013). Energy use represent raw renewables or fossil fuel energies and is based on EIA data for 2014. See Table 1 in Yang, Ingwersen et al. 2017 and Supporting Information 1, and the v1.1 data update notes (Ingwersen et al. 2017) for all details on environmental data sources used.Land occupation associated with manufacturing buildings was estimated based on the building floorspace data provided by the U.S. Energy Information Administration in the 2010 Manufacturing Energy Consumption Survey (EIA 2013). Portions of total renewable energy (EIA 2016) based on EIA-923 reports for 2014 (EIA 2017) are included. Nitrogen and Phosphorus releases are modeled in total N and total P equivalents as estimated by the Discharge Monitoring Report Nutrient Loading tool (USEPA 2016b). Self-supplied withdrawals were assigned to industrial sectors based on water use statistics for Canadian industries by NAICS 3-digit sector scaled to US production levels based on gross domestic product by industry (BEA 2015; Statistics Canada 2010), and further disaggregated to the manufacturing sectors based on compensation of employees as provided by the 2007 IO tables (BEA 2015). Water withdrawals associated with public supply were allocated to sectors based on their use of water, sewage, and other services in USD based on the IO tables (BEA 2015). Portions of total renewable energy (EIA 2016) by type are assigned to sectors (hydro, wind, solar, or) based on EIA-923 reports for 2014 (EIA 2017).

## Data collection
2015-2016

## Sampling procedure
US federal government sources, including surveys and US EPA emissions databases are used as the primary sources. From these sources, data for US reporting establishments/facilities are aggregated by the NAICS sector as defined in the BEA detailed 2007 input-output tables. When level of sector aggregation differs, or when direct emissions are not reported but modeled, additional sources are used to make allocations and estimates.

## Review details
In regard to quality assurance and peer-review, each dataset created went through Quality Assurance as defined in a quality assurance project plans at US EPA, CSRA or ERG. The model was assembled with the IO model builder model (USEPA 2016c). Validation functions were used to check that all the model components were properly assembled and harmonized. Bayou Demeke and Santosh Ghimire provided internal peer review of the model methodology and the manuscript underwent standard EPA management review. An editor and two anonymous reviewers at the Journal of Cleaner Production reviewed the model. In regard to data quality evaluation, data quality assessment was performed at the flow and process levels according to the updated US EPA data quality assessment guidelines as defined in US EPA (2016b).

## Intended application
The primary application is for use in the US Environmentally-Extended Input-Ouput model, USEEIO, version 1.1. This model is being used by the US EPA for supporting tools that prioritize goods and services based on potential environmental impacts, resource use or emissions for large regions, including the US and US states, and as a strealined tool for organizations as a starting point to consider sustainable materials management. Model results are designed to provide meso/macro-level decision support.

## Project
USEEIO v1.1 was developed by the US EPA with CSRA and ERG with Wesley W. Ingwersen and David E. Meyer as research leads. Yi Yang was the technical lead on the work for CSRA (contract EP-C-15-012); Troy Hawkins was lead for ERG (contract EP-C-12-021).

## Sources
- USDA 2006
- BEA 2015
- USDA 2009a
- USEPA 2016b
- EIA 2013
- Statistics Canada 2010
- Lovelace 2009
- Nickerson et al. 2011
- USGS 2015
- USEPA 2016a
- USGS 2016
- EIA 2017
- Yienger et al. 1995
- BLM 2008
- USEPA 2015b
- Edelen and Ingwersen 2017
- Blackhurst et al. 2010
- Kim et el. 2013
- USDA 2016
- Ingwersen et al. 2017
- USEPA 2016c
- USDA 2014
- USDA 2009b
- EIA 2016
- Maupin et al. 2014
- EIA 2015
- Torcellini et al. 2003
- USEPA 2015a
- Macknick et al. 2011
- Ingwersen et al. DRAFT
- Goebes et al. 2003
