# Pipeline transport

Dataset: openLCA process, unit process
Category: 48-49: Transportation and Warehousing
Geography: United States
Time period: 2017-01-01 to 2017-12-31
Data quality: US EPA - Process Pedigree Matrix (1;1)
Exchange data quality scheme: US EPA - Flow Pedigree Matrix
Generated by: US EPA with CSRA and ERG
Owner: US EPA
Published in: Yang, Ingwersen et al. 2017
restrictionsDescription: This model shold be appropriately cited (see Yang, Ingwersen et al. 2017 source or Publication field) when used. Any changes or derivations of this model by the user should be documented. The model itself and any results from use of this model shall not be construed to consitute US EPA opinion or policy.
copyright: false

## General comment
BEA Code & Name is '486000:Pipeline transportation'. Description of the primary industry producing this good or service, adapted from the Census Bureau NAICS 2007 descriptions: Industries in the Pipeline Transportation subsector use transmission pipelines to transport products, such as crude oil, natural gas, refined petroleum products, and slurry. Industries are identified based on the products transported (i.e., pipeline transportation of crude oil, natural gas, refined petroleum products, and other products). The Pipeline Transportation of Natural Gas industry includes the storage of natural gas because the storage is usually done by the pipeline establishment and because a pipeline is inherently a network in which all the nodes are interdependent.

## Technology
The process describes the average US production of this good or service within this NAICS-based grouping defined in the BEA 2007 detailed input-output tables (BEA 2015). Distribution, wholesale and retailing of this good or service, use, and final disposal are not included. Creation of a product system with this process will enable modeling of all upstream (supply-chain) activities.

## Geography
Data represent the 50 US states

## Time period
2017 was the year in which this version of USEEIO was released and is the target date for the model

## Reference product
- Pipeline transport: 1 USD

## Inputs from technosphere
All rows: data quality (1,3,1,1,1)
- Ball and roller bearings; at manufacturer: 0.000924179 USD
- Water transport (boats, ships, ferries): 0.00508298 USD
- Welding and Soldering Equipment, Scales and Balances, and other general purpose machinery; at manufacturer: 3.85075e-5 USD
- Noncomparable imports: 0.00157881 USD
- Commercial machinery repair: 0.00123224 USD
- General merchandise stores: 0.00015403 USD
- Storage batteries; at manufacturer: 3.85075e-5 USD
- Accounting, tax preparation, bookkeeping, and payroll: 0.00231045 USD
- Relay and industrial controls; at manufacturer: 0.000269552 USD
- Pipeline transport: 0.00173284 USD
- Telephones; at manufacturer: 3.85075e-5 USD
- Insurance carriers: 0.00388925 USD
- Other concrete products; at manufacturer: 0.000115522 USD
- Pumps and pumping equipment; at manufacturer: 0.000269552 USD
- Passenger ground transport: 3.85075e-5 USD
- Architectural, engineering, and related services: 0.0274173 USD
- Other computer related services, including facilities management: 0.000192537 USD
- Buildings and dwellings services: 0.00500597 USD
- Food and beverage stores: 3.85075e-5 USD
- Advertising and public relations: 3.85075e-5 USD
- Paper; at manufacturer: 0.00100119 USD
- Environmental and other technical consulting services: 0.025646 USD
- Gasoline, fuels, and by-products of petroleum refining; at manufacturer: 0.0419346 USD
- Adhesives; at manufacturer: 3.85075e-5 USD
- Other retail: 0.00111672 USD
- Used and secondhand goods: 0.00015403 USD
- Metal pipe fittings, ball and roller bearings, industrial patterns, metal bath fixtures, other misc. fabricated metals; at manufacturer: 0.000693134 USD
- Wireless communications; at manufacturer: 0.000192537 USD
- Books, newspapers, magazines, and other print media; at manufacturer: 0.000577612 USD
- Monetary authorities and depository credit intermediation: 0.00612268 USD
- Marketing research and all other miscellaneous professional, scientific, and technical services: 0.00704686 USD
- Legal services: 0.00450537 USD
- Telecommunications: 0.00250298 USD
- Vehicle repair: 3.85075e-5 USD
- Full-service restaurants: 0.000115522 USD
- Vehicle rental and leasing: 0.000346567 USD
- Air and gas compressors; at manufacturer: 0.000192537 USD
- Unrefined oil and gas; at extraction site: 0.154569 USD
- Air conditioning, refrigeration, and warm air heating equipment; at manufacturer: 0.0110131 USD
- Veneer, plywood, and engineered wood; at manufacturer: 0.000423582 USD
- Paper bags and coated paper; at manufacturer: 0.000885671 USD
- Metal coatings, engravings, and heat treatments; at manufacturer: 0.000808656 USD
- Rail transport: 0.000500597 USD
- Hydraulic pumps, motors, cylinders and actuators; at manufacturer: 3.85075e-5 USD
- Waste management and remediation: 0.00250298 USD
- Scenic and sightseeing transportation and support activities for transportation: 0.00762448 USD
- Wholesale trade: 0.0130925 USD
- Machine shops; at manufacturer: 0.000577612 USD
- Investment advice, portfolio management, and other financial advising services: 0.000346567 USD
- All other food and drinking places: 3.85075e-5 USD
- Office supplies (not paper); at manufacturer: 7.70149e-5 USD
- Business support: 0.00204089 USD
- Screws, nuts, and bolts; at manufacturer: 0.000192537 USD
- Securities and commodities brokerage and exchanges: 0.00377373 USD
- Household goods repair: 0.00138627 USD
- Air transport: 0.000192537 USD
- Cardboard containers; at manufacturer: 0.000847164 USD
- Electricity; at consumer: 0.00219492 USD
- Cardboard; at manufacturer: 0.000346567 USD
- Civic, social, professional, and similar organizations: 0.000423582 USD
- Colleges, universities, junior colleges, and professional schools: 0.00015403 USD
- Chemicals (except basic chemicals, agrichemicals, polymers, paints, pharmaceuticals,soaps, cleaning compounds); at manufacturer: 0.000192537 USD
- Other plastic products; at manufacturer: 0.0041588 USD
- Other textiles; at manufacturer: 0.00015403 USD
- Limited-service restaurants: 0.000115522 USD
- Motors and generators; at manufacturer: 0.00015403 USD
- Satellite, telecommunications resellers, and all other telecommunications: 0.000192537 USD
- Springs and wires; at manufacturer: 0.00015403 USD
- Other basic organic chemicals; at manufacturer: 7.70149e-5 USD
- Facilities support: 0.000847164 USD
- Travel arrangement and reservation: 0.00123224 USD
- Warehousing: 0.00015403 USD
- Stationery; at manufacturer: 0.000231045 USD
- Metal structural products; at manufacturer: 0.0344642 USD
- Transmission and power train parts; at manufacturer: 3.85075e-5 USD
- Cutlery and handtools; at manufacturer: 0.00450537 USD
- Commercial equipment rental: 0.000346567 USD
- Computer terminals and other computer peripheral equipment; at manufacturer: 0.000423582 USD
- Other real estate: 0.010397 USD
- Nonresidential building repair and maintanence: 0.0403558 USD
- Couriers and messengers: 0.00138627 USD
- Hotels and campgrounds: 0.000269552 USD
- Office administration: 0.00146328 USD
- Investigation and security: 0.00111672 USD
- Data processing and hosting: 0.00130925 USD
- Employment services: 0.00816358 USD
- Communications equipment; at manufacturer: 3.85075e-5 USD
- Specialized design: 0.000462089 USD
- Insurance agencies and brokerages: 0.000115522 USD
- Electronic capacitors, resistors, coils, transformers, connectors and other components (except semiconductors and printed circuit assemblies); at manufacturer: 7.70149e-5 USD
- Truck transport: 0.0030806 USD
- Management consulting: 0.00177134 USD
- Wireless telecommunications: 0.0010397 USD
- Postal service: 0.00446686 USD
- Nondepository credit intermediation and related activities: 0.00142478 USD
- Natural gas; at consumer: 0.00808656 USD
- Computer systems design: 0.000192537 USD
- External hard drives, CDs, other storage media; at manufacturer: 0.000423582 USD
- Other support services: 0.000115522 USD
- Electronic equipment repair and maintenance: 0.000654627 USD

## Inputs from nature
- Occupation, urban, discontinuously built: 0.000104692 m2*a; data quality (4,2,1,1,1)

## Emissions to nature
- cyclohexane: 2.01023e-10 kg; data quality (4,1,1,1,5)
- Ethane, 1,1,1-trifluoro-, HFC-143a: 8.92575e-7 kg; data quality (4,2,1,4,1)
- beryllium: 9.95374e-12 kg; data quality (2,2,1,1,2)
- ethylbenzene: 4.95011e-9 kg; data quality (4,1,1,1,5)
- Propene: 4.03545e-7 kg; data quality (3,1,1,1,5)
- methane, dichloro-, hcc-30: 2.51392e-7 kg; data quality (4,2,1,1,2)
- cyanide: 1.02328e-9 kg; data quality (3,2,1,1,2)
- acenaphthene: 1.99232e-9 kg; data quality (3,2,1,1,2)
- arsenic: 4.23317e-10 kg; data quality (3,2,1,1,2)
- Nitrogen: 2.14526e-6 kg; data quality (5,2,1,1,5)
- hydrogen chloride: 1.03142e-10 kg; data quality (2,2,1,1,2)
- Propene, 1,3-dichloro-: 6.91094e-8 kg; data quality (3,2,1,1,2)
- selenium: 1.28583e-9 kg; data quality (2,2,1,1,2)
- lead: 4.17312e-10 kg; data quality (3,2,1,1,2)
- Benzo(k)fluoranthene: 5.77678e-12 kg; data quality (2,2,1,1,2)
- Indeno(1,2,3-cd)pyrene: 1.16721e-11 kg; data quality (2,2,1,1,2)
- benz[a]anthracene: 1.21312e-9 kg; data quality (2,2,1,1,2)
- Ethylene glycol monoethyl ether: 8.03299e-10 kg; data quality (3,2,1,1,2)
- 1,2-dibromo-3-chloropropane: 1.57262e-10 kg; data quality (4,2,1,1,2)
- butadiene: 1.74705e-6 kg; data quality (2,2,1,1,2)
- ethane, 1,1,2-trichloro-: 8.20765e-8 kg; data quality (4,2,1,1,2)
- Benzo(b)fluoranthene: 1.23967e-10 kg; data quality (2,2,1,1,2)
- particulates, < 10 um: 1.16851e-5 kg; data quality (3,2,1,1,2)
- 1,4-dichlorobenzene: 1.04753e-10 kg; data quality (2,2,1,1,2)
- Propane, 1,1,1,3,3,3-hexafluoro-, HCFC-236fa: 2.41131e-8 kg; data quality (4,2,1,4,1)
- 2,2,4-trimethylpentane: 2.54912e-5 kg; data quality (3,2,1,1,2)
- particulates, < 2.5 um: 0.000193075 kg; data quality (3,2,1,1,2)
- Xylene: 7.73164e-11 kg; data quality (4,1,1,1,5)
- carbon monoxide: 0.00263892 kg; data quality (2,2,1,1,2)
- sulfur dioxide: 4.54736e-5 kg; data quality (2,2,1,1,2)
- acrolein: 2.33193e-5 kg; data quality (2,2,1,1,2)
- styrene: 7.83654e-7 kg; data quality (4,2,1,1,2)
- benzo(a)pyrene: 1.64238e-9 kg; data quality (2,2,1,1,2)
- naphthalene: 3.32833e-7 kg; data quality (3,2,1,1,2)
- 2-methylnaphthalene: 4.04648e-8 kg; data quality (2,2,1,1,2)
- Chromium VI: 2.62004e-10 kg; data quality (3,2,1,1,2)
- carbon tetrachloride: 9.62136e-8 kg; data quality (4,2,1,1,2)
- 1,2,4-trimethylbenzene: 7.73164e-11, 1.19686e-8 kg (2 entries, compartments not in this file); data quality (5,1,1,1,5)
- catechol: 9.21078e-9 kg; data quality (5,2,1,1,2)
- acetaldehyde: 2.84967e-5 kg; data quality (3,2,1,1,2)
- methyl methacrylate: 1.6607e-8 kg; data quality (4,2,1,1,2)
- propylene oxide: 4.85418e-8 kg; data quality (3,2,1,1,2)
- t-butyl methyl ether: 2.44403e-6 kg; data quality (3,2,1,1,2)
- 1,2,4-trichlorobenzene: 5.8642e-10 kg; data quality (4,2,1,1,2)
- Benzene, 1,2,4-trimethyl-: 7.73164e-11 kg; data quality (5,1,1,1,5)
- m-xylene: 1.4971e-7 kg; data quality (3,2,1,1,2)
- methane, monochloro-, r-40: 4.07437e-9 kg; data quality (3,2,1,1,2)
- Benzo(a)anthracene: 5.7691e-14 kg; data quality (2,2,1,1,2)
- hydrogen sulfide: 6.22481e-7 kg; data quality (3,2,1,1,2)
- fluoranthene: 1.53301e-9 kg; data quality (2,2,1,1,2)
- biphenyl: 2.96908e-7 kg; data quality (4,2,1,1,2)
- benzene, chloro-: 7.0662e-8 kg; data quality (4,2,1,1,2)
- Ethane, 1,1,1,2-tetrafluoro-, HFC-134a: 7.86294e-6 kg; data quality (4,2,1,4,1)
- Chrysene: 1.13016e-9 kg; data quality (2,2,1,1,2)
- toluene: 5.58176e-5 kg; data quality (3,2,1,1,2)
- manganese: 2.80637e-8 kg; data quality (3,2,1,1,2)
- Dibenz(a,h)anthracene: 2.20155e-12 kg; data quality (2,2,1,1,2)
- Xylene: 2.64855e-5 kg; data quality (3,2,1,1,2)
- PHOSPHORUS: 1.03791e-9 kg; data quality (2,2,1,1,2)
- mercury: 4.63935e-9 kg; data quality (2,2,1,1,2)
- hexane: 6.72086e-5 kg; data quality (3,2,1,1,2)
- fluorene: 5.39666e-9 kg; data quality (2,2,1,1,2)
- formaldehyde: 0.000183072 kg; data quality (2,2,1,1,2)
- benzene: 2.20705e-5 kg; data quality (3,2,1,1,2)
- trichloroethylene: 3.17885e-8 kg; data quality (3,2,1,1,2)
- Hexane: 2.44366e-9 kg; data quality (4,1,1,1,5)
- Methane, difluoro-, HFC-32: 1.21487e-6 kg; data quality (4,2,1,4,1)
- Ethane, pentafluoro-, HFC-125: 2.08614e-6 kg; data quality (4,2,1,4,1)
- Benzo(g,h,i)perylene: 3.57962e-9 kg; data quality (3,2,1,1,2)
- methanol: 1.42185e-5 kg; data quality (4,2,1,1,2)
- 1,1,1-trichloroethane: 4.66743e-8 kg; data quality (3,2,1,1,2)
- Hydrocarbons, aromatic: 9.14398e-8 kg; data quality (4,2,1,1,2)
- Cobalt: 1.2745e-10 kg; data quality (3,2,1,1,2)
- Ethene, chloro-: 5.68001e-8 kg; data quality (3,2,1,1,2)
- benzene: 7.73164e-11 kg; data quality (3,1,1,1,5)
- phenanthrene: 1.03974e-8 kg; data quality (3,2,1,1,2)
- toluene: 7.73164e-11 kg; data quality (5,1,1,1,5)
- Benzo(g,h,i)perylene: 3.86582e-13 kg; data quality (2,1,1,1,5)
- ammonia: 2.96223e-6 kg; data quality (3,2,1,1,2)
- nitrogen oxides: 0.00862247 kg; data quality (2,2,1,1,2)
- Methane: 0.0744529 kg; data quality (4,2,1,4,1)
- o-Xylene: 1.40666e-7 kg; data quality (3,2,1,1,2)
- ethane, 1,2-dibromo-: 1.1347e-7 kg; data quality (2,2,1,1,2)
- ethylene glycol: 4.32332e-8 kg; data quality (5,2,1,1,2)
- Cumene: 1.31149e-10 kg; data quality (3,1,1,1,5)
- Propane, 1,2-dichloro-: 6.58659e-8 kg; data quality (4,2,1,1,2)
- ethene, tetrachloro-: 9.02019e-9 kg; data quality (3,2,1,1,2)
- Cresol: 7.43834e-9 kg; data quality (4,2,1,1,2)
- naphthalene: 1.48543e-10 kg; data quality (4,1,1,1,5)
- phenol: 1.9713e-7 kg; data quality (4,2,1,1,2)
- Carbon dioxide: 0.00672828 kg; data quality (4,2,1,4,1)
- acenaphthylene: 5.24016e-9 kg; data quality (3,2,1,1,2)
- Asbestos: 4.60539e-16 kg; data quality (5,2,1,1,2)
- 3-methylcholanthrene: 7.40101e-15 kg; data quality (2,2,1,1,2)
- dicyclopentadiene: 5.41215e-10 kg; data quality (4,1,1,1,5)
- monochloroethane: 2.65048e-9 kg; data quality (3,2,1,1,2)
- chlorine: 1.04996e-8 kg; data quality (2,1,1,1,5)
- cumene: 4.03113e-7 kg; data quality (3,2,1,1,2)
- pyrene: 1.44259e-9 kg; data quality (2,2,1,1,2)
- Benzene, ethyl-: 1.90801e-10 kg; data quality (4,1,1,1,5)
- Diethylene glycol butyl ether: 1.24038e-9 kg; data quality (3,2,1,1,2)
- ethane, 1,2-dichloro-: 1.19657e-7 kg; data quality (3,2,1,1,2)
- Chromium, ion: 4.14901e-9 kg; data quality (2,2,1,1,2)
- nickel: 7.94587e-8 kg; data quality (3,2,1,1,2)
- 1,1,2,2-tetrachloroethane: 1.12824e-7 kg; data quality (3,2,1,1,2)
- anthracene: 6.91738e-10 kg; data quality (3,2,1,1,2)
- ETHENE: 4.12901e-7 kg; data quality (3,1,1,1,5)
- Phosphorus: 1.06595e-8 kg; data quality (2,1,1,1,5)
- cadmium: 2.70884e-9 kg; data quality (3,2,1,1,2)
- benzene, ethyl-: 3.4926e-6 kg; data quality (4,2,1,1,2)
- t-Butyl methyl ether: 7.73164e-11 kg; data quality (4,1,1,1,5)
- chloroform: 7.5339e-8 kg; data quality (4,2,1,1,2)
- dibenzofuran: 4.26382e-11 kg; data quality (4,2,1,1,2)
- VOC, volatile organic compounds: 0.00457813 kg; data quality (3,2,1,1,2)

## Inventory method
Input-output

## Modelling constants
The reference unit of all processes is 1 USD2013 of the good or service. The technosphere inputs are based on the US BEA detailed input-output tables for 2007. The IO tables are combined to develop a commodity-by-commodity model based on the the industry-technology assumption (see Suh et al., 2010), which assumes all commodities produced by a given industry have the same input structure, but that multiple industries can produce the same commodity. Thus, model technosphere flows represent commodity outputs (and not industry outputs) from other processes in the model. There are no by-products included in these processes. All commodity production is based on US-conditions, despite in reality that some goods and services are produced overseas, as USEEIO v1.1 is a single-region IO model.

## Completeness
The input-output approach assures that all purchased inputs associated with the sectors making these commodities as reported in the US census for 2007 are included. The direct resources extracted including minerals, energy sources, water and land occupied are included. Emissions to air include all critieria air pollutants, greenhouse gases, and hazardous and toxic air pollutants as defined by US EPA. Releases to water include toxics, total nitrogen and total phosphorus, and water discharges. Releases to soil or groundwater include toxics and agriculutural pesticides. Some metal releases to air, water and soil are not included because they could not be speciated. Solid hazardous and non-hazardous wastes generated are not included as an elementary flows although purchases of waste services are included.

## Data treatment
Greenhouse gases are primarily from the US Greenhouse Gas Emission Inventory (USEPA 2016a). Biogenic C uptake is not included (change from version 1.0), as biogenic C emission are not included. Toxic releases to air, water and soil (except pesticides) are from the 2013 Toxic Release Inventory (USEPA 2015a). Criteria air pollutants and hazardous air pollutants are from the 2011 National Emissions Inventory (USEPA 2015b). All estimates are normalized by industry based on sector output in the data year, then converted to 2013 USD using relative sector-specific CPIs (if data year is not 2013). Energy use represent raw renewables or fossil fuel energies and is based on EIA data for 2014. See Table 1 in Yang, Ingwersen et al. 2017 and Supporting Information 1, and the v1.1 data update notes (Ingwersen et al. 2017) for all details on environmental data sources used.Total transportation land use is reported in the USGA Major Uses of Land for 2007 (Nickerson et al. 2011). Land use for roads was allocated to relevant transportation sectors based on the shares of Federal Highway Administration fees. Transportation land use for airports and railroads were each assumed 5% of the total use of urban land.

## Data collection
2015-2016

## Sampling procedure
US federal government sources, including surveys and US EPA emissions databases are used as the primary sources. From these sources, data for US reporting establishments/facilities are aggregated by the NAICS sector as defined in the BEA detailed 2007 input-output tables. When level of sector aggregation differs, or when direct emissions are not reported but modeled, additional sources are used to make allocations and estimates.

## Review details
In regard to quality assurance and peer-review, each dataset created went through Quality Assurance as defined in a quality assurance project plans at US EPA, CSRA or ERG. The model was assembled with the IO model builder model (USEPA 2016c). Validation functions were used to check that all the model components were properly assembled and harmonized. Bayou Demeke and Santosh Ghimire provided internal peer review of the model methodology and the manuscript underwent standard EPA management review. An editor and two anonymous reviewers at the Journal of Cleaner Production reviewed the model. In regard to data quality evaluation, data quality assessment was performed at the flow and process levels according to the updated US EPA data quality assessment guidelines as defined in US EPA (2016b).

## Intended application
The primary application is for use in the US Environmentally-Extended Input-Ouput model, USEEIO, version 1.1. This model is being used by the US EPA for supporting tools that prioritize goods and services based on potential environmental impacts, resource use or emissions for large regions, including the US and US states, and as a strealined tool for organizations as a starting point to consider sustainable materials management. Model results are designed to provide meso/macro-level decision support.

## Project
USEEIO v1.1 was developed by the US EPA with CSRA and ERG with Wesley W. Ingwersen and David E. Meyer as research leads. Yi Yang was the technical lead on the work for CSRA (contract EP-C-15-012); Troy Hawkins was lead for ERG (contract EP-C-12-021).

## Sources
- EIA 2015
- USDA 2016
- USEPA 2016a
- Torcellini et al. 2003
- Goebes et al. 2003
- EIA 2017
- USEPA 2015a
- EIA 2013
- Edelen and Ingwersen 2017
- USDA 2009b
- Macknick et al. 2011
- Maupin et al. 2014
- Statistics Canada 2010
- Lovelace 2009
- USDA 2009a
- Kim et el. 2013
- Blackhurst et al. 2010
- USEPA 2016b
- USEPA 2015b
- Ingwersen et al. 2017
- BEA 2015
- Ingwersen et al. DRAFT
- BLM 2008
- USDA 2006
- USGS 2016
- USEPA 2016c
- Yienger et al. 1995
- Nickerson et al. 2011
- USGS 2015
- EIA 2016
- USDA 2014
