# Surgical appliance and supplies; at manufacturer

Dataset: openLCA process, unit process
Category: 3391: Medical Equipment and Supplies Manufacturing
Geography: United States
Time period: 2017-01-01 to 2017-12-31
Data quality: US EPA - Process Pedigree Matrix (1;1)
Exchange data quality scheme: US EPA - Flow Pedigree Matrix
Generated by: US EPA with CSRA and ERG
Owner: US EPA
Published in: Yang, Ingwersen et al. 2017
restrictionsDescription: This model shold be appropriately cited (see Yang, Ingwersen et al. 2017 source or Publication field) when used. Any changes or derivations of this model by the user should be documented. The model itself and any results from use of this model shall not be construed to consitute US EPA opinion or policy.
copyright: false

## General comment
BEA Code & Name is '339113:Surgical appliance and supplies manufacturing'. Description of the primary industry producing this good or service, adapted from the Census Bureau NAICS 2007 descriptions: This U.S. industry comprises establishments primarily engaged in manufacturing surgical appliances and supplies. Examples of products made by these establishments are orthopedic devices, prosthetic appliances, surgical dressings, crutches, surgical sutures, personal industrial safety devices (except protective eyewear), hospital beds, and operating room tables.

## Technology
The process describes the average US production of this good or service within this NAICS-based grouping defined in the BEA 2007 detailed input-output tables (BEA 2015). Distribution, wholesale and retailing of this good or service, use, and final disposal are not included. Creation of a product system with this process will enable modeling of all upstream (supply-chain) activities.

## Geography
Data represent the 50 US states

## Time period
2017 was the year in which this version of USEEIO was released and is the target date for the model

## Reference product
- Surgical appliance and supplies; at manufacturer: 1 USD

## Inputs from technosphere
All rows: data quality (1,3,1,1,1)
- Employment services: 0.000937907 USD
- Plastic bottles; at manufacturer: 1.02963e-5 USD
- Semiconductors; at manufacturer: 0.00189492 USD
- Cutting and machine tool accessory, rolling mill, and other metalworking machines; at manufacturer: 0.000723108 USD
- Coal; at mine: 1.85192e-5 USD
- All other converted paper products; at manufacturer: 1.85313e-5 USD
- Nonferrous metal casts; at manufacturer: 0.000816156 USD
- other miscellaneous electrical equipment and components; at manufacturer: 0.000113806 USD
- Metal pipe fittings, ball and roller bearings, industrial patterns, metal bath fixtures, other misc. fabricated metals; at manufacturer: 0.00111232 USD
- Wireless communications; at manufacturer: 5.49925e-5 USD
- Air and gas compressors; at manufacturer: 1.81274e-6 USD
- Cardboard containers; at manufacturer: 0.00622134 USD
- Surgical and medical instruments; at manufacturer: 0.0209324 USD
- Light gauge metal cans, boxes, and containers; at manufacturer: 0.000370142 USD
- Accounting, tax preparation, bookkeeping, and payroll: 0.00397745 USD
- Semiconductor machinery; at manufacturer: 1.63273e-8 USD
- Optical instruments and lenses; at manufacturer: 0.0103527 USD
- Paper bags and coated paper; at manufacturer: 0.000137974 USD
- Material handling equipment; at manufacturer: 6.80128e-5 USD
- Water transport (boats, ships, ferries): 0.000190226 USD
- Consumer goods and general rental centers: 3.51733e-5 USD
- Unrefined oil and gas; at extraction site: 4.99146e-6 USD
- Plastics; at manufacturer: 0.005767 USD
- Plastics and rubber industry machinery; at manufacturer: 2.41925e-6 USD
- Advertising and public relations: 0.0136363 USD
- Facilities support: 1.35928e-5 USD
- Other basic organic chemicals; at manufacturer: 0.00106755 USD
- Secondary copper products; at manufacturer: 0.000202598 USD
- All other forging, stamping, and sintering; at manufacturer: 0.00115293 USD
- Insurance carriers: 0.000760652 USD
- Communication and energy wire and cable; at manufacturer: 0.00039563 USD
- Electronic capacitors, resistors, coils, transformers, connectors and other components (except semiconductors and printed circuit assemblies); at manufacturer: 0.00226103 USD
- Asphalt pavement; at manufacturer: 6.76993e-7 USD
- Refined vegetable, olive, and seed oils; at manufacturer: 1.27819e-6 USD
- Mattresses, blinds and shades; at manufacturer: 1.77038e-5 USD
- Chemicals (except basic chemicals, agrichemicals, polymers, paints, pharmaceuticals,soaps, cleaning compounds); at manufacturer: 0.00154324 USD
- Legal services: 0.00718656 USD
- Securities and commodities brokerage and exchanges: 0.0101747 USD
- Plywood and veneer; at manufacturer: 0.00380745 USD
- Fabric; at manufacturer: 0.00757076 USD
- Ink and ink cartridges; at manufacturer: 9.19033e-6 USD
- Lessors of nonfinancial intangible assets: 0.0117479 USD
- Heating equipment other than warm air furnaces; at manufacturer: 9.95578e-9 USD
- Electricity; at consumer: 0.00350391 USD
- Iron, gold, silver, and other metal ores; at mine: 1.55973e-6 USD
- Springs and wires; at manufacturer: 0.000156537 USD
- Secondary steel products; at manufacturer: 0.000125777 USD
- Special tools, dies, jigs, and fixtures; at manufacturer: 6.56871e-5 USD
- Primary iron, steel, and ferroalloy products; at manufacturer: 0.0046462 USD
- All other food and drinking places: 0.000277466 USD
- Timber and raw forest products; at forest: 8.71024e-5 USD
- Monetary authorities and depository credit intermediation: 0.00604207 USD
- Computer terminals and other computer peripheral equipment; at manufacturer: 0.000259111 USD
- Soap and cleaning compounds; at manufacturer: 0.000689733 USD
- Ready-mix concrete; at manufacturer: 8.9602e-8 USD
- Fiber, yarn, and thread; at manufacturer: 0.000203996 USD
- Medicinal and botanical ingredients; at manufacturer: 0.000212129 USD
- Dental equipment and supplies; at manufacturer: 6.61898e-5 USD
- Metal plumbing drains, faucets, valves, and other fittings; at manufacturer: 1.97161e-5 USD
- Watches, clocks, and other measuring and controlling devices; at manufacturer: 4.82109e-6 USD
- Machinery for the paper, textile, food or other industries (except semiconductor machinery); at manufacturer: 0.000275365 USD
- Other secondary nonferrous metal products; at manufacturer: 0.00320467 USD
- Other vehicle parts; at manufacturer: 0.00170645 USD
- Lime and gypsum products; at manufacturer: 0.0057507 USD
- Blood sugar, pregnancy, and other diagnostic test kits; at manufacturer: 1.35276e-6 USD
- General merchandise stores: 0.000199784 USD
- Travel arrangement and reservation: 9.19162e-5 USD
- Household goods repair: 0.000286528 USD
- Vehicle electrical and electronic equipment; at manufacturer: 3.73446e-5 USD
- Vegetable oils and by-products; at manufacturer: 6.82835e-6 USD
- Gaskets, seals, musical instruments, fasteners, brooms, brushes, mop and other misc. goods; at manufacturer: 6.77525e-5 USD
- Metal windows, doors, and architectural products; at manufacturer: 0.00263848 USD
- Company and enterprise management: 0.0470939 USD
- Primary copper; at manufacturer: 2.7562e-6 USD
- Lids, jars, bottle caps, other metal closures and crowns; at manufacturer: 0.000398648 USD
- Noncomparable imports: 0.00383096 USD
- Limited-service restaurants: 0.00386939 USD
- Air conditioning, refrigeration, and warm air heating equipment; at manufacturer: 0.000316812 USD
- Wooden windows, door, and flooring; at manufacturer: 6.71189e-6 USD
- Animal farms and aquaculture ponds (except cattle and poultry): 3.69628e-5 USD
- Food and beverage stores: 9.99905e-5 USD
- Commercial machinery repair: 0.00113996 USD
- Specialty transformers; at manufacturer: 6.23223e-5 USD
- Plastic pipe, fittings, and sausage casings; at manufacturer: 0.00118869 USD
- Relay and industrial controls; at manufacturer: 0.000786783 USD
- Screws, nuts, and bolts; at manufacturer: 0.00453893 USD
- Power boilers and heat exchangers; at manufacturer: 4.03755e-6 USD
- Specialized design: 0.000467079 USD
- Rubber and plastic belts and hoses; at manufacturer: 4.40761e-6 USD
- State and local government enterprises: 0.000396124 USD
- Welding and Soldering Equipment, Scales and Balances, and other general purpose machinery; at manufacturer: 0.000136267 USD
- Gasoline, fuels, and by-products of petroleum refining; at manufacturer: 0.000858322 USD
- Truck transport: 0.00668987 USD
- Commercial equipment rental: 0.000238047 USD
- Metal hinges, keys, lock, and other hardware; at manufacturer: 2.44679e-6 USD
- Passenger ground transport: 0.0016317 USD
- Heavy gauge metal tanks; at manufacturer: 3.2884e-6 USD
- Scientific research and development: 0.000124288 USD
- Industrial process variable instruments; at manufacturer: 9.78665e-6 USD
- Toiletries; at manufacturer: 9.59742e-6 USD
- Motors and generators; at manufacturer: 0.00781102 USD
- Fresh soybeans, canola, flaxseeds, and other oilseeds; at farm: 5.87049e-7 USD
- Fertilizers; at manufacturer: 6.16912e-6 USD
- Electromedical appartuses; at manufacturer: 0.00744927 USD
- Light fixtures; at manufacturer: 0.000122518 USD
- Plastic bags, films, and sheets; at manufacturer: 0.00936931 USD
- Promoters and agents: 3.2172e-5 USD
- Dimensional stone; at mine: 2.74934e-6 USD
- Magazines and journals; at publisher: 9.4006e-5 USD
- Transmission and power train parts; at manufacturer: 6.37339e-5 USD
- Environmental and other technical consulting services: 0.00122111 USD
- Vehicle repair: 0.000585843 USD
- Custom metal rolls; at manufacturer: 0.00664162 USD
- Packaging machinery; at manufacturer: 7.2633e-7 USD
- Small electrical appliances; at manufacturer: 8.16374e-7 USD
- Independent artists, writers, and performers: 0.000160883 USD
- Switchgear and switchboards; at manufacturer: 0.000154063 USD
- Wood kitchen cabinets and countertops; at manufacturer: 3.72346e-6 USD
- Industrial molds; at manufacturer: 5.53248e-5 USD
- Surgical appliance and supplies; at manufacturer: 0.0255917 USD
- Metal coatings, engravings, and heat treatments; at manufacturer: 0.00244834 USD
- Drinking water and wastewater treatment; at consumer: 0.000363439 USD
- Pipeline transport: 3.27894e-5 USD
- Other support services: 0.000395484 USD
- Full-service restaurants: 0.00225983 USD
- Sporting and athletic goods; at manufacturer: 0.000101226 USD
- Custom computer programming: 0.000118342 USD
- Signal testing instruments; at manufacturer: 4.00443e-5 USD
- Management consulting: 0.00535267 USD
- Scenic and sightseeing transportation and support activities for transportation: 0.00016405 USD
- Dental laboratories; at manufacturer: 0.000312052 USD
- Adhesives; at manufacturer: 0.00577213 USD
- Sanitary paper (tissues, napkins, diapers, etc.); at manufacturer: 4.48027e-7 USD
- Pumps and pumping equipment; at manufacturer: 1.53133e-5 USD
- Other petroleum and coal products; at manufacturer: 0.00327036 USD
- Audio and video equipment; at manufacturer: 3.48733e-6 USD
- Wholesale trade: 0.0626467 USD
- Electronic equipment repair and maintenance: 0.000763382 USD
- Packaged meat (except poultry); at manufacturer: 1.96855e-5 USD
- Insurance agencies and brokerages: 0.000212145 USD
- Wireless telecommunications: 0.00153953 USD
- Investigation and security: 0.00063718 USD
- Other textiles; at manufacturer: 1.94976e-6 USD
- Ball and roller bearings; at manufacturer: 0.000583035 USD
- All other foods; at manufacturer: 1.58248e-6 USD
- Nondepository credit intermediation and related activities: 0.00137753 USD
- Lumber and treated lumber; at manufacturer: 3.01389e-5 USD
- Clay and ceramic products; at manufacturer: 1.34403e-6 USD
- Tobacco, cotton, sugarcane, peanuts, sugar beets, herbs and spices, and other crops; at farm: 7.67284e-5 USD
- Hydraulic pumps, motors, cylinders and actuators; at manufacturer: 3.93028e-5 USD
- Telephones; at manufacturer: 2.76893e-7 USD
- Office administration: 0.000719184 USD
- Office supplies (not paper); at manufacturer: 3.04004e-5 USD
- Other concrete products; at manufacturer: 4.02758e-6 USD
- Telecommunications: 0.00324671 USD
- Satellite, telecommunications resellers, and all other telecommunications: 0.000224001 USD
- Architectural, engineering, and related services: 0.0030708 USD
- Business support: 0.00191957 USD
- Other plastic products; at manufacturer: 0.00859203 USD
- Vending, commercial laundry, and other commercial and service industry machinery; at manufacturer: 4.12114e-5 USD
- Veneer, plywood, and engineered wood; at manufacturer: 2.20594e-5 USD
- Cutlery and handtools; at manufacturer: 0.000487076 USD
- Communications equipment; at manufacturer: 1.02649e-5 USD
- Postal service: 1.62646e-5 USD
- Valve and fittings (except for plumbing); at manufacturer: 0.00108541 USD
- Air transport: 0.00362983 USD
- Paper; at manufacturer: 0.00382942 USD
- Synthetic rubber and artificial and synthetic fibers; at manufacturer: 0.0141905 USD
- Abrasive products; at manufacturer: 0.00107776 USD
- Cement; at manufacturer: 6.76993e-7 USD
- Golf courses, marinas, ski resorts, fitness and other rec centers and industries: 0.000647823 USD
- Metal cutting and forming machine tools; at manufacturer: 3.86354e-5 USD
- Warehousing: 0.00491829 USD
- Glass and glass products; at manufacturer: 0.00102977 USD
- Paints and coatings; at manufacturer: 9.69388e-5 USD
- Other primary nonferrous metals; at manufacturer: 0.000257645 USD
- Institutional furniture; at manufacturer: 7.25329e-7 USD
- Other computer related services, including facilities management: 0.000601715 USD
- Investment advice, portfolio management, and other financial advising services: 0.000224079 USD
- Petrochemicals; at manufacturer: 5.9773e-5 USD
- Other real estate: 0.000211241 USD
- Shelving and lockers; at manufacturer: 8.74114e-7 USD
- Speed changers, industrial high-speed drives, and gears; at manufacturer: 7.85142e-5 USD
- Air purification and ventilation equipment; at manufacturer: 1.70003e-6 USD
- Other rubber products; at manufacturer: 0.00200869 USD
- Vehicle seating and interior trim (upholstery); at manufacturer: 5.69253e-8 USD
- Light bulbs; at manufacturer: 3.07796e-5 USD
- Natural gas; at consumer: 0.00189792 USD
- Vaccines and other biological medical products; at manufacturer: 0.00015812 USD
- Computer storage device readers; at manufacturer: 3.54332e-5 USD
- Leather; at manufacturer: 1.50136e-5 USD
- Buildings and dwellings services: 0.00267586 USD
- Machine shops; at manufacturer: 0.00379105 USD
- Laminated plastic plates and shapes; at manufacturer: 0.00122112 USD
- Wood pulp; at manufacturer: 7.67945e-5 USD
- Rail transport: 0.000744664 USD
- Compressed Gases; at manufacturer: 0.000100059 USD
- Clothing; at manufacturer: 1.7279e-5 USD
- Sand, gravel, clay, phosphate, other nonmetallic minerals; at mine: 8.93308e-7 USD
- Software: 0.000159346 USD
- Cardboard; at manufacturer: 0.00164009 USD
- Dry-cleaning and laundry: 6.8499e-5 USD
- Metal structural products; at manufacturer: 4.56076e-5 USD
- Hotels and campgrounds: 0.00320287 USD
- Copper, nickel, lead, and zinc; at mine: 0.000303905 USD
- Books, newspapers, magazines, and other print media; at manufacturer: 1.07487e-5 USD
- Aluminum products; at manufacturer: 0.000226725 USD
- Wiring devices; at manufacturer: 0.00181508 USD
- Performances: 9.18726e-5 USD
- Polystyrene foam products; at manufacturer: 6.75424e-5 USD
- Vehicle engines and engine parts; at manufacturer: 9.33699e-7 USD
- Motor vehicle steering, suspension components (except spring), and brake systems; at manufacturer: 3.31448e-5 USD
- Data processing and hosting: 0.00456441 USD
- Urethane and other foam products; at manufacturer: 0.000575245 USD
- Pharmaceutical products (pills, powders, solutions, etc.); at manufacturer: 5.65098e-5 USD
- Marketing research and all other miscellaneous professional, scientific, and technical services: 0.0049188 USD
- Nonresidential building repair and maintanence: 0.0015603 USD
- Vehicle rental and leasing: 0.000470382 USD
- Ground or treated minerals and earth; at manufacturer: 2.28848e-6 USD
- Sports: 0.000307091 USD
- Home furniture - Cabinets and non-wood, nonupholstered; at manufacturer: 0.00363972 USD
- Computer systems design: 0.00171429 USD
- Cast iron and steel; at manufacturer: 0.00495183 USD
- Printed circuit and electronic assembly; at manufacturer: 0.00260373 USD
- Waste management and remediation: 0.00130047 USD
- Newspapers; at publisher: 2.26988e-8 USD
- Analytical laboratory instruments; at manufacturer: 0.00519983 USD
- Finished and coated fabric; at manufacturer: 0.0135035 USD
- Vehicles and parts sales: 0.000351509 USD
- Other retail: 0.00163184 USD
- Synthetic dyes and pigments; at manufacturer: 7.92941e-5 USD
- Other basic inorganic chemicals; at manufacturer: 0.000620084 USD
- Other nonmetallic mineral products; at manufacturer: 6.63205e-7 USD
- Concrete pipe, bricks, and blocks; at manufacturer: 2.64824e-6 USD
- Ophthalmic goods; at manufacturer: 6.35566e-5 USD
- Dry, condensed, and evaporated dairy; at manufacturer: 4.21144e-6 USD
- Civic, social, professional, and similar organizations: 0.000441853 USD
- Aluminum; at manufacturer: 0.000170559 USD

## Inputs from nature
- Occupation, industrial area: 0.000506395 m2*a; data quality (4,2,1,1,1)
- Water, saline: 1.88782e-5 m3; data quality (4,2,1,4,2)
- Energy, biomass: 2.79097e-5 MJ; data quality (3,1,1,1,1)
- Energy, wind: 3.8021e-6 MJ; data quality (3,1,1,1,1)
- Energy, solar: 1.00433e-5 MJ; data quality (3,1,1,1,1)
- Water, fresh: 0.000159853 m3; data quality (2,2,1,4,2)
- Occupation, industrial area, built up: 0.000168798 m2*a; data quality (4,2,1,1,1)
- Occupation, urban, discontinuously built: 0.000150499 m2*a; data quality (4,2,1,1,1)
- Water, fresh: 0.000412064 m3; data quality (3,2,1,4,2)

## Emissions to nature
- AZIRIDINE: 7.86671e-13 kg; data quality (4,2,1,1,4)
- toluene: 8.81867e-7 kg; data quality (4,2,1,1,5)
- p-cresol: 5.36228e-14 kg; data quality (4,2,1,1,4)
- 2-METHYLPYRIDINE: 1.47149e-15 kg; data quality (3,1,1,1,4)
- mercury: 9.29837e-15 kg; data quality (3,1,1,1,4)
- CHLOROMETHYL METHYL ETHER: 2.06291e-15 kg; data quality (5,2,1,1,5)
- chlorine: 2.66659e-9 kg; data quality (4,2,1,1,5)
- Water, saline: 9.56552e-6 m3; data quality (4,2,1,4,2)
- silver: 2.56931e-13 kg; data quality (4,1,1,1,5)
- Ethane, 2-chloro-1,1,1,2-tetrafluoro-, HCFC-124: 3.03508e-8 kg; data quality (4,1,1,1,5)
- Water, fresh: 0.00048254 m3; data quality (3,2,1,4,2)
- Aluminum: 4.57839e-11 kg; data quality (4,1,1,1,5)
- dimethyl formamide: 1.90481e-12, 8.27375e-13 kg (2 entries, compartments not in this file); data quality (4,1,1,1,4)
- 2-METHOXYETHANOL: 1.07825e-10 kg; data quality (4,2,1,1,4)
- QUINOLINE: 1.85387e-12 kg; data quality (2,1,1,1,4)
- Phthalate, dioctyl-: 7.30911e-12 kg; data quality (4,1,1,1,4)
- nitric acid: 2.58678e-8, 1.65051e-12 kg (2 entries, compartments not in this file); data quality (3,1,1,1,5)
- beryllium: 4.61626e-12 kg; data quality (2,2,1,1,4)
- TERT-BUTYL ALCOHOL: 3.79157e-13 kg; data quality (4,1,1,1,4)
- Propane, 1,1,1,3,3,3-hexafluoro-, HCFC-236fa: 8.26641e-10 kg; data quality (4,2,1,4,1)
- Methane, dichlorodifluoro-, CFC-12: 2.27861e-11 kg; data quality (4,1,1,1,5)
- Thiram: 9.97255e-11, 5.97634e-13, 3.19615e-11 kg (3 entries, compartments not in this file); data quality (4,1,1,1,5)
- hexane: 2.01467e-7 kg; data quality (3,2,1,1,5)
- Dimethylamine: 7.95851e-11 kg; data quality (3,1,1,1,4)
- 1,4-dichlorobenzene: 3.12878e-12 kg; data quality (2,2,1,1,4)
- Nitrogen: 7.45357e-7 kg; data quality (3,2,1,1,5)
- Methane, tetrachloro-, R-10: 3.10547e-12, 2.25689e-14 kg (2 entries, compartments not in this file); data quality (3,1,1,1,4)
- DIMETHYLAMINOAZOBENZENE: 8.60008e-15 kg; data quality (5,2,1,1,5)
- copper: 9.53761e-11, 1.70187e-11, 8.70672e-12 kg (3 entries, compartments not in this file); data quality (4,1,1,1,5)
- QUINOLINE: 9.59818e-12 kg; data quality (3,2,1,1,5)
- propargyl alcohol: 8.5817e-13, 2.80493e-12 kg (2 entries, compartments not in this file); data quality (4,1,1,1,4)
- ethane, 1,2-dibromo-: 5.90334e-13 kg; data quality (2,2,1,1,5)
- NITRIC ACID: 1.57982e-11 kg; data quality (3,1,1,1,4)
- butadiene: 5.87875e-10 kg; data quality (3,2,1,3,2)
- phosgene: 2.68114e-14 kg; data quality (5,2,1,1,4)
- mercury: 9.3336e-11 kg; data quality (3,2,1,1,5)
- toluene, 2,4-dinitro-: 3.93254e-11 kg; data quality (5,2,1,1,4)
- 2-Mercaptobenzothiazole: 5.6609e-11, 5.97634e-13, 3.5858e-13 kg (3 entries, compartments not in this file); data quality (3,1,1,1,5)
- cyanide: 6.65102e-9 kg; data quality (3,2,1,1,5)
- ACRYLAMIDE: 1.62496e-13 kg; data quality (4,1,1,1,4)
- Hydrazine: 9.2942e-13 kg; data quality (4,2,1,1,5)
- Asbestos: 1.4775e-17 kg; data quality (5,2,1,1,5)
- acetophenone: 9.27974e-10 kg; data quality (4,2,1,1,5)
- Triethyl amine: 5.57902e-12 kg; data quality (5,1,1,1,4)
- BUTYL ISOCYANATE: 9.23111e-11 kg; data quality (5,2,1,1,5)
- 1,2,4-trimethylbenzene: 3.2583e-10, 4.03239e-11 kg (2 entries, compartments not in this file); data quality (5,1,1,1,4)
- Propane, 1,2-dichloro-: 2.04529e-12 kg; data quality (4,2,1,1,4)
- propanal: 9.59283e-10 kg; data quality (3,2,1,4,1)
- 1,2-DICHLOROETHYLENE: 1.6069e-13 kg; data quality (5,1,1,1,4)
- 1-Methyl-2-pyrrolidinone: 8.05969e-9 kg; data quality (5,1,1,1,5)
- biphenyl: 1.51584e-10 kg; data quality (4,2,1,1,4)
- Methane, trichlorofluoro-, CFC-11: 1.04319e-11 kg; data quality (2,1,1,1,5)
- SEC-BUTYL ALCOHOL: 6.9596e-12 kg; data quality (5,1,1,1,4)
- benzidine: 3.15459e-14 kg; data quality (2,2,1,1,5)
- Phenol: 3.12714e-11 kg; data quality (3,1,1,1,4)
- Methyl acrylate: 1.06251e-13 kg; data quality (3,1,1,1,5)
- cobalt: 5.3478e-11 kg; data quality (4,1,1,1,5)
- ETHENE: 9.17198e-11 kg; data quality (3,1,1,1,4)
- Methyl acrylate: 1.1007e-10, 2.70826e-14 kg (2 entries, compartments not in this file); data quality (3,1,1,1,4)
- Phthalate, dimethyl-: 4.82624e-12 kg; data quality (4,1,1,1,4)
- polychlorinated biphenyls: 3.43526e-14 kg; data quality (3,2,1,1,4)
- Bis(2-chloroethyl)ether: 9.02754e-15 kg; data quality (2,1,1,1,4)
- methanol: 7.45316e-10, 4.26178e-11 kg (2 entries, compartments not in this file); data quality (3,1,1,1,4)
- Hexachlorocyclopentadiene: 1.13975e-13 kg; data quality (3,2,1,1,5)
- toluene: 5.54984e-11 kg; data quality (5,1,1,1,4)
- HCFC-225ca: 4.96515e-13 kg; data quality (5,1,1,1,4)
- 1,1-DICHLOROETHYLENE: 6.03353e-13 kg; data quality (3,2,1,1,5)
- n-nitrosodimethylamine: 8.6672e-16 kg; data quality (5,2,1,1,5)
- 4,4'-METHYLENEDIANILINE: 7.08984e-13 kg; data quality (4,2,1,1,5)
- acetonitrile: 1.77661e-9 kg; data quality (3,2,1,1,5)
- ACETONE CYANOHYDRIN: 5.16375e-11 kg; data quality (3,1,1,1,4)
- vinyl acetate: 1.8147e-8 kg; data quality (4,2,1,1,5)
- Benzene, ethyl-: 9.02754e-15, 1.66935e-11 kg (2 entries, compartments not in this file); data quality (4,1,1,1,4)
- Phosphorus: 1.442e-7 kg; data quality (2,1,1,1,5)
- ethane, 1,1,2-trichloro-: 1.93207e-12 kg; data quality (4,2,1,1,4)
- hydroquinone: 2.37171e-11 kg; data quality (3,2,1,1,5)
- lead: 2.53318e-12, 3.32499e-11 kg (2 entries, compartments not in this file); data quality (3,1,1,1,4)
- cadmium: 1.92339e-11 kg; data quality (3,2,1,1,4)
- MALEIC ANHYDRIDE: 1.39809e-11 kg; data quality (4,1,1,1,4)
- Benzene, 1,2,4-trimethyl-: 4.3628e-12 kg; data quality (5,1,1,1,5)
- 2,4-Diaminotoluene: 1.76955e-12 kg; data quality (2,2,1,1,4)
- 2-PHENYLPHENOL: 1.32705e-12, 1.17358e-12 kg (2 entries, compartments not in this file); data quality (3,1,1,1,4)
- 4-nitroaniline: 3.74643e-13 kg; data quality (5,1,1,1,4)
- 4-nitrophenol: 6.13121e-15 kg; data quality (2,2,1,1,5)
- Cobalt: 7.88626e-9 kg; data quality (3,2,1,1,5)
- ALLYL ALCOHOL: 4.83714e-11 kg; data quality (4,1,1,1,4)
- 1,2,4-trichlorobenzene: 1.18156e-14 kg; data quality (3,2,1,1,5)
- methyl methacrylate: 1.21909e-8 kg; data quality (4,2,1,1,5)
- BUTYL ACRYLATE: 4.86596e-11, 2.93072e-11 kg (2 entries, compartments not in this file); data quality (4,1,1,1,4)
- benzene, ethyl-: 4.60652e-7 kg; data quality (4,2,1,1,5)
- methyl isobutyl ketone: 5.0679e-8 kg; data quality (3,2,1,1,5)
- Aniline: 1.02018e-12 kg; data quality (3,1,1,1,5)
- 4-Methyl-2-pentanone: 2.25689e-12 kg; data quality (4,1,1,1,4)
- pyrene: 1.42301e-12 kg; data quality (3,2,1,3,2)
- t-Butyl methyl ether: 1.20698e-11 kg; data quality (4,1,1,1,4)
- 2-chloro-1-phenylethanone: 5.53728e-14 kg; data quality (2,2,1,1,5)
- Bisphenol A: 9.02754e-15 kg; data quality (4,1,1,1,4)
- Ethene, chloro-: 2.42488e-10 kg; data quality (3,2,1,1,4)
- 2,4/2,6-toluenediisocyanate (mixture): 1.8892e-11 kg; data quality (1,1,1,1,5)
- methylene diphenyl diisocyanate: 2.68338e-10 kg; data quality (4,2,1,1,5)
- ethylene glycol: 7.30861e-12 kg; data quality (5,1,1,1,4)
- sulfur dioxide: 1.08032e-6 kg; data quality (2,2,1,1,4)
- m-xylene: 1.56857e-8 kg; data quality (3,2,1,1,5)
- HYDROCHLORIC ACID: 4.89654e-11 kg; data quality (2,1,1,1,4)
- Polychlorinated biphenyls: 5.16128e-13 kg; data quality (3,1,1,1,5)
- antimony: 7.36106e-11, 4.51377e-14 kg (2 entries, compartments not in this file); data quality (2,1,1,1,4)
- Benzo(k)fluoranthene: 1.95181e-13 kg; data quality (2,2,1,2,3)
- CATECHOL: 1.0833e-13 kg; data quality (2,1,1,1,4)
- Cumene: 3.57391e-13 kg; data quality (3,1,1,1,5)
- Nitrobenzene: 3.42462e-12 kg; data quality (4,2,1,1,4)
- phenol: 7.54525e-9 kg; data quality (4,2,1,1,4)
- AMMONIA: 5.11309e-11 kg; data quality (3,1,1,1,4)
- 2-ethoxyethyl acetate: 7.15996e-10 kg; data quality (3,2,1,1,5)
- 2-nitropropane: 8.81016e-13 kg; data quality (3,2,1,1,5)
- anthracene: 2.01092e-12 kg; data quality (3,2,1,2,3)
- phthalate, dioctyl-: 2.86721e-9 kg; data quality (3,2,1,1,5)
- Chloroform: 2.35953e-12, 2.92438e-12 kg (2 entries, compartments not in this file); data quality (3,1,1,1,4)
- fluorene: 8.6737e-12 kg; data quality (3,2,1,4,1)
- acetaldehyde: 6.56504e-9 kg; data quality (3,2,1,3,2)
- Tetracycline hydrochloride: 2.32787e-12 kg; data quality (5,1,1,1,5)
- Propene: 6.31137e-10 kg; data quality (3,1,1,1,4)
- Acrylic acid: 1.24286e-11 kg; data quality (4,1,1,1,4)
- Methane, dichloro-, HCC-30: 1.28633e-12 kg; data quality (5,1,1,1,4)
- Formaldehyde: 4.94994e-12 kg; data quality (2,1,1,1,4)
- carbon disulfide: 2.46592e-8 kg; data quality (4,2,1,1,5)
- hexachloro-1,3-butadiene: 5.06178e-14 kg; data quality (4,2,1,1,5)
- selenium: 4.76131e-11 kg; data quality (2,2,1,1,5)
- 2,2,4-trimethylpentane: 2.79338e-9 kg; data quality (3,2,1,2,4)
- Ethylene glycol monoethyl ether: 2.38796e-9 kg; data quality (3,2,1,1,5)
- maleic anhydride: 1.18067e-9 kg; data quality (2,2,1,1,4)
- benzene, chloro-: 5.50046e-10 kg; data quality (4,2,1,1,5)
- M-CRESOL: 3.71935e-13 kg; data quality (3,1,1,1,4)
- ethyl acrylate: 5.76003e-10 kg; data quality (3,2,1,1,5)
- phenanthrene: 2.03949e-11 kg; data quality (3,2,1,4,1)
- Chrysene: 3.09607e-12 kg; data quality (2,2,1,1,4)
- Cumene hydroperoxide: 2.75801e-11 kg; data quality (2,1,1,1,5)
- bromine: 1.41801e-12 kg; data quality (5,1,1,1,5)
- Sodium formate: 1.03817e-12 kg; data quality (3,1,1,1,4)
- o-cresol: 1.00289e-13 kg; data quality (4,2,1,1,5)
- Methane, monochloro-, R-40: 4.51377e-14 kg; data quality (3,1,1,1,4)
- BIS (2-ETHOXY ETHYL) ETHER: 2.17946e-11 kg; data quality (5,2,1,1,5)
- PHOSPHORUS: 9.51666e-12 kg; data quality (2,2,1,1,4)
- Hydrocarbons, aromatic: 3.19284e-10 kg; data quality (3,2,1,4,1)
- o-Xylene: 4.12594e-9 kg; data quality (3,2,1,1,5)
- Dichlorvos: 8.25162e-14 kg; data quality (3,2,1,1,5)
- CHLORINE: 9.02754e-15 kg; data quality (2,1,1,1,4)
- 2,6-Dinitrotoluene: 1.44441e-11 kg; data quality (5,1,1,1,4)
- naphthalene: 6.26708e-10 kg; data quality (3,2,1,2,4)
- Xylene: 1.58434e-6 kg; data quality (4,2,1,1,5)
- METHACRYLONITRILE: 9.02754e-15 kg; data quality (5,1,1,1,4)
- manganese: 4.10118e-13 kg; data quality (4,1,1,1,5)
- Sodium formate: 4.45713e-12 kg; data quality (3,1,1,1,5)
- phthalic anhydride: 2.76214e-8 kg; data quality (2,2,1,1,5)
- N,N-DIMETHYLANILINE: 7.74583e-12 kg; data quality (5,2,1,1,5)
- Xylene: 6.59107e-11 kg; data quality (4,1,1,1,4)
- 2-(2-ETHOXYETHOXY) ETHYL ACETATE: 9.47207e-12 kg; data quality (5,2,1,1,5)
- Triethylene glycol: 3.13662e-11 kg; data quality (4,2,1,1,5)
- Styrene: 2.2265e-12 kg; data quality (3,1,1,1,5)
- Decabromodiphenyl oxide: 1.01108e-13 kg; data quality (4,1,1,1,4)
- hexachlorobenzene: 8.36271e-15 kg; data quality (3,2,1,1,5)
- Propane, 1,2-dichloro-: 3.23186e-14 kg; data quality (5,1,1,1,4)
- ammonia: 2.58578e-10 kg; data quality (3,1,1,1,4)
- acrylic acid: 1.59743e-9 kg; data quality (4,2,1,1,4)
- Chloroacetic acid: 3.40811e-11 kg; data quality (3,2,1,1,4)
- HCFC-225cb: 7.08662e-13 kg; data quality (2,1,1,1,4)
- aniline: 6.57938e-11 kg; data quality (4,2,1,1,4)
- Ethylene glycol monoethyl ether: 6.44053e-11, 1.11556e-10 kg (2 entries, compartments not in this file); data quality (5,1,1,1,4)
- chloroform: 9.62623e-10 kg; data quality (4,2,1,1,5)
- Ethane, 1,1,1-trifluoro-, HFC-143a: 3.0599e-8 kg; data quality (4,2,1,4,1)
- Acetonitrile: 9.28934e-12 kg; data quality (3,1,1,1,4)
- nickel: 1.58288e-12, 1.02813e-8 kg (2 entries, compartments not in this file); data quality (4,1,1,1,5)
- particulates, < 2.5 um: 6.4748e-7 kg; data quality (3,2,1,2,4)
- Phosphine: 7.55918e-14 kg; data quality (4,2,1,1,4)
- p-phenylenediamine: 6.24886e-13 kg; data quality (5,2,1,1,5)
- TERT-BUTYL ALCOHOL: 3.0444e-10 kg; data quality (4,1,1,1,5)
- benz[a]anthracene: 1.09449e-11 kg; data quality (2,2,1,1,4)
- PYRIDINE: 6.52803e-12 kg; data quality (4,1,1,1,5)
- methane, dichloro-, hcc-30: 9.42943e-8 kg; data quality (4,2,1,1,5)
- 2,4-dimethylphenol: 6.2931e-13 kg; data quality (4,1,1,1,4)
- Ethene, tetrachloro-: 2.25689e-12 kg; data quality (3,1,1,1,4)
- isophorone: 8.83093e-10 kg; data quality (2,2,1,1,5)
- ammonia: 5.36325e-8 kg; data quality (3,2,1,1,5)
- naphthalene: 1.7061e-11 kg; data quality (4,1,1,1,5)
- carbonyl sulfide: 9.69592e-11 kg; data quality (4,2,1,1,5)
- Phenol, 2,4-dimethyl-: 5.37139e-14 kg; data quality (4,1,1,1,4)
- nickel: 6.25043e-10 kg; data quality (3,2,1,1,4)
- 2-(2-BUTOXYETHOXY) ETHYL ACETATE: 8.24711e-11 kg; data quality (3,2,1,1,5)
- THIOUREA: 2.26501e-15 kg; data quality (3,1,1,1,4)
- Phthalate, dioctyl-: 1.19788e-9 kg; data quality (4,1,1,1,5)
- methane, bromo-, halon 1001: 5.04409e-12 kg; data quality (3,2,1,1,5)
- Ethane, pentafluoro-, HFC-125: 7.15167e-8 kg; data quality (4,2,1,4,1)
- Chromium VI: 2.02931e-9 kg; data quality (3,2,1,1,5)
- 1,1,1-trichloroethane: 5.05401e-8 kg; data quality (3,2,1,1,5)
- 1,3-PHENYLENEDIAMINE: 4.92141e-13 kg; data quality (4,1,1,1,5)
- 2,2-BIS(4-HYDROXY-3,5-DIBROMOPHENYL)PROPANE: 1.42913e-11 kg; data quality (5,1,1,1,5)
- SULFURYL FLUORIDE: 3.52074e-10 kg; data quality (4,1,1,1,4)
- cumene: 9.15007e-10 kg; data quality (4,2,1,1,5)
- CHLOROPRENE: 8.49778e-12 kg; data quality (2,2,1,1,4)
- ozone: 8.27123e-10 kg; data quality (4,1,1,1,5)
- O-ANISIDINE: 8.93713e-15 kg; data quality (5,2,1,1,4)
- 1,4-BENZOQUINONE: 8.31153e-14 kg; data quality (3,2,1,1,4)
- PYRIDINE: 1.99509e-12 kg; data quality (4,1,1,1,4)
- Benzo(a)anthracene: 9.60623e-15 kg; data quality (2,2,1,1,5)
- Acetonitrile: 6.70349e-12 kg; data quality (3,1,1,1,5)
- 1,2-BUTYLENE OXIDE: 1.49751e-11 kg; data quality (3,2,1,1,5)
- NITROUS ACID: 1.4902e-10 kg; data quality (5,1,1,1,5)
- o-toluidine: 2.38695e-13 kg; data quality (4,2,1,1,5)
- m-cresol: 6.26462e-13 kg; data quality (4,2,1,1,5)
- Benzo(g,h,i)perylene: 1.16523e-10 kg; data quality (3,2,1,1,5)
- methane, chlorodifluoro-, hcfc-22: 1.48099e-10 kg; data quality (4,1,1,1,5)
- formaldehyde: 1.75829e-8 kg; data quality (3,2,1,3,3)
- NITROGEN TRIFLUORIDE: 1.25686e-13 kg; data quality (3,1,1,1,5)
- Methane: 1.31615e-7 kg; data quality (4,2,1,4,1)
- formaldehyde: 6.19337e-11 kg; data quality (2,1,1,1,5)
- Triethyl amine: 9.42739e-12 kg; data quality (5,1,1,1,5)
- formic acid: 5.81437e-10 kg; data quality (3,1,1,1,4)
- chlorine: 1.04284e-10 kg; data quality (2,1,1,1,4)
- ETHYLENETHIOUREA: 5.97634e-14 kg; data quality (2,1,1,1,5)
- Dinitrogen monoxide: 1.98125e-8 kg; data quality (4,2,1,4,1)
- hydrogen sulfide: 4.44123e-10 kg; data quality (3,2,1,1,5)
- Methyl iodide: 1.4523e-12 kg; data quality (4,2,1,1,5)
- Epichlorohydrin: 1.86845e-11 kg; data quality (2,1,1,1,4)
- para-xylene: 3.65095e-9 kg; data quality (3,2,1,1,5)
- arsenic: 3.99929e-11 kg; data quality (3,2,1,1,4)
- BENZOIC TRICHLORIDE (BENZOTRICHLORIDE): 2.32365e-13 kg; data quality (3,2,1,1,4)
- diethanolamine: 2.43594e-9 kg; data quality (3,2,1,1,5)
- ALUMINUM OXIDE: 1.28377e-11 kg; data quality (5,1,1,1,4)
- acenaphthene: 1.03768e-11 kg; data quality (3,2,1,3,2)
- cyclohexane: 1.21358e-8 kg; data quality (4,1,1,1,5)
- Vinyl acetate: 1.58846e-11 kg; data quality (4,1,1,1,4)
- Methane, dichloro-, HCC-30: 1.11448e-12 kg; data quality (5,1,1,1,5)
- Phthalate, dimethyl-: 4.31001e-9 kg; data quality (4,2,1,1,5)
- Carbon dioxide: 0.0177478 kg; data quality (4,2,1,4,1)
- styrene: 1.68134e-11 kg; data quality (3,1,1,1,5)
- MOLYBDENUM(VI): 6.20914e-12 kg; data quality (3,1,1,1,4)
- Naphthalene: 6.1622e-11 kg; data quality (4,1,1,1,4)
- trichloroethylene: 2.37746e-8 kg; data quality (4,2,1,1,5)
- toluene-2,4-diisocyante: 4.24078e-11 kg; data quality (3,2,1,1,5)
- ethene, tetrachloro-: 7.83199e-9 kg; data quality (3,2,1,1,5)
- 4,4'-isopropylidenediphenol: 4.66767e-12 kg; data quality (4,1,1,1,4)
- methanol: 1.60853e-7 kg; data quality (4,2,1,1,5)
- mercury: 4.87534e-11 kg; data quality (3,1,1,1,5)
- Vinyl acetate: 1.57526e-11 kg; data quality (4,1,1,1,5)
- Hexane: 4.54949e-12 kg; data quality (4,1,1,1,5)
- monochloroethane: 1.22325e-11 kg; data quality (3,2,1,1,4)
- Propene, 1,3-dichloro-: 4.49071e-15 kg; data quality (3,2,1,1,4)
- PHENYTOIN: 1.64207e-11 kg; data quality (5,1,1,1,5)
- 4,4'-METHYLENEBIS(2-CHLOROANALINE): 1.59868e-9 kg; data quality (5,2,1,1,5)
- 3-methylcholanthrene: 1.14223e-15 kg; data quality (2,2,1,1,5)
- catechol: 1.2139e-11 kg; data quality (2,1,1,1,4)
- ethylbenzene: 5.3981e-8 kg; data quality (4,1,1,1,5)
- Butanol: 6.21095e-12, 2.53732e-13 kg (2 entries, compartments not in this file); data quality (5,1,1,1,4)
- t-butyl methyl ether: 2.17807e-10 kg; data quality (4,1,1,1,5)
- Cyanide: 1.06251e-12 kg; data quality (3,1,1,1,5)
- benzene: 5.70904e-9 kg; data quality (3,2,1,3,3)
- 2-methylnaphthalene: 1.02797e-13 kg; data quality (2,2,1,1,5)
- HYDROQUINONE: 2.24885e-12 kg; data quality (2,1,1,1,4)
- Formic acid: 7.39443e-12 kg; data quality (3,1,1,1,4)
- benzo(a)pyrene: 2.28114e-12 kg; data quality (2,2,1,1,4)
- Urethane: 2.08042e-16 kg; data quality (4,1,1,1,5)
- lead: 1.76404e-10 kg; data quality (3,2,1,1,4)
- pentachlorophenol: 9.39166e-15 kg; data quality (3,2,1,1,5)
- propylene oxide: 2.6277e-10 kg; data quality (3,2,1,1,4)
- diisocyanates: 4.05447e-9 kg; data quality (4,1,1,1,5)
- carbon tetrachloride: 1.00747e-10 kg; data quality (4,2,1,1,5)
- Permethrin: 1.48954e-12 kg; data quality (2,1,1,1,4)
- Xylene: 7.55682e-13 kg; data quality (4,1,1,1,5)
- benzyl chloride: 2.02152e-11 kg; data quality (2,2,1,1,4)
- nitrogen oxides: 3.03252e-6 kg; data quality (3,2,1,1,3)
- Nitrilotriacetic acid: 1.85065e-13 kg; data quality (5,1,1,1,4)
- hydrogen chloride: 2.08883e-8 kg; data quality (2,2,1,1,4)
- butanol: 5.67455e-10 kg; data quality (5,1,1,1,5)
- bromoform: 4.41514e-13 kg; data quality (3,2,1,1,5)
- NITROGLYCERIN: 1.98693e-10 kg; data quality (5,1,1,1,4)
- Chromium, ion: 8.98383e-9 kg; data quality (2,2,1,1,5)
- 2,4-dinitrophenol: 2.16761e-11 kg; data quality (5,1,1,1,4)
- Methane, dibromo-: 9.20286e-12 kg; data quality (5,1,1,1,4)
- toluene: 1.73631e-12 kg; data quality (5,1,1,1,5)
- Ethane, 1,1,1,2-tetrafluoro-, HFC-134a: 2.69555e-7 kg; data quality (4,2,1,4,1)
- chromium: 1.17188e-8, 2.88913e-9, 5.40456e-11 kg (3 entries, compartments not in this file); data quality (4,1,1,1,5)
- Benzyl chloride: 8.525e-11 kg; data quality (3,1,1,1,4)
- 1,1,2,2-tetrachloroethane: 9.3534e-13 kg; data quality (3,2,1,1,4)
- acrolein: 3.4952e-10 kg; data quality (3,2,1,3,2)
- manganese: 3.70587e-10 kg; data quality (3,2,1,1,4)
- CHLORONAPHTHALENE: 1.0347e-18 kg; data quality (1,2,1,1,5)
- Hydrazine, methyl-: 1.2284e-12 kg; data quality (2,2,1,1,5)
- antimony: 2.75355e-10 kg; data quality (3,2,1,1,5)
- Triethyl amine: 1.03972e-9 kg; data quality (4,2,1,1,5)
- PERACETIC ACID: 1.35012e-10 kg; data quality (4,1,1,1,5)
- carbon monoxide: 7.85929e-6 kg; data quality (3,2,1,1,1)
- Dimethyl sulfate: 1.64819e-11 kg; data quality (2,2,1,1,4)
- tertiary-Butyl Acetate: 1.53183e-8 kg; data quality (3,2,1,1,5)
- ethylene oxide: 2.85277e-7 kg; data quality (3,2,1,1,5)
- Phthalate, dibutyl-: 6.76389e-10 kg; data quality (4,2,1,1,5)
- epichlorohydrin: 1.84487e-10 kg; data quality (3,2,1,1,4)
- dibenzofuran: 3.73273e-12 kg; data quality (4,2,1,1,5)
- 2-PHENOXYETHANOL: 2.00824e-10 kg; data quality (3,2,1,1,5)
- manganese: 1.57533e-11 kg; data quality (4,1,1,1,4)
- dicyclopentadiene: 2.22845e-11 kg; data quality (4,1,1,1,5)
- Dibenz(a,h)anthracene: 7.81435e-14 kg; data quality (2,2,1,1,4)
- Methane, difluoro-, HFC-32: 4.1648e-8 kg; data quality (4,2,1,4,1)
- DIETHANOLAMINE: 2.77777e-11, 2.83954e-12 kg (2 entries, compartments not in this file); data quality (4,1,1,1,4)
- Indeno(1,2,3-cd)pyrene: 1.55001e-13 kg; data quality (2,2,1,2,3)
- fluoranthene: 8.61609e-12 kg; data quality (2,2,1,2,4)
- NITROUS ACID: 1.75296e-9 kg; data quality (5,1,1,1,4)
- VOC, volatile organic compounds: 1.15736e-5 kg; data quality (3,2,1,1,5)
- PHTHALIC ANHYDRIDE: 4.51377e-14 kg; data quality (3,1,1,1,4)
- Sulfuric acid: 2.09266e-9 kg; data quality (2,1,1,1,4)
- hydrogen fluoride: 2.2195e-9 kg; data quality (2,2,1,1,4)
- Benzo(b)fluoranthene: 2.59902e-13 kg; data quality (2,2,1,2,3)
- ACRYLAMIDE: 5.2338e-10 kg; data quality (4,2,1,1,5)
- acrylonitrile: 9.77012e-11 kg; data quality (4,2,1,1,4)
- Cresol: 1.22966e-12 kg; data quality (4,2,1,1,5)
- 1,4-dioxane: 1.43302e-9 kg; data quality (3,2,1,1,5)
- trifluralin: 3.0269e-12 kg; data quality (5,2,1,1,5)
- ALLYL CHLORIDE: 4.14237e-11 kg; data quality (3,2,1,1,4)
- methane, monochloro-, r-40: 4.99091e-10 kg; data quality (3,2,1,1,4)
- ETHYLENETHIOUREA: 1.92505e-12 kg; data quality (3,1,1,1,4)
- ethylene glycol: 7.94664e-9 kg; data quality (5,2,1,1,5)
- bis(2-chloroethyl)ether: 1.52869e-12 kg; data quality (2,1,1,1,4)
- dimethyl formamide: 2.90993e-9 kg; data quality (4,2,1,1,5)
- Decabromodiphenyl oxide: 1.13649e-10 kg; data quality (4,1,1,1,5)
- Ethylene glycol: 7.53654e-11 kg; data quality (5,1,1,1,4)
- ethane, 1,2-dichloro-: 2.34588e-10 kg; data quality (3,2,1,1,4)
- Zinc: 3.61122e-11 kg; data quality (5,1,1,1,5)
- Cadmium: 5.83458e-14 kg; data quality (3,1,1,1,5)
- styrene: 5.55474e-7 kg; data quality (4,2,1,1,5)
- acetamide: 9.02754e-15 kg; data quality (4,1,1,1,4)
- hexachloroethane: 6.50547e-13 kg; data quality (4,2,1,1,5)
- NICOTINE: 2.4148e-12 kg; data quality (2,1,1,1,5)
- DIPHENYLAMINE: 3.76448e-13 kg; data quality (1,1,1,1,4)
- Benzoyl chloride: 2.61765e-13 kg; data quality (2,1,1,1,5)
- CFC-114: 9.57227e-12 kg; data quality (5,1,1,1,5)
- Diethylene glycol butyl ether: 2.5722e-9 kg; data quality (4,2,1,1,5)
- phenol: 2.20723e-13 kg; data quality (3,1,1,1,4)
- acenaphthylene: 8.74523e-12 kg; data quality (3,2,1,4,1)
- DMTT (DAZOMET): 5.05542e-13 kg; data quality (4,1,1,1,4)
- particulates, < 10 um: 2.12183e-7 kg; data quality (3,2,1,1,5)
- 4-aminobiphenyl: 2.36816e-17 kg; data quality (5,2,1,1,5)

## Inventory method
Input-output

## Modelling constants
The reference unit of all processes is 1 USD2013 of the good or service. The technosphere inputs are based on the US BEA detailed input-output tables for 2007. The IO tables are combined to develop a commodity-by-commodity model based on the the industry-technology assumption (see Suh et al., 2010), which assumes all commodities produced by a given industry have the same input structure, but that multiple industries can produce the same commodity. Thus, model technosphere flows represent commodity outputs (and not industry outputs) from other processes in the model. There are no by-products included in these processes. All commodity production is based on US-conditions, despite in reality that some goods and services are produced overseas, as USEEIO v1.1 is a single-region IO model.

## Completeness
The input-output approach assures that all purchased inputs associated with the sectors making these commodities as reported in the US census for 2007 are included. The direct resources extracted including minerals, energy sources, water and land occupied are included. Emissions to air include all critieria air pollutants, greenhouse gases, and hazardous and toxic air pollutants as defined by US EPA. Releases to water include toxics, total nitrogen and total phosphorus, and water discharges. Releases to soil or groundwater include toxics and agriculutural pesticides. Some metal releases to air, water and soil are not included because they could not be speciated. Solid hazardous and non-hazardous wastes generated are not included as an elementary flows although purchases of waste services are included.

## Data treatment
Greenhouse gases are primarily from the US Greenhouse Gas Emission Inventory (USEPA 2016a). Biogenic C uptake is not included (change from version 1.0), as biogenic C emission are not included. Toxic releases to air, water and soil (except pesticides) are from the 2013 Toxic Release Inventory (USEPA 2015a). Criteria air pollutants and hazardous air pollutants are from the 2011 National Emissions Inventory (USEPA 2015b). All estimates are normalized by industry based on sector output in the data year, then converted to 2013 USD using relative sector-specific CPIs (if data year is not 2013). Energy use represent raw renewables or fossil fuel energies and is based on EIA data for 2014. See Table 1 in Yang, Ingwersen et al. 2017 and Supporting Information 1, and the v1.1 data update notes (Ingwersen et al. 2017) for all details on environmental data sources used.Land occupation associated with manufacturing buildings was estimated based on the building floorspace data provided by the U.S. Energy Information Administration in the 2010 Manufacturing Energy Consumption Survey (EIA 2013). Portions of total renewable energy (EIA 2016) based on EIA-923 reports for 2014 (EIA 2017) are included. Nitrogen and Phosphorus releases are modeled in total N and total P equivalents as estimated by the Discharge Monitoring Report Nutrient Loading tool (USEPA 2016b). Self-supplied withdrawals were assigned to industrial sectors based on water use statistics for Canadian industries by NAICS 3-digit sector scaled to US production levels based on gross domestic product by industry (BEA 2015; Statistics Canada 2010), and further disaggregated to the manufacturing sectors based on compensation of employees as provided by the 2007 IO tables (BEA 2015). Water withdrawals associated with public supply were allocated to sectors based on their use of water, sewage, and other services in USD based on the IO tables (BEA 2015). Portions of total renewable energy (EIA 2016) by type are assigned to sectors (hydro, wind, solar, or) based on EIA-923 reports for 2014 (EIA 2017).

## Data collection
2015-2016

## Sampling procedure
US federal government sources, including surveys and US EPA emissions databases are used as the primary sources. From these sources, data for US reporting establishments/facilities are aggregated by the NAICS sector as defined in the BEA detailed 2007 input-output tables. When level of sector aggregation differs, or when direct emissions are not reported but modeled, additional sources are used to make allocations and estimates.

## Review details
In regard to quality assurance and peer-review, each dataset created went through Quality Assurance as defined in a quality assurance project plans at US EPA, CSRA or ERG. The model was assembled with the IO model builder model (USEPA 2016c). Validation functions were used to check that all the model components were properly assembled and harmonized. Bayou Demeke and Santosh Ghimire provided internal peer review of the model methodology and the manuscript underwent standard EPA management review. An editor and two anonymous reviewers at the Journal of Cleaner Production reviewed the model. In regard to data quality evaluation, data quality assessment was performed at the flow and process levels according to the updated US EPA data quality assessment guidelines as defined in US EPA (2016b).

## Intended application
The primary application is for use in the US Environmentally-Extended Input-Ouput model, USEEIO, version 1.1. This model is being used by the US EPA for supporting tools that prioritize goods and services based on potential environmental impacts, resource use or emissions for large regions, including the US and US states, and as a strealined tool for organizations as a starting point to consider sustainable materials management. Model results are designed to provide meso/macro-level decision support.

## Project
USEEIO v1.1 was developed by the US EPA with CSRA and ERG with Wesley W. Ingwersen and David E. Meyer as research leads. Yi Yang was the technical lead on the work for CSRA (contract EP-C-15-012); Troy Hawkins was lead for ERG (contract EP-C-12-021).

## Sources
- USEPA 2015a
- Ingwersen et al. 2017
- EIA 2017
- Nickerson et al. 2011
- USEPA 2015b
- Goebes et al. 2003
- EIA 2013
- USDA 2009a
- BEA 2015
- BLM 2008
- USDA 2014
- USEPA 2016a
- Lovelace 2009
- USDA 2009b
- USEPA 2016c
- USGS 2016
- Macknick et al. 2011
- Blackhurst et al. 2010
- USGS 2015
- Edelen and Ingwersen 2017
- EIA 2015
- Torcellini et al. 2003
- Ingwersen et al. DRAFT
- Kim et el. 2013
- USDA 2016
- USDA 2006
- Yienger et al. 1995
- EIA 2016
- Statistics Canada 2010
- USEPA 2016b
- Maupin et al. 2014
