# Primary copper; at manufacturer

Dataset: openLCA process, unit process
Category: 3314: Nonferrous Metal (except Aluminum) Production and Processing
Geography: United States
Time period: 2017-01-01 to 2017-12-31
Data quality: US EPA - Process Pedigree Matrix (1;1)
Exchange data quality scheme: US EPA - Flow Pedigree Matrix
Generated by: US EPA with CSRA and ERG
Owner: US EPA
Published in: Yang, Ingwersen et al. 2017
restrictionsDescription: This model shold be appropriately cited (see Yang, Ingwersen et al. 2017 source or Publication field) when used. Any changes or derivations of this model by the user should be documented. The model itself and any results from use of this model shall not be construed to consitute US EPA opinion or policy.
copyright: false

## General comment
BEA Code & Name is '331411:Primary smelting and refining of copper'. Description of the primary industry producing this good or service, adapted from the Census Bureau NAICS 2007 descriptions: This U.S. industry comprises establishments primarily engaged in (1) smelting copper ore and/or (2) the primary refining of copper by electrolytic methods or other processes. Establishments in this industry make primary copper and copper-based alloys, such as brass and bronze, from ore or concentrates.

## Technology
The process describes the average US production of this good or service within this NAICS-based grouping defined in the BEA 2007 detailed input-output tables (BEA 2015). Distribution, wholesale and retailing of this good or service, use, and final disposal are not included. Creation of a product system with this process will enable modeling of all upstream (supply-chain) activities.

## Geography
Data represent the 50 US states

## Time period
2017 was the year in which this version of USEEIO was released and is the target date for the model

## Reference product
- Primary copper; at manufacturer: 1 USD

## Inputs from technosphere
All rows: data quality (1,3,1,1,1)
- Printed circuit and electronic assembly; at manufacturer: 0.000366759 USD
- Clay and ceramic products; at manufacturer: 0.00314367 USD
- Other petroleum and coal products; at manufacturer: 2.80116e-5 USD
- Petrochemicals; at manufacturer: 2.36825e-5 USD
- Other retail: 6.13079e-6 USD
- Air transport: 0.000369732 USD
- Investment advice, portfolio management, and other financial advising services: 1.25128e-5 USD
- Relay and industrial controls; at manufacturer: 0.000307034 USD
- Material handling equipment; at manufacturer: 1.2559e-5 USD
- Investigation and security: 4.43252e-5 USD
- Air conditioning, refrigeration, and warm air heating equipment; at manufacturer: 0.000224889 USD
- Vehicle engines and engine parts; at manufacturer: 2.51218e-7 USD
- Vehicles and parts sales: 3.12895e-5 USD
- Metal pipe fittings, ball and roller bearings, industrial patterns, metal bath fixtures, other misc. fabricated metals; at manufacturer: 0.00034895 USD
- Secondary copper products; at manufacturer: 0.0344338 USD
- Electricity; at consumer: 0.0018681 USD
- Scientific research and development: 5.9719e-6 USD
- Warehousing: 0.000168532 USD
- Wireless telecommunications: 2.47744e-5 USD
- Wholesale trade: 0.0403393 USD
- Chemicals (except basic chemicals, agrichemicals, polymers, paints, pharmaceuticals,soaps, cleaning compounds); at manufacturer: 0.000319425 USD
- Metal structural products; at manufacturer: 1.25526e-5 USD
- Industrial molds; at manufacturer: 3.17789e-7 USD
- Plastics; at manufacturer: 3.97428e-6 USD
- Truck transport: 0.0389447 USD
- All other food and drinking places: 2.05056e-7 USD
- Cutlery and handtools; at manufacturer: 2.39595e-5 USD
- Waste management and remediation: 0.000268439 USD
- Screws, nuts, and bolts; at manufacturer: 0.000210043 USD
- Satellite, telecommunications resellers, and all other telecommunications: 6.13079e-6 USD
- Carbon and graphite products; at manufacturer: 1.22349e-5 USD
- Management consulting: 0.00204798 USD
- Specialized design: 6.88537e-5 USD
- Hotels and campgrounds: 3.70564e-5 USD
- Household goods repair: 0.000131065 USD
- Other plastic products; at manufacturer: 0.000251109 USD
- Gasoline, fuels, and by-products of petroleum refining; at manufacturer: 0.000345305 USD
- Vehicle repair: 0.000387157 USD
- Aluminum; at manufacturer: 8.94643e-5 USD
- Marketing research and all other miscellaneous professional, scientific, and technical services: 0.000213742 USD
- Data processing and hosting: 0.000105838 USD
- Promoters and agents: 2.05056e-7 USD
- Cardboard containers; at manufacturer: 0.000355983 USD
- Advertising and public relations: 0.000199847 USD
- Drinking water and wastewater treatment; at consumer: 5.40649e-5 USD
- Wooden windows, door, and flooring; at manufacturer: 6.1823e-6 USD
- Telecommunications: 7.41643e-5 USD
- Accounting, tax preparation, bookkeeping, and payroll: 0.000203748 USD
- Pumps and pumping equipment; at manufacturer: 2.0974e-5 USD
- Transmission and power train parts; at manufacturer: 6.01806e-6 USD
- Iron, gold, silver, and other metal ores; at mine: 0.000109184 USD
- Full-service restaurants: 3.75588e-5 USD
- Abrasive products; at manufacturer: 2.52822e-5 USD
- Vending, commercial laundry, and other commercial and service industry machinery; at manufacturer: 4.61616e-8 USD
- Glass and glass products; at manufacturer: 1.90673e-6 USD
- Other primary nonferrous metals; at manufacturer: 0.0914781 USD
- Commercial machinery repair: 0.000656079 USD
- Other basic organic chemicals; at manufacturer: 0.00052061 USD
- Welding and Soldering Equipment, Scales and Balances, and other general purpose machinery; at manufacturer: 8.3349e-6 USD
- Other computer related services, including facilities management: 1.82796e-5 USD
- Independent artists, writers, and performers: 1.23077e-5 USD
- Ground or treated minerals and earth; at manufacturer: 1.76373e-5 USD
- Fertilizers; at manufacturer: 6.40242e-6 USD
- Sports: 2.05056e-7 USD
- Other secondary nonferrous metal products; at manufacturer: 0.00863941 USD
- Rail transport: 0.00298358 USD
- Architectural, engineering, and related services: 0.000151527 USD
- Special tools, dies, jigs, and fixtures; at manufacturer: 2.8601e-6 USD
- Lime and gypsum products; at manufacturer: 5.87909e-6 USD
- Employment services: 0.000287197 USD
- Limited-service restaurants: 6.84178e-5 USD
- Insurance carriers: 0.000186811 USD
- Surgical appliance and supplies; at manufacturer: 2.13754e-6 USD
- Buildings and dwellings services: 0.00108615 USD
- Cutting and machine tool accessory, rolling mill, and other metalworking machines; at manufacturer: 4.88262e-5 USD
- Gaskets, seals, musical instruments, fasteners, brooms, brushes, mop and other misc. goods; at manufacturer: 6.1823e-6 USD
- Vehicle rental and leasing: 0.000150503 USD
- Office administration: 0.000230815 USD
- Monetary authorities and depository credit intermediation: 0.000380613 USD
- State and local government enterprises: 0.000172458 USD
- Dry-cleaning and laundry: 0.000103849 USD
- Machine shops; at manufacturer: 0.00114198 USD
- Aluminum products; at manufacturer: 4.2122e-5 USD
- Adhesives; at manufacturer: 3.56467e-5 USD
- Commercial equipment rental: 1.93253e-5 USD
- Metal coatings, engravings, and heat treatments; at manufacturer: 0.00118598 USD
- Pipeline transport: 1.58894e-7 USD
- Lessors of nonfinancial intangible assets: 0.000176137 USD
- Civic, social, professional, and similar organizations: 1.83462e-5 USD
- Mineral wool; at manufacturer: 2.22452e-6 USD
- Other vehicle parts; at manufacturer: 0.000156196 USD
- Metal windows, doors, and architectural products; at manufacturer: 1.26416e-5 USD
- Motor vehicle steering, suspension components (except spring), and brake systems; at manufacturer: 2.05056e-7 USD
- Cardboard; at manufacturer: 0.000428827 USD
- Primary copper; at manufacturer: 0.245404 USD
- Company and enterprise management: 0.00250299 USD
- Environmental and other technical consulting services: 0.000455704 USD
- Nondepository credit intermediation and related activities: 0.000211611 USD
- Legal services: 0.000309813 USD
- Other support services: 5.02971e-5 USD
- Ball and roller bearings; at manufacturer: 2.33575e-5 USD
- Light fixtures; at manufacturer: 1.23938e-5 USD
- Software: 2.05056e-7 USD
- Computer terminals and other computer peripheral equipment; at manufacturer: 1.18976e-5 USD
- Noncomparable imports: 0.00160161 USD
- Secondary steel products; at manufacturer: 7.88738e-5 USD
- Valve and fittings (except for plumbing); at manufacturer: 6.35577e-7 USD
- Nonresidential building repair and maintanence: 0.000918255 USD
- Magazines and journals; at publisher: 5.813e-6 USD
- Coal; at mine: 0.000661691 USD
- Golf courses, marinas, ski resorts, fitness and other rec centers and industries: 6.28969e-6 USD
- Paper bags and coated paper; at manufacturer: 6.26928e-6 USD
- Communication and energy wire and cable; at manufacturer: 0.00138036 USD
- Other real estate: 0.000177743 USD
- Facilities support: 3.13357e-5 USD
- Water transport (boats, ships, ferries): 0.00628224 USD
- Springs and wires; at manufacturer: 6.43522e-5 USD
- Semiconductors; at manufacturer: 0.000903187 USD
- Other basic inorganic chemicals; at manufacturer: 0.000107693 USD
- Other nonmetallic mineral products; at manufacturer: 7.94471e-7 USD
- Insurance agencies and brokerages: 2.48871e-5 USD
- Compressed Gases; at manufacturer: 5.19929e-5 USD
- General merchandise stores: 1.58894e-7 USD
- Cast iron and steel; at manufacturer: 8.10361e-6 USD
- Consumer goods and general rental centers: 6.13079e-6 USD
- Electronic equipment repair and maintenance: 0.000137242 USD
- Plastic bags, films, and sheets; at manufacturer: 0.00014182 USD
- Scenic and sightseeing transportation and support activities for transportation: 6.79212e-6 USD
- Synthetic rubber and artificial and synthetic fibers; at manufacturer: 0.000145919 USD
- Other concrete products; at manufacturer: 3.17789e-7 USD
- Computer systems design: 3.69028e-5 USD
- Custom metal rolls; at manufacturer: 1.15337e-5 USD
- Passenger ground transport: 1.85513e-5 USD
- Natural gas; at consumer: 0.00150447 USD
- Business support: 0.000313083 USD
- Copper, nickel, lead, and zinc; at mine: 0.270047 USD
- Veneer, plywood, and engineered wood; at manufacturer: 0.000158801 USD
- Primary iron, steel, and ferroalloy products; at manufacturer: 0.0017712 USD
- Electronic capacitors, resistors, coils, transformers, connectors and other components (except semiconductors and printed circuit assemblies); at manufacturer: 4.9508e-5 USD
- Securities and commodities brokerage and exchanges: 0.000468002 USD

## Inputs from nature
- Occupation, industrial area, built up: 4.33713e-5 m2*a; data quality (4,2,1,1,1)
- Water, fresh: 0.00297376, 0.000728298 m3 (2 entries, compartments not in this file); data quality (4,2,1,4,2)
- Occupation, urban, discontinuously built: 2.4372e-5 m2*a; data quality (4,2,1,1,1)
- Water, saline: 0.000238846 m3; data quality (4,2,1,4,2)
- Occupation, industrial area: 0.000130114 m2*a; data quality (4,2,1,1,1)

## Emissions to nature
- acetaldehyde: 2.39291e-8 kg; data quality (3,2,1,1,5)
- carbonyl sulfide: 3.64193e-10 kg; data quality (4,2,1,1,5)
- nickel: 2.92163e-10 kg; data quality (4,1,1,1,3)
- phthalate, dioctyl-: 8.73747e-10 kg; data quality (3,2,1,1,5)
- 1,2,4-trimethylbenzene: 2.34465e-8 kg; data quality (5,1,1,1,3)
- 4-nitrophenol: 1.76426e-16 kg; data quality (2,2,1,1,4)
- phosgene: 4.54896e-7 kg; data quality (3,1,1,1,5)
- carbon tetrachloride: 1.03362e-12 kg; data quality (4,2,1,1,4)
- cyanide: 2.73273e-8 kg; data quality (3,2,1,1,5)
- copper: 4.21762e-11 kg; data quality (4,1,1,1,4)
- Titanium: 1.35991e-8 kg; data quality (5,2,1,1,5)
- butanol: 9.60976e-10 kg; data quality (5,1,1,1,4)
- VOC, volatile organic compounds: 8.35533e-5 kg; data quality (3,2,1,1,5)
- 1,1,1-trichloroethane: 7.15293e-9 kg; data quality (3,2,1,1,5)
- acenaphthylene: 4.078e-11 kg; data quality (3,2,1,1,5)
- Cobalt: 2.38451e-12 kg; data quality (4,1,1,1,4)
- Methane, difluoro-, HFC-32: 2.33587e-8 kg; data quality (4,2,1,4,1)
- methane, dichloro-, hcc-30: 2.41865e-7 kg; data quality (4,2,1,1,4)
- 1,1,2,2-tetrachloroethane: 1.00474e-12 kg; data quality (3,2,1,1,4)
- Propane, 1,1,1,3,3,3-hexafluoro-, HCFC-236fa: 4.6363e-10 kg; data quality (4,2,1,4,1)
- Ethane, 1,1,1-trifluoro-, HFC-143a: 1.71618e-8 kg; data quality (4,2,1,4,1)
- dibenzofuran: 3.49245e-11 kg; data quality (4,2,1,1,4)
- phenanthrene: 3.04687e-10 kg; data quality (3,2,1,1,5)
- Cadmium: 7.33015e-13 kg; data quality (3,1,1,1,4)
- m-xylene: 2.53196e-10 kg; data quality (3,2,1,4,1)
- 1,2-BUTYLENE OXIDE: 9.50961e-11 kg; data quality (4,2,1,1,4)
- ethylbenzene: 1.00725e-8 kg; data quality (4,1,1,1,3)
- Sulfuric acid: 3.16164e-13 kg; data quality (2,1,1,1,4)
- Hydrazine, methyl-: 1.81803e-9 kg; data quality (2,2,1,1,5)
- Methyl iodide: 5.62129e-12 kg; data quality (4,2,1,1,4)
- Ethene, chloro-: 6.30987e-11 kg; data quality (3,2,1,1,4)
- arsenic: 7.37777e-7 kg; data quality (3,2,1,1,5)
- methane, chlorodifluoro-, hcfc-22: 2.11857e-7 kg; data quality (4,1,1,1,5)
- beryllium: 5.77202e-10 kg; data quality (2,2,1,1,5)
- Cresol: 1.06269e-8 kg; data quality (2,1,1,1,5)
- BENZ(A)ACRIDINE: 1.32834e-15 kg; data quality (2,2,1,1,4)
- Ethane, pentafluoro-, HFC-125: 4.01109e-8 kg; data quality (4,2,1,4,1)
- Aluminum: 5.80817e-9, 7.52063e-5 kg (2 entries, compartments not in this file); data quality (4,1,1,1,5)
- ammonia: 6.70041e-7 kg; data quality (3,1,1,1,5)
- Ethane, 1,1,1,2-tetrafluoro-, HFC-134a: 1.52489e-7 kg; data quality (4,2,1,4,1)
- ALUMINUM OXIDE: 2.32949e-10 kg; data quality (5,1,1,1,4)
- phenol: 1.27243e-7 kg; data quality (4,2,1,1,4)
- Chromium, ion: 5.8617e-8 kg; data quality (2,2,1,1,5)
- Benzo(b)fluoranthene: 4.33062e-12 kg; data quality (2,2,1,1,5)
- acrylonitrile: 8.94329e-13 kg; data quality (4,2,1,1,4)
- o-Xylene: 9.88476e-11 kg; data quality (3,2,1,4,1)
- cobalt: 3.85115e-11 kg; data quality (4,1,1,1,4)
- Ethene, trichloro-: 2.59254e-14 kg; data quality (5,1,1,1,4)
- ethene, tetrachloro-: 7.90338e-9 kg; data quality (3,2,1,1,5)
- 2-ethoxyethyl acetate: 6.03129e-12 kg; data quality (5,2,1,1,5)
- m-cresol: 2.19885e-11 kg; data quality (4,2,1,1,4)
- methane, monochloro-, r-40: 6.04893e-9 kg; data quality (3,2,1,1,5)
- chlorine: 2.36684e-12 kg; data quality (2,1,1,1,4)
- hydrogen fluoride: 2.13035e-6 kg; data quality (2,2,1,1,5)
- mercury: 8.83151e-17 kg; data quality (3,1,1,1,4)
- ammonia: 0.000238782 kg; data quality (3,2,1,1,5)
- hydrogen sulfide: 1.0298e-10 kg; data quality (3,2,1,1,5)
- acrolein: 5.85448e-9 kg; data quality (2,2,1,1,5)
- phenol: 1.68983e-10 kg; data quality (3,1,1,1,3)
- hydrogen chloride: 7.87009e-5 kg; data quality (2,2,1,1,5)
- chromium: 4.24262e-11, 4.02476e-10, 2.30232e-11 kg (3 entries, compartments not in this file); data quality (4,1,1,1,4)
- Water, saline: 0.000121023 m3; data quality (4,2,1,4,2)
- Chrysene: 8.28039e-12 kg; data quality (2,2,1,1,5)
- benzene: 2.31358e-8 kg; data quality (3,2,1,1,5)
- 1-Methyl-2-pyrrolidinone: 6.6964e-8, 2.66348e-11 kg (2 entries, compartments not in this file); data quality (5,1,1,1,3)
- cumene: 1.77788e-9 kg; data quality (4,2,1,1,4)
- silver: 6.47476e-10 kg; data quality (4,1,1,1,3)
- Propene: 8.83151e-12 kg; data quality (3,1,1,1,4)
- 3-methylcholanthrene: 1.35695e-13 kg; data quality (2,2,1,1,5)
- naphthalene: 1.33686e-9 kg; data quality (3,2,1,1,5)
- methyl isobutyl ketone: 3.91295e-6 kg; data quality (4,2,1,1,5)
- Phthalate, dibutyl-: 8.1933e-12 kg; data quality (4,2,1,1,4)
- propanal: 4.50483e-9 kg; data quality (3,2,1,1,5)
- pentachlorophenol: 8.17977e-17 kg; data quality (3,2,1,1,4)
- antimony: 4.82062e-7 kg; data quality (3,2,1,1,5)
- AMMONIA: 2.12626e-10 kg; data quality (3,1,1,1,5)
- benzyl chloride: 7.48601e-9 kg; data quality (2,2,1,1,5)
- 2-methylnaphthalene: 1.01741e-11 kg; data quality (2,2,1,1,5)
- ethane, 1,2-dibromo-: 1.31983e-11 kg; data quality (2,2,1,1,5)
- beryllium: 4.6463e-11 kg; data quality (5,1,1,1,3)
- Phthalate, dimethyl-: 2.13399e-9 kg; data quality (4,2,1,1,4)
- Chromium VI: 4.73789e-9 kg; data quality (3,2,1,1,5)
- toluene, 2,4-dinitro-: 2.9944e-12 kg; data quality (5,2,1,1,5)
- cadmium: 4.57116e-8 kg; data quality (3,2,1,1,5)
- HYDROCHLORIC ACID: 3.44311e-9 kg; data quality (2,1,1,1,5)
- fluorene: 1.69603e-10 kg; data quality (2,2,1,1,5)
- Phenol, 2,4-dimethyl-: 2.95943e-12 kg; data quality (4,1,1,1,3)
- Indeno(1,2,3-cd)pyrene: 8.28739e-13 kg; data quality (2,2,1,1,5)
- sulfur dioxide: 0.00383415 kg; data quality (2,2,1,1,5)
- Dinitrogen monoxide: 2.41545e-8 kg; data quality (4,2,1,4,1)
- Cobalt: 2.06324e-8 kg; data quality (3,2,1,1,5)
- SEC-BUTYL ALCOHOL: 3.04839e-9 kg; data quality (5,1,1,1,4)
- manganese: 7.95918e-10 kg; data quality (4,1,1,1,4)
- Chrysene, 5-methyl-: 2.35275e-13 kg; data quality (2,2,1,1,5)
- methyl methacrylate: 2.13886e-10 kg; data quality (4,2,1,1,5)
- Benzo(k)fluoranthene: 1.97037e-13 kg; data quality (2,2,1,2,4)
- copper: 1.41372e-7, 8.96346e-9 kg (2 entries, compartments not in this file); data quality (4,1,1,1,3)
- Propene, 1,3-dichloro-: 2.42985e-12 kg; data quality (3,2,1,1,4)
- Benzo(g,h,i)perylene: 4.54481e-8 kg; data quality (3,2,1,1,5)
- p-cresol: 2.01752e-11 kg; data quality (4,2,1,1,4)
- manganese: 1.06922e-7 kg; data quality (3,2,1,1,5)
- benzene, chloro-: 2.45865e-10 kg; data quality (4,2,1,1,5)
- Sulfur hexafluoride: 1.14631e-9 kg; data quality (4,2,1,4,1)
- mercury: 6.45212e-9 kg; data quality (2,2,1,1,5)
- MOLYBDENUM(VI): 1.57373e-7, 9.69291e-7 kg (2 entries, compartments not in this file); data quality (3,1,1,1,5)
- nitric acid: 2.79198e-9 kg; data quality (3,1,1,1,4)
- Cresol: 6.67264e-8 kg; data quality (4,2,1,1,4)
- CHLORONAPHTHALENE: 1.18171e-17 kg; data quality (1,2,1,1,4)
- Phosphorus: 7.04135e-6 kg; data quality (3,1,1,1,5)
- Carbon dioxide: 0.0143419 kg; data quality (4,2,1,4,1)
- 4-Methyl-2-pentanone: 1.53027e-9 kg; data quality (4,1,1,1,5)
- toluene: 9.78541e-8 kg; data quality (4,2,1,1,4)
- Decabromodiphenyl oxide: 8.10883e-10 kg; data quality (4,1,1,1,3)
- selenium: 8.68662e-7 kg; data quality (2,2,1,1,5)
- t-butyl methyl ether: 3.75064e-10 kg; data quality (3,2,1,1,5)
- methanol: 1.30468e-7 kg; data quality (4,2,1,1,5)
- fluoranthene: 5.2797e-11 kg; data quality (2,2,1,1,5)
- acetophenone: 4.7392e-8 kg; data quality (4,2,1,1,4)
- arsenic: 2.45807e-11 kg; data quality (2,1,1,1,3)
- monochloroethane: 5.44763e-10 kg; data quality (3,2,1,1,5)
- ethylene oxide: 8.15553e-13 kg; data quality (3,2,1,1,4)
- para-xylene: 1.01423e-11 kg; data quality (3,2,1,4,1)
- methane, bromo-, halon 1001: 1.71891e-9 kg; data quality (3,2,1,1,5)
- benz[a]anthracene: 9.60616e-12 kg; data quality (2,2,1,1,5)
- lead: 3.33103e-6 kg; data quality (3,2,1,1,5)
- chlorine: 0.000347738 kg; data quality (4,2,1,1,5)
- Dimethyl sulfate: 5.13326e-10 kg; data quality (2,2,1,1,5)
- arsenic: 2.94796e-11 kg; data quality (2,1,1,1,4)
- styrene: 5.07793e-10 kg; data quality (4,2,1,1,5)
- TERT-BUTYL ALCOHOL: 5.56448e-11 kg; data quality (4,1,1,1,4)
- Dibenz(a,h)anthracene: 9.8386e-14 kg; data quality (2,2,1,1,5)
- PHOSPHORUS: 2.06163e-8 kg; data quality (2,2,1,1,5)
- hexachlorobenzene: 1.1477e-12 kg; data quality (4,1,1,1,5)
- Hydrocarbons, aromatic: 5.31359e-9 kg; data quality (4,2,1,1,5)
- 1,4-dichlorobenzene: 1.45066e-15 kg; data quality (2,2,1,1,4)
- Water, fresh: 0.00323411 m3; data quality (4,2,1,4,2)
- trichloroethylene: 1.97904e-7 kg; data quality (4,2,1,1,4)
- 2-chloro-1-phenylethanone: 7.48601e-11 kg; data quality (2,2,1,1,5)
- o-cresol: 1.3643e-9 kg; data quality (2,1,1,1,3)
- carbon disulfide: 2.44954e-9 kg; data quality (4,2,1,1,5)
- acenaphthene: 2.6612e-11 kg; data quality (3,2,1,1,5)
- pyrene: 3.75234e-11 kg; data quality (2,2,1,1,5)
- polychlorinated biphenyls: 7.9064e-12 kg; data quality (3,1,1,1,5)
- propylene oxide: 1.57674e-14 kg; data quality (3,2,1,1,4)
- nickel: 2.33593e-10 kg; data quality (4,1,1,1,4)
- 2,4-dimethylphenol: 7.12334e-9 kg; data quality (4,1,1,1,3)
- ethane, 1,2-dichloro-: 4.27819e-10 kg; data quality (3,2,1,1,5)
- 2,2,4-trimethylpentane: 9.9216e-9 kg; data quality (3,2,1,1,4)
- Hydrazine: 3.37024e-12 kg; data quality (4,2,1,1,4)
- Ethylene glycol monoethyl ether: 1.66191e-8 kg; data quality (5,1,1,1,4)
- 2,4-dinitrophenol: 2.88697e-16 kg; data quality (5,2,1,1,4)
- Methane: 2.62285e-7 kg; data quality (4,2,1,4,1)
- ethylene glycol: 1.44939e-10 kg; data quality (5,2,1,1,4)
- aniline: 6.03129e-12 kg; data quality (4,2,1,1,5)
- hexane: 5.05994e-7 kg; data quality (3,2,1,1,5)
- benzo(a)pyrene: 6.59114e-13 kg; data quality (2,2,1,1,5)
- biphenyl: 6.27666e-11 kg; data quality (4,2,1,1,4)
- benzene, ethyl-: 2.7756e-8 kg; data quality (4,2,1,1,4)
- particulates, < 10 um: 7.01237e-5 kg; data quality (3,2,1,1,5)
- chloroform: 6.32446e-10 kg; data quality (4,2,1,1,5)
- ethane, 1,1,2-trichloro-: 3.67705e-18 kg; data quality (4,2,1,1,4)
- butadiene: 3.06486e-10 kg; data quality (3,2,1,3,2)
- Xylene: 9.79235e-8 kg; data quality (4,2,1,1,4)
- bromoform: 4.17078e-10 kg; data quality (3,2,1,1,5)
- nitrogen oxides: 0.000304349 kg; data quality (2,2,1,1,5)
- Propane, 1,2-dichloro-: 5.29306e-14 kg; data quality (4,2,1,1,4)
- particulates, < 2.5 um: 0.000305701 kg; data quality (3,2,1,1,5)
- Sulfuric acid: 9.10868e-6 kg; data quality (2,1,1,1,5)
- isophorone: 6.20388e-9 kg; data quality (2,2,1,1,5)
- vinyl acetate: 8.12767e-11 kg; data quality (4,2,1,1,5)
- ETHENE: 2.84547e-9 kg; data quality (3,1,1,1,4)
- formaldehyde: 3.95143e-7 kg; data quality (2,2,1,1,5)
- nickel: 8.1148e-8 kg; data quality (3,2,1,1,5)
- Diethylene glycol butyl ether: 6.03129e-12 kg; data quality (4,2,1,1,5)
- carbon monoxide: 0.00240645 kg; data quality (2,2,1,1,5)
- lead: 5.43759e-13 kg; data quality (3,1,1,1,4)
- nitric acid: 1.71259e-6 kg; data quality (3,1,1,1,5)
- CYANAMIDE: 6.02697e-11 kg; data quality (2,2,1,1,4)
- HYDROFLUORIC ACID: 1.27523e-11 kg; data quality (3,1,1,1,5)
- Benzo(a)anthracene: 1.79171e-13 kg; data quality (2,2,1,1,5)
- Nitrogen: 3.18724e-5 kg; data quality (4,2,1,1,5)
- lead: 1.4402e-10 kg; data quality (3,1,1,1,3)
- NITROUS ACID: 2.35271e-10 kg; data quality (5,1,1,1,4)
- formic acid: 4.13315e-15 kg; data quality (3,1,1,1,4)
- anthracene: 1.42007e-11 kg; data quality (3,2,1,1,5)
- Zinc: 2.19635e-7 kg; data quality (5,1,1,1,3)
- antimony: 4.91209e-11, 5.602e-12 kg (2 entries, compartments not in this file); data quality (2,1,1,1,4)

## Inventory method
Input-output

## Modelling constants
The reference unit of all processes is 1 USD2013 of the good or service. The technosphere inputs are based on the US BEA detailed input-output tables for 2007. The IO tables are combined to develop a commodity-by-commodity model based on the the industry-technology assumption (see Suh et al., 2010), which assumes all commodities produced by a given industry have the same input structure, but that multiple industries can produce the same commodity. Thus, model technosphere flows represent commodity outputs (and not industry outputs) from other processes in the model. There are no by-products included in these processes. All commodity production is based on US-conditions, despite in reality that some goods and services are produced overseas, as USEEIO v1.1 is a single-region IO model.

## Completeness
The input-output approach assures that all purchased inputs associated with the sectors making these commodities as reported in the US census for 2007 are included. The direct resources extracted including minerals, energy sources, water and land occupied are included. Emissions to air include all critieria air pollutants, greenhouse gases, and hazardous and toxic air pollutants as defined by US EPA. Releases to water include toxics, total nitrogen and total phosphorus, and water discharges. Releases to soil or groundwater include toxics and agriculutural pesticides. Some metal releases to air, water and soil are not included because they could not be speciated. Solid hazardous and non-hazardous wastes generated are not included as an elementary flows although purchases of waste services are included.

## Data treatment
Greenhouse gases are primarily from the US Greenhouse Gas Emission Inventory (USEPA 2016a). Biogenic C uptake is not included (change from version 1.0), as biogenic C emission are not included. Toxic releases to air, water and soil (except pesticides) are from the 2013 Toxic Release Inventory (USEPA 2015a). Criteria air pollutants and hazardous air pollutants are from the 2011 National Emissions Inventory (USEPA 2015b). All estimates are normalized by industry based on sector output in the data year, then converted to 2013 USD using relative sector-specific CPIs (if data year is not 2013). Energy use represent raw renewables or fossil fuel energies and is based on EIA data for 2014. See Table 1 in Yang, Ingwersen et al. 2017 and Supporting Information 1, and the v1.1 data update notes (Ingwersen et al. 2017) for all details on environmental data sources used.Land occupation associated with manufacturing buildings was estimated based on the building floorspace data provided by the U.S. Energy Information Administration in the 2010 Manufacturing Energy Consumption Survey (EIA 2013). Portions of total renewable energy (EIA 2016) based on EIA-923 reports for 2014 (EIA 2017) are included. Nitrogen and Phosphorus releases are modeled in total N and total P equivalents as estimated by the Discharge Monitoring Report Nutrient Loading tool (USEPA 2016b). Self-supplied withdrawals were assigned to industrial sectors based on water use statistics for Canadian industries by NAICS 3-digit sector scaled to US production levels based on gross domestic product by industry (BEA 2015; Statistics Canada 2010), and further disaggregated to the manufacturing sectors based on compensation of employees as provided by the 2007 IO tables (BEA 2015). Water withdrawals associated with public supply were allocated to sectors based on their use of water, sewage, and other services in USD based on the IO tables (BEA 2015). Portions of total renewable energy (EIA 2016) by type are assigned to sectors (hydro, wind, solar, or) based on EIA-923 reports for 2014 (EIA 2017).

## Data collection
2015-2016

## Sampling procedure
US federal government sources, including surveys and US EPA emissions databases are used as the primary sources. From these sources, data for US reporting establishments/facilities are aggregated by the NAICS sector as defined in the BEA detailed 2007 input-output tables. When level of sector aggregation differs, or when direct emissions are not reported but modeled, additional sources are used to make allocations and estimates.

## Review details
In regard to quality assurance and peer-review, each dataset created went through Quality Assurance as defined in a quality assurance project plans at US EPA, CSRA or ERG. The model was assembled with the IO model builder model (USEPA 2016c). Validation functions were used to check that all the model components were properly assembled and harmonized. Bayou Demeke and Santosh Ghimire provided internal peer review of the model methodology and the manuscript underwent standard EPA management review. An editor and two anonymous reviewers at the Journal of Cleaner Production reviewed the model. In regard to data quality evaluation, data quality assessment was performed at the flow and process levels according to the updated US EPA data quality assessment guidelines as defined in US EPA (2016b).

## Intended application
The primary application is for use in the US Environmentally-Extended Input-Ouput model, USEEIO, version 1.1. This model is being used by the US EPA for supporting tools that prioritize goods and services based on potential environmental impacts, resource use or emissions for large regions, including the US and US states, and as a strealined tool for organizations as a starting point to consider sustainable materials management. Model results are designed to provide meso/macro-level decision support.

## Project
USEEIO v1.1 was developed by the US EPA with CSRA and ERG with Wesley W. Ingwersen and David E. Meyer as research leads. Yi Yang was the technical lead on the work for CSRA (contract EP-C-15-012); Troy Hawkins was lead for ERG (contract EP-C-12-021).

## Sources
- EIA 2017
- Torcellini et al. 2003
- Statistics Canada 2010
- Goebes et al. 2003
- Kim et el. 2013
- Edelen and Ingwersen 2017
- Blackhurst et al. 2010
- USDA 2009a
- Lovelace 2009
- USEPA 2016a
- Macknick et al. 2011
- USEPA 2015b
- EIA 2015
- USGS 2016
- EIA 2013
- USDA 2006
- USDA 2009b
- Yienger et al. 1995
- Ingwersen et al. DRAFT
- USDA 2014
- USEPA 2015a
- USEPA 2016b
- BEA 2015
- Ingwersen et al. 2017
- USDA 2016
- EIA 2016
- USEPA 2016c
- BLM 2008
- USGS 2015
- Nickerson et al. 2011
- Maupin et al. 2014
