# Sugar, candy, and chocolate; at manufacturer

Dataset: openLCA process, unit process
Category: 3113: Sugar and Confectionery Product Manufacturing
Geography: United States
Time period: 2017-01-01 to 2017-12-31
Data quality: US EPA - Process Pedigree Matrix (1;1)
Exchange data quality scheme: US EPA - Flow Pedigree Matrix
Generated by: US EPA with CSRA and ERG
Owner: US EPA
Published in: Yang, Ingwersen et al. 2017
restrictionsDescription: This model shold be appropriately cited (see Yang, Ingwersen et al. 2017 source or Publication field) when used. Any changes or derivations of this model by the user should be documented. The model itself and any results from use of this model shall not be construed to consitute US EPA opinion or policy.
copyright: false

## General comment
BEA Code & Name is '311300:Sugar and confectionery product manufacturing'. Description of the primary industry producing this good or service, adapted from the Census Bureau NAICS 2007 descriptions: This industry group comprises (1) establishments that process agricultural inputs, such as sugarcane, beet, and cacao, to give rise to a new product (sugar or chocolate), and (2) those that begin with sugar and chocolate and process these further.

## Technology
The process describes the average US production of this good or service within this NAICS-based grouping defined in the BEA 2007 detailed input-output tables (BEA 2015). Distribution, wholesale and retailing of this good or service, use, and final disposal are not included. Creation of a product system with this process will enable modeling of all upstream (supply-chain) activities.

## Geography
Data represent the 50 US states

## Time period
2017 was the year in which this version of USEEIO was released and is the target date for the model

## Reference product
- Sugar, candy, and chocolate; at manufacturer: 1 USD

## Inputs from technosphere
All rows: data quality (1,3,1,1,1)
- Synthetic dyes and pigments; at manufacturer: 1.33508e-7 USD
- Books, newspapers, magazines, and other print media; at manufacturer: 3.65837e-5 USD
- Hotels and campgrounds: 0.000245237 USD
- Investigation and security: 0.00023179 USD
- Vehicle rental and leasing: 0.00110431 USD
- Metal pipe fittings, ball and roller bearings, industrial patterns, metal bath fixtures, other misc. fabricated metals; at manufacturer: 0.00688505 USD
- Paper; at manufacturer: 0.000633683 USD
- Architectural, engineering, and related services: 0.00233793 USD
- Animal farms and aquaculture ponds (except cattle and poultry): 5.95344e-5 USD
- Screws, nuts, and bolts; at manufacturer: 1.21552e-7 USD
- Electronic equipment repair and maintenance: 0.000414502 USD
- Insurance agencies and brokerages: 0.00139088 USD
- Toiletries; at manufacturer: 2.71201e-6 USD
- Limited-service restaurants: 0.00059665 USD
- Telecommunications: 0.00125718 USD
- Metal coatings, engravings, and heat treatments; at manufacturer: 5.16098e-7 USD
- Vehicle electrical and electronic equipment; at manufacturer: 1.81881e-6 USD
- Other textiles; at manufacturer: 3.83002e-5 USD
- Ice cream and frozen desserts; at manufacturer: 6.16179e-6 USD
- Chemicals (except basic chemicals, agrichemicals, polymers, paints, pharmaceuticals,soaps, cleaning compounds); at manufacturer: 0.00254966 USD
- Office administration: 0.000256776 USD
- State and local government enterprises: 0.00122951 USD
- Nondepository credit intermediation and related activities: 0.00343247 USD
- Analytical laboratory instruments; at manufacturer: 1.99266e-8 USD
- Monetary authorities and depository credit intermediation: 0.00355651 USD
- Insurance carriers: 0.00419578 USD
- Travel arrangement and reservation: 3.43616e-6 USD
- Fruit and vegetable preservation; at manufacturer: 0.00472932 USD
- Dairies: 0.000111399 USD
- Machine shops; at manufacturer: 0.00192067 USD
- Coal; at mine: 0.00313796 USD
- Legal services: 0.00172499 USD
- Motor vehicle steering, suspension components (except spring), and brake systems; at manufacturer: 5.40631e-6 USD
- All other converted paper products; at manufacturer: 0.0105589 USD
- Flours and malts; at manufacturer: 0.0011014 USD
- Paints and coatings; at manufacturer: 2.07236e-7 USD
- Business support: 0.000647852 USD
- Wooden windows, door, and flooring; at manufacturer: 9.88053e-8 USD
- Primary iron, steel, and ferroalloy products; at manufacturer: 3.66623e-5 USD
- Natural gas; at consumer: 0.0165806 USD
- Sugar, candy, and chocolate; at manufacturer: 0.16013 USD
- Other retail: 0.000849797 USD
- Surgical appliance and supplies; at manufacturer: 3.18825e-8 USD
- Fresh fruits and tree nuts; at farm: 0.0259193 USD
- Relay and industrial controls; at manufacturer: 0.00107152 USD
- Vehicle repair: 0.000907698 USD
- Air transport: 0.00120242 USD
- Dry, condensed, and evaporated dairy; at manufacturer: 0.00408583 USD
- Cutting and machine tool accessory, rolling mill, and other metalworking machines; at manufacturer: 7.58079e-5 USD
- Passenger ground transport: 0.000123373 USD
- Sand, gravel, clay, phosphate, other nonmetallic minerals; at mine: 5.57944e-8 USD
- Civic, social, professional, and similar organizations: 0.000157386 USD
- Rail transport: 0.00692308 USD
- Office supplies (not paper); at manufacturer: 9.88053e-8 USD
- Performances: 5.50502e-7 USD
- Software: 3.68688e-5 USD
- Wiring devices; at manufacturer: 1.99266e-9 USD
- Printed circuit and electronic assembly; at manufacturer: 1.83325e-7 USD
- Other basic organic chemicals; at manufacturer: 0.0180933 USD
- Electronic capacitors, resistors, coils, transformers, connectors and other components (except semiconductors and printed circuit assemblies); at manufacturer: 0.000525579 USD
- other miscellaneous electrical equipment and components; at manufacturer: 3.6477e-5 USD
- Promoters and agents: 3.777e-5 USD
- Scientific research and development: 3.86645e-5 USD
- Wholesale trade: 0.0694673 USD
- Buildings and dwellings services: 0.00307195 USD
- Other plastic products; at manufacturer: 0.00215114 USD
- Other computer related services, including facilities management: 0.000155946 USD
- Water transport (boats, ships, ferries): 0.00208211 USD
- Wireless communications; at manufacturer: 1.99911e-7 USD
- Fresh vegetables, melons, and potatoes; at farm: 0.000397043 USD
- Adhesives; at manufacturer: 4.15028e-5 USD
- Other support services: 0.00028575 USD
- Other rubber products; at manufacturer: 3.65532e-5 USD
- Food and beverage stores: 3.70418e-5 USD
- All other foods; at manufacturer: 0.00109841 USD
- Household goods repair: 0.000303742 USD
- Cheese; at manufacturer: 3.78948e-5 USD
- Flavored drink concentrates; at manufacturer: 0.000604764 USD
- Valve and fittings (except for plumbing); at manufacturer: 0.000477039 USD
- Welding and Soldering Equipment, Scales and Balances, and other general purpose machinery; at manufacturer: 7.32831e-5 USD
- Computer systems design: 0.000389397 USD
- Power boilers and heat exchangers; at manufacturer: 2.80965e-7 USD
- Breakfast cereals; at manufacturer: 3.45538e-6 USD
- Gasoline, fuels, and by-products of petroleum refining; at manufacturer: 0.00336877 USD
- Laminated plastic plates and shapes; at manufacturer: 2.78764e-9 USD
- Rubber tires; at manufacturer: 5.69085e-6 USD
- Seasonings and dressings; at manufacturer: 0.000288203 USD
- Securities and commodities brokerage and exchanges: 0.000310108 USD
- Tobacco, cotton, sugarcane, peanuts, sugar beets, herbs and spices, and other crops; at farm: 0.0808891 USD
- Fluid milk and butter; at manufacturer: 0.0158572 USD
- Fresh wheat, corn, rice, and other grains; at farm: 0.000779581 USD
- Unrefined oil and gas; at extraction site: 3.82857e-5 USD
- Waste management and remediation: 0.00262133 USD
- Data processing and hosting: 0.000965909 USD
- Specialized design: 0.000314785 USD
- Cutlery and handtools; at manufacturer: 7.39364e-5 USD
- Lessors of nonfinancial intangible assets: 0.00156493 USD
- Facilities support: 0.000114902 USD
- Consumer goods and general rental centers: 0.000114701 USD
- Other petroleum and coal products; at manufacturer: 0.00990409 USD
- Timber and raw forest products; at forest: 0.00162128 USD
- Veneer, plywood, and engineered wood; at manufacturer: 8.85791e-7 USD
- Vegetable oils and by-products; at manufacturer: 0.0149844 USD
- Light bulbs; at manufacturer: 0.000186973 USD
- All other food and drinking places: 1.55229e-6 USD
- Semiconductors; at manufacturer: 4.36392e-7 USD
- Packaging machinery; at manufacturer: 2.05244e-7 USD
- Vehicle engines and engine parts; at manufacturer: 3.038e-6 USD
- Advertising and public relations: 0.0107645 USD
- Fresh soybeans, canola, flaxseeds, and other oilseeds; at farm: 8.8267e-5 USD
- Sanitary paper (tissues, napkins, diapers, etc.); at manufacturer: 7.37999e-5 USD
- Material handling equipment; at manufacturer: 0.000418127 USD
- Electricity; at consumer: 0.00678641 USD
- Golf courses, marinas, ski resorts, fitness and other rec centers and industries: 4.21817e-5 USD
- Poultry farms: 0.00361473 USD
- Plastics; at manufacturer: 1.35595e-7 USD
- Magazines and journals; at publisher: 4.13155e-7 USD
- Other vehicle parts; at manufacturer: 4.21415e-5 USD
- Corn products; at manufacturer: 0.0118998 USD
- Commercial equipment rental: 0.000755833 USD
- Snack foods; at manufacturer: 0.0128593 USD
- Employment services: 0.000522659 USD
- Petrochemicals; at manufacturer: 1.05611e-7 USD
- General merchandise stores: 0.000111538 USD
- Company and enterprise management: 0.0404464 USD
- Computer terminals and other computer peripheral equipment; at manufacturer: 4.0677e-5 USD
- Specialty transformers; at manufacturer: 0.00022261 USD
- Fluid meters and counting devices; at manufacturer: 9.88053e-8 USD
- Pipeline transport: 0.000148058 USD
- Rubber and plastic belts and hoses; at manufacturer: 1.45464e-7 USD
- Frozen food; at manufacturer: 0.000202614 USD
- Investment advice, portfolio management, and other financial advising services: 0.000118193 USD
- Nonresidential building repair and maintanence: 0.00242124 USD
- Plastic bottles; at manufacturer: 0.00251184 USD
- Satellite, telecommunications resellers, and all other telecommunications: 7.70325e-5 USD
- Accounting, tax preparation, bookkeeping, and payroll: 0.00159027 USD
- Plastic bags, films, and sheets; at manufacturer: 0.0129617 USD
- Full-service restaurants: 0.000357756 USD
- Marketing research and all other miscellaneous professional, scientific, and technical services: 0.00192877 USD
- Warehousing: 0.000899287 USD
- Cardboard; at manufacturer: 0.00195067 USD
- Greenhouse crops, mushrooms, nurseries, and flowers; at farm: 7.60367e-5 USD
- Cardboard containers; at manufacturer: 0.030109 USD
- Truck transport: 0.0167945 USD
- Light gauge metal cans, boxes, and containers; at manufacturer: 0.00247872 USD
- Drinking water and wastewater treatment; at consumer: 0.00111867 USD
- Plastic pipe, fittings, and sausage casings; at manufacturer: 7.5756e-7 USD
- Cookies, crackers, pastas, and tortillas; at manufacturer: 0.000134645 USD
- Lids, jars, bottle caps, other metal closures and crowns; at manufacturer: 3.79262e-5 USD
- Other real estate: 0.00158882 USD
- Urethane and other foam products; at manufacturer: 1.19946e-6 USD
- Air conditioning, refrigeration, and warm air heating equipment; at manufacturer: 0.00111127 USD
- Gaskets, seals, musical instruments, fasteners, brooms, brushes, mop and other misc. goods; at manufacturer: 7.63598e-5 USD
- Metal hinges, keys, lock, and other hardware; at manufacturer: 5.90502e-7 USD
- Transmission and power train parts; at manufacturer: 1.05492e-5 USD
- Bread and other baked goods; at manufacturer: 2.86535e-6 USD
- Other basic inorganic chemicals; at manufacturer: 5.57944e-8 USD
- Paper bags and coated paper; at manufacturer: 0.0131249 USD
- Scenic and sightseeing transportation and support activities for transportation: 0.000117571 USD
- Heavy gauge metal tanks; at manufacturer: 7.97063e-8 USD
- Soap and cleaning compounds; at manufacturer: 0.00247271 USD
- Wireless telecommunications: 0.000309667 USD
- Abrasive products; at manufacturer: 1.30677e-6 USD
- Glass and glass products; at manufacturer: 0.000551997 USD
- Wild-caught fish and game; at place of capture: 0.000103554 USD
- Management consulting: 0.00143574 USD
- Coffee and tea; at manufacturer: 9.47042e-5 USD
- Dry-cleaning and laundry: 1.97611e-7 USD
- Independent artists, writers, and performers: 0.000117179 USD
- Packaged poultry; at manufacturer: 2.69672e-5 USD
- Environmental and other technical consulting services: 0.000186279 USD
- Sports: 3.88519e-5 USD
- Commercial machinery repair: 0.00174031 USD
- Polystyrene foam products; at manufacturer: 7.71002e-5 USD
- Noncomparable imports: 0.00187617 USD
- Refined vegetable, olive, and seed oils; at manufacturer: 0.00559675 USD
- Vehicles and parts sales: 9.8532e-6 USD
- Packaged meat (except poultry); at manufacturer: 0.0023582 USD

## Inputs from nature
- Energy, wind: 5.20561e-6 MJ; data quality (3,1,1,1,1)
- Water, fresh: 0.000785555, 0.00244885 m3 (2 entries, compartments not in this file); data quality (3,2,1,4,2)
- Occupation, urban, discontinuously built: 8.09331e-5 m2*a; data quality (4,2,1,1,1)
- Occupation, industrial area, built up: 0.000174186 m2*a; data quality (4,2,1,1,1)
- Energy, solar: 3.02603e-5 MJ; data quality (3,1,1,1,1)
- Energy, biomass: 0.000550215 MJ; data quality (3,1,1,1,1)
- Water, saline: 0.00015186 m3; data quality (4,2,1,4,2)
- Occupation, industrial area: 0.000522559 m2*a; data quality (4,2,1,1,1)

## Emissions to nature
- para-xylene: 8.67576e-11 kg; data quality (3,2,1,4,1)
- pentachlorophenol: 8.72547e-15 kg; data quality (3,2,1,1,5)
- Ethane, 1,1,1-trifluoro-, HFC-143a: 8.39773e-8 kg; data quality (4,2,1,4,1)
- beryllium: 1.32983e-9 kg; data quality (2,2,1,1,5)
- Cobalt: 1.21672e-8 kg; data quality (3,2,1,1,5)
- methanol: 7.64483e-6 kg; data quality (4,2,1,1,5)
- pyrene: 7.7451e-11 kg; data quality (3,2,1,1,5)
- benzene: 2.34049e-6 kg; data quality (3,2,1,1,5)
- 2-METHOXYETHANOL: 3.87127e-13 kg; data quality (4,2,1,1,5)
- toluene: 4.16522e-15 kg; data quality (5,1,1,1,4)
- Dinitrogen monoxide: 2.10832e-6 kg; data quality (4,2,1,4,1)
- Diethylene glycol butyl ether: 6.13638e-11 kg; data quality (3,2,1,1,5)
- Hydrocarbons, aromatic: 7.43104e-9 kg; data quality (4,2,1,1,4)
- Propane, 1,2-dichloro-: 2.83835e-12 kg; data quality (4,2,1,1,5)
- Hydrazine, methyl-: 1.27657e-9 kg; data quality (2,2,1,1,5)
- chloroform: 5.47963e-9 kg; data quality (4,2,1,1,5)
- Phosphorus: 4.3776e-7 kg; data quality (2,1,1,1,4)
- Hydrazine: 6.35795e-15 kg; data quality (4,2,1,1,5)
- Cresol: 6.96874e-8 kg; data quality (4,2,1,1,5)
- phenanthrene: 4.19352e-10 kg; data quality (3,2,1,2,4)
- Chromium, ion: 3.54818e-8 kg; data quality (2,2,1,1,5)
- sulfur dioxide: 0.000294849 kg; data quality (2,2,1,1,5)
- methane, dichloro-, hcc-30: 8.26603e-9 kg; data quality (4,2,1,1,5)
- ammonia: 7.16944e-7 kg; data quality (3,1,1,1,5)
- nitrogen oxides: 0.000473452 kg; data quality (2,2,1,1,5)
- AMMONIA: 6.6042e-7 kg; data quality (3,1,1,1,5)
- methane, monochloro-, r-40: 3.9825e-9 kg; data quality (3,2,1,1,5)
- 1,1-DICHLOROETHYLENE: 1.14786e-15 kg; data quality (3,2,1,1,5)
- toluene: 4.11505e-7 kg; data quality (4,2,1,1,5)
- Propene, 1,3-dichloro-: 1.55577e-17 kg; data quality (3,2,1,1,5)
- t-butyl methyl ether: 1.56615e-8 kg; data quality (3,2,1,1,5)
- acetonitrile: 1.42418e-19 kg; data quality (3,2,1,1,5)
- PERACETIC ACID: 1.09129e-12 kg; data quality (4,1,1,1,4)
- benzene, chloro-: 1.6859e-10 kg; data quality (4,2,1,1,5)
- phenol: 2.03646e-6 kg; data quality (4,2,1,1,5)
- naphthalene: 9.91293e-6 kg; data quality (3,2,1,1,5)
- acrolein: 1.01776e-7 kg; data quality (2,2,1,1,5)
- isophorone: 4.35545e-9 kg; data quality (2,2,1,1,5)
- nickel: 3.43948e-8 kg; data quality (3,2,1,1,5)
- nitric acid: 1.87995e-10 kg; data quality (3,1,1,1,5)
- ethyl acrylate: 1.9612e-13 kg; data quality (3,2,1,1,5)
- cumene: 4.41401e-11 kg; data quality (4,2,1,1,5)
- mercury: 2.13736e-11 kg; data quality (3,1,1,1,5)
- ethane, 1,2-dichloro-: 2.04321e-9 kg; data quality (3,2,1,1,5)
- propanal: 7.84932e-9 kg; data quality (3,2,1,2,3)
- Dichlorvos: 7.73581e-12 kg; data quality (3,2,1,1,5)
- phthalate, dioctyl-: 2.98516e-8 kg; data quality (3,2,1,1,5)
- 1,1,2,2-tetrachloroethane: 3.25528e-17 kg; data quality (3,2,1,1,5)
- manganese: 6.35999e-8 kg; data quality (3,2,1,1,5)
- p-phenylenediamine: 1.76577e-13 kg; data quality (5,2,1,1,5)
- hydroquinone: 8.47727e-17 kg; data quality (3,2,1,1,5)
- monochloroethane: 1.90142e-9 kg; data quality (3,2,1,1,5)
- 3-methylcholanthrene: 9.8609e-14 kg; data quality (2,2,1,1,5)
- 2-chloro-1-phenylethanone: 5.25691e-11 kg; data quality (2,2,1,1,5)
- trichloroethylene: 4.06652e-11 kg; data quality (4,2,1,1,5)
- p-cresol: 5.99917e-11 kg; data quality (3,2,1,1,5)
- Chrysene: 7.76769e-12 kg; data quality (2,2,1,1,5)
- Benzo(k)fluoranthene: 5.57477e-13 kg; data quality (3,2,1,3,2)
- o-cresol: 2.98331e-11 kg; data quality (3,2,1,1,5)
- hydrogen sulfide: 2.80463e-7 kg; data quality (3,2,1,1,5)
- aniline: 5.79845e-21 kg; data quality (4,2,1,1,5)
- 1,4-dioxane: 7.22132e-13 kg; data quality (4,2,1,1,5)
- Phthalate, dibutyl-: 6.45433e-11 kg; data quality (3,2,1,1,5)
- Xylene: 3.24664e-8 kg; data quality (4,2,1,2,4)
- 4-nitrophenol: 1.13615e-10 kg; data quality (3,2,1,1,5)
- Aluminum: 1.25271e-13 kg; data quality (4,1,1,1,5)
- hydrogen fluoride: 1.32699e-6 kg; data quality (2,2,1,1,5)
- lead: 5.49035e-9 kg; data quality (3,1,1,1,5)
- dibenzofuran: 6.31007e-7 kg; data quality (4,2,1,1,5)
- biphenyl: 1.31405e-10 kg; data quality (3,2,1,1,5)
- ozone: 2.88468e-13 kg; data quality (4,1,1,1,5)
- 2,2,4-trimethylpentane: 1.45843e-8 kg; data quality (3,2,1,2,4)
- particulates, < 10 um: 8.4152e-5 kg; data quality (3,2,1,1,5)
- benz[a]anthracene: 4.54332e-11 kg; data quality (2,2,1,1,5)
- Dibenz(a,h)anthracene: 9.83079e-14 kg; data quality (2,2,1,1,5)
- Ethane, pentafluoro-, HFC-125: 1.96274e-7 kg; data quality (4,2,1,4,1)
- acetophenone: 1.55417e-10 kg; data quality (4,2,1,1,5)
- bromoform: 1.76565e-9 kg; data quality (3,2,1,1,5)
- anthracene: 4.84928e-11 kg; data quality (3,2,1,1,5)
- arsenic: 2.59016e-8 kg; data quality (3,2,1,1,5)
- Nitrogen: 6.55841e-6 kg; data quality (3,2,1,1,5)
- carbon disulfide: 9.76257e-10 kg; data quality (4,2,1,1,5)
- Ethene, chloro-: 2.04911e-12 kg; data quality (3,2,1,1,5)
- Benzo(b)fluoranthene: 6.13947e-13 kg; data quality (3,2,1,3,2)
- acenaphthylene: 2.19018e-10 kg; data quality (3,2,1,1,4)
- Triethyl amine: 5.6289e-14 kg; data quality (4,2,1,1,5)
- acenaphthene: 4.38114e-11 kg; data quality (3,2,1,3,2)
- Chrysene, 5-methyl-: 1.65215e-13 kg; data quality (2,2,1,1,5)
- bis(2-chloroethyl)ether: 1.77074e-8 kg; data quality (3,2,1,1,5)
- methanol: 2.07696e-6 kg; data quality (3,1,1,1,5)
- ethylene oxide: 1.57705e-11 kg; data quality (3,2,1,1,5)
- 1,4-dichlorobenzene: 4.52722e-14 kg; data quality (2,2,1,1,5)
- ethene, tetrachloro-: 1.95109e-9 kg; data quality (3,2,1,1,5)
- NITRIC ACID: 1.52826e-9 kg; data quality (3,1,1,1,5)
- methyl methacrylate: 1.5036e-10 kg; data quality (4,2,1,1,5)
- acrylonitrile: 2.86969e-14 kg; data quality (3,2,1,1,5)
- ethylene glycol: 5.57468e-10 kg; data quality (5,2,1,1,5)
- Dimethyl sulfate: 3.60911e-10 kg; data quality (2,2,1,1,5)
- Propane, 1,1,1,3,3,3-hexafluoro-, HCFC-236fa: 2.26867e-9 kg; data quality (4,2,1,4,1)
- TERT-BUTYL ALCOHOL: 2.24445e-13 kg; data quality (4,1,1,1,5)
- selenium: 1.26539e-8 kg; data quality (2,2,1,1,5)
- chlorine: 8.90905e-12 kg; data quality (2,1,1,1,5)
- toluene, 2,4-dinitro-: 2.10257e-12 kg; data quality (5,2,1,1,5)
- fluoranthene: 2.91074e-10 kg; data quality (2,2,1,1,5)
- epichlorohydrin: 4.64523e-14 kg; data quality (3,2,1,1,5)
- Water, saline: 7.69471e-5 m3; data quality (4,2,1,4,2)
- Methane: 1.27999e-5 kg; data quality (4,2,1,4,1)
- Cumene hydroperoxide: 2.04146e-11 kg; data quality (3,1,1,1,5)
- benzene, ethyl-: 6.04882e-8 kg; data quality (4,2,1,1,5)
- hexane: 4.97697e-7 kg; data quality (3,2,1,1,5)
- acetaldehyde: 7.53062e-7 kg; data quality (3,2,1,1,5)
- barium: 9.13455e-8 kg; data quality (4,1,1,1,5)
- benzyl chloride: 5.25693e-9 kg; data quality (2,2,1,1,5)
- ACRYLAMIDE: 1.10335e-16 kg; data quality (3,2,1,1,5)
- Asbestos: 1.71194e-13 kg; data quality (5,2,1,1,5)
- hydrogen chloride: 8.53522e-6 kg; data quality (2,2,1,1,5)
- Chromium VI: 4.00248e-9 kg; data quality (3,2,1,1,5)
- mercury: 2.4836e-9 kg; data quality (2,2,1,1,5)
- butadiene: 2.12556e-9 kg; data quality (3,2,1,4,1)
- VOC, volatile organic compounds: 0.000155632 kg; data quality (3,2,1,1,5)
- methyl isobutyl ketone: 1.25618e-9 kg; data quality (4,2,1,1,5)
- PERACETIC ACID: 1.062e-11 kg; data quality (4,1,1,1,5)
- Benzo(a)anthracene: 2.73935e-13 kg; data quality (2,2,1,1,5)
- Carbon dioxide: 0.146317 kg; data quality (4,2,1,4,1)
- PHOSPHORUS: 2.10542e-8 kg; data quality (2,2,1,1,5)
- Nitrobenzene: 7.32436e-21 kg; data quality (4,2,1,1,5)
- 2,4-dinitrophenol: 3.07958e-14 kg; data quality (5,2,1,1,5)
- styrene: 1.52865e-7 kg; data quality (4,2,1,1,5)
- formaldehyde: 1.89965e-6 kg; data quality (2,2,1,1,5)
- o-toluidine: 3.83562e-16 kg; data quality (4,2,1,1,4)
- Ethylene glycol monoethyl ether: 3.84784e-13 kg; data quality (5,1,1,1,5)
- lead: 5.81012e-8 kg; data quality (3,2,1,1,5)
- chlorine: 5.85193e-7 kg; data quality (4,2,1,1,5)
- Indeno(1,2,3-cd)pyrene: 1.03582e-11 kg; data quality (3,2,1,1,5)
- particulates, < 2.5 um: 0.000553389 kg; data quality (3,2,1,1,5)
- propylene oxide: 9.80946e-10 kg; data quality (3,2,1,1,5)
- cadmium: 3.56905e-9 kg; data quality (3,2,1,1,5)
- Methyl iodide: 2.54318e-19 kg; data quality (4,2,1,1,5)
- Sulfuric acid: 3.37034e-7 kg; data quality (2,1,1,1,5)
- acrylic acid: 9.86436e-14 kg; data quality (3,2,1,1,5)
- antimony: 1.79707e-10 kg; data quality (3,2,1,1,5)
- 1,1,1-trichloroethane: 1.67169e-9 kg; data quality (4,2,1,1,5)
- ammonia: 4.89974e-5 kg; data quality (3,2,1,1,5)
- acetaldehyde: 7.74794e-10 kg; data quality (3,1,1,1,5)
- m-xylene: 2.14678e-9 kg; data quality (3,2,1,4,1)
- Methane, difluoro-, HFC-32: 1.14301e-7 kg; data quality (4,2,1,4,1)
- Water, fresh: 0.00277171 m3; data quality (3,2,1,4,2)
- dimethyl formamide: 7.1209e-22 kg; data quality (4,2,1,1,5)
- methane, bromo-, halon 1001: 4.21286e-9 kg; data quality (3,2,1,1,5)
- 2-methylnaphthalene: 2.29111e-11 kg; data quality (2,2,1,1,5)
- carbon monoxide: 0.00149152 kg; data quality (2,2,1,1,5)
- POTASSIUM BROMATE: 1.27591e-11 kg; data quality (5,1,1,1,5)
- ethane, 1,2-dibromo-: 5.4319e-11 kg; data quality (2,2,1,1,5)
- vinyl acetate: 5.71324e-11 kg; data quality (4,2,1,1,5)
- Phosphine: 1.77764e-9 kg; data quality (4,2,1,1,4)
- Ethane, 1,1,1,2-tetrafluoro-, HFC-134a: 7.3978e-7 kg; data quality (4,2,1,4,1)
- cyanide: 2.44849e-8 kg; data quality (3,2,1,1,5)
- fluorene: 8.76885e-11 kg; data quality (3,2,1,2,4)
- SULFURYL FLUORIDE: 4.50024e-9 kg; data quality (4,1,1,1,5)
- o-Xylene: 1.38554e-9 kg; data quality (3,2,1,3,3)
- butanol: 8.69941e-15 kg; data quality (5,1,1,1,5)
- benzo(a)pyrene: 2.49236e-10 kg; data quality (2,2,1,1,5)
- Benzo(g,h,i)perylene: 8.46949e-10 kg; data quality (3,2,1,1,5)
- maleic anhydride: 4.64956e-14 kg; data quality (3,2,1,1,5)
- carbon tetrachloride: 5.25056e-12 kg; data quality (4,2,1,1,5)
- diethanolamine: 3.22485e-14 kg; data quality (3,2,1,1,5)
- ethane, 1,1,2-trichloro-: 1.22775e-9 kg; data quality (4,2,1,1,5)

## Inventory method
Input-output

## Modelling constants
The reference unit of all processes is 1 USD2013 of the good or service. The technosphere inputs are based on the US BEA detailed input-output tables for 2007. The IO tables are combined to develop a commodity-by-commodity model based on the the industry-technology assumption (see Suh et al., 2010), which assumes all commodities produced by a given industry have the same input structure, but that multiple industries can produce the same commodity. Thus, model technosphere flows represent commodity outputs (and not industry outputs) from other processes in the model. There are no by-products included in these processes. All commodity production is based on US-conditions, despite in reality that some goods and services are produced overseas, as USEEIO v1.1 is a single-region IO model.

## Completeness
The input-output approach assures that all purchased inputs associated with the sectors making these commodities as reported in the US census for 2007 are included. The direct resources extracted including minerals, energy sources, water and land occupied are included. Emissions to air include all critieria air pollutants, greenhouse gases, and hazardous and toxic air pollutants as defined by US EPA. Releases to water include toxics, total nitrogen and total phosphorus, and water discharges. Releases to soil or groundwater include toxics and agriculutural pesticides. Some metal releases to air, water and soil are not included because they could not be speciated. Solid hazardous and non-hazardous wastes generated are not included as an elementary flows although purchases of waste services are included.

## Data treatment
Greenhouse gases are primarily from the US Greenhouse Gas Emission Inventory (USEPA 2016a). Biogenic C uptake is not included (change from version 1.0), as biogenic C emission are not included. Toxic releases to air, water and soil (except pesticides) are from the 2013 Toxic Release Inventory (USEPA 2015a). Criteria air pollutants and hazardous air pollutants are from the 2011 National Emissions Inventory (USEPA 2015b). All estimates are normalized by industry based on sector output in the data year, then converted to 2013 USD using relative sector-specific CPIs (if data year is not 2013). Energy use represent raw renewables or fossil fuel energies and is based on EIA data for 2014. See Table 1 in Yang, Ingwersen et al. 2017 and Supporting Information 1, and the v1.1 data update notes (Ingwersen et al. 2017) for all details on environmental data sources used.Land occupation associated with manufacturing buildings was estimated based on the building floorspace data provided by the U.S. Energy Information Administration in the 2010 Manufacturing Energy Consumption Survey (EIA 2013). Portions of total renewable energy (EIA 2016) based on EIA-923 reports for 2014 (EIA 2017) are included. Nitrogen and Phosphorus releases are modeled in total N and total P equivalents as estimated by the Discharge Monitoring Report Nutrient Loading tool (USEPA 2016b). Self-supplied withdrawals were assigned to industrial sectors based on water use statistics for Canadian industries by NAICS 3-digit sector scaled to US production levels based on gross domestic product by industry (BEA 2015; Statistics Canada 2010), and further disaggregated to the manufacturing sectors based on compensation of employees as provided by the 2007 IO tables (BEA 2015). Water withdrawals associated with public supply were allocated to sectors based on their use of water, sewage, and other services in USD based on the IO tables (BEA 2015). Portions of total renewable energy (EIA 2016) by type are assigned to sectors (hydro, wind, solar, or) based on EIA-923 reports for 2014 (EIA 2017).

## Data collection
2015-2016

## Sampling procedure
US federal government sources, including surveys and US EPA emissions databases are used as the primary sources. From these sources, data for US reporting establishments/facilities are aggregated by the NAICS sector as defined in the BEA detailed 2007 input-output tables. When level of sector aggregation differs, or when direct emissions are not reported but modeled, additional sources are used to make allocations and estimates.

## Review details
In regard to quality assurance and peer-review, each dataset created went through Quality Assurance as defined in a quality assurance project plans at US EPA, CSRA or ERG. The model was assembled with the IO model builder model (USEPA 2016c). Validation functions were used to check that all the model components were properly assembled and harmonized. Bayou Demeke and Santosh Ghimire provided internal peer review of the model methodology and the manuscript underwent standard EPA management review. An editor and two anonymous reviewers at the Journal of Cleaner Production reviewed the model. In regard to data quality evaluation, data quality assessment was performed at the flow and process levels according to the updated US EPA data quality assessment guidelines as defined in US EPA (2016b).

## Intended application
The primary application is for use in the US Environmentally-Extended Input-Ouput model, USEEIO, version 1.1. This model is being used by the US EPA for supporting tools that prioritize goods and services based on potential environmental impacts, resource use or emissions for large regions, including the US and US states, and as a strealined tool for organizations as a starting point to consider sustainable materials management. Model results are designed to provide meso/macro-level decision support.

## Project
USEEIO v1.1 was developed by the US EPA with CSRA and ERG with Wesley W. Ingwersen and David E. Meyer as research leads. Yi Yang was the technical lead on the work for CSRA (contract EP-C-15-012); Troy Hawkins was lead for ERG (contract EP-C-12-021).

## Sources
- EIA 2016
- Kim et el. 2013
- USEPA 2015a
- BLM 2008
- USGS 2016
- Lovelace 2009
- USEPA 2016b
- Blackhurst et al. 2010
- Statistics Canada 2010
- USDA 2009a
- USGS 2015
- Yienger et al. 1995
- USDA 2009b
- EIA 2017
- Maupin et al. 2014
- USDA 2016
- USDA 2014
- Ingwersen et al. 2017
- USEPA 2016c
- Macknick et al. 2011
- USEPA 2016a
- Torcellini et al. 2003
- EIA 2015
- Edelen and Ingwersen 2017
- USEPA 2015b
- Ingwersen et al. DRAFT
- Nickerson et al. 2011
- Goebes et al. 2003
- BEA 2015
- EIA 2013
- USDA 2006
