# Sound recording

Dataset: openLCA process, unit process
Category: 5122: Sound Recording Industries
Geography: United States
Time period: 2017-01-01 to 2017-12-31
Data quality: US EPA - Process Pedigree Matrix (1;1)
Exchange data quality scheme: US EPA - Flow Pedigree Matrix
Generated by: US EPA with CSRA and ERG
Owner: US EPA
Published in: Yang, Ingwersen et al. 2017
restrictionsDescription: This model shold be appropriately cited (see Yang, Ingwersen et al. 2017 source or Publication field) when used. Any changes or derivations of this model by the user should be documented. The model itself and any results from use of this model shall not be construed to consitute US EPA opinion or policy.
copyright: false

## General comment
BEA Code & Name is '512200:Sound recording industries'. Description of the primary industry producing this good or service, adapted from the Census Bureau NAICS 2007 descriptions: This industry group comprises establishments primarily engaged in producing and distributing musical recordings, in publishing music, or in providing sound recording and related services.

## Technology
The process describes the average US production of this good or service within this NAICS-based grouping defined in the BEA 2007 detailed input-output tables (BEA 2015). Distribution, wholesale and retailing of this good or service, use, and final disposal are not included. Creation of a product system with this process will enable modeling of all upstream (supply-chain) activities.

## Geography
Data represent the 50 US states

## Time period
2017 was the year in which this version of USEEIO was released and is the target date for the model

## Reference product
- Sound recording: 1 USD

## Inputs from technosphere
All rows: data quality (1,3,1,1,1)
- News syndicates, libraries, archives, Internet publishing and all other information services: 0.000234549 USD
- Vehicle engines and engine parts; at manufacturer: 9.8981e-7 USD
- Computer systems design: 0.0156553 USD
- Other textiles; at manufacturer: 6.59874e-7 USD
- Software: 0.00206154 USD
- Electricity; at consumer: 0.00134171 USD
- Plastic bottles; at manufacturer: 6.59874e-7 USD
- Air conditioning, refrigeration, and warm air heating equipment; at manufacturer: 1.84848e-6 USD
- Full-service restaurants: 0.00317539 USD
- Plastic pipe, fittings, and sausage casings; at manufacturer: 6.59874e-7 USD
- Machine shops; at manufacturer: 0.000187735 USD
- Employment services: 0.00409647 USD
- Rail transport: 6.76789e-7 USD
- Copper, nickel, lead, and zinc; at mine: 0.000703494 USD
- Unrefined oil and gas; at extraction site: 3.80682e-7 USD
- Industrial process variable instruments; at manufacturer: 1.15478e-6 USD
- Other petroleum and coal products; at manufacturer: 6.59874e-7 USD
- Waste management and remediation: 0.000476817 USD
- Gasoline, fuels, and by-products of petroleum refining; at manufacturer: 0.00113258 USD
- Golf courses, marinas, ski resorts, fitness and other rec centers and industries: 0.000614405 USD
- Newspapers; at publisher: 3.29937e-7 USD
- Hotels and campgrounds: 0.00452351 USD
- Buildings and dwellings services: 0.00260872 USD
- Vehicle electrical and electronic equipment; at manufacturer: 1.48472e-6 USD
- Air transport: 0.00501612 USD
- Cardboard; at manufacturer: 0.000145891 USD
- Truck transport: 0.0016608 USD
- Nonresidential building repair and maintanence: 0.000475882 USD
- Limited-service restaurants: 0.00104977 USD
- Specialized design: 0.000472473 USD
- Travel arrangement and reservation: 0.000234215 USD
- Sound recording: 0.0962052 USD
- Business support: 0.00303022 USD
- Books, newspapers, magazines, and other print media; at manufacturer: 0.0193509 USD
- Rubber tires; at manufacturer: 1.15478e-6 USD
- Monetary authorities and depository credit intermediation: 0.00940545 USD
- Wireless communications; at manufacturer: 0.00206084 USD
- Food and beverage stores: 1.64968e-7 USD
- Other concrete products; at manufacturer: 2.32629e-7 USD
- Urethane and other foam products; at manufacturer: 3.29937e-7 USD
- Warehousing: 0.0015333 USD
- Other real estate: 0.0194971 USD
- Printed circuit and electronic assembly; at manufacturer: 4.73048e-5 USD
- Metal pipe fittings, ball and roller bearings, industrial patterns, metal bath fixtures, other misc. fabricated metals; at manufacturer: 5.1182e-7 USD
- Civic, social, professional, and similar organizations: 0.000528801 USD
- Passenger ground transport: 0.00127613 USD
- Performances: 0.000332965 USD
- Directory, mailing list, and other publishers; at publisher: 0.000376789 USD
- Drinking water and wastewater treatment; at consumer: 0.000330855 USD
- Environmental and other technical consulting services: 0.00208626 USD
- Facilities support: 0.000292995 USD
- Postal service: 0.00378591 USD
- Wholesale trade: 0.00297413 USD
- Radio and television: 0.000106599 USD
- Glass and glass products; at manufacturer: 1.64968e-7 USD
- General merchandise stores: 4.94905e-7 USD
- Flavored drink concentrates; at manufacturer: 6.59874e-7 USD
- Other plastic products; at manufacturer: 0.000145925 USD
- Fabric; at manufacturer: 5.11402e-6 USD
- Wooden windows, door, and flooring; at manufacturer: 0.00310155 USD
- Vehicles and parts sales: 1.15478e-6 USD
- Other support services: 0.000141255 USD
- Electronic equipment repair and maintenance: 0.000332136 USD
- Commercial equipment rental: 0.00227087 USD
- Other retail: 4.97794e-5 USD
- Noncomparable imports: 0.00347926 USD
- Advertising and public relations: 0.0506752 USD
- Other vehicle parts; at manufacturer: 1.31975e-6 USD
- Legal services: 0.0213079 USD
- Motor vehicle steering, suspension components (except spring), and brake systems; at manufacturer: 9.8981e-7 USD
- Other computer related services, including facilities management: 0.0120521 USD
- Veneer, plywood, and engineered wood; at manufacturer: 8.24842e-7 USD
- Investigation and security: 0.000952078 USD
- Fiber, yarn, and thread; at manufacturer: 1.35274e-5 USD
- Internet publishing and broadcasting: 0.000237696 USD
- Natural gas; at consumer: 0.000284895 USD
- Accounting, tax preparation, bookkeeping, and payroll: 0.0127213 USD
- Scenic and sightseeing transportation and support activities for transportation: 0.00345249 USD
- Semiconductor machinery; at manufacturer: 0.00061245 USD
- Screws, nuts, and bolts; at manufacturer: 9.42967e-5 USD
- Computer terminals and other computer peripheral equipment; at manufacturer: 0.000795837 USD
- Household goods repair: 0.000237493 USD
- Transmission and power train parts; at manufacturer: 1.84848e-6 USD
- Other basic organic chemicals; at manufacturer: 4.74698e-5 USD
- Polystyrene foam products; at manufacturer: 1.64968e-7 USD
- Couriers and messengers: 0.00484246 USD
- Consumer goods and general rental centers: 0.000488605 USD
- Lessors of nonfinancial intangible assets: 0.00554368 USD
- State and local government enterprises: 0.000427364 USD
- Company and enterprise management: 0.00338198 USD
- Vehicle rental and leasing: 0.00391753 USD
- Metal coatings, engravings, and heat treatments; at manufacturer: 0.000562426 USD
- Independent artists, writers, and performers: 0.000874456 USD
- Office supplies (not paper); at manufacturer: 1.64968e-7 USD
- Plywood and veneer; at manufacturer: 9.8981e-7 USD
- Custom computer programming: 0.00028086 USD
- Movies and film: 0.00303876 USD
- Clothing; at manufacturer: 5.60893e-6 USD
- Cardboard containers; at manufacturer: 0.000329814 USD
- Gaskets, seals, musical instruments, fasteners, brooms, brushes, mop and other misc. goods; at manufacturer: 3.29937e-7 USD
- Paper; at manufacturer: 6.28119e-5 USD
- Dry-cleaning and laundry: 2.47453e-6 USD
- Sugar, candy, and chocolate; at manufacturer: 1.48472e-6 USD
- Commercial machinery repair: 0.00085496 USD
- Finished and coated fabric; at manufacturer: 8.08345e-6 USD
- Nondepository credit intermediation and related activities: 0.00211215 USD
- Plastic bags, films, and sheets; at manufacturer: 4.82947e-5 USD
- Office administration: 0.00246875 USD
- Telecommunications: 0.0298021 USD
- Satellite, telecommunications resellers, and all other telecommunications: 0.00370341 USD
- Magazines and journals; at publisher: 9.89158e-5 USD
- Used and secondhand goods: 1.81884e-7 USD
- Insurance agencies and brokerages: 0.00105599 USD
- Wireless telecommunications: 0.0173399 USD
- Aluminum; at manufacturer: 0.000421987 USD
- All other food and drinking places: 0.000518919 USD
- Insurance carriers: 0.00611883 USD
- Chemicals (except basic chemicals, agrichemicals, polymers, paints, pharmaceuticals,soaps, cleaning compounds); at manufacturer: 6.86027e-5 USD
- Sports: 0.000338189 USD
- Primary iron, steel, and ferroalloy products; at manufacturer: 0.000422152 USD
- Investment advice, portfolio management, and other financial advising services: 0.000192701 USD
- Securities and commodities brokerage and exchanges: 0.018987 USD
- Promoters and agents: 0.00543274 USD
- Water transport (boats, ships, ferries): 1.81884e-7 USD
- Paper bags and coated paper; at manufacturer: 4.82947e-5 USD
- Lumber and treated lumber; at manufacturer: 1.97962e-6 USD
- Light bulbs; at manufacturer: 1.64968e-7 USD
- External hard drives, CDs, other storage media; at manufacturer: 0.00448272 USD
- Marketing research and all other miscellaneous professional, scientific, and technical services: 0.00473369 USD
- Vehicle repair: 0.000427579 USD
- Communications equipment; at manufacturer: 0.000468099 USD
- Data processing and hosting: 0.0141427 USD
- Architectural, engineering, and related services: 0.0014017 USD
- Management consulting: 0.0090547 USD
- Paints and coatings; at manufacturer: 0.000190095 USD

## Inputs from nature
- Water, fresh: 0.000237655, 0.000137325 m3 (2 entries, compartments not in this file); data quality (1,2,1,4,2)
- Energy, solar: 1.40714e-6 MJ; data quality (3,1,1,1,1)
- Occupation, urban, discontinuously built: 0.000231291 m2*a; data quality (4,2,1,1,1)

## Emissions to nature
- isophorone: 8.63149e-11 kg; data quality (3,2,1,1,5)
- VOC, volatile organic compounds: 4.08339e-6 kg; data quality (3,2,1,1,4)
- Asbestos: 2.47209e-15 kg; data quality (5,2,1,1,5)
- arsenic: 2.82306e-12 kg; data quality (3,2,1,5,1)
- Phthalate, dibutyl-: 5.10483e-10 kg; data quality (3,2,1,1,5)
- benzene: 3.33989e-8 kg; data quality (3,2,1,4,1)
- carbon disulfide: 6.50501e-12 kg; data quality (4,2,1,1,5)
- Diethylene glycol butyl ether: 3.11775e-12 kg; data quality (4,2,1,1,5)
- ethane, 1,1,2-trichloro-: 2.94839e-14 kg; data quality (4,2,1,1,5)
- Ethane, pentafluoro-, HFC-125: 3.98586e-10 kg; data quality (4,2,1,4,1)
- Benzo(k)fluoranthene: 1.46208e-12 kg; data quality (3,2,1,4,1)
- hydrogen chloride: 3.65816e-9 kg; data quality (2,2,1,1,5)
- 1,1,1-trichloroethane: 2.77506e-7 kg; data quality (3,2,1,1,5)
- Benzo(g,h,i)perylene: 3.94007e-12 kg; data quality (3,2,1,4,1)
- 3-methylcholanthrene: 7.6495e-18 kg; data quality (2,2,1,1,5)
- chloroform: 2.64184e-14 kg; data quality (4,2,1,1,5)
- anthracene: 9.9805e-12 kg; data quality (3,2,1,4,1)
- pyrene: 1.67716e-11 kg; data quality (3,2,1,4,1)
- Benzo(a)anthracene: 6.79847e-17 kg; data quality (2,2,1,1,5)
- Chromium VI: 8.58246e-13 kg; data quality (3,2,1,4,2)
- Water, fresh: 0.000317501 m3; data quality (1,2,1,4,2)
- Methane: 1.62448e-7 kg; data quality (4,2,1,4,1)
- acrolein: 6.86526e-10 kg; data quality (3,2,1,4,1)
- m-xylene: 2.81816e-8 kg; data quality (3,2,1,1,5)
- benzene, ethyl-: 2.60405e-8 kg; data quality (3,2,1,2,3)
- carbon tetrachloride: 8.23828e-14 kg; data quality (4,2,1,1,5)
- Xylene: 4.45891e-8 kg; data quality (3,2,1,4,1)
- Dinitrogen monoxide: 5.32351e-9 kg; data quality (4,2,1,4,1)
- benzene, chloro-: 4.26009e-11 kg; data quality (4,2,1,1,5)
- mercury: 7.73037e-14 kg; data quality (3,2,1,3,3)
- methane, dichloro-, hcc-30: 5.65716e-9 kg; data quality (3,2,1,1,5)
- methanol: 7.31565e-9 kg; data quality (3,2,1,1,5)
- toluene: 2.97883e-7 kg; data quality (3,2,1,2,4)
- Chrysene: 1.38912e-12 kg; data quality (3,2,1,4,1)
- hydrogen fluoride: 6.6828e-10 kg; data quality (2,2,1,1,5)
- beryllium: 3.48134e-13 kg; data quality (2,2,1,1,5)
- acetaldehyde: 8.49358e-9 kg; data quality (3,2,1,4,1)
- benz[a]anthracene: 1.4891e-12 kg; data quality (3,2,1,4,1)
- nickel: 5.48147e-10 kg; data quality (3,2,1,1,5)
- Benzo(b)fluoranthene: 1.48594e-12 kg; data quality (3,2,1,4,1)
- Cobalt: 1.22997e-13 kg; data quality (3,2,1,1,5)
- Ethene, chloro-: 4.22224e-11 kg; data quality (3,2,1,1,5)
- ethane, 1,2-dibromo-: 9.892e-14 kg; data quality (2,2,1,1,5)
- trichloroethylene: 1.35634e-8 kg; data quality (3,2,1,1,5)
- methyl isobutyl ketone: 7.94403e-8 kg; data quality (3,2,1,1,5)
- o-Xylene: 1.22335e-8 kg; data quality (3,2,1,1,5)
- 1,1,2,2-tetrachloroethane: 4.94e-14 kg; data quality (3,2,1,1,5)
- ethene, tetrachloro-: 3.47483e-10 kg; data quality (3,2,1,1,5)
- tertiary-Butyl Acetate: 5.3849e-8 kg; data quality (3,2,1,1,5)
- sulfur dioxide: 2.70377e-8 kg; data quality (2,2,1,1,5)
- Propane, 1,1,1,3,3,3-hexafluoro-, HCFC-236fa: 4.60714e-12 kg; data quality (4,2,1,4,1)
- 1,4-dichlorobenzene: 9.54231e-11 kg; data quality (2,2,1,1,5)
- naphthalene: 1.25033e-9 kg; data quality (3,2,1,4,1)
- fluoranthene: 1.34533e-11 kg; data quality (3,2,1,4,1)
- acetophenone: 9.78916e-12 kg; data quality (3,2,1,1,5)
- methylene diphenyl diisocyanate: 4.54898e-14 kg; data quality (4,2,1,1,5)
- Propane, 1,2-dichloro-: 2.51564e-14 kg; data quality (4,2,1,1,5)
- selenium: 1.47003e-13 kg; data quality (2,2,1,1,5)
- carbon monoxide: 1.99177e-5 kg; data quality (3,2,1,1,1)
- butadiene: 5.36785e-9 kg; data quality (3,2,1,4,1)
- acenaphthene: 1.28542e-11 kg; data quality (3,2,1,4,1)
- Propene, 1,3-dichloro-: 2.4473e-14 kg; data quality (3,2,1,1,5)
- 2,2,4-trimethylpentane: 1.84815e-8 kg; data quality (3,2,1,4,1)
- Methane, difluoro-, HFC-32: 2.32118e-10 kg; data quality (4,2,1,4,1)
- propanal: 1.84807e-9 kg; data quality (3,2,1,4,1)
- Indeno(1,2,3-cd)pyrene: 1.21313e-12 kg; data quality (3,2,1,4,1)
- styrene: 5.41465e-10 kg; data quality (3,2,1,4,1)
- Carbon dioxide: 0.00176396 kg; data quality (4,2,1,4,1)
- particulates, < 10 um: 4.2414e-9 kg; data quality (3,2,1,4,1)
- para-xylene: 1.18149e-8 kg; data quality (3,2,1,1,5)
- particulates, < 2.5 um: 9.78679e-8 kg; data quality (3,2,1,3,2)
- Ethane, 1,1,1-trifluoro-, HFC-143a: 1.70538e-10 kg; data quality (4,2,1,4,1)
- cumene: 1.95783e-11 kg; data quality (3,2,1,1,5)
- ethane, 1,2-dichloro-: 7.44547e-14 kg; data quality (3,2,1,1,5)
- 2-methylnaphthalene: 1.09712e-16 kg; data quality (2,2,1,1,5)
- Ethylene glycol monoethyl ether: 1.32487e-11 kg; data quality (3,2,1,1,5)
- Chromium, ion: 2.09146e-12 kg; data quality (3,2,1,5,1)
- formaldehyde: 1.9246e-8 kg; data quality (3,2,1,4,1)
- Triethyl amine: 1.01877e-9 kg; data quality (3,2,1,1,5)
- Phthalate, dimethyl-: 1.49167e-11 kg; data quality (4,2,1,1,5)
- Nitrogen: 4.41346e-8 kg; data quality (4,2,1,1,5)
- Hydrocarbons, aromatic: 3.64415e-10 kg; data quality (3,2,1,4,1)
- manganese: 2.33572e-11 kg; data quality (3,2,1,1,5)
- lead: 1.92177e-14 kg; data quality (3,2,1,1,5)
- cadmium: 1.48713e-13 kg; data quality (3,2,1,1,5)
- acenaphthylene: 4.98954e-11 kg; data quality (3,2,1,4,1)
- phenanthrene: 4.30344e-11 kg; data quality (3,2,1,4,1)
- fluorene: 2.43481e-11 kg; data quality (3,2,1,4,1)
- nitrogen oxides: 1.3275e-6 kg; data quality (3,2,1,1,2)
- benzo(a)pyrene: 1.38753e-12 kg; data quality (3,2,1,4,1)
- Dibenz(a,h)anthracene: 2.56148e-14 kg; data quality (2,2,1,2,4)
- ethylene glycol: 2.15972e-8 kg; data quality (3,2,1,1,5)
- Ethane, 1,1,1,2-tetrafluoro-, HFC-134a: 1.50232e-9 kg; data quality (4,2,1,4,1)
- chlorine: 1.1763e-13 kg; data quality (4,2,1,1,5)
- hexane: 5.25728e-7 kg; data quality (3,2,1,1,5)
- carbonyl sulfide: 2.85779e-16 kg; data quality (4,2,1,1,5)
- t-butyl methyl ether: 5.32025e-13 kg; data quality (3,2,1,1,5)
- Phosphorus: 6.47181e-9 kg; data quality (2,1,1,1,5)
- 1,4-dioxane: 1.48829e-13 kg; data quality (4,2,1,1,5)
- acrylonitrile: 3.7298e-15 kg; data quality (4,2,1,1,5)
- ammonia: 3.90996e-9 kg; data quality (3,2,1,3,2)

## Inventory method
Input-output

## Modelling constants
The reference unit of all processes is 1 USD2013 of the good or service. The technosphere inputs are based on the US BEA detailed input-output tables for 2007. The IO tables are combined to develop a commodity-by-commodity model based on the the industry-technology assumption (see Suh et al., 2010), which assumes all commodities produced by a given industry have the same input structure, but that multiple industries can produce the same commodity. Thus, model technosphere flows represent commodity outputs (and not industry outputs) from other processes in the model. There are no by-products included in these processes. All commodity production is based on US-conditions, despite in reality that some goods and services are produced overseas, as USEEIO v1.1 is a single-region IO model.

## Completeness
The input-output approach assures that all purchased inputs associated with the sectors making these commodities as reported in the US census for 2007 are included. The direct resources extracted including minerals, energy sources, water and land occupied are included. Emissions to air include all critieria air pollutants, greenhouse gases, and hazardous and toxic air pollutants as defined by US EPA. Releases to water include toxics, total nitrogen and total phosphorus, and water discharges. Releases to soil or groundwater include toxics and agriculutural pesticides. Some metal releases to air, water and soil are not included because they could not be speciated. Solid hazardous and non-hazardous wastes generated are not included as an elementary flows although purchases of waste services are included.

## Data treatment
Greenhouse gases are primarily from the US Greenhouse Gas Emission Inventory (USEPA 2016a). Biogenic C uptake is not included (change from version 1.0), as biogenic C emission are not included. Toxic releases to air, water and soil (except pesticides) are from the 2013 Toxic Release Inventory (USEPA 2015a). Criteria air pollutants and hazardous air pollutants are from the 2011 National Emissions Inventory (USEPA 2015b). All estimates are normalized by industry based on sector output in the data year, then converted to 2013 USD using relative sector-specific CPIs (if data year is not 2013). Energy use represent raw renewables or fossil fuel energies and is based on EIA data for 2014. See Table 1 in Yang, Ingwersen et al. 2017 and Supporting Information 1, and the v1.1 data update notes (Ingwersen et al. 2017) for all details on environmental data sources used.Land occupation for commercial buildings was estimated based on the building floorspace data provided by the U.S. Energy Information Administration 2012 Commercial Building Energy Consumption Survey (CBECS) (EIA 2015). Total commercial public supply water use is reported by USGS (Maupin et al. 2014). Water use is allocated across commercial sectors based on their use of water, sewage, and other services in USD based on the 2007 Benchmark Use Table before redefinitions (BEA 2015).

## Data collection
2015-2016

## Sampling procedure
US federal government sources, including surveys and US EPA emissions databases are used as the primary sources. From these sources, data for US reporting establishments/facilities are aggregated by the NAICS sector as defined in the BEA detailed 2007 input-output tables. When level of sector aggregation differs, or when direct emissions are not reported but modeled, additional sources are used to make allocations and estimates.

## Review details
In regard to quality assurance and peer-review, each dataset created went through Quality Assurance as defined in a quality assurance project plans at US EPA, CSRA or ERG. The model was assembled with the IO model builder model (USEPA 2016c). Validation functions were used to check that all the model components were properly assembled and harmonized. Bayou Demeke and Santosh Ghimire provided internal peer review of the model methodology and the manuscript underwent standard EPA management review. An editor and two anonymous reviewers at the Journal of Cleaner Production reviewed the model. In regard to data quality evaluation, data quality assessment was performed at the flow and process levels according to the updated US EPA data quality assessment guidelines as defined in US EPA (2016b).

## Intended application
The primary application is for use in the US Environmentally-Extended Input-Ouput model, USEEIO, version 1.1. This model is being used by the US EPA for supporting tools that prioritize goods and services based on potential environmental impacts, resource use or emissions for large regions, including the US and US states, and as a strealined tool for organizations as a starting point to consider sustainable materials management. Model results are designed to provide meso/macro-level decision support.

## Project
USEEIO v1.1 was developed by the US EPA with CSRA and ERG with Wesley W. Ingwersen and David E. Meyer as research leads. Yi Yang was the technical lead on the work for CSRA (contract EP-C-15-012); Troy Hawkins was lead for ERG (contract EP-C-12-021).

## Sources
- USDA 2006
- Goebes et al. 2003
- USDA 2009a
- USEPA 2015b
- EIA 2013
- USEPA 2016c
- USDA 2009b
- USEPA 2015a
- Macknick et al. 2011
- USDA 2016
- USEPA 2016a
- BLM 2008
- BEA 2015
- Nickerson et al. 2011
- Blackhurst et al. 2010
- EIA 2017
- Ingwersen et al. 2017
- Maupin et al. 2014
- Edelen and Ingwersen 2017
- USDA 2014
- Lovelace 2009
- USGS 2015
- EIA 2015
- EIA 2016
- Kim et el. 2013
- USGS 2016
- USEPA 2016b
- Ingwersen et al. DRAFT
- Statistics Canada 2010
- Yienger et al. 1995
- Torcellini et al. 2003
