# Scientific research and development

Dataset: openLCA process, unit process
Category: 5417: Scientific Research and Development Services
Geography: United States
Time period: 2017-01-01 to 2017-12-31
Data quality: US EPA - Process Pedigree Matrix (1;1)
Exchange data quality scheme: US EPA - Flow Pedigree Matrix
Generated by: US EPA with CSRA and ERG
Owner: US EPA
Published in: Yang, Ingwersen et al. 2017
restrictionsDescription: This model shold be appropriately cited (see Yang, Ingwersen et al. 2017 source or Publication field) when used. Any changes or derivations of this model by the user should be documented. The model itself and any results from use of this model shall not be construed to consitute US EPA opinion or policy.
copyright: false

## General comment
BEA Code & Name is '541700:Scientific research and development services'. Description of the primary industry producing this good or service, adapted from the Census Bureau NAICS 2007 descriptions: This industry group comprises establishments engaged in conducting original investigation undertaken on a systematic basis to gain new knowledge (research) and/or the application of research findings or other scientific knowledge for the creation of new or significantly improved products or processes (experimental development). The industries within this industry group are defined on the basis of the domain of research; that is, on the scientific expertise of the establishment.

## Technology
The process describes the average US production of this good or service within this NAICS-based grouping defined in the BEA 2007 detailed input-output tables (BEA 2015). Distribution, wholesale and retailing of this good or service, use, and final disposal are not included. Creation of a product system with this process will enable modeling of all upstream (supply-chain) activities.

## Geography
Data represent the 50 US states

## Time period
2017 was the year in which this version of USEEIO was released and is the target date for the model

## Reference product
- Scientific research and development: 1 USD

## Inputs from technosphere
All rows: data quality (1,3,1,1,1)
- Cookies, crackers, pastas, and tortillas; at manufacturer: 1.02813e-5 USD
- Printing support; at manufacturer: 1.5422e-5 USD
- Cardboard containers; at manufacturer: 0.000164245 USD
- Truck transport: 0.00123773 USD
- Pesticides; at manufacturer: 1.79924e-5 USD
- Other nonmetallic mineral products; at manufacturer: 1.79975e-5 USD
- Other basic inorganic chemicals; at manufacturer: 0.000246776 USD
- Other transportation equipment; at manufacturer: 1.2852e-5 USD
- Hydraulic pumps, motors, cylinders and actuators; at manufacturer: 0.000128842 USD
- Polystyrene foam products; at manufacturer: 8.99666e-5 USD
- Machine shops; at manufacturer: 0.000441753 USD
- Carbon and graphite products; at manufacturer: 7.87087e-5 USD
- Sports: 5.9488e-5 USD
- Power tools; at manufacturer: 2.57034e-6 USD
- Wholesale trade: 0.00313648 USD
- Primary batteries; at manufacturer: 1.60968e-8 USD
- Scientific research and development: 0.0375501 USD
- Books; at publisher: 2.3133e-5 USD
- Fruit and vegetable preservation; at manufacturer: 1.28517e-5 USD
- Guided missiles and space vehicles; at manufacturer: 0.00216164 USD
- Distilleries and spirits; at manufacturer: 7.71101e-6 USD
- Surgical and medical instruments; at manufacturer: 2.57034e-5 USD
- Drinking water and wastewater treatment; at consumer: 9.95486e-5 USD
- Turbines and turbine generator sets; at manufacturer: 1.04455e-5 USD
- Sand, gravel, clay, phosphate, other nonmetallic minerals; at mine: 0.000120299 USD
- Seasonings and dressings; at manufacturer: 1.02813e-5 USD
- Computer systems design: 0.00119686 USD
- Chemicals (except basic chemicals, agrichemicals, polymers, paints, pharmaceuticals,soaps, cleaning compounds); at manufacturer: 0.000475065 USD
- Motor vehicle steering, suspension components (except spring), and brake systems; at manufacturer: 8.5394e-5 USD
- Greenhouse crops, mushrooms, nurseries, and flowers; at farm: 1.29248e-7 USD
- Management consulting: 0.0483343 USD
- Air purification and ventilation equipment; at manufacturer: 4.62661e-5 USD
- Environmental and other technical consulting services: 0.00515009 USD
- Packaged meat (except poultry); at manufacturer: 7.9683e-5 USD
- Light gauge metal cans, boxes, and containers; at manufacturer: 7.77398e-6 USD
- Other rubber products; at manufacturer: 0.000675405 USD
- Speed changers, industrial high-speed drives, and gears; at manufacturer: 5.14735e-5 USD
- Securities and commodities brokerage and exchanges: 0.000293068 USD
- Other animal food; at manufacturer: 0.000321292 USD
- Heating equipment other than warm air furnaces; at manufacturer: 2.57034e-5 USD
- Vehicle electrical and electronic equipment; at manufacturer: 0.00023928 USD
- Metal hinges, keys, lock, and other hardware; at manufacturer: 0.000177072 USD
- Lawn and garden equipment; at manufacturer: 3.34144e-5 USD
- Mineral wool; at manufacturer: 2.57156e-5 USD
- Secondary copper products; at manufacturer: 2.20787e-5 USD
- Telecommunications: 0.00128078 USD
- Other secondary nonferrous metal products; at manufacturer: 0.000153442 USD
- Analytical laboratory instruments; at manufacturer: 1.28617e-5 USD
- Transmission and power train parts; at manufacturer: 0.000242022 USD
- Fertilizers; at manufacturer: 2.82744e-5 USD
- Vehicle metal stamping; at manufacturer: 0.000293156 USD
- Timber and raw forest products; at forest: 1.29838e-5 USD
- Electronic capacitors, resistors, coils, transformers, connectors and other components (except semiconductors and printed circuit assemblies); at manufacturer: 0.00106918 USD
- Specialized design: 0.000253127 USD
- Leather; at manufacturer: 5.88546e-11 USD
- Household goods repair: 0.000571488 USD
- Blood sugar, pregnancy, and other diagnostic test kits; at manufacturer: 2.57034e-6 USD
- Iron, gold, silver, and other metal ores; at mine: 0.000257035 USD
- Paints and coatings; at manufacturer: 7.29535e-5 USD
- Concrete pipe, bricks, and blocks; at manufacturer: 5.14067e-5 USD
- Warehousing: 0.000312709 USD
- Other retail: 4.25343e-5 USD
- Construction machinery; at manufacturer: 4.62661e-5 USD
- Industrial process variable instruments; at manufacturer: 2.9348e-5 USD
- Plastic bottles; at manufacturer: 7.71101e-6 USD
- Metal pipe fittings, ball and roller bearings, industrial patterns, metal bath fixtures, other misc. fabricated metals; at manufacturer: 0.000131186 USD
- Audio and video equipment; at manufacturer: 5.25241e-6 USD
- Metal coatings, engravings, and heat treatments; at manufacturer: 0.000112906 USD
- Synthetic rubber and artificial and synthetic fibers; at manufacturer: 3.22979e-5 USD
- Veterinarians: 0.000187635 USD
- Material handling equipment; at manufacturer: 1.03029e-5 USD
- Laminated plastic plates and shapes; at manufacturer: 1.05307e-5 USD
- Full-service restaurants: 0.00115383 USD
- Soap and cleaning compounds; at manufacturer: 0.000164514 USD
- Automatic controls for HVAC and refrigeration equipment; at manufacturer: 5.14067e-6 USD
- Snack foods; at manufacturer: 1.5422e-5 USD
- Software: 0.000604454 USD
- Limited-service restaurants: 0.000723375 USD
- Books, newspapers, magazines, and other print media; at manufacturer: 0.000514069 USD
- Water transport (boats, ships, ferries): 0.00236021 USD
- Other aircraft parts; at manufacturer: 0.00201921 USD
- Pipeline transport: 8.10972e-6 USD
- Other support services: 0.000782275 USD
- Wood kitchen cabinets and countertops; at manufacturer: 3.0844e-5 USD
- Hotels and campgrounds: 0.000871452 USD
- Food and beverage stores: 2.57141e-6 USD
- Electricity; at consumer: 0.00390544 USD
- Passenger ground transport: 0.000460466 USD
- Other primary nonferrous metals; at manufacturer: 3.02598e-5 USD
- Vehicle engines and engine parts; at manufacturer: 6.62771e-5 USD
- Metal plumbing drains, faucets, valves, and other fittings; at manufacturer: 4.11254e-5 USD
- Waste management and remediation: 0.00148312 USD
- Fresh fruits and tree nuts; at farm: 2.57034e-6 USD
- Watches, clocks, and other measuring and controlling devices; at manufacturer: 0.000189571 USD
- Commercial equipment rental: 0.000268637 USD
- Cardboard; at manufacturer: 0.000220087 USD
- Propulsion units and parts for space vehicles and guided missiles; at manufacturer: 0.00110592 USD
- Clay and ceramic products; at manufacturer: 6.68339e-5 USD
- Clothing; at manufacturer: 0.000167074 USD
- Metal structural products; at manufacturer: 0.000527946 USD
- Synthetic dyes and pigments; at manufacturer: 6.16245e-5 USD
- Air transport: 0.0012285 USD
- Investigation and security: 0.000483825 USD
- Lumber and treated lumber; at manufacturer: 8.52054e-5 USD
- Rubber and plastic belts and hoses; at manufacturer: 1.926e-7 USD
- Telephones; at manufacturer: 1.11559e-7 USD
- Insurance agencies and brokerages: 0.000303807 USD
- Pet care, photofinishing, parking and other sundry services: 0.000560333 USD
- Marketing research and all other miscellaneous professional, scientific, and technical services: 0.0212405 USD
- Primary copper; at manufacturer: 4.39125e-5 USD
- Satellite, telecommunications resellers, and all other telecommunications: 0.000199611 USD
- Civic, social, professional, and similar organizations: 0.00262735 USD
- Newspapers; at publisher: 2.57034e-5 USD
- Fluid meters and counting devices; at manufacturer: 7.19696e-5 USD
- Packaged poultry; at manufacturer: 1.5422e-5 USD
- Light fixtures; at manufacturer: 0.000221049 USD
- Ammunition, arms, ordnance, and related accessories; at manufacturer: 5.80529e-6 USD
- Architectural, engineering, and related services: 0.0314927 USD
- Agriculture and forestry support: 0.000167072 USD
- Computer storage device readers; at manufacturer: 2.41843e-6 USD
- Metal cutting and forming machine tools; at manufacturer: 6.00217e-9 USD
- Other plastic products; at manufacturer: 0.00111835 USD
- Secondary steel products; at manufacturer: 4.84585e-8 USD
- Storage batteries; at manufacturer: 9.25321e-5 USD
- Semiconductors; at manufacturer: 0.000559765 USD
- External hard drives, CDs, other storage media; at manufacturer: 4.11302e-5 USD
- Wooden windows, door, and flooring; at manufacturer: 9.25562e-5 USD
- Air conditioning, refrigeration, and warm air heating equipment; at manufacturer: 4.16749e-5 USD
- Cattle ranches and feedlots: 0.000118235 USD
- Monetary authorities and depository credit intermediation: 0.0184462 USD
- All other forging, stamping, and sintering; at manufacturer: 0.000144063 USD
- Ink and ink cartridges; at manufacturer: 5.14239e-6 USD
- Other textiles; at manufacturer: 0.000136228 USD
- Scenic and sightseeing transportation and support activities for transportation: 0.00295589 USD
- Directory, mailing list, and other publishers; at publisher: 0.000110524 USD
- All other food and drinking places: 0.000576317 USD
- Travel trailer and campers; at manufacturer: 1.28517e-5 USD
- Company and enterprise management: 0.0152106 USD
- Office supplies (not paper); at manufacturer: 7.71108e-6 USD
- Semiconductor machinery; at manufacturer: 6.68288e-5 USD
- Electronic equipment repair and maintenance: 0.00435636 USD
- Electromedical appartuses; at manufacturer: 2.5794e-6 USD
- Other concrete products; at manufacturer: 8.99633e-5 USD
- Lime and gypsum products; at manufacturer: 4.36957e-5 USD
- Travel arrangement and reservation: 0.00153706 USD
- Wiring devices; at manufacturer: 0.000150052 USD
- Dairies: 5.14067e-6 USD
- Metal windows, doors, and architectural products; at manufacturer: 0.000248052 USD
- Finished and coated fabric; at manufacturer: 7.71897e-5 USD
- Medicinal and botanical ingredients; at manufacturer: 3.34144e-5 USD
- Flavored drink concentrates; at manufacturer: 9.25321e-5 USD
- Shelving and lockers; at manufacturer: 5.39771e-5 USD
- Specialty transformers; at manufacturer: 1.12319e-5 USD
- Special tools, dies, jigs, and fixtures; at manufacturer: 6.23693e-8 USD
- Optical instruments and lenses; at manufacturer: 6.93991e-5 USD
- Other engine equipment; at manufacturer: 4.3849e-5 USD
- Farm machinery and equipment; at manufacturer: 0.000398402 USD
- Consumer goods and general rental centers: 6.0769e-5 USD
- General merchandise stores: 8.03155e-6 USD
- Coal; at mine: 0.000258613 USD
- Paper bags and coated paper; at manufacturer: 0.000103948 USD
- Business support: 0.00361095 USD
- All other foods; at manufacturer: 1.28517e-5 USD
- Photographers: 0.000146509 USD
- Other support activities for mining: 7.19694e-5 USD
- Asphalt pavement; at manufacturer: 2.57034e-5 USD
- Couriers and messengers: 0.000447239 USD
- Printed circuit and electronic assembly; at manufacturer: 7.47006e-5 USD
- Animal farms and aquaculture ponds (except cattle and poultry): 0.000344427 USD
- Signal testing instruments; at manufacturer: 8.64047e-7 USD
- Switchgear and switchboards; at manufacturer: 3.85608e-5 USD
- Toiletries; at manufacturer: 7.96804e-5 USD
- Light bulbs; at manufacturer: 7.71155e-6 USD
- Petrochemicals; at manufacturer: 4.40861e-5 USD
- Employment services: 0.0120832 USD
- Noncomparable imports: 0.000762468 USD
- State and local government enterprises: 0.000767357 USD
- Nonresidential building repair and maintanence: 0.00054516 USD
- Industrial molds; at manufacturer: 2.31814e-5 USD
- Promoters and agents: 3.35674e-5 USD
- Magazines and journals; at publisher: 0.0011265 USD
- Ball and roller bearings; at manufacturer: 5.83789e-5 USD
- Motors and generators; at manufacturer: 8.00754e-5 USD
- News syndicates, libraries, archives, Internet publishing and all other information services: 0.000346995 USD
- Frozen food; at manufacturer: 1.5422e-5 USD
- Industrial process furnaces and ovens; at manufacturer: 2.07218e-9 USD
- Mining and oil/gas field machinery; at manufacturer: 1.28517e-5 USD
- Compressed Gases; at manufacturer: 0.000218953 USD
- Office machinery; at manufacturer: 1.02813e-5 USD
- Packaging machinery; at manufacturer: 2.57034e-6 USD
- Soft drinks, bottled water, and ice; at manufacturer: 2.3133e-5 USD
- Golf courses, marinas, ski resorts, fitness and other rec centers and industries: 0.000178334 USD
- Air and gas compressors; at manufacturer: 1.02813e-5 USD
- Fluid milk and butter; at manufacturer: 5.14067e-6 USD
- Communication and energy wire and cable; at manufacturer: 0.00014684 USD
- Gaskets, seals, musical instruments, fasteners, brooms, brushes, mop and other misc. goods; at manufacturer: 0.000117921 USD
- Plastics; at manufacturer: 1.01962e-6 USD
- Valve and fittings (except for plumbing); at manufacturer: 0.000515778 USD
- Cutting and machine tool accessory, rolling mill, and other metalworking machines; at manufacturer: 3.2126e-5 USD
- Cutlery and handtools; at manufacturer: 0.000108445 USD
- Copper, nickel, lead, and zinc; at mine: 8.00916e-5 USD
- Other vehicle parts; at manufacturer: 0.0004298 USD
- Pharmaceutical products (pills, powders, solutions, etc.); at manufacturer: 0.000210768 USD
- Aluminum products; at manufacturer: 8.56437e-5 USD
- Urethane and other foam products; at manufacturer: 6.46306e-5 USD
- Wineries and wine; at manufacturer: 1.02813e-5 USD
- Wireless telecommunications: 0.000570675 USD
- Dry-cleaning and laundry: 0.000226939 USD
- Springs and wires; at manufacturer: 0.000259389 USD
- Rubber tires; at manufacturer: 3.59849e-5 USD
- Wood pulp; at manufacturer: 5.14067e-6 USD
- Surgical appliance and supplies; at manufacturer: 0.000264745 USD
- Investment advice, portfolio management, and other financial advising services: 0.00221665 USD
- Unrefined oil and gas; at extraction site: 3.35662e-5 USD
- Buildings and dwellings services: 0.00163925 USD
- Movies and film: 1.79924e-5 USD
- Nondepository credit intermediation and related activities: 0.000355662 USD
- Heavy gauge metal tanks; at manufacturer: 7.71937e-6 USD
- Fiber, yarn, and thread; at manufacturer: 3.87014e-8 USD
- Abrasive products; at manufacturer: 2.8e-5 USD
- Lids, jars, bottle caps, other metal closures and crowns; at manufacturer: 5.52939e-5 USD
- Custom metal rolls; at manufacturer: 6.1424e-6 USD
- Home furniture - Cabinets and non-wood, nonupholstered; at manufacturer: 4.93607e-6 USD
- Performances: 2.33005e-5 USD
- Power boilers and heat exchangers; at manufacturer: 3.08533e-5 USD
- Accounting, tax preparation, bookkeeping, and payroll: 0.00400818 USD
- Cast iron and steel; at manufacturer: 3.87328e-5 USD
- Plastic bags, films, and sheets; at manufacturer: 1.56181e-5 USD
- Insurance carriers: 0.00266973 USD
- Other petroleum and coal products; at manufacturer: 7.49176e-5 USD
- Rail transport: 0.000316269 USD
- Facilities support: 0.000657295 USD
- Fresh wheat, corn, rice, and other grains; at farm: 0.000174783 USD
- Vaccines and other biological medical products; at manufacturer: 0.000143939 USD
- Corn products; at manufacturer: 1.02813e-5 USD
- Computer terminals and other computer peripheral equipment; at manufacturer: 0.000408245 USD
- Lessors of nonfinancial intangible assets: 0.00935236 USD
- Nonferrous metal casts; at manufacturer: 4.73722e-5 USD
- Ophthalmic goods; at manufacturer: 5.08016e-10 USD
- Data processing and hosting: 0.0022253 USD
- Vehicle rental and leasing: 0.000582929 USD
- Cut stone and stone products; at manufacturer: 4.62661e-5 USD
- Natural gas; at consumer: 0.000315962 USD
- Navigation instruments; at manufacturer: 0.000193852 USD
- Relay and industrial controls; at manufacturer: 3.96631e-5 USD
- Commercial machinery repair: 0.000971826 USD
- Fabricated pipe and pipe fittings; at manufacturer: 3.79388e-5 USD
- Primary iron, steel, and ferroalloy products; at manufacturer: 0.000662347 USD
- Custom computer programming: 1.29887e-5 USD
- Ready-mix concrete; at manufacturer: 0.000205627 USD
- Adhesives; at manufacturer: 8.44498e-7 USD
- Paper; at manufacturer: 1.54597e-5 USD
- Aircraft; at manufacturer: 0.000227956 USD
- Vending, commercial laundry, and other commercial and service industry machinery; at manufacturer: 1.38204e-6 USD
- Gasoline, fuels, and by-products of petroleum refining; at manufacturer: 0.00101388 USD
- Machinery for the paper, textile, food or other industries (except semiconductor machinery); at manufacturer: 4.88364e-5 USD
- Dry, condensed, and evaporated dairy; at manufacturer: 2.57034e-6 USD
- Other real estate: 0.096397 USD
- Military armored vehicles and tanks; at manufacturer: 0.00284279 USD
- Welding and Soldering Equipment, Scales and Balances, and other general purpose machinery; at manufacturer: 2.20784e-5 USD
- Aluminum; at manufacturer: 4.92298e-5 USD
- Vehicle repair: 0.000490878 USD
- Ice cream and frozen desserts; at manufacturer: 1.28517e-5 USD
- Seafood; at manufacturer: 1.79924e-5 USD
- other miscellaneous electrical equipment and components; at manufacturer: 1.03248e-5 USD
- Pumps and pumping equipment; at manufacturer: 2.57034e-5 USD
- Sugar, candy, and chocolate; at manufacturer: 2.57034e-6 USD
- Vehicle seating and interior trim (upholstery); at manufacturer: 3.27097e-5 USD
- Other computer related services, including facilities management: 0.00211334 USD
- Asphalt shingles; at manufacturer: 7.71101e-6 USD
- Fabric; at manufacturer: 3.3476e-5 USD
- Independent artists, writers, and performers: 0.000113963 USD
- Tobacco, cotton, sugarcane, peanuts, sugar beets, herbs and spices, and other crops; at farm: 5.14067e-5 USD
- Internet publishing and broadcasting: 0.00068885 USD
- Cement; at manufacturer: 1.28517e-5 USD
- Vehicles and parts sales: 5.55772e-5 USD
- Legal services: 0.0513043 USD
- Screws, nuts, and bolts; at manufacturer: 9.41719e-5 USD
- Ground or treated minerals and earth; at manufacturer: 3.25082e-8 USD
- Postal service: 0.000548402 USD
- Computers; at manufacturer: 2.54724e-7 USD
- Poultry farms: 7.71101e-6 USD
- Cheese; at manufacturer: 1.02813e-5 USD
- Glass and glass products; at manufacturer: 0.000969031 USD
- Used and secondhand goods: 7.30215e-10 USD
- Wild-caught fish and game; at place of capture: 1.79924e-5 USD
- Carpets and rugs; at manufacturer: 4.27366e-5 USD
- Veneer, plywood, and engineered wood; at manufacturer: 4.14554e-5 USD
- Communications equipment; at manufacturer: 1.79924e-5 USD
- Plywood and veneer; at manufacturer: 2.61347e-5 USD
- Advertising and public relations: 0.00749843 USD
- Mechanical power transmission equipment; at manufacturer: 6.71299e-5 USD
- Dimensional stone; at mine: 5.65474e-5 USD
- Irradiation apparatuses; at manufacturer: 5.14156e-6 USD
- Wireless communications; at manufacturer: 0.00037317 USD
- Aircraft engines and parts; at manufacturer: 0.00186322 USD
- Office administration: 0.00474558 USD
- Plastic pipe, fittings, and sausage casings; at manufacturer: 0.000131147 USD
- Other basic organic chemicals; at manufacturer: 0.000607983 USD

## Inputs from nature
- Water, saline: 4.53847e-7 m3; data quality (4,2,1,4,2)
- Water, fresh: 0.00010451, 5.85084e-5 m3 (2 entries, compartments not in this file); data quality (1,2,1,4,2)
- Energy, wind: 1.14933e-5 MJ; data quality (3,1,1,1,1)
- Occupation, industrial area, built up: 8.83447e-6 m2*a; data quality (4,2,1,1,1)
- Occupation, industrial area: 2.65034e-5 m2*a; data quality (4,2,1,1,1)
- Energy, solar: 0.00177543 MJ; data quality (3,1,1,1,1)
- Occupation, urban, discontinuously built: 0.000584023 m2*a; data quality (4,2,1,1,1)

## Emissions to nature
- biphenyl: 1.99187e-13 kg; data quality (4,2,1,1,4)
- anthracene: 1.26249e-11 kg; data quality (3,2,1,4,1)
- Hydrazine: 3.7004e-13 kg; data quality (4,2,1,1,5)
- formaldehyde: 3.42278e-8 kg; data quality (3,2,1,3,2)
- PHOSPHORUS: 3.967e-11 kg; data quality (2,2,1,1,5)
- dibenzofuran: 2.26913e-15 kg; data quality (4,2,1,1,5)
- Ethane, 1,1,1,2-tetrafluoro-, HFC-134a: 9.01458e-8 kg; data quality (4,2,1,4,1)
- Ethene, chloro-: 8.22902e-12 kg; data quality (3,2,1,1,5)
- 2-Mercaptobenzothiazole: 3.9197e-16, 6.53283e-16, 5.04726e-14 kg (3 entries, compartments not in this file); data quality (3,1,1,1,5)
- Chrysene, 5-methyl-: 1.45758e-19 kg; data quality (2,2,1,1,5)
- Chromium VI: 3.60862e-10 kg; data quality (3,2,1,1,5)
- 1-Methyl-2-pyrrolidinone: 1.19479e-9 kg; data quality (5,1,1,1,5)
- hydrogen sulfide: 8.83007e-11 kg; data quality (3,1,1,1,5)
- acetonitrile: 7.9972e-10 kg; data quality (3,2,1,1,5)
- Nickel, ion: 4.06709e-20 kg; data quality (3,2,1,1,5)
- 1,2,4-trimethylbenzene: 8.27924e-11 kg; data quality (5,1,1,1,5)
- chromium: 2.86577e-12, 2.03499e-11, 2.03123e-10 kg (3 entries, compartments not in this file); data quality (4,1,1,1,5)
- 2-METHOXYETHANOL: 3.20248e-11 kg; data quality (4,2,1,1,4)
- ETHYLENETHIOUREA: 1.38317e-15 kg; data quality (5,2,1,1,5)
- cadmium: 3.03855e-11 kg; data quality (3,2,1,1,5)
- Hexachlorocyclopentadiene: 1.25676e-16 kg; data quality (3,2,1,1,5)
- antimony: 2.39981e-13, 6.7224e-14 kg (2 entries, compartments not in this file); data quality (2,1,1,1,5)
- methanol: 1.06332e-8 kg; data quality (4,2,1,1,4)
- Thiophanat-methyl: 1.72589e-14 kg; data quality (4,1,1,1,5)
- hexachloro-1,3-butadiene: 5.64188e-17 kg; data quality (4,2,1,1,5)
- methane, chlorodifluoro-, hcfc-22: 1.18076e-12 kg; data quality (4,1,1,1,5)
- 2,4-dinitrophenol: 3.19465e-17 kg; data quality (5,2,1,1,5)
- methane, dichloro-, hcc-30: 5.38077e-9 kg; data quality (4,2,1,1,5)
- trifluralin: 1.6282e-14 kg; data quality (4,1,1,1,5)
- phenanthrene: 5.58502e-11 kg; data quality (3,2,1,4,1)
- 1,2,4-trichlorobenzene: 1.24052e-17 kg; data quality (3,2,1,1,5)
- N,N-DIMETHYLANILINE: 2.53627e-12 kg; data quality (5,2,1,1,4)
- 2,3,4'-TRICHLOROBIPHENYL: 2.47217e-22 kg; data quality (2,2,1,1,5)
- 2-methylnaphthalene: 4.92681e-13 kg; data quality (2,2,1,1,5)
- arsenic: 1.79419e-11 kg; data quality (3,2,1,2,4)
- carbon tetrachloride: 1.71269e-11 kg; data quality (4,2,1,1,4)
- Thiram: 3.49376e-14, 6.53283e-16, 1.0463e-13 kg (3 entries, compartments not in this file); data quality (4,1,1,1,5)
- carbon monoxide: 3.04524e-5 kg; data quality (3,2,1,1,2)
- BENEFIN: 4.0705e-14 kg; data quality (5,1,1,1,5)
- Nitrogen: 1.85395e-7 kg; data quality (4,2,1,1,5)
- diethanolamine: 7.63063e-10 kg; data quality (3,2,1,1,4)
- Vinyl acetate: 3.26641e-16 kg; data quality (4,1,1,1,5)
- silver: 2.24092e-15 kg; data quality (4,1,1,1,5)
- phenol: 5.20288e-16 kg; data quality (3,1,1,1,5)
- tertiary-Butyl Acetate: 5.79924e-9 kg; data quality (3,2,1,1,4)
- ethane, 1,2-dibromo-: 7.7303e-14 kg; data quality (2,2,1,1,4)
- VOC, volatile organic compounds: 2.77081e-6 kg; data quality (3,2,1,1,3)
- Asbestos: 4.39052e-13 kg; data quality (5,2,1,1,4)
- manganese: 4.45075e-10 kg; data quality (3,2,1,1,4)
- NITRIC ACID: 1.09949e-14 kg; data quality (3,1,1,1,4)
- nickel: 8.96864e-12 kg; data quality (4,1,1,1,5)
- ethylene glycol: 1.03433e-9 kg; data quality (5,2,1,1,4)
- ethane, 1,1,2-trichloro-: 1.76208e-12 kg; data quality (4,2,1,1,4)
- acrylic acid: 3.4484e-12 kg; data quality (4,2,1,1,4)
- diisocyanates: 4.65444e-10 kg; data quality (4,1,1,1,5)
- NITROGLYCERIN: 6.26508e-12 kg; data quality (5,1,1,1,5)
- pentachlorophenol: 1.8101e-17 kg; data quality (3,2,1,1,5)
- fluorene: 3.08147e-11 kg; data quality (3,2,1,4,1)
- Aluminum: 7.96106e-12 kg; data quality (4,1,1,1,5)
- particulates, < 2.5 um: 5.43716e-7 kg; data quality (3,2,1,2,4)
- Nitrobenzene: 1.27175e-17 kg; data quality (4,2,1,1,5)
- butanol: 6.26092e-12 kg; data quality (5,1,1,1,5)
- Hydrazine, methyl-: 1.55478e-12 kg; data quality (2,2,1,1,5)
- isophorone: 7.1209e-12 kg; data quality (2,2,1,1,5)
- 4-aminobiphenyl: 2.58867e-20 kg; data quality (5,2,1,1,5)
- ammonia: 6.87769e-12 kg; data quality (3,1,1,1,4)
- BETA-PROPIOLACTONE: 3.71021e-14 kg; data quality (5,2,1,1,4)
- Benzo(b)fluoranthene: 1.90507e-12 kg; data quality (3,2,1,4,1)
- Ethane, pentafluoro-, HFC-125: 2.39169e-8 kg; data quality (4,2,1,4,1)
- benzene, chloro-: 1.16853e-11 kg; data quality (4,2,1,1,4)
- nickel: 1.70688e-12 kg; data quality (4,1,1,1,4)
- 1,1-DIMETHYL HYDRAZINE: 2.30135e-13 kg; data quality (5,2,1,1,5)
- Benzo(k)fluoranthene: 1.85086e-12 kg; data quality (3,2,1,4,1)
- arsenic: 3.38864e-13 kg; data quality (2,1,1,1,5)
- 2,4,5-trichlorophenol: 9.05625e-19 kg; data quality (2,2,1,1,5)
- n-nitrosodimethylamine: 1.37131e-16 kg; data quality (5,2,1,1,5)
- acetophenone: 6.08354e-13 kg; data quality (4,2,1,1,5)
- lead: 4.35118e-9, 9.75295e-12 kg (2 entries, compartments not in this file); data quality (3,1,1,1,5)
- chlorine: 2.79739e-11 kg; data quality (4,2,1,1,5)
- Cresol: 2.74822e-13 kg; data quality (4,2,1,1,5)
- cyanide: 1.75887e-10 kg; data quality (2,2,1,1,5)
- ALUMINUM OXIDE: 1.83141e-15 kg; data quality (5,1,1,1,5)
- phthalate, dioctyl-: 1.12679e-11 kg; data quality (3,2,1,1,5)
- monochloroethane: 6.8913e-13 kg; data quality (3,2,1,1,5)
- styrene: 2.64507e-9 kg; data quality (4,2,1,2,3)
- Cobalt: 8.28694e-14 kg; data quality (4,1,1,1,4)
- Pendimethalin: 5.5196e-14 kg; data quality (5,1,1,1,5)
- polychlorinated biphenyls: 1.02223e-14 kg; data quality (3,2,1,1,5)
- BUTYL ISOCYANATE: 1.02009e-10 kg; data quality (4,2,1,1,5)
- TERT-BUTYL ALCOHOL: 6.93986e-12, 4.21264e-14 kg (2 entries, compartments not in this file); data quality (4,1,1,1,5)
- Carbaryl: 4.0705e-14 kg; data quality (5,1,1,1,5)
- 4-nitrophenol: 3.65568e-12 kg; data quality (2,2,1,1,4)
- benzene: 4.45631e-8 kg; data quality (3,2,1,4,1)
- benzene, ethyl-: 2.228e-8 kg; data quality (3,2,1,3,2)
- Triethyl amine: 1.3176e-10 kg; data quality (3,2,1,1,4)
- cumene: 3.04741e-11 kg; data quality (4,2,1,1,4)
- hydrogen chloride: 1.21113e-7 kg; data quality (2,2,1,1,4)
- aniline: 7.8147e-14 kg; data quality (4,2,1,1,4)
- pyrene: 2.13189e-11 kg; data quality (3,2,1,4,1)
- 4,4'-METHYLENEBIS(2-CHLOROANALINE): 1.03574e-13 kg; data quality (5,2,1,1,5)
- toluene: 2.87354e-10, 1.60625e-16 kg (2 entries, compartments not in this file); data quality (5,1,1,1,5)
- particulates, < 10 um: 5.98458e-8 kg; data quality (3,2,1,1,4)
- Phthalate, dibutyl-: 8.68379e-11 kg; data quality (4,2,1,1,4)
- 2,2-BIS(4-HYDROXY-3,5-DIBROMOPHENYL)PROPANE: 2.32532e-11, 5.33332e-14 kg (2 entries, compartments not in this file); data quality (5,1,1,1,5)
- p-cresol: 9.05625e-19 kg; data quality (4,2,1,1,5)
- nitrogen oxides: 4.6626e-6 kg; data quality (2,2,1,1,4)
- ethylbenzene: 2.46089e-9 kg; data quality (4,1,1,1,5)
- Benzo(g,h,i)perylene: 9.18624e-11 kg; data quality (3,2,1,1,5)
- propanal: 2.36949e-9 kg; data quality (3,2,1,4,1)
- phenol: 1.04177e-9 kg; data quality (4,2,1,1,5)
- acrolein: 1.49187e-9 kg; data quality (3,2,1,3,3)
- trichloroethylene: 1.6101e-8 kg; data quality (4,2,1,1,4)
- m-xylene: 5.06182e-9 kg; data quality (3,2,1,2,3)
- selenium: 2.47232e-11 kg; data quality (2,2,1,1,5)
- nitric acid: 2.74872e-14 kg; data quality (3,1,1,1,4)
- methylene diphenyl diisocyanate: 7.1048e-10 kg; data quality (4,2,1,1,4)
- Dimethyl sulfate: 4.38997e-13 kg; data quality (2,2,1,1,5)
- DNOC: 9.05625e-19 kg; data quality (2,2,1,1,5)
- hexachloroethane: 5.85047e-12 kg; data quality (4,2,1,1,4)
- acetaldehyde: 1.14359e-8 kg; data quality (3,2,1,4,1)
- Benzo(a)anthracene: 8.64858e-15 kg; data quality (2,2,1,1,5)
- 2,4,6-trichlorophenol: 1.03801e-18 kg; data quality (2,2,1,1,5)
- mercury: 1.04158e-13 kg; data quality (3,1,1,1,5)
- Chrysene: 3.1299e-12 kg; data quality (3,2,1,3,3)
- 2-chloro-1-phenylethanone: 6.40259e-14 kg; data quality (2,2,1,1,5)
- hexachlorobenzene: 2.85789e-17 kg; data quality (3,2,1,1,4)
- Propene, 1,3-dichloro-: 3.84236e-14 kg; data quality (3,2,1,1,4)
- ethylene oxide: 2.50804e-13 kg; data quality (3,2,1,1,5)
- hexane: 1.00334e-7 kg; data quality (3,2,1,1,4)
- Phenol: 8.93682e-11 kg; data quality (3,1,1,1,5)
- maleic anhydride: 4.94723e-14 kg; data quality (2,2,1,1,4)
- sulfur dioxide: 4.59129e-7 kg; data quality (2,2,1,1,5)
- HALON 1301: 6.9581e-11 kg; data quality (5,1,1,1,5)
- Propane, 1,2-dichloro-: 4.01743e-13 kg; data quality (4,2,1,1,5)
- benzo(a)pyrene: 1.94433e-12 kg; data quality (3,2,1,4,1)
- Ethylene glycol monoethyl ether: 5.45743e-13, 4.2758e-11 kg (2 entries, compartments not in this file); data quality (5,1,1,1,5)
- ethyl acrylate: 5.55033e-12 kg; data quality (4,2,1,1,4)
- Phthalate, dioctyl-: 1.30937e-12, 1.12365e-15 kg (2 entries, compartments not in this file); data quality (4,1,1,1,5)
- methyl isobutyl ketone: 1.5171e-8 kg; data quality (4,2,1,1,4)
- Sulfuric acid: 5.57651e-13 kg; data quality (2,1,1,1,5)
- propylene oxide: 2.15092e-10 kg; data quality (3,2,1,1,5)
- Ethane, 1,1,1-trifluoro-, HFC-143a: 1.0233e-8 kg; data quality (4,2,1,4,1)
- 1,1-DICHLOROETHYLENE: 1.10577e-11 kg; data quality (3,2,1,1,4)
- benzidine: 9.61227e-17 kg; data quality (2,2,1,1,5)
- copper: 4.36489e-11, 3.30648e-10, 4.82929e-12 kg (3 entries, compartments not in this file); data quality (4,1,1,1,5)
- manganese: 6.14537e-16 kg; data quality (4,1,1,1,5)
- antimony: 8.86412e-11 kg; data quality (3,2,1,1,5)
- Indeno(1,2,3-cd)pyrene: 1.53041e-12 kg; data quality (3,2,1,4,1)
- hydroquinone: 4.67609e-12 kg; data quality (3,2,1,1,4)
- ethene, tetrachloro-: 3.14653e-8 kg; data quality (3,2,1,1,4)
- toluene, 2,4-dinitro-: 2.56372e-15 kg; data quality (5,2,1,1,5)
- Chromium, ion: 5.63935e-10 kg; data quality (2,2,1,1,5)
- epichlorohydrin: 1.27159e-10 kg; data quality (3,2,1,1,4)
- ammonia: 6.0648e-8 kg; data quality (3,2,1,1,5)
- NITROMETHANE: 3.98289e-11 kg; data quality (5,1,1,1,4)
- Propane, 1,1,1,3,3,3-hexafluoro-, HCFC-236fa: 2.76448e-10 kg; data quality (4,2,1,4,1)
- bis(2-chloroethyl)ether: 1.13281e-18 kg; data quality (3,2,1,1,5)
- Methane: 2.3239e-7 kg; data quality (4,2,1,4,1)
- Decabromodiphenyl oxide: 1.19938e-13 kg; data quality (4,1,1,1,5)
- cyclohexane: 1.73727e-10, 3.86967e-11 kg (2 entries, compartments not in this file); data quality (4,1,1,1,5)
- mercury: 1.17701e-11 kg; data quality (2,2,1,1,5)
- Dinitrogen monoxide: 7.92278e-9 kg; data quality (4,2,1,4,1)
- 2-nitropropane: 6.90091e-13 kg; data quality (5,2,1,1,4)
- Xylene: 6.55446e-8 kg; data quality (3,2,1,4,1)
- ETHENE: 1.01415e-9 kg; data quality (3,1,1,1,5)
- dicyclopentadiene: 1.15286e-16 kg; data quality (4,1,1,1,5)
- 2-ethoxyethyl acetate: 7.99646e-11 kg; data quality (4,2,1,1,4)
- Ethene, trichloro-: 7.30126e-14 kg; data quality (5,1,1,1,5)
- ETHYLENETHIOUREA: 6.53283e-17 kg; data quality (2,1,1,1,5)
- Diethylene glycol butyl ether: 1.11208e-11 kg; data quality (3,2,1,1,5)
- vinyl acetate: 1.85368e-11 kg; data quality (4,2,1,1,5)
- methane, monochloro-, r-40: 4.85232e-12 kg; data quality (3,2,1,1,5)
- NITROUS ACID: 3.53888e-13, 3.48467e-13 kg (2 entries, compartments not in this file); data quality (5,1,1,1,5)
- methanol: 1.52388e-10 kg; data quality (3,1,1,1,5)
- 1,1,1-trichloroethane: 1.60792e-9 kg; data quality (4,2,1,1,4)
- chloroform: 1.7597e-10 kg; data quality (4,2,1,1,5)
- Dinitrotoluene, technical grade (2,4 (77%)- and 2,6 (19%)-): 7.84737e-18 kg; data quality (5,1,1,1,5)
- hydrogen fluoride: 3.5786e-9 kg; data quality (2,2,1,1,4)
- acrylonitrile: 8.80039e-14 kg; data quality (4,2,1,1,5)
- manganese: 1.46801e-12 kg; data quality (4,1,1,1,4)
- Zinc: 1.87078e-12 kg; data quality (5,1,1,1,5)
- o-toluidine: 2.89071e-16 kg; data quality (4,2,1,1,5)
- Dibenz(a,h)anthracene: 2.07903e-14 kg; data quality (3,2,1,3,3)
- benz[a]anthracene: 2.8663e-12 kg; data quality (3,2,1,3,2)
- 1,4-dichlorobenzene: 8.76785e-13 kg; data quality (2,2,1,1,5)
- fluoranthene: 2.18873e-11 kg; data quality (3,2,1,3,2)
- Methyl iodide: 4.45032e-18 kg; data quality (4,2,1,1,5)
- nitric acid: 2.60723e-9 kg; data quality (3,1,1,1,5)
- cobalt: 1.17784e-12 kg; data quality (4,1,1,1,4)
- ACRYLAMIDE: 3.73007e-14 kg; data quality (4,2,1,1,5)
- dimethyl formamide: 3.45433e-11 kg; data quality (4,2,1,1,4)
- toluene: 1.4185e-7 kg; data quality (3,2,1,3,3)
- o-cresol: 6.41965e-17 kg; data quality (4,2,1,1,5)
- methane, bromo-, halon 1001: 1.47573e-12 kg; data quality (3,2,1,1,5)
- CHLOROPRENE: 2.04217e-15 kg; data quality (2,2,1,1,5)
- carbon disulfide: 3.99433e-12 kg; data quality (4,2,1,1,5)
- 1,4-dioxane: 7.53757e-12 kg; data quality (4,2,1,1,5)
- benzyl chloride: 6.40203e-12 kg; data quality (2,2,1,1,5)
- Water, saline: 2.29963e-7 m3; data quality (4,2,1,4,2)
- Phosphorus: 5.34617e-7 kg; data quality (4,1,1,1,5)
- 1,1,2,2-tetrachloroethane: 5.48006e-14 kg; data quality (3,2,1,1,4)
- 2,2,4-trimethylpentane: 2.33565e-8 kg; data quality (3,2,1,4,1)
- acenaphthylene: 6.32555e-11 kg; data quality (3,2,1,4,1)
- formic acid: 3.90768e-14 kg; data quality (3,1,1,1,5)
- para-xylene: 1.30718e-9 kg; data quality (3,2,1,1,4)
- 4,4'-METHYLENEDIANILINE: 2.36641e-10 kg; data quality (4,2,1,1,5)
- CHLORONAPHTHALENE: 8.2474e-20 kg; data quality (1,2,1,1,5)
- Methane, difluoro-, HFC-32: 1.39281e-8 kg; data quality (4,2,1,4,1)
- 3,3'-Dichlorobenzidine: 5.45032e-17 kg; data quality (3,2,1,1,5)
- carbonyl sulfide: 8.11657e-14 kg; data quality (4,2,1,1,5)
- bromoform: 3.56858e-13 kg; data quality (3,2,1,1,5)
- butadiene: 7.10773e-9 kg; data quality (3,2,1,4,1)
- 1,2-BUTYLENE OXIDE: 5.63557e-11 kg; data quality (4,2,1,1,4)
- SEC-BUTYL ALCOHOL: 2.4403e-10, 5.25582e-9 kg (2 entries, compartments not in this file); data quality (5,1,1,1,5)
- acenaphthene: 1.65857e-11 kg; data quality (3,2,1,4,1)
- methyl methacrylate: 2.59279e-10 kg; data quality (4,2,1,1,5)
- Propene: 2.32859e-11 kg; data quality (3,1,1,1,5)
- Hydrocarbons, aromatic: 4.77348e-10 kg; data quality (3,2,1,4,1)
- o-Xylene: 2.06376e-9 kg; data quality (3,2,1,2,3)
- t-butyl methyl ether: 1.24189e-11 kg; data quality (3,2,1,1,5)
- naphthalene: 3.93138e-9 kg; data quality (3,2,1,2,3)
- DIMETHYLAMINOAZOBENZENE: 9.40088e-18 kg; data quality (5,2,1,1,5)
- 2,4/2,6-toluenediisocyanate (mixture): 1.90759e-14 kg; data quality (1,1,1,1,5)
- QUINOLINE: 8.92883e-15 kg; data quality (3,2,1,1,5)
- phthalic anhydride: 6.91966e-14 kg; data quality (2,2,1,1,5)
- Water, fresh: 0.000137851 m3; data quality (1,2,1,4,2)
- nickel: 2.4772e-10 kg; data quality (3,2,1,1,5)
- oxadiazon: 4.0705e-14 kg; data quality (3,1,1,1,5)
- Dimethoxy methane: 8.33436e-13 kg; data quality (2,2,1,1,4)
- beryllium: 2.15169e-12 kg; data quality (2,2,1,1,5)
- acetamide: 5.56531e-13 kg; data quality (5,2,1,1,4)
- PCB-1: 2.09213e-23 kg; data quality (2,2,1,1,5)
- 3-methylcholanthrene: 2.82161e-15 kg; data quality (2,2,1,1,5)
- Cobalt: 1.08063e-11 kg; data quality (3,2,1,1,5)
- Phthalate, dimethyl-: 1.65513e-13 kg; data quality (4,2,1,1,4)
- lead: 1.29801e-10 kg; data quality (3,2,1,1,5)
- toluene-2,4-diisocyante: 1.58753e-11 kg; data quality (3,2,1,1,4)
- 4,4'-isopropylidenediphenol: 5.36079e-12 kg; data quality (4,1,1,1,4)
- HALON 1211: 1.38724e-11 kg; data quality (5,1,1,1,5)
- ethane, 1,2-dichloro-: 2.04471e-11 kg; data quality (3,2,1,1,5)
- Carbon dioxide: 0.00318308 kg; data quality (4,2,1,4,1)
- 2,4,5,2',5'-PENTACHLOROBIPHENYL: 4.36102e-22 kg; data quality (2,2,1,1,5)

## Inventory method
Input-output

## Modelling constants
The reference unit of all processes is 1 USD2013 of the good or service. The technosphere inputs are based on the US BEA detailed input-output tables for 2007. The IO tables are combined to develop a commodity-by-commodity model based on the the industry-technology assumption (see Suh et al., 2010), which assumes all commodities produced by a given industry have the same input structure, but that multiple industries can produce the same commodity. Thus, model technosphere flows represent commodity outputs (and not industry outputs) from other processes in the model. There are no by-products included in these processes. All commodity production is based on US-conditions, despite in reality that some goods and services are produced overseas, as USEEIO v1.1 is a single-region IO model.

## Completeness
The input-output approach assures that all purchased inputs associated with the sectors making these commodities as reported in the US census for 2007 are included. The direct resources extracted including minerals, energy sources, water and land occupied are included. Emissions to air include all critieria air pollutants, greenhouse gases, and hazardous and toxic air pollutants as defined by US EPA. Releases to water include toxics, total nitrogen and total phosphorus, and water discharges. Releases to soil or groundwater include toxics and agriculutural pesticides. Some metal releases to air, water and soil are not included because they could not be speciated. Solid hazardous and non-hazardous wastes generated are not included as an elementary flows although purchases of waste services are included.

## Data treatment
Greenhouse gases are primarily from the US Greenhouse Gas Emission Inventory (USEPA 2016a). Biogenic C uptake is not included (change from version 1.0), as biogenic C emission are not included. Toxic releases to air, water and soil (except pesticides) are from the 2013 Toxic Release Inventory (USEPA 2015a). Criteria air pollutants and hazardous air pollutants are from the 2011 National Emissions Inventory (USEPA 2015b). All estimates are normalized by industry based on sector output in the data year, then converted to 2013 USD using relative sector-specific CPIs (if data year is not 2013). Energy use represent raw renewables or fossil fuel energies and is based on EIA data for 2014. See Table 1 in Yang, Ingwersen et al. 2017 and Supporting Information 1, and the v1.1 data update notes (Ingwersen et al. 2017) for all details on environmental data sources used.Land occupation for commercial buildings was estimated based on the building floorspace data provided by the U.S. Energy Information Administration 2012 Commercial Building Energy Consumption Survey (CBECS) (EIA 2015). Total commercial public supply water use is reported by USGS (Maupin et al. 2014). Water use is allocated across commercial sectors based on their use of water, sewage, and other services in USD based on the 2007 Benchmark Use Table before redefinitions (BEA 2015).

## Data collection
2015-2016

## Sampling procedure
US federal government sources, including surveys and US EPA emissions databases are used as the primary sources. From these sources, data for US reporting establishments/facilities are aggregated by the NAICS sector as defined in the BEA detailed 2007 input-output tables. When level of sector aggregation differs, or when direct emissions are not reported but modeled, additional sources are used to make allocations and estimates.

## Review details
In regard to quality assurance and peer-review, each dataset created went through Quality Assurance as defined in a quality assurance project plans at US EPA, CSRA or ERG. The model was assembled with the IO model builder model (USEPA 2016c). Validation functions were used to check that all the model components were properly assembled and harmonized. Bayou Demeke and Santosh Ghimire provided internal peer review of the model methodology and the manuscript underwent standard EPA management review. An editor and two anonymous reviewers at the Journal of Cleaner Production reviewed the model. In regard to data quality evaluation, data quality assessment was performed at the flow and process levels according to the updated US EPA data quality assessment guidelines as defined in US EPA (2016b).

## Intended application
The primary application is for use in the US Environmentally-Extended Input-Ouput model, USEEIO, version 1.1. This model is being used by the US EPA for supporting tools that prioritize goods and services based on potential environmental impacts, resource use or emissions for large regions, including the US and US states, and as a strealined tool for organizations as a starting point to consider sustainable materials management. Model results are designed to provide meso/macro-level decision support.

## Project
USEEIO v1.1 was developed by the US EPA with CSRA and ERG with Wesley W. Ingwersen and David E. Meyer as research leads. Yi Yang was the technical lead on the work for CSRA (contract EP-C-15-012); Troy Hawkins was lead for ERG (contract EP-C-12-021).

## Sources
- Kim et el. 2013
- Maupin et al. 2014
- USDA 2014
- USGS 2016
- BEA 2015
- Edelen and Ingwersen 2017
- Lovelace 2009
- USEPA 2016b
- USGS 2015
- Statistics Canada 2010
- EIA 2016
- Ingwersen et al. 2017
- USEPA 2015b
- Ingwersen et al. DRAFT
- USDA 2016
- EIA 2013
- USEPA 2016c
- BLM 2008
- Nickerson et al. 2011
- USDA 2009a
- USDA 2009b
- Goebes et al. 2003
- EIA 2015
- Macknick et al. 2011
- Blackhurst et al. 2010
- Yienger et al. 1995
- USDA 2006
- USEPA 2015a
- Torcellini et al. 2003
- EIA 2017
- USEPA 2016a
