# Cable and subscription programming

Dataset: openLCA process, unit process
Category: 5152: Cable and Other Subscription Programming
Geography: United States
Time period: 2017-01-01 to 2017-12-31
Data quality: US EPA - Process Pedigree Matrix (1;1)
Exchange data quality scheme: US EPA - Flow Pedigree Matrix
Generated by: US EPA with CSRA and ERG
Owner: US EPA
Published in: Yang, Ingwersen et al. 2017
restrictionsDescription: This model shold be appropriately cited (see Yang, Ingwersen et al. 2017 source or Publication field) when used. Any changes or derivations of this model by the user should be documented. The model itself and any results from use of this model shall not be construed to consitute US EPA opinion or policy.
copyright: false

## General comment
BEA Code & Name is '515200:Cable and other subscription programming'. Description of the primary industry producing this good or service, adapted from the Census Bureau NAICS 2007 descriptions: This industry comprises establishments primarily engaged in operating studios and facilities for the broadcasting of programs on a subscription or fee basis. The broadcast programming is typically narrowcast in nature (e.g., limited format, such as news, sports, education, or youth-oriented). These establishments produce programming in their own facilities or acquire programming from external sources. The programming material is usually delivered to a third party, such as cable systems or direct-to-home satellite systems, for transmission to viewers.

## Technology
The process describes the average US production of this good or service within this NAICS-based grouping defined in the BEA 2007 detailed input-output tables (BEA 2015). Distribution, wholesale and retailing of this good or service, use, and final disposal are not included. Creation of a product system with this process will enable modeling of all upstream (supply-chain) activities.

## Geography
Data represent the 50 US states

## Time period
2017 was the year in which this version of USEEIO was released and is the target date for the model

## Reference product
- Cable and subscription programming: 1 USD

## Inputs from technosphere
All rows: data quality (1,3,1,1,1)
- Investment advice, portfolio management, and other financial advising services: 3.49086e-5 USD
- Wooden windows, door, and flooring; at manufacturer: 0.000220158 USD
- Consumer goods and general rental centers: 0.000715513 USD
- Internet publishing and broadcasting: 3.49086e-5 USD
- Nonresidential building repair and maintanence: 5.90355e-5 USD
- Motor vehicle steering, suspension components (except spring), and brake systems; at manufacturer: 0.0025665 USD
- Vehicle repair: 0.000184722 USD
- Metal pipe fittings, ball and roller bearings, industrial patterns, metal bath fixtures, other misc. fabricated metals; at manufacturer: 2.2619e-7 USD
- Semiconductors; at manufacturer: 1.73412e-5 USD
- Sports: 0.022726 USD
- Investigation and security: 0.000369142 USD
- Screws, nuts, and bolts; at manufacturer: 1.75674e-5 USD
- Paints and coatings; at manufacturer: 5.27022e-5 USD
- Natural gas; at consumer: 2.27698e-5 USD
- Software: 0.000226567 USD
- Other real estate: 0.00527346 USD
- Golf courses, marinas, ski resorts, fitness and other rec centers and industries: 0.000105404 USD
- Hotels and campgrounds: 0.000545042 USD
- Rail transport: 3.49086e-5 USD
- Full-service restaurants: 0.000596613 USD
- Other vehicle parts; at manufacturer: 0.000468213 USD
- Household goods repair: 0.000110381 USD
- Printing support; at manufacturer: 0.00152603 USD
- Polystyrene foam products; at manufacturer: 0.000208095 USD
- Telephones; at manufacturer: 0.00801164 USD
- Lessors of nonfinancial intangible assets: 0.00594321 USD
- Aluminum; at manufacturer: 5.47379e-5 USD
- Computer systems design: 0.00151705 USD
- Securities and commodities brokerage and exchanges: 0.0025334 USD
- Wholesale trade: 0.0101343 USD
- Management consulting: 0.000805084 USD
- Books, newspapers, magazines, and other print media; at manufacturer: 0.000312142 USD
- Electricity; at consumer: 0.000350217 USD
- Gaskets, seals, musical instruments, fasteners, brooms, brushes, mop and other misc. goods; at manufacturer: 1.73412e-5 USD
- Communications equipment; at manufacturer: 0.000173412 USD
- Scenic and sightseeing transportation and support activities for transportation: 6.9591e-5 USD
- Scientific research and development: 1.73412e-5 USD
- Transmission and power train parts; at manufacturer: 4.52379e-7 USD
- Company and enterprise management: 0.00214051 USD
- Wireless communications; at manufacturer: 0.000813755 USD
- Office administration: 0.0009126 USD
- Other engine equipment; at manufacturer: 3.46824e-5 USD
- Water transport (boats, ships, ferries): 1.75674e-5 USD
- Environmental and other technical consulting services: 0.000183138 USD
- Commercial equipment rental: 0.0112538 USD
- Cardboard containers; at manufacturer: 1.73412e-5 USD
- Limited-service restaurants: 0.00021013 USD
- Other basic inorganic chemicals; at manufacturer: 1.73412e-5 USD
- Copper, nickel, lead, and zinc; at mine: 9.1456e-5 USD
- Wireless telecommunications: 0.000479145 USD
- Specialized design: 0.000105178 USD
- Marketing research and all other miscellaneous professional, scientific, and technical services: 0.0039507 USD
- Facilities support: 0.000456526 USD
- State and local government enterprises: 1.91507e-5 USD
- Radio and television: 0.00156418 USD
- Chemicals (except basic chemicals, agrichemicals, polymers, paints, pharmaceuticals,soaps, cleaning compounds); at manufacturer: 1.75674e-5 USD
- Other plastic products; at manufacturer: 0.00149202 USD
- Lids, jars, bottle caps, other metal closures and crowns; at manufacturer: 0.00246245 USD
- Nondepository credit intermediation and related activities: 0.000193694 USD
- Warehousing: 0.000129079 USD
- Truck transport: 0.0010603 USD
- Commercial machinery repair: 0.000368991 USD
- News syndicates, libraries, archives, Internet publishing and all other information services: 2.2619e-6 USD
- Valve and fittings (except for plumbing); at manufacturer: 0.0185031 USD
- Movies and film: 0.142786 USD
- Advertising and public relations: 0.0256052 USD
- Drinking water and wastewater treatment; at consumer: 6.15236e-5 USD
- Cardboard; at manufacturer: 0.000277686 USD
- Travel arrangement and reservation: 0.000398848 USD
- Passenger ground transport: 0.000228376 USD
- Legal services: 0.0016778 USD
- Employment services: 0.0039547 USD
- Other support services: 3.46824e-5 USD
- Architectural, engineering, and related services: 0.000713251 USD
- Other petroleum and coal products; at manufacturer: 1.73412e-5 USD
- Telecommunications: 0.000917124 USD
- External hard drives, CDs, other storage media; at manufacturer: 0.000329709 USD
- Switchgear and switchboards; at manufacturer: 0.000121388 USD
- Other computer related services, including facilities management: 0.00141188 USD
- Plastic pipe, fittings, and sausage casings; at manufacturer: 0.0042486 USD
- Sound recording: 0.00214933 USD
- Accounting, tax preparation, bookkeeping, and payroll: 0.00189916 USD
- Printed circuit and electronic assembly; at manufacturer: 0.000121388 USD
- Pet care, photofinishing, parking and other sundry services: 8.6706e-5 USD
- Clay and ceramic products; at manufacturer: 0.00150869 USD
- Dolls, toys, and games; at manufacturer: 1.73412e-5 USD
- Buildings and dwellings services: 0.000414681 USD
- Monetary authorities and depository credit intermediation: 0.00222737 USD
- Other concrete products; at manufacturer: 9.04758e-7 USD
- Magazines and journals; at publisher: 5.22498e-5 USD
- All other food and drinking places: 3.5361e-5 USD
- Cable and subscription programming: 0.0883881 USD
- Clothing; at manufacturer: 6.93648e-5 USD
- Insurance carriers: 0.000108571 USD
- Noncomparable imports: 0.00330787 USD
- Electronic capacitors, resistors, coils, transformers, connectors and other components (except semiconductors and printed circuit assemblies); at manufacturer: 3.46824e-5 USD
- Laminated plastic plates and shapes; at manufacturer: 1.73412e-5 USD
- Promoters and agents: 0.0017069 USD
- Ball and roller bearings; at manufacturer: 0.000260118 USD
- Satellite, telecommunications resellers, and all other telecommunications: 0.000110381 USD
- Fabricated pipe and pipe fittings; at manufacturer: 1.73412e-5 USD
- Other rubber products; at manufacturer: 1.73412e-5 USD
- Air transport: 0.000877918 USD
- Independent artists, writers, and performers: 0.0142063 USD
- Unrefined oil and gas; at extraction site: 6.78569e-7 USD
- Electronic equipment repair and maintenance: 0.000422975 USD
- Computer terminals and other computer peripheral equipment; at manufacturer: 0.000295705 USD
- Metal coatings, engravings, and heat treatments; at manufacturer: 9.39441e-5 USD
- Primary iron, steel, and ferroalloy products; at manufacturer: 5.47379e-5 USD
- Air conditioning, refrigeration, and warm air heating equipment; at manufacturer: 0.00279239 USD
- Semiconductor machinery; at manufacturer: 0.000110154 USD
- Data processing and hosting: 0.00190128 USD
- Vehicle rental and leasing: 0.00137576 USD
- Gasoline, fuels, and by-products of petroleum refining; at manufacturer: 0.000113773 USD
- Insurance agencies and brokerages: 3.60396e-5 USD
- Performances: 1.75674e-5 USD
- Waste management and remediation: 3.87538e-5 USD
- Business support: 0.00049528 USD
- Used and secondhand goods: 2.2619e-7 USD
- Civic, social, professional, and similar organizations: 0.000121841 USD

## Inputs from nature
- Occupation, urban, discontinuously built: 0.00020121 m2*a; data quality (4,2,1,1,1)
- Water, fresh: 1.79861e-5, 3.11267e-5 m3 (2 entries, compartments not in this file); data quality (1,2,1,4,2)
- Energy, solar: 1.88163e-5 MJ; data quality (3,1,1,1,1)

## Emissions to nature
- benz[a]anthracene: 3.14417e-13 kg; data quality (2,2,1,2,2)
- Water, fresh: 4.15845e-5 m3; data quality (1,2,1,4,2)
- pyrene: 2.51408e-12 kg; data quality (3,2,1,3,2)
- arsenic: 7.60263e-13 kg; data quality (3,2,1,2,2)
- methane, dichloro-, hcc-30: 3.65308e-14 kg; data quality (4,2,1,1,3)
- 2-methylnaphthalene: 3.62001e-16 kg; data quality (2,2,1,1,3)
- Chromium VI: 1.26344e-13 kg; data quality (3,2,1,3,2)
- acenaphthylene: 6.84513e-12 kg; data quality (3,2,1,3,2)
- Indeno(1,2,3-cd)pyrene: 1.17228e-13 kg; data quality (3,2,1,4,1)
- Chromium, ion: 4.5925e-13 kg; data quality (2,2,1,3,2)
- antimony: 6.19856e-13 kg; data quality (3,2,1,1,3)
- Dibenz(a,h)anthracene: 3.74528e-15 kg; data quality (2,2,1,2,3)
- nickel: 1.35368e-12 kg; data quality (3,2,1,2,2)
- toluene: 5.00101e-9 kg; data quality (3,2,1,4,1)
- ethane, 1,2-dichloro-: 1.22139e-14 kg; data quality (3,2,1,1,3)
- sulfur dioxide: 5.83955e-8 kg; data quality (2,2,1,1,3)
- Ethane, 1,1,1,2-tetrafluoro-, HFC-134a: 1.54543e-6 kg; data quality (4,2,1,4,1)
- m-xylene: 1.67147e-10 kg; data quality (3,2,1,4,1)
- ethane, 1,2-dibromo-: 1.92452e-14 kg; data quality (2,2,1,1,3)
- hexane: 1.04471e-9 kg; data quality (3,2,1,4,1)
- 2,2,4-trimethylpentane: 1.77246e-9 kg; data quality (3,2,1,4,1)
- 1,1,2,2-tetrachloroethane: 2.27521e-14 kg; data quality (3,2,1,1,3)
- butadiene: 5.41199e-10 kg; data quality (3,2,1,4,1)
- acenaphthene: 2.27488e-12 kg; data quality (3,2,1,3,2)
- selenium: 9.66891e-13 kg; data quality (2,2,1,1,3)
- cadmium: 3.32818e-13 kg; data quality (3,2,1,1,3)
- Benzo(g,h,i)perylene: 3.79024e-13 kg; data quality (3,2,1,4,1)
- methanol: 2.72783e-12 kg; data quality (4,2,1,1,3)
- PHOSPHORUS: 8.56528e-12 kg; data quality (2,2,1,1,3)
- anthracene: 1.2623e-12 kg; data quality (3,2,1,3,2)
- mercury: 2.78031e-13 kg; data quality (2,2,1,1,3)
- Methane: 1.03344e-8 kg; data quality (4,2,1,4,1)
- Xylene: 4.18613e-9 kg; data quality (3,2,1,4,1)
- benzene, ethyl-: 1.2483e-9 kg; data quality (3,2,1,4,1)
- benzo(a)pyrene: 1.33237e-13 kg; data quality (3,2,1,4,1)
- particulates, < 10 um: 6.43623e-10 kg; data quality (3,2,1,3,2)
- Dinitrogen monoxide: 4.05125e-10 kg; data quality (4,2,1,4,1)
- fluoranthene: 2.43267e-12 kg; data quality (3,2,1,3,2)
- Cobalt: 2.57063e-13 kg; data quality (3,2,1,1,3)
- VOC, volatile organic compounds: 1.73882e-7 kg; data quality (3,2,1,1,2)
- Ethane, pentafluoro-, HFC-125: 4.10024e-7 kg; data quality (4,2,1,4,1)
- Propane, 1,2-dichloro-: 1.17304e-14 kg; data quality (4,2,1,1,3)
- acrolein: 7.77087e-11 kg; data quality (3,2,1,3,1)
- Hydrocarbons, aromatic: 3.9554e-11 kg; data quality (3,2,1,4,1)
- beryllium: 9.54524e-15 kg; data quality (2,2,1,1,3)
- para-xylene: 3.12824e-12 kg; data quality (3,2,1,4,1)
- naphthalene: 1.87383e-10 kg; data quality (3,2,1,3,2)
- benzene, chloro-: 3.51975e-14 kg; data quality (4,2,1,1,3)
- Methane, difluoro-, HFC-32: 2.38779e-7 kg; data quality (4,2,1,4,1)
- propanal: 1.7716e-10 kg; data quality (3,2,1,4,1)
- manganese: 2.27753e-11 kg; data quality (3,2,1,1,3)
- phenol: 2.62219e-16 kg; data quality (4,2,1,1,3)
- Benzo(b)fluoranthene: 3.89193e-13 kg; data quality (2,2,1,2,2)
- Propane, 1,1,1,3,3,3-hexafluoro-, HCFC-236fa: 4.73935e-9 kg; data quality (4,2,1,4,1)
- o-Xylene: 5.99906e-11 kg; data quality (3,2,1,4,1)
- fluorene: 5.67695e-12 kg; data quality (2,2,1,2,2)
- ammonia: 2.77538e-10 kg; data quality (3,2,1,4,1)
- Ethene, chloro-: 6.49473e-15 kg; data quality (3,2,1,1,3)
- hydrogen chloride: 2.19107e-11 kg; data quality (2,2,1,1,3)
- Benzo(k)fluoranthene: 1.40595e-13 kg; data quality (3,2,1,4,1)
- carbon monoxide: 2.52993e-6 kg; data quality (3,2,1,1,2)
- chloroform: 1.242e-14 kg; data quality (4,2,1,1,3)
- Carbon dioxide: 0.000110645 kg; data quality (4,2,1,4,1)
- formaldehyde: 2.11623e-9 kg; data quality (3,2,1,3,1)
- nitrogen oxides: 1.78601e-6 kg; data quality (2,2,1,1,3)
- Ethane, 1,1,1-trifluoro-, HFC-143a: 1.75432e-7 kg; data quality (4,2,1,4,1)
- styrene: 4.86524e-11 kg; data quality (3,2,1,4,1)
- benzene: 3.57807e-9 kg; data quality (3,2,1,4,1)
- lead: 4.00577e-13 kg; data quality (3,2,1,1,3)
- ethane, 1,1,2-trichloro-: 1.38465e-14 kg; data quality (4,2,1,1,3)
- Chrysene: 4.88957e-13 kg; data quality (2,2,1,2,2)
- acetaldehyde: 9.84686e-9 kg; data quality (3,2,1,1,3)
- biphenyl: 2.30892e-15 kg; data quality (4,2,1,1,3)
- particulates, < 2.5 um: 3.97045e-8 kg; data quality (3,2,1,1,3)
- carbon tetrachloride: 1.5975e-14 kg; data quality (4,2,1,1,3)
- phenanthrene: 1.36898e-11 kg; data quality (3,2,1,2,2)

## Inventory method
Input-output

## Modelling constants
The reference unit of all processes is 1 USD2013 of the good or service. The technosphere inputs are based on the US BEA detailed input-output tables for 2007. The IO tables are combined to develop a commodity-by-commodity model based on the the industry-technology assumption (see Suh et al., 2010), which assumes all commodities produced by a given industry have the same input structure, but that multiple industries can produce the same commodity. Thus, model technosphere flows represent commodity outputs (and not industry outputs) from other processes in the model. There are no by-products included in these processes. All commodity production is based on US-conditions, despite in reality that some goods and services are produced overseas, as USEEIO v1.1 is a single-region IO model.

## Completeness
The input-output approach assures that all purchased inputs associated with the sectors making these commodities as reported in the US census for 2007 are included. The direct resources extracted including minerals, energy sources, water and land occupied are included. Emissions to air include all critieria air pollutants, greenhouse gases, and hazardous and toxic air pollutants as defined by US EPA. Releases to water include toxics, total nitrogen and total phosphorus, and water discharges. Releases to soil or groundwater include toxics and agriculutural pesticides. Some metal releases to air, water and soil are not included because they could not be speciated. Solid hazardous and non-hazardous wastes generated are not included as an elementary flows although purchases of waste services are included.

## Data treatment
Greenhouse gases are primarily from the US Greenhouse Gas Emission Inventory (USEPA 2016a). Biogenic C uptake is not included (change from version 1.0), as biogenic C emission are not included. Toxic releases to air, water and soil (except pesticides) are from the 2013 Toxic Release Inventory (USEPA 2015a). Criteria air pollutants and hazardous air pollutants are from the 2011 National Emissions Inventory (USEPA 2015b). All estimates are normalized by industry based on sector output in the data year, then converted to 2013 USD using relative sector-specific CPIs (if data year is not 2013). Energy use represent raw renewables or fossil fuel energies and is based on EIA data for 2014. See Table 1 in Yang, Ingwersen et al. 2017 and Supporting Information 1, and the v1.1 data update notes (Ingwersen et al. 2017) for all details on environmental data sources used.Land occupation for commercial buildings was estimated based on the building floorspace data provided by the U.S. Energy Information Administration 2012 Commercial Building Energy Consumption Survey (CBECS) (EIA 2015). Total commercial public supply water use is reported by USGS (Maupin et al. 2014). Water use is allocated across commercial sectors based on their use of water, sewage, and other services in USD based on the 2007 Benchmark Use Table before redefinitions (BEA 2015).

## Data collection
2015-2016

## Sampling procedure
US federal government sources, including surveys and US EPA emissions databases are used as the primary sources. From these sources, data for US reporting establishments/facilities are aggregated by the NAICS sector as defined in the BEA detailed 2007 input-output tables. When level of sector aggregation differs, or when direct emissions are not reported but modeled, additional sources are used to make allocations and estimates.

## Review details
In regard to quality assurance and peer-review, each dataset created went through Quality Assurance as defined in a quality assurance project plans at US EPA, CSRA or ERG. The model was assembled with the IO model builder model (USEPA 2016c). Validation functions were used to check that all the model components were properly assembled and harmonized. Bayou Demeke and Santosh Ghimire provided internal peer review of the model methodology and the manuscript underwent standard EPA management review. An editor and two anonymous reviewers at the Journal of Cleaner Production reviewed the model. In regard to data quality evaluation, data quality assessment was performed at the flow and process levels according to the updated US EPA data quality assessment guidelines as defined in US EPA (2016b).

## Intended application
The primary application is for use in the US Environmentally-Extended Input-Ouput model, USEEIO, version 1.1. This model is being used by the US EPA for supporting tools that prioritize goods and services based on potential environmental impacts, resource use or emissions for large regions, including the US and US states, and as a strealined tool for organizations as a starting point to consider sustainable materials management. Model results are designed to provide meso/macro-level decision support.

## Project
USEEIO v1.1 was developed by the US EPA with CSRA and ERG with Wesley W. Ingwersen and David E. Meyer as research leads. Yi Yang was the technical lead on the work for CSRA (contract EP-C-15-012); Troy Hawkins was lead for ERG (contract EP-C-12-021).

## Sources
- BEA 2015
- Statistics Canada 2010
- USDA 2006
- EIA 2017
- USEPA 2015a
- USEPA 2015b
- Edelen and Ingwersen 2017
- EIA 2016
- EIA 2015
- USDA 2014
- Nickerson et al. 2011
- USGS 2015
- USDA 2009b
- Ingwersen et al. 2017
- EIA 2013
- Torcellini et al. 2003
- Kim et el. 2013
- Macknick et al. 2011
- USEPA 2016b
- Ingwersen et al. DRAFT
- USDA 2016
- Blackhurst et al. 2010
- USDA 2009a
- USEPA 2016a
- USGS 2016
- BLM 2008
- USEPA 2016c
- Yienger et al. 1995
- Lovelace 2009
- Maupin et al. 2014
- Goebes et al. 2003
