# Aircraft; at manufacturer

Dataset: openLCA process, unit process
Category: 3364: Aerospace Product and Parts Manufacturing
Geography: United States
Time period: 2017-01-01 to 2017-12-31
Data quality: US EPA - Process Pedigree Matrix (1;1)
Exchange data quality scheme: US EPA - Flow Pedigree Matrix
Generated by: US EPA with CSRA and ERG
Owner: US EPA
Published in: Yang, Ingwersen et al. 2017
restrictionsDescription: This model shold be appropriately cited (see Yang, Ingwersen et al. 2017 source or Publication field) when used. Any changes or derivations of this model by the user should be documented. The model itself and any results from use of this model shall not be construed to consitute US EPA opinion or policy.
copyright: false

## General comment
BEA Code & Name is '336411:Aircraft manufacturing'. Description of the primary industry producing this good or service, adapted from the Census Bureau NAICS 2007 descriptions: This U.S. industry comprises establishments primarily engaged in one or more of the following: (1) manufacturing or assembling complete aircraft; (2) developing and making aircraft prototypes; (3) aircraft conversion (i.e., major modifications to systems); and (4) complete aircraft overhaul and rebuilding (i.e., periodic restoration of aircraft to original design specifications).

## Technology
The process describes the average US production of this good or service within this NAICS-based grouping defined in the BEA 2007 detailed input-output tables (BEA 2015). Distribution, wholesale and retailing of this good or service, use, and final disposal are not included. Creation of a product system with this process will enable modeling of all upstream (supply-chain) activities.

## Geography
Data represent the 50 US states

## Time period
2017 was the year in which this version of USEEIO was released and is the target date for the model

## Reference product
- Aircraft; at manufacturer: 1 USD

## Inputs from technosphere
All rows: data quality (1,3,1,1,1)
- State and local government enterprises: 0.000211458 USD
- Rubber and plastic belts and hoses; at manufacturer: 1.77656e-6 USD
- Aircraft; at manufacturer: 0.0155458 USD
- Other secondary nonferrous metal products; at manufacturer: 0.000154343 USD
- Limited-service restaurants: 0.00033461 USD
- Coal; at mine: 5.359e-5 USD
- Drinking water and wastewater treatment; at consumer: 0.000188539 USD
- Electromedical appartuses; at manufacturer: 2.10454e-5 USD
- Monetary authorities and depository credit intermediation: 0.000409521 USD
- Management consulting: 0.000230365 USD
- Motor vehicle steering, suspension components (except spring), and brake systems; at manufacturer: 2.14656e-5 USD
- Relay and industrial controls; at manufacturer: 3.85229e-5 USD
- Environmental and other technical consulting services: 5.47869e-5 USD
- Magazines and journals; at publisher: 2.26496e-5 USD
- Home furniture - Cabinets and non-wood, nonupholstered; at manufacturer: 0.000132526 USD
- Synthetic dyes and pigments; at manufacturer: 6.39874e-6 USD
- Gasoline, fuels, and by-products of petroleum refining; at manufacturer: 0.000461136 USD
- Fluid meters and counting devices; at manufacturer: 4.09974e-7 USD
- Petrochemicals; at manufacturer: 2.22843e-7 USD
- Electronic equipment repair and maintenance: 0.000271916 USD
- Audio and video equipment; at manufacturer: 8.27989e-7 USD
- Vehicle engines and engine parts; at manufacturer: 3.95788e-8 USD
- Computers; at manufacturer: 3.3074e-7 USD
- Paints and coatings; at manufacturer: 0.000788989 USD
- Industrial process variable instruments; at manufacturer: 0.000103536 USD
- Cardboard; at manufacturer: 0.000496572 USD
- Signal testing instruments; at manufacturer: 8.51197e-5 USD
- Wireless communications; at manufacturer: 0.00886962 USD
- Commercial equipment rental: 0.000242021 USD
- Independent artists, writers, and performers: 4.28496e-5 USD
- Veneer, plywood, and engineered wood; at manufacturer: 1.57187e-5 USD
- Irradiation apparatuses; at manufacturer: 2.04987e-6 USD
- Truck transport: 0.00624281 USD
- Plastic pipe, fittings, and sausage casings; at manufacturer: 7.37954e-6 USD
- Wireless telecommunications: 0.000456199 USD
- Cutting and machine tool accessory, rolling mill, and other metalworking machines; at manufacturer: 0.000388361 USD
- Machine shops; at manufacturer: 0.000956477 USD
- Scientific research and development: 1.37312e-7 USD
- Metal coatings, engravings, and heat treatments; at manufacturer: 0.00071727 USD
- Other petroleum and coal products; at manufacturer: 0.000362759 USD
- Cutlery and handtools; at manufacturer: 9.55805e-5 USD
- Warehousing: 0.00158864 USD
- Vehicle seating and interior trim (upholstery); at manufacturer: 0.00201441 USD
- Air conditioning, refrigeration, and warm air heating equipment; at manufacturer: 2.17599e-5 USD
- Computer storage device readers; at manufacturer: 0.000116923 USD
- Telephones; at manufacturer: 4.18015e-7 USD
- Paper; at manufacturer: 1.78001e-7 USD
- Watches, clocks, and other measuring and controlling devices; at manufacturer: 0.0111278 USD
- Investment advice, portfolio management, and other financial advising services: 5.34626e-5 USD
- Other retail: 6.46498e-5 USD
- Telecommunications: 0.00187559 USD
- Glass and glass products; at manufacturer: 2.86982e-6 USD
- Other basic inorganic chemicals; at manufacturer: 2.93831e-6 USD
- Adhesives; at manufacturer: 1.89495e-6 USD
- Vehicles and parts sales: 0.000520351 USD
- Transmission and power train parts; at manufacturer: 1.11259e-5 USD
- Specialty transformers; at manufacturer: 5.16781e-7 USD
- Chemicals (except basic chemicals, agrichemicals, polymers, paints, pharmaceuticals,soaps, cleaning compounds); at manufacturer: 0.00317891 USD
- External hard drives, CDs, other storage media; at manufacturer: 1.10693e-5 USD
- Civic, social, professional, and similar organizations: 1.68937e-6 USD
- Compressed Gases; at manufacturer: 2.98994e-5 USD
- Laminated plastic plates and shapes; at manufacturer: 4.94981e-5 USD
- Consumer goods and general rental centers: 4.43305e-5 USD
- other miscellaneous electrical equipment and components; at manufacturer: 2.14967e-5 USD
- Performances: 1.06337e-5 USD
- Aluminum products; at manufacturer: 0.000794728 USD
- Nonresidential building repair and maintanence: 0.000662538 USD
- Synthetic rubber and artificial and synthetic fibers; at manufacturer: 3.56235e-5 USD
- Analytical laboratory instruments; at manufacturer: 2.32319e-5 USD
- Ball and roller bearings; at manufacturer: 0.00094235 USD
- Copper, nickel, lead, and zinc; at mine: 8.17744e-9 USD
- Unrefined oil and gas; at extraction site: 1.04763e-5 USD
- Plastic bags, films, and sheets; at manufacturer: 2.88828e-5 USD
- Waste management and remediation: 0.000450235 USD
- Vehicle repair: 0.00024327 USD
- Sand, gravel, clay, phosphate, other nonmetallic minerals; at mine: 0.000487764 USD
- Paper bags and coated paper; at manufacturer: 4.36018e-5 USD
- Nondepository credit intermediation and related activities: 0.000471901 USD
- Other support services: 0.00180759 USD
- Computer terminals and other computer peripheral equipment; at manufacturer: 6.21749e-5 USD
- Water transport (boats, ships, ferries): 0.000133621 USD
- General merchandise stores: 2.111e-5 USD
- Nonferrous metal casts; at manufacturer: 0.000129935 USD
- Dry-cleaning and laundry: 0.000408578 USD
- Buildings and dwellings services: 0.000975312 USD
- Plywood and veneer; at manufacturer: 9.84422e-7 USD
- Navigation instruments; at manufacturer: 0.010468 USD
- Commercial machinery repair: 0.000485757 USD
- Architectural, engineering, and related services: 0.00282344 USD
- Metal windows, doors, and architectural products; at manufacturer: 4.84111e-5 USD
- Office administration: 3.26672e-5 USD
- Soap and cleaning compounds; at manufacturer: 4.78303e-6 USD
- Advertising and public relations: 0.00429123 USD
- Other computer related services, including facilities management: 0.00106704 USD
- Business support: 0.00299808 USD
- Sports: 2.12884e-5 USD
- Urethane and other foam products; at manufacturer: 2.79863e-6 USD
- Fabricated pipe and pipe fittings; at manufacturer: 7.03862e-5 USD
- All other food and drinking places: 2.19172e-5 USD
- Other real estate: 2.27185e-5 USD
- Hotels and campgrounds: 0.000205856 USD
- Gaskets, seals, musical instruments, fasteners, brooms, brushes, mop and other misc. goods; at manufacturer: 7.55074e-8 USD
- Semiconductors; at manufacturer: 0.0342497 USD
- Cardboard containers; at manufacturer: 0.00207998 USD
- Other aircraft parts; at manufacturer: 0.105389 USD
- Company and enterprise management: 0.0475802 USD
- Insurance agencies and brokerages: 8.74106e-5 USD
- Propulsion units and parts for space vehicles and guided missiles; at manufacturer: 0.000224452 USD
- Pipeline transport: 9.84749e-7 USD
- Communication and energy wire and cable; at manufacturer: 0.00586658 USD
- Natural gas; at consumer: 0.001714 USD
- Vehicle rental and leasing: 0.00047328 USD
- Air transport: 0.00136783 USD
- Legal services: 0.00118726 USD
- Metal structural products; at manufacturer: 0.00161775 USD
- Custom metal rolls; at manufacturer: 0.000108852 USD
- Data processing and hosting: 0.00409408 USD
- Software: 0.000469952 USD
- Metal hinges, keys, lock, and other hardware; at manufacturer: 0.00171949 USD
- Vending, commercial laundry, and other commercial and service industry machinery; at manufacturer: 1.13022e-5 USD
- Switchgear and switchboards; at manufacturer: 1.32558e-5 USD
- Printed circuit and electronic assembly; at manufacturer: 0.00266423 USD
- Wiring devices; at manufacturer: 0.00914051 USD
- Carbon and graphite products; at manufacturer: 0.00138669 USD
- Valve and fittings (except for plumbing); at manufacturer: 0.012215 USD
- Speed changers, industrial high-speed drives, and gears; at manufacturer: 1.74922e-5 USD
- Leather; at manufacturer: 1.36658e-7 USD
- Computer systems design: 0.00482812 USD
- Abrasive products; at manufacturer: 0.000656764 USD
- Other vehicle parts; at manufacturer: 0.0124383 USD
- Specialized design: 0.00291439 USD
- Metal pipe fittings, ball and roller bearings, industrial patterns, metal bath fixtures, other misc. fabricated metals; at manufacturer: 0.000176074 USD
- Promoters and agents: 1.0613e-5 USD
- Wooden windows, door, and flooring; at manufacturer: 2.93987e-7 USD
- Primary iron, steel, and ferroalloy products; at manufacturer: 0.0250342 USD
- Wholesale trade: 0.0275452 USD
- Material handling equipment; at manufacturer: 1.36658e-7 USD
- Postal service: 1.13692e-6 USD
- Securities and commodities brokerage and exchanges: 0.00287936 USD
- Lessors of nonfinancial intangible assets: 0.00338069 USD
- Vehicle electrical and electronic equipment; at manufacturer: 1.40781e-5 USD
- Electricity; at consumer: 0.00232637 USD
- Guided missiles and space vehicles; at manufacturer: 0.00016577 USD
- Satellite, telecommunications resellers, and all other telecommunications: 0.000119285 USD
- Custom computer programming: 0.000645087 USD
- Aluminum; at manufacturer: 9.81459e-5 USD
- Rail transport: 0.000620874 USD
- Investigation and security: 0.00160224 USD
- Cast iron and steel; at manufacturer: 9.10247e-5 USD
- Accounting, tax preparation, bookkeeping, and payroll: 0.000752955 USD
- Employment services: 0.00216416 USD
- Marketing research and all other miscellaneous professional, scientific, and technical services: 0.000958794 USD
- Plastics; at manufacturer: 5.20909e-6 USD
- All other forging, stamping, and sintering; at manufacturer: 0.00105565 USD
- Carpets and rugs; at manufacturer: 0.00296481 USD
- Golf courses, marinas, ski resorts, fitness and other rec centers and industries: 4.33839e-5 USD
- Other plastic products; at manufacturer: 0.00601878 USD
- Light gauge metal cans, boxes, and containers; at manufacturer: 0.00012937 USD
- Aircraft engines and parts; at manufacturer: 0.106881 USD
- Other basic organic chemicals; at manufacturer: 0.00011218 USD
- Passenger ground transport: 9.79376e-5 USD
- Noncomparable imports: 0.00363542 USD
- Lids, jars, bottle caps, other metal closures and crowns; at manufacturer: 0.000121636 USD
- Facilities support: 0.00122696 USD
- Hydraulic pumps, motors, cylinders and actuators; at manufacturer: 0.00681222 USD
- Household goods repair: 8.8431e-5 USD
- Primary batteries; at manufacturer: 4.30646e-7 USD
- Springs and wires; at manufacturer: 0.00870766 USD
- Electronic capacitors, resistors, coils, transformers, connectors and other components (except semiconductors and printed circuit assemblies); at manufacturer: 0.00266208 USD
- Motors and generators; at manufacturer: 2.40679e-5 USD
- Welding and Soldering Equipment, Scales and Balances, and other general purpose machinery; at manufacturer: 0.00128011 USD
- Screws, nuts, and bolts; at manufacturer: 0.00198945 USD
- Secondary copper products; at manufacturer: 0.000689543 USD
- Other primary nonferrous metals; at manufacturer: 0.000110626 USD
- Full-service restaurants: 0.000194448 USD
- Other rubber products; at manufacturer: 1.37435e-6 USD
- Insurance carriers: 0.000295648 USD

## Inputs from nature
- Water, saline: 1.24148e-5 m3; data quality (4,2,1,4,2)
- Water, fresh: 0.000257594 m3; data quality (3,2,1,4,2)
- Occupation, industrial area: 0.000889517 m2*a; data quality (4,2,1,1,1)
- Water, fresh: 9.73858e-5 m3; data quality (2,2,1,4,2)
- Occupation, urban, discontinuously built: 0.000138419 m2*a; data quality (4,2,1,1,1)
- Occupation, industrial area, built up: 0.000296506 m2*a; data quality (4,2,1,1,1)

## Emissions to nature
- bis(2-chloroethyl)ether: 6.50556e-19 kg; data quality (3,2,1,1,5)
- manganese: 2.59154e-14 kg; data quality (4,1,1,1,4)
- NITROMETHANE: 7.92225e-13 kg; data quality (5,1,1,1,4)
- ethylbenzene: 1.22848e-7 kg; data quality (4,1,1,1,5)
- o-Xylene: 5.80236e-8 kg; data quality (3,2,1,1,4)
- methane, dichloro-, hcc-30: 1.12856e-7 kg; data quality (4,2,1,1,4)
- Asbestos: 2.86579e-11 kg; data quality (5,2,1,1,4)
- particulates, < 2.5 um: 2.18683e-6 kg; data quality (3,2,1,1,4)
- copper: 2.56001e-9, 1.05966e-10, 1.40592e-8 kg (3 entries, compartments not in this file); data quality (4,1,1,1,5)
- hydrogen fluoride: 1.18893e-7 kg; data quality (2,2,1,1,4)
- Nickel, ion: 9.44362e-17 kg; data quality (3,2,1,1,5)
- ethane, 1,2-dichloro-: 5.31046e-12 kg; data quality (3,2,1,1,4)
- methyl methacrylate: 8.30894e-9 kg; data quality (4,2,1,1,4)
- 2,2-BIS(4-HYDROXY-3,5-DIBROMOPHENYL)PROPANE: 1.61317e-9, 1.01696e-13 kg (2 entries, compartments not in this file); data quality (5,1,1,1,5)
- Ethylene glycol monoethyl ether: 3.69446e-10 kg; data quality (3,2,1,1,4)
- nickel: 9.02703e-10 kg; data quality (3,2,1,1,4)
- toluene: 3.585e-6 kg; data quality (4,2,1,1,4)
- manganese: 2.47073e-8 kg; data quality (3,2,1,1,4)
- Phthalate, dimethyl-: 1.11537e-11 kg; data quality (4,2,1,1,4)
- Chromium, ion: 1.39187e-8 kg; data quality (2,2,1,1,4)
- 3,3'-Dichlorobenzidine: 3.13004e-17 kg; data quality (3,2,1,1,5)
- nickel: 1.85115e-14, 3.2261e-14 kg (2 entries, compartments not in this file); data quality (4,1,1,1,4)
- benzene: 1.11878e-8 kg; data quality (3,2,1,1,4)
- vinyl acetate: 8.13253e-12 kg; data quality (4,2,1,1,4)
- HALON 1211: 3.57818e-11 kg; data quality (5,1,1,1,5)
- benzidine: 3.53987e-17 kg; data quality (2,2,1,1,5)
- 1,1,1-trichloroethane: 7.33561e-8 kg; data quality (4,2,1,1,4)
- methane, monochloro-, r-40: 1.5549e-19 kg; data quality (3,2,1,1,5)
- PHOSPHORUS: 4.89856e-12 kg; data quality (2,2,1,1,5)
- Ethane, 1,1,1-trifluoro-, HFC-143a: 1.54419e-9 kg; data quality (4,2,1,4,1)
- carbon disulfide: 1.42303e-13 kg; data quality (4,2,1,1,5)
- Dinitrogen monoxide: 1.00755e-8 kg; data quality (4,2,1,4,1)
- particulates, < 10 um: 3.60053e-7 kg; data quality (3,2,1,1,4)
- acrylic acid: 2.37328e-10 kg; data quality (4,2,1,1,4)
- phenanthrene: 3.16469e-11 kg; data quality (3,2,1,2,3)
- Propene: 5.53299e-11 kg; data quality (3,1,1,1,5)
- propylene oxide: 2.32199e-11 kg; data quality (3,2,1,1,4)
- chromium: 1.56518e-9, 1.10416e-10 kg (2 entries, compartments not in this file); data quality (4,1,1,1,5)
- Dibenz(a,h)anthracene: 1.91785e-14 kg; data quality (2,2,1,1,4)
- VOC, volatile organic compounds: 3.85162e-5 kg; data quality (3,2,1,1,4)
- Xylene: 4.5398e-7 kg; data quality (4,2,1,1,4)
- phenol: 2.54232e-8 kg; data quality (4,2,1,1,4)
- hexachloroethane: 4.05821e-10 kg; data quality (4,2,1,1,4)
- Water, fresh: 0.000300167 m3; data quality (3,2,1,4,2)
- cyclohexane: 9.98124e-11, 4.99766e-10 kg (2 entries, compartments not in this file); data quality (4,1,1,1,5)
- sulfur dioxide: 4.93304e-7 kg; data quality (2,2,1,1,4)
- HALON 1301: 1.79474e-10 kg; data quality (5,1,1,1,5)
- 4,4'-isopropylidenediphenol: 1.06625e-13 kg; data quality (4,1,1,1,4)
- cumene: 6.79902e-10 kg; data quality (4,2,1,1,4)
- Propane, 1,2-dichloro-: 1.7499e-12 kg; data quality (4,2,1,1,4)
- m-xylene: 1.32232e-7 kg; data quality (3,2,1,1,4)
- SEC-BUTYL ALCOHOL: 1.69293e-8, 3.11529e-7 kg (2 entries, compartments not in this file); data quality (5,1,1,1,5)
- 2,4-dinitrophenol: 5.20088e-19 kg; data quality (5,2,1,1,5)
- Ethane, pentafluoro-, HFC-125: 3.60911e-9 kg; data quality (4,2,1,4,1)
- epichlorohydrin: 8.68244e-9 kg; data quality (3,2,1,1,4)
- 4,4'-METHYLENEDIANILINE: 1.42669e-10 kg; data quality (4,2,1,1,5)
- 3-methylcholanthrene: 1.01843e-14 kg; data quality (2,2,1,1,4)
- methylene diphenyl diisocyanate: 2.20925e-8 kg; data quality (4,2,1,1,4)
- 1,2-BUTYLENE OXIDE: 3.32801e-9 kg; data quality (4,2,1,1,4)
- cobalt: 2.34037e-14 kg; data quality (4,1,1,1,4)
- acetonitrile: 2.73363e-12 kg; data quality (3,2,1,1,5)
- Hydrazine: 1.31005e-13 kg; data quality (4,2,1,1,5)
- 1,2,4-trimethylbenzene: 3.14443e-9 kg; data quality (5,1,1,1,5)
- 1,4-dioxane: 2.05383e-11 kg; data quality (4,2,1,1,4)
- Hexachlorocyclopentadiene: 6.24641e-19 kg; data quality (3,2,1,1,5)
- ETHENE: 2.61586e-9 kg; data quality (3,1,1,1,5)
- carbon monoxide: 8.05085e-6 kg; data quality (2,2,1,1,3)
- beryllium: 2.20647e-13 kg; data quality (2,2,1,1,4)
- arsenic: 1.63471e-11 kg; data quality (3,2,1,1,4)
- 1,1,2,2-tetrachloroethane: 2.78247e-12 kg; data quality (3,2,1,1,4)
- Propene, 1,3-dichloro-: 1.74434e-12 kg; data quality (3,2,1,1,4)
- styrene: 8.32726e-8 kg; data quality (4,2,1,1,4)
- diisocyanates: 9.46509e-13 kg; data quality (4,1,1,1,5)
- benzo(a)pyrene: 6.75548e-14 kg; data quality (3,2,1,3,2)
- p-cresol: 5.20088e-19 kg; data quality (4,2,1,1,5)
- NITRIC ACID: 2.18696e-16 kg; data quality (3,1,1,1,4)
- 2-METHOXYETHANOL: 2.15415e-9 kg; data quality (4,2,1,1,4)
- dibenzofuran: 5.20088e-19 kg; data quality (4,2,1,1,5)
- acetaldehyde: 3.36842e-9 kg; data quality (3,2,1,3,2)
- mercury: 6.86485e-12 kg; data quality (2,2,1,1,4)
- n-nitrosodimethylamine: 7.8208e-17 kg; data quality (5,2,1,1,5)
- 1,4-dichlorobenzene: 3.385e-12 kg; data quality (2,2,1,1,4)
- tertiary-Butyl Acetate: 2.68788e-7 kg; data quality (3,2,1,1,4)
- benzyl chloride: 2.67573e-16 kg; data quality (2,2,1,1,4)
- methanol: 2.7533e-7 kg; data quality (4,2,1,1,4)
- anthracene: 1.94719e-12 kg; data quality (3,2,1,1,4)
- pyrene: 4.21541e-12 kg; data quality (2,2,1,1,4)
- acetamide: 3.86088e-11 kg; data quality (5,2,1,1,4)
- chromium: 2.18696e-15 kg; data quality (4,1,1,1,4)
- DNOC: 5.20088e-19 kg; data quality (2,2,1,1,5)
- formaldehyde: 1.89893e-8 kg; data quality (2,2,1,2,3)
- Benzo(a)anthracene: 9.05267e-14 kg; data quality (2,2,1,1,4)
- ethene, tetrachloro-: 1.67157e-6 kg; data quality (3,2,1,1,4)
- nitric acid: 2.63701e-8 kg; data quality (3,1,1,1,5)
- ethylene glycol: 6.49863e-8 kg; data quality (5,2,1,1,4)
- Phenol: 6.19983e-9 kg; data quality (3,1,1,1,5)
- chlorine: 2.59225e-12 kg; data quality (4,2,1,1,4)
- Ethane, 1,1,1,2-tetrafluoro-, HFC-134a: 1.36032e-8 kg; data quality (4,2,1,4,1)
- methyl isobutyl ketone: 8.53194e-7 kg; data quality (4,2,1,1,4)
- chloroform: 3.81675e-11 kg; data quality (4,2,1,1,5)
- lead: 2.15234e-9 kg; data quality (3,2,1,1,4)
- Nitrobenzene: 6.24641e-19 kg; data quality (4,2,1,1,5)
- para-xylene: 5.87074e-8 kg; data quality (3,2,1,1,4)
- Water, saline: 6.29057e-6 m3; data quality (4,2,1,4,2)
- 1-Methyl-2-pyrrolidinone: 3.9717e-8 kg; data quality (5,1,1,1,5)
- ethylene oxide: 2.82031e-12 kg; data quality (3,2,1,1,4)
- Cobalt: 1.64022e-15 kg; data quality (4,1,1,1,4)
- nitric acid: 5.46739e-16 kg; data quality (3,1,1,1,4)
- antimony: 3.17456e-10 kg; data quality (3,2,1,1,4)
- cadmium: 6.59215e-11 kg; data quality (3,2,1,1,4)
- Benzo(k)fluoranthene: 8.33454e-14 kg; data quality (3,2,1,3,2)
- Ethylene glycol monoethyl ether: 2.84886e-11 kg; data quality (5,1,1,1,5)
- Chromium VI: 1.17805e-8 kg; data quality (3,2,1,1,4)
- t-butyl methyl ether: 3.23268e-10 kg; data quality (3,2,1,1,4)
- cyanide: 6.35615e-10 kg; data quality (2,2,1,1,5)
- diethanolamine: 3.82453e-8 kg; data quality (3,2,1,1,4)
- toluene: 1.99349e-8 kg; data quality (5,1,1,1,5)
- acenaphthene: 8.51502e-12 kg; data quality (3,2,1,2,3)
- lead: 2.05008e-13, 1.1714e-10 kg (2 entries, compartments not in this file); data quality (3,1,1,1,5)
- Methane, difluoro-, HFC-32: 2.10178e-9 kg; data quality (4,2,1,4,1)
- dimethyl formamide: 1.661e-9 kg; data quality (4,2,1,1,4)
- Chrysene: 1.69173e-12 kg; data quality (2,2,1,1,4)
- Methyl iodide: 2.55576e-18 kg; data quality (4,2,1,1,5)
- naphthalene: 1.64673e-7 kg; data quality (3,2,1,1,4)
- acetophenone: 8.03302e-15 kg; data quality (3,2,1,1,5)
- phthalate, dioctyl-: 1.74611e-10 kg; data quality (3,2,1,1,4)
- Triethyl amine: 5.35392e-9 kg; data quality (3,2,1,1,4)
- ammonia: 4.43598e-12 kg; data quality (3,1,1,1,5)
- Benzo(b)fluoranthene: 1.02447e-13 kg; data quality (3,2,1,3,2)
- o-cresol: 5.20088e-19 kg; data quality (4,2,1,1,5)
- N,N-DIMETHYLANILINE: 1.47121e-10 kg; data quality (5,2,1,1,4)
- methane, bromo-, halon 1001: 1.5549e-19 kg; data quality (3,2,1,1,5)
- Methane: 9.62516e-8 kg; data quality (4,2,1,4,1)
- 2,4,5-trichlorophenol: 5.20088e-19 kg; data quality (2,2,1,1,5)
- benzene, ethyl-: 2.87854e-7 kg; data quality (4,2,1,1,4)
- monochloroethane: 1.16801e-13 kg; data quality (3,2,1,1,4)
- ethyl acrylate: 3.84591e-10 kg; data quality (4,2,1,1,4)
- o-toluidine: 1.95288e-15 kg; data quality (4,2,1,1,4)
- Phosphorus: 3.6459e-7 kg; data quality (5,1,1,1,5)
- benzene, chloro-: 6.86702e-10 kg; data quality (4,2,1,1,4)
- ethane, 1,2-dibromo-: 2.92741e-12 kg; data quality (2,2,1,1,4)
- Propane, 1,1,1,3,3,3-hexafluoro-, HCFC-236fa: 4.17166e-11 kg; data quality (4,2,1,4,1)
- Benzo(g,h,i)perylene: 1.59108e-12 kg; data quality (3,2,1,1,4)
- bromoform: 4.96853e-18 kg; data quality (3,2,1,1,5)
- nitrogen oxides: 8.4061e-6 kg; data quality (2,2,1,1,4)
- hydrogen chloride: 1.58224e-7 kg; data quality (2,2,1,1,4)
- isophorone: 9.30782e-13 kg; data quality (2,2,1,1,4)
- selenium: 9.18805e-11 kg; data quality (2,2,1,1,4)
- aniline: 4.33318e-12 kg; data quality (4,2,1,1,4)
- fluorene: 1.4997e-11 kg; data quality (2,2,1,2,3)
- Ethene, chloro-: 3.85076e-12 kg; data quality (3,2,1,1,4)
- trichloroethylene: 6.66952e-7 kg; data quality (4,2,1,1,4)
- benz[a]anthracene: 2.01592e-13 kg; data quality (2,2,1,2,3)
- 2-ethoxyethyl acetate: 5.77885e-10 kg; data quality (4,2,1,1,4)
- BUTYL ISOCYANATE: 3.45142e-9 kg; data quality (4,2,1,1,4)
- 2-nitropropane: 4.22327e-11 kg; data quality (5,2,1,1,4)
- carbon tetrachloride: 1.10502e-9 kg; data quality (4,2,1,1,4)
- Phthalate, dibutyl-: 5.31232e-9 kg; data quality (4,2,1,1,4)
- hexachloro-1,3-butadiene: 6.24641e-19 kg; data quality (4,2,1,1,5)
- Dimethoxy methane: 5.78188e-11 kg; data quality (2,2,1,1,4)
- 4-nitrophenol: 2.53608e-10 kg; data quality (2,2,1,1,4)
- methanol: 1.05337e-8 kg; data quality (3,1,1,1,5)
- Ethene, trichloro-: 1.88325e-13 kg; data quality (5,1,1,1,5)
- Hydrocarbons, aromatic: 1.80784e-10 kg; data quality (3,2,1,4,1)
- pentachlorophenol: 1.42264e-18 kg; data quality (3,2,1,1,5)
- Indeno(1,2,3-cd)pyrene: 5.692e-14 kg; data quality (3,2,1,3,2)
- maleic anhydride: 3.43189e-12 kg; data quality (2,2,1,1,4)
- 1,1-DIMETHYL HYDRAZINE: 1.32163e-13 kg; data quality (5,2,1,1,5)
- BETA-PROPIOLACTONE: 2.57392e-12 kg; data quality (5,2,1,1,4)
- Nitrogen: 4.84796e-9 kg; data quality (2,2,1,1,5)
- acrylonitrile: 1.65986e-13 kg; data quality (4,2,1,1,4)
- hexane: 2.61982e-6 kg; data quality (3,2,1,1,4)
- Cobalt: 1.54585e-10 kg; data quality (3,2,1,1,4)
- toluene, 2,4-dinitro-: 1.67465e-18 kg; data quality (5,2,1,1,5)
- 1,1-DICHLOROETHYLENE: 7.46437e-10 kg; data quality (3,2,1,1,4)
- 2,4,6-trichlorophenol: 5.20088e-19 kg; data quality (2,2,1,1,5)
- Diethylene glycol butyl ether: 3.04984e-10 kg; data quality (4,2,1,1,4)
- butadiene: 4.3984e-10 kg; data quality (3,2,1,3,2)
- acenaphthylene: 8.44179e-12 kg; data quality (3,2,1,3,2)
- hydroquinone: 3.19701e-10 kg; data quality (3,2,1,1,4)
- fluoranthene: 2.86763e-12 kg; data quality (2,2,1,2,3)
- ethane, 1,1,2-trichloro-: 1.21462e-10 kg; data quality (4,2,1,1,4)
- 2-methylnaphthalene: 8.52681e-13 kg; data quality (2,2,1,1,4)
- phthalic anhydride: 3.94245e-14 kg; data quality (2,2,1,1,5)
- acrolein: 5.26197e-10 kg; data quality (2,2,1,2,3)
- ammonia: 2.68663e-7 kg; data quality (3,2,1,1,4)
- Carbon dioxide: 0.00497662 kg; data quality (4,2,1,4,1)
- hexachlorobenzene: 1.53749e-15 kg; data quality (3,2,1,1,4)
- 1,2,4-trichlorobenzene: 1.67465e-18 kg; data quality (4,2,1,1,5)
- 2,2,4-trimethylpentane: 1.48443e-9 kg; data quality (3,2,1,2,3)
- toluene-2,4-diisocyante: 9.4117e-10 kg; data quality (3,2,1,1,4)
- NITROGLYCERIN: 3.01334e-12 kg; data quality (5,1,1,1,5)
- propanal: 5.36467e-10 kg; data quality (3,2,1,4,1)
- Cresol: 4.59145e-12 kg; data quality (4,2,1,1,4)
- biphenyl: 9.31516e-12 kg; data quality (4,2,1,1,4)

## Inventory method
Input-output

## Modelling constants
The reference unit of all processes is 1 USD2013 of the good or service. The technosphere inputs are based on the US BEA detailed input-output tables for 2007. The IO tables are combined to develop a commodity-by-commodity model based on the the industry-technology assumption (see Suh et al., 2010), which assumes all commodities produced by a given industry have the same input structure, but that multiple industries can produce the same commodity. Thus, model technosphere flows represent commodity outputs (and not industry outputs) from other processes in the model. There are no by-products included in these processes. All commodity production is based on US-conditions, despite in reality that some goods and services are produced overseas, as USEEIO v1.1 is a single-region IO model.

## Completeness
The input-output approach assures that all purchased inputs associated with the sectors making these commodities as reported in the US census for 2007 are included. The direct resources extracted including minerals, energy sources, water and land occupied are included. Emissions to air include all critieria air pollutants, greenhouse gases, and hazardous and toxic air pollutants as defined by US EPA. Releases to water include toxics, total nitrogen and total phosphorus, and water discharges. Releases to soil or groundwater include toxics and agriculutural pesticides. Some metal releases to air, water and soil are not included because they could not be speciated. Solid hazardous and non-hazardous wastes generated are not included as an elementary flows although purchases of waste services are included.

## Data treatment
Greenhouse gases are primarily from the US Greenhouse Gas Emission Inventory (USEPA 2016a). Biogenic C uptake is not included (change from version 1.0), as biogenic C emission are not included. Toxic releases to air, water and soil (except pesticides) are from the 2013 Toxic Release Inventory (USEPA 2015a). Criteria air pollutants and hazardous air pollutants are from the 2011 National Emissions Inventory (USEPA 2015b). All estimates are normalized by industry based on sector output in the data year, then converted to 2013 USD using relative sector-specific CPIs (if data year is not 2013). Energy use represent raw renewables or fossil fuel energies and is based on EIA data for 2014. See Table 1 in Yang, Ingwersen et al. 2017 and Supporting Information 1, and the v1.1 data update notes (Ingwersen et al. 2017) for all details on environmental data sources used.Land occupation associated with manufacturing buildings was estimated based on the building floorspace data provided by the U.S. Energy Information Administration in the 2010 Manufacturing Energy Consumption Survey (EIA 2013). Portions of total renewable energy (EIA 2016) based on EIA-923 reports for 2014 (EIA 2017) are included. Nitrogen and Phosphorus releases are modeled in total N and total P equivalents as estimated by the Discharge Monitoring Report Nutrient Loading tool (USEPA 2016b). Self-supplied withdrawals were assigned to industrial sectors based on water use statistics for Canadian industries by NAICS 3-digit sector scaled to US production levels based on gross domestic product by industry (BEA 2015; Statistics Canada 2010), and further disaggregated to the manufacturing sectors based on compensation of employees as provided by the 2007 IO tables (BEA 2015). Water withdrawals associated with public supply were allocated to sectors based on their use of water, sewage, and other services in USD based on the IO tables (BEA 2015). Portions of total renewable energy (EIA 2016) by type are assigned to sectors (hydro, wind, solar, or) based on EIA-923 reports for 2014 (EIA 2017).

## Data collection
2015-2016

## Sampling procedure
US federal government sources, including surveys and US EPA emissions databases are used as the primary sources. From these sources, data for US reporting establishments/facilities are aggregated by the NAICS sector as defined in the BEA detailed 2007 input-output tables. When level of sector aggregation differs, or when direct emissions are not reported but modeled, additional sources are used to make allocations and estimates.

## Review details
In regard to quality assurance and peer-review, each dataset created went through Quality Assurance as defined in a quality assurance project plans at US EPA, CSRA or ERG. The model was assembled with the IO model builder model (USEPA 2016c). Validation functions were used to check that all the model components were properly assembled and harmonized. Bayou Demeke and Santosh Ghimire provided internal peer review of the model methodology and the manuscript underwent standard EPA management review. An editor and two anonymous reviewers at the Journal of Cleaner Production reviewed the model. In regard to data quality evaluation, data quality assessment was performed at the flow and process levels according to the updated US EPA data quality assessment guidelines as defined in US EPA (2016b).

## Intended application
The primary application is for use in the US Environmentally-Extended Input-Ouput model, USEEIO, version 1.1. This model is being used by the US EPA for supporting tools that prioritize goods and services based on potential environmental impacts, resource use or emissions for large regions, including the US and US states, and as a strealined tool for organizations as a starting point to consider sustainable materials management. Model results are designed to provide meso/macro-level decision support.

## Project
USEEIO v1.1 was developed by the US EPA with CSRA and ERG with Wesley W. Ingwersen and David E. Meyer as research leads. Yi Yang was the technical lead on the work for CSRA (contract EP-C-15-012); Troy Hawkins was lead for ERG (contract EP-C-12-021).

## Sources
- Maupin et al. 2014
- Nickerson et al. 2011
- BEA 2015
- USEPA 2016c
- Lovelace 2009
- USDA 2014
- Goebes et al. 2003
- USGS 2015
- Ingwersen et al. 2017
- USEPA 2015a
- EIA 2016
- USEPA 2016b
- Statistics Canada 2010
- USDA 2016
- USEPA 2015b
- USDA 2006
- Yienger et al. 1995
- EIA 2017
- Blackhurst et al. 2010
- EIA 2013
- USEPA 2016a
- EIA 2015
- Kim et el. 2013
- Edelen and Ingwersen 2017
- Ingwersen et al. DRAFT
- Torcellini et al. 2003
- Macknick et al. 2011
- USDA 2009a
- BLM 2008
- USDA 2009b
- USGS 2016
