# Metal pipe fittings, ball and roller bearings, industrial patterns, metal bath fixtures, other misc. fabricated metals; at manufacturer

Dataset: openLCA process, unit process
Category: 3329: Other Fabricated Metal Product Manufacturing
Geography: United States
Time period: 2017-01-01 to 2017-12-31
Data quality: US EPA - Process Pedigree Matrix (1;1)
Exchange data quality scheme: US EPA - Flow Pedigree Matrix
Generated by: US EPA with CSRA and ERG
Owner: US EPA
Published in: Yang, Ingwersen et al. 2017
restrictionsDescription: This model shold be appropriately cited (see Yang, Ingwersen et al. 2017 source or Publication field) when used. Any changes or derivations of this model by the user should be documented. The model itself and any results from use of this model shall not be construed to consitute US EPA opinion or policy.
copyright: false

## General comment
BEA Code & Name is '33299B:Other fabricated metal manufacturing'. Description of the primary industry producing this good or service, adapted from the Census Bureau NAICS 2007 descriptions: This industry group comprises establishments primarily engaged in manufacturing fabricated metal products (except forgings and stampings, cutlery and handtools, architectural and structural metals, boilers, tanks, shipping containers, hardware, spring and wire products, machine shop products, turned products, screws, and nuts and bolts). Related NAICS codes are: 332997-9

## Technology
The process describes the average US production of this good or service within this NAICS-based grouping defined in the BEA 2007 detailed input-output tables (BEA 2015). Distribution, wholesale and retailing of this good or service, use, and final disposal are not included. Creation of a product system with this process will enable modeling of all upstream (supply-chain) activities.

## Geography
Data represent the 50 US states

## Time period
2017 was the year in which this version of USEEIO was released and is the target date for the model

## Reference product
- Metal pipe fittings, ball and roller bearings, industrial patterns, metal bath fixtures, other misc. fabricated metals; at manufacturer: 1 USD

## Inputs from technosphere
All rows: data quality (1,3,1,1,1)
- Other basic organic chemicals; at manufacturer: 0.000283761 USD
- Gaskets, seals, musical instruments, fasteners, brooms, brushes, mop and other misc. goods; at manufacturer: 0.000242407 USD
- Office administration: 6.30065e-5 USD
- Navigation instruments; at manufacturer: 3.6043e-6 USD
- Ball and roller bearings; at manufacturer: 0.00103323 USD
- Electricity; at consumer: 0.00632863 USD
- Communications equipment; at manufacturer: 3.25695e-7 USD
- Office supplies (not paper); at manufacturer: 1.01088e-6 USD
- Other basic inorganic chemicals; at manufacturer: 9.24645e-5 USD
- Rubber tires; at manufacturer: 8.24087e-6 USD
- Polystyrene foam products; at manufacturer: 5.83651e-6 USD
- Postal service: 7.20668e-5 USD
- Material handling equipment; at manufacturer: 0.000582962 USD
- Welding and Soldering Equipment, Scales and Balances, and other general purpose machinery; at manufacturer: 0.000395832 USD
- Paper; at manufacturer: 0.000570604 USD
- Fiber, yarn, and thread; at manufacturer: 1.58706e-5 USD
- Clay and ceramic products; at manufacturer: 0.000628373 USD
- Warehousing: 0.00236877 USD
- Household goods repair: 0.000333399 USD
- Full-service restaurants: 0.000812514 USD
- Fabricated pipe and pipe fittings; at manufacturer: 0.00180277 USD
- Computer terminals and other computer peripheral equipment; at manufacturer: 2.39813e-5 USD
- Ophthalmic goods; at manufacturer: 1.69926e-7 USD
- Lids, jars, bottle caps, other metal closures and crowns; at manufacturer: 0.00690093 USD
- Paper bags and coated paper; at manufacturer: 0.000291801 USD
- Cutlery and handtools; at manufacturer: 0.000910884 USD
- Vehicle rental and leasing: 0.00143714 USD
- Relay and industrial controls; at manufacturer: 0.00139466 USD
- Passenger ground transport: 0.000409449 USD
- Vehicle seating and interior trim (upholstery); at manufacturer: 0.000247847 USD
- Books, newspapers, magazines, and other print media; at manufacturer: 5.89803e-6 USD
- Specialty transformers; at manufacturer: 3.35544e-5 USD
- Aluminum products; at manufacturer: 0.066011 USD
- Mineral wool; at manufacturer: 1.6894e-5 USD
- Springs and wires; at manufacturer: 0.00046732 USD
- Ground or treated minerals and earth; at manufacturer: 2.87302e-6 USD
- Consumer goods and general rental centers: 0.000163917 USD
- Other primary nonferrous metals; at manufacturer: 0.000750642 USD
- Limited-service restaurants: 0.00139028 USD
- Lumber and treated lumber; at manufacturer: 0.000360027 USD
- Plastic bags, films, and sheets; at manufacturer: 0.00854329 USD
- Computer systems design: 0.000954831 USD
- Wood pulp; at manufacturer: 7.74596e-5 USD
- Pipeline transport: 5.12255e-5 USD
- Nonferrous metal casts; at manufacturer: 0.00625905 USD
- Industrial process furnaces and ovens; at manufacturer: 0.00129573 USD
- Heavy duty trucks; at manufacturer: 0.000132753 USD
- Adhesives; at manufacturer: 0.00401251 USD
- Ink and ink cartridges; at manufacturer: 5.68738e-5 USD
- Golf courses, marinas, ski resorts, fitness and other rec centers and industries: 0.000176201 USD
- Travel arrangement and reservation: 3.68327e-6 USD
- Vehicle bodies; at manufacturer: 6.26949e-5 USD
- Metal cutting and forming machine tools; at manufacturer: 0.00399756 USD
- Synthetic rubber and artificial and synthetic fibers; at manufacturer: 0.000293684 USD
- Primary iron, steel, and ferroalloy products; at manufacturer: 0.128938 USD
- Nonresidential building repair and maintanence: 0.00260402 USD
- All other forging, stamping, and sintering; at manufacturer: 0.00420605 USD
- Hydraulic pumps, motors, cylinders and actuators; at manufacturer: 0.00271663 USD
- Metal plumbing drains, faucets, valves, and other fittings; at manufacturer: 1.27942e-5 USD
- Plastic pipe, fittings, and sausage casings; at manufacturer: 0.000825804 USD
- Other plastic products; at manufacturer: 0.00174501 USD
- Other engine equipment; at manufacturer: 0.000150842 USD
- Special tools, dies, jigs, and fixtures; at manufacturer: 0.000141004 USD
- Plastics and rubber industry machinery; at manufacturer: 1.59091e-5 USD
- Stationery; at manufacturer: 2.97786e-6 USD
- State and local government enterprises: 0.000604285 USD
- Other secondary nonferrous metal products; at manufacturer: 0.00770687 USD
- Environmental and other technical consulting services: 0.000117804 USD
- Air conditioning, refrigeration, and warm air heating equipment; at manufacturer: 0.000545909 USD
- Printed circuit and electronic assembly; at manufacturer: 0.00266193 USD
- General merchandise stores: 5.8785e-5 USD
- Metal pipe fittings, ball and roller bearings, industrial patterns, metal bath fixtures, other misc. fabricated metals; at manufacturer: 0.0123128 USD
- Software: 5.70122e-5 USD
- Custom computer programming: 0.000325496 USD
- Packaged meat (except poultry); at manufacturer: 5.02746e-7 USD
- Investigation and security: 0.000998761 USD
- Satellite, telecommunications resellers, and all other telecommunications: 0.000165836 USD
- Facilities support: 0.000636905 USD
- Home furniture - Cabinets and non-wood, nonupholstered; at manufacturer: 2.35689e-6 USD
- Wireless communications; at manufacturer: 8.8143e-7 USD
- Plywood and veneer; at manufacturer: 0.00017031 USD
- Cardboard containers; at manufacturer: 0.00341607 USD
- Leather; at manufacturer: 0.000121683 USD
- Advertising and public relations: 0.00523932 USD
- Specialized design: 0.00209708 USD
- Drinking water and wastewater treatment; at consumer: 0.000551869 USD
- Computer storage device readers; at manufacturer: 9.39457e-8 USD
- Cement; at manufacturer: 5.49999e-5 USD
- Copper, nickel, lead, and zinc; at mine: 0.0023214 USD
- Urethane and other foam products; at manufacturer: 7.08036e-5 USD
- Carbon and graphite products; at manufacturer: 2.03635e-5 USD
- Air transport: 0.00186787 USD
- Light bulbs; at manufacturer: 5.0775e-5 USD
- Monetary authorities and depository credit intermediation: 0.00448192 USD
- Other nonmetallic mineral products; at manufacturer: 2.44161e-5 USD
- Light gauge metal cans, boxes, and containers; at manufacturer: 0.0015121 USD
- Unrefined oil and gas; at extraction site: 2.17069e-6 USD
- Investment advice, portfolio management, and other financial advising services: 0.000228621 USD
- Timber and raw forest products; at forest: 1.17356e-5 USD
- Communication and energy wire and cable; at manufacturer: 0.00926334 USD
- Fertilizers; at manufacturer: 1.83648e-6 USD
- Wiring devices; at manufacturer: 5.42748e-5 USD
- Plastic bottles; at manufacturer: 1.1161e-5 USD
- Performances: 2.15839e-6 USD
- Signs; at manufacturer: 1.37609e-5 USD
- Finished and coated fabric; at manufacturer: 0.000125148 USD
- Other vehicle parts; at manufacturer: 0.00270557 USD
- Noncomparable imports: 0.00340635 USD
- Electronic equipment repair and maintenance: 0.000607724 USD
- Other retail: 0.000263568 USD
- All other converted paper products; at manufacturer: 2.20845e-6 USD
- Hotels and campgrounds: 0.000819633 USD
- Commercial machinery repair: 0.0018849 USD
- Shelving and lockers; at manufacturer: 6.13486e-5 USD
- Gasoline, fuels, and by-products of petroleum refining; at manufacturer: 0.00367137 USD
- Other petroleum and coal products; at manufacturer: 0.00242193 USD
- Laminated plastic plates and shapes; at manufacturer: 0.000458314 USD
- Veneer, plywood, and engineered wood; at manufacturer: 6.84759e-5 USD
- Valve and fittings (except for plumbing); at manufacturer: 0.00198605 USD
- Light fixtures; at manufacturer: 1.07271e-5 USD
- Semiconductors; at manufacturer: 0.00639158 USD
- Paints and coatings; at manufacturer: 0.000568962 USD
- Ammunition, arms, ordnance, and related accessories; at manufacturer: 0.000166702 USD
- Magazines and journals; at publisher: 0.000105712 USD
- Civic, social, professional, and similar organizations: 0.00034181 USD
- Data processing and hosting: 0.00261538 USD
- Soap and cleaning compounds; at manufacturer: 8.28719e-5 USD
- Vehicle metal stamping; at manufacturer: 0.000239986 USD
- Storage batteries; at manufacturer: 2.32816e-6 USD
- Compressed Gases; at manufacturer: 3.4477e-5 USD
- Electronic capacitors, resistors, coils, transformers, connectors and other components (except semiconductors and printed circuit assemblies); at manufacturer: 0.000855588 USD
- Vehicles and parts sales: 0.000548348 USD
- Toiletries; at manufacturer: 4.53908e-6 USD
- Motors and generators; at manufacturer: 0.0159598 USD
- Other support services: 0.00117551 USD
- Other rubber products; at manufacturer: 0.000916704 USD
- Industrial process variable instruments; at manufacturer: 0.00445427 USD
- Buildings and dwellings services: 0.00366216 USD
- Fabric; at manufacturer: 0.000211627 USD
- Insurance agencies and brokerages: 0.000295279 USD
- Lime and gypsum products; at manufacturer: 1.22374e-5 USD
- Telecommunications: 0.00234691 USD
- Wooden windows, door, and flooring; at manufacturer: 7.77787e-5 USD
- Motor vehicle steering, suspension components (except spring), and brake systems; at manufacturer: 7.43025e-5 USD
- Clothing; at manufacturer: 3.69857e-7 USD
- Office furniture and custom architectural woodwork and millwork; at manufacturer: 1.32826e-6 USD
- Vehicle electrical and electronic equipment; at manufacturer: 1.51638e-5 USD
- Truck trailers; at manufacturer: 8.68129e-7 USD
- Sand, gravel, clay, phosphate, other nonmetallic minerals; at mine: 0.00112689 USD
- Rail transport: 0.00323 USD
- Asphalt pavement; at manufacturer: 9.15561e-6 USD
- Synthetic dyes and pigments; at manufacturer: 4.84917e-5 USD
- Independent artists, writers, and performers: 0.000173401 USD
- Accounting, tax preparation, bookkeeping, and payroll: 0.00228369 USD
- Sanitary paper (tissues, napkins, diapers, etc.); at manufacturer: 8.5645e-8 USD
- Wireless telecommunications: 0.000737552 USD
- Metal coatings, engravings, and heat treatments; at manufacturer: 0.00422935 USD
- Speed changers, industrial high-speed drives, and gears; at manufacturer: 8.31173e-5 USD
- Custom metal rolls; at manufacturer: 0.00106323 USD
- Other transportation equipment; at manufacturer: 0.000149548 USD
- Other computer related services, including facilities management: 0.000341216 USD
- Commercial equipment rental: 0.000721765 USD
- Glass and glass products; at manufacturer: 0.00202534 USD
- Insurance carriers: 0.00105328 USD
- All other food and drinking places: 0.000111426 USD
- Power boilers and heat exchangers; at manufacturer: 0.000218852 USD
- Transmission and power train parts; at manufacturer: 7.74377e-5 USD
- Scenic and sightseeing transportation and support activities for transportation: 6.72331e-5 USD
- Scientific research and development: 5.86248e-5 USD
- Pumps and pumping equipment; at manufacturer: 3.90506e-5 USD
- Nondepository credit intermediation and related activities: 0.00157941 USD
- Metal windows, doors, and architectural products; at manufacturer: 0.001957 USD
- Small electrical appliances; at manufacturer: 4.66717e-6 USD
- Cutting and machine tool accessory, rolling mill, and other metalworking machines; at manufacturer: 0.00157027 USD
- Mechanical power transmission equipment; at manufacturer: 0.000163351 USD
- Chemicals (except basic chemicals, agrichemicals, polymers, paints, pharmaceuticals,soaps, cleaning compounds); at manufacturer: 0.000801625 USD
- Sports: 6.06631e-5 USD
- Abrasive products; at manufacturer: 0.00587849 USD
- Employment services: 0.00221037 USD
- Mining and oil/gas field machinery; at manufacturer: 2.22587e-5 USD
- Truck transport: 0.0106459 USD
- Business support: 0.00198572 USD
- Rubber and plastic belts and hoses; at manufacturer: 0.00103924 USD
- Ready-mix concrete; at manufacturer: 1.95359e-6 USD
- Screws, nuts, and bolts; at manufacturer: 0.0226255 USD
- Waste management and remediation: 0.00165877 USD
- Dry-cleaning and laundry: 3.66047e-6 USD
- Machine shops; at manufacturer: 0.00841384 USD
- Wholesale trade: 0.0478727 USD
- External hard drives, CDs, other storage media; at manufacturer: 1.50313e-6 USD
- Architectural, engineering, and related services: 0.00438877 USD
- Iron, gold, silver, and other metal ores; at mine: 0.00100947 USD
- Wood kitchen cabinets and countertops; at manufacturer: 4.15876e-5 USD
- Concrete pipe, bricks, and blocks; at manufacturer: 1.84279e-5 USD
- Vending, commercial laundry, and other commercial and service industry machinery; at manufacturer: 0.000561284 USD
- Food and beverage stores: 3.27441e-6 USD
- Vehicle repair: 0.000944787 USD
- Air and gas compressors; at manufacturer: 1.11042e-5 USD
- Heavy gauge metal tanks; at manufacturer: 0.000484414 USD
- Secondary copper products; at manufacturer: 0.00944828 USD
- Natural gas; at consumer: 0.00661942 USD
- Metal structural products; at manufacturer: 0.00160393 USD
- other miscellaneous electrical equipment and components; at manufacturer: 5.19637e-5 USD
- Vehicle engines and engine parts; at manufacturer: 7.8199e-6 USD
- Other concrete products; at manufacturer: 2.93483e-5 USD
- Company and enterprise management: 0.0217912 USD
- Management consulting: 0.000575567 USD
- Vegetable oils and by-products; at manufacturer: 1.89445e-6 USD
- Other textiles; at manufacturer: 2.0837e-5 USD
- Promoters and agents: 5.50429e-5 USD
- Construction machinery; at manufacturer: 4.71659e-6 USD
- Coal; at mine: 0.000138662 USD
- Secondary steel products; at manufacturer: 0.0147309 USD
- Aluminum; at manufacturer: 0.00479719 USD
- Lessors of nonfinancial intangible assets: 0.00593464 USD
- Heating equipment other than warm air furnaces; at manufacturer: 3.08906e-5 USD
- Metal hinges, keys, lock, and other hardware; at manufacturer: 0.000812008 USD
- Automatic controls for HVAC and refrigeration equipment; at manufacturer: 1.5403e-5 USD
- Air purification and ventilation equipment; at manufacturer: 2.36502e-5 USD
- Petrochemicals; at manufacturer: 4.56591e-5 USD
- Marketing research and all other miscellaneous professional, scientific, and technical services: 0.00387674 USD
- Primary copper; at manufacturer: 0.00448526 USD
- Plastics; at manufacturer: 0.00930161 USD
- Industrial molds; at manufacturer: 0.00550196 USD
- Cast iron and steel; at manufacturer: 0.00580883 USD
- Railroad rolling stock; at manufacturer: 1.0457e-6 USD
- Jewelry and silverware; at manufacturer: 2.03401e-5 USD
- Machinery for the paper, textile, food or other industries (except semiconductor machinery); at manufacturer: 8.88995e-5 USD
- Surgical appliance and supplies; at manufacturer: 0.000156872 USD
- Legal services: 0.00195522 USD
- Switchgear and switchboards; at manufacturer: 1.41331e-5 USD
- Water transport (boats, ships, ferries): 0.000485779 USD
- Securities and commodities brokerage and exchanges: 0.00896894 USD
- Cardboard; at manufacturer: 0.00832666 USD
- Other real estate: 0.00229497 USD

## Inputs from nature
- Water, fresh: 0.00120071, 0.000427137 m3 (2 entries, compartments not in this file); data quality (3,2,1,4,2)
- Occupation, urban, discontinuously built: 0.000114822 m2*a; data quality (4,2,1,1,1)
- Energy, wind: 1.06425e-5 MJ; data quality (3,1,1,1,1)
- Water, saline: 6.43342e-5 m3; data quality (4,2,1,4,2)
- Occupation, industrial area: 0.00133607 m2*a; data quality (4,2,1,1,1)
- Occupation, industrial area, built up: 0.000445358 m2*a; data quality (4,2,1,1,1)
- Energy, hydraulic potential: 0.000100469 MJ; data quality (3,1,1,1,1)

## Emissions to nature
- arsenic: 1.01258e-11 kg; data quality (2,1,1,1,5)
- 1,4-DIOXANE: 1.43195e-14 kg; data quality (4,1,1,1,5)
- chlorine: 3.00136e-9 kg; data quality (4,1,1,1,4)
- ethyl acrylate: 9.86414e-10 kg; data quality (3,2,1,1,5)
- Methane, monochloro-, R-40: 1.43195e-14, 2.39135e-15 kg (2 entries, compartments not in this file); data quality (3,1,1,1,5)
- ethylene glycol: 1.44681e-6 kg; data quality (3,2,1,1,3)
- bromoform: 1.04903e-12 kg; data quality (3,2,1,1,5)
- benz[a]anthracene: 3.5517e-10 kg; data quality (2,2,1,1,3)
- t-butyl methyl ether: 7.87487e-11 kg; data quality (3,2,1,1,5)
- hydrogen sulfide: 2.00082e-9 kg; data quality (3,2,1,1,5)
- dicyclopentadiene: 2.08512e-10 kg; data quality (4,1,1,1,5)
- fluorine: 5.61858e-12 kg; data quality (4,1,1,1,5)
- 1,4-dioxane: 4.62159e-9 kg; data quality (3,2,1,1,5)
- MOLYBDENUM(VI): 5.77236e-11 kg; data quality (3,1,1,1,3)
- barium: 7.56659e-12, 2.24661e-12 kg (2 entries, compartments not in this file); data quality (4,1,1,1,3)
- ethylene glycol: 4.29088e-11 kg; data quality (5,1,1,1,5)
- ethane, 1,2-dichloro-: 2.17185e-11 kg; data quality (3,2,1,1,5)
- Ethane, pentafluoro-, HFC-125: 7.64554e-8 kg; data quality (4,2,1,4,1)
- 4,4'-METHYLENEBIS(2-CHLOROANALINE): 8.61493e-12 kg; data quality (5,2,1,1,3)
- Pentachloroethane: 1.7249e-12 kg; data quality (2,1,1,1,5)
- o-Xylene: 5.63257e-7 kg; data quality (3,2,1,1,5)
- methanol: 2.7938e-6 kg; data quality (4,2,1,1,4)
- nickel: 6.37765e-8, 3.9945e-9 kg (2 entries, compartments not in this file); data quality (4,1,1,1,5)
- maleic anhydride: 4.07275e-11 kg; data quality (2,2,1,1,5)
- Zinc: 1.14117e-7 kg; data quality (5,1,1,1,4)
- propylene oxide: 8.92511e-11 kg; data quality (3,2,1,1,5)
- acenaphthene: 4.00231e-11 kg; data quality (3,2,1,4,1)
- 2-nitropropane: 1.70769e-12 kg; data quality (3,2,1,1,5)
- Zinc: 1.47589e-9 kg; data quality (5,1,1,1,5)
- methylene diphenyl diisocyanate: 8.15396e-8 kg; data quality (4,2,1,1,5)
- benzo(a)pyrene: 5.88638e-11 kg; data quality (2,2,1,1,3)
- Benzyl chloride: 8.21222e-13, 7.39601e-15 kg (2 entries, compartments not in this file); data quality (3,1,1,1,5)
- m-cresol: 2.55369e-11 kg; data quality (4,2,1,1,3)
- Chromium VI: 1.02411e-8 kg; data quality (3,2,1,1,5)
- copper: 6.46946e-8, 9.05737e-9 kg (2 entries, compartments not in this file); data quality (4,1,1,1,5)
- ethane, 1,2-dibromo-: 5.81534e-12 kg; data quality (2,2,1,1,5)
- tertiary-Butyl Acetate: 2.26266e-6 kg; data quality (3,2,1,1,5)
- Hydrazine, methyl-: 4.56362e-12 kg; data quality (2,2,1,1,5)
- cyclohexane: 1.28672e-8 kg; data quality (4,1,1,1,4)
- 1,2,4-trimethylbenzene: 1.33129e-10 kg; data quality (5,1,1,1,3)
- dimethyl formamide: 8.5618e-10 kg; data quality (4,2,1,1,5)
- Aluminum: 3.45833e-11 kg; data quality (4,1,1,1,3)
- Triethylene glycol: 4.79074e-10 kg; data quality (3,2,1,1,5)
- MOLYBDENUM(VI): 1.41518e-12 kg; data quality (3,1,1,1,4)
- Chromium, ion: 4.96388e-8 kg; data quality (2,2,1,1,5)
- Sulfur hexafluoride: 5.50271e-9 kg; data quality (4,2,1,4,1)
- toluene: 5.71791e-10, 1.08132e-12 kg (2 entries, compartments not in this file); data quality (5,1,1,1,4)
- particulates, < 10 um: 1.11199e-5 kg; data quality (3,2,1,1,5)
- nitric acid: 2.84555e-8 kg; data quality (3,1,1,1,5)
- chromium: 8.87634e-9, 4.40486e-8, 9.78853e-10 kg (3 entries, compartments not in this file); data quality (4,1,1,1,5)
- 1,3-PHENYLENEDIAMINE: 1.57974e-12 kg; data quality (4,1,1,1,5)
- Phthalate, dioctyl-: 3.16541e-14 kg; data quality (4,1,1,1,4)
- NITROUS ACID: 1.71498e-10, 9.10611e-11 kg (2 entries, compartments not in this file); data quality (5,1,1,1,5)
- cobalt: 1.54465e-12 kg; data quality (4,1,1,1,4)
- N-(3-CHLORALLYL) HEXAMINIUM CHLORIDE: 1.25295e-12 kg; data quality (3,1,1,1,5)
- SEC-BUTYL ALCOHOL: 2.86587e-7 kg; data quality (5,1,1,1,5)
- CYANAMIDE: 1.10507e-12 kg; data quality (2,2,1,1,4)
- benzyl chloride: 3.91366e-8 kg; data quality (2,2,1,1,5)
- Thiram: 1.28878e-13, 1.88418e-14 kg (2 entries, compartments not in this file); data quality (4,1,1,1,4)
- m-xylene: 1.06164e-6 kg; data quality (3,2,1,1,5)
- Ethene, trichloro-: 6.70691e-11 kg; data quality (5,1,1,1,5)
- Cresol: 6.47271e-9 kg; data quality (4,2,1,1,3)
- toluene, 2,4-dinitro-: 1.17617e-13 kg; data quality (5,2,1,1,5)
- phthalate, dioctyl-: 2.70093e-9 kg; data quality (3,2,1,1,5)
- mercury: 6.30137e-11, 1.60615e-10 kg (2 entries, compartments not in this file); data quality (3,1,1,1,5)
- Benzene, ethyl-: 7.15974e-14 kg; data quality (4,1,1,1,5)
- Methane, difluoro-, HFC-32: 4.45241e-8 kg; data quality (4,2,1,4,1)
- Xylene: 2.34291e-11, 1.31071e-12 kg (2 entries, compartments not in this file); data quality (4,1,1,1,4)
- p-phenylenediamine: 9.2343e-11 kg; data quality (5,2,1,1,3)
- propanal: 5.97381e-9 kg; data quality (3,2,1,4,1)
- 1,4-dichlorobenzene: 3.90574e-11 kg; data quality (2,2,1,1,5)
- CHLOROPRENE: 8.57441e-12 kg; data quality (2,2,1,1,4)
- hexachloroethane: 2.91728e-15 kg; data quality (4,2,1,1,5)
- ALLYL CHLORIDE: 5.33931e-12 kg; data quality (3,2,1,1,5)
- Sulfuric acid: 3.28044e-9 kg; data quality (2,1,1,1,3)
- PERACETIC ACID: 1.5823e-12 kg; data quality (4,1,1,1,5)
- isophorone: 1.92807e-7 kg; data quality (2,2,1,1,5)
- Propane, 1,2-dichloro-: 4.04308e-12 kg; data quality (4,2,1,1,5)
- Phthalate, dibutyl-: 7.48035e-9 kg; data quality (4,2,1,1,5)
- ammonia: 2.98681e-9 kg; data quality (3,1,1,1,4)
- Methyl iodide: 5.18665e-10 kg; data quality (4,2,1,1,4)
- Cobalt: 2.4577e-9 kg; data quality (3,2,1,1,4)
- antimony: 6.86779e-12, 1.93037e-12 kg (2 entries, compartments not in this file); data quality (2,1,1,1,5)
- acetaldehyde: 3.23242e-8 kg; data quality (3,2,1,3,1)
- Cyclohexanol: 3.99778e-11 kg; data quality (4,1,1,1,4)
- pyrene: 7.78859e-12 kg; data quality (3,2,1,3,2)
- o-toluidine: 2.86805e-13 kg; data quality (4,2,1,1,5)
- butanol: 6.92902e-7 kg; data quality (5,1,1,1,4)
- arsenic: 4.71486e-10 kg; data quality (3,2,1,1,4)
- carbon tetrachloride: 5.79217e-12 kg; data quality (4,2,1,1,5)
- ALUMINUM OXIDE: 1.07555e-8, 1.52592e-9, 4.34028e-9 kg (3 entries, compartments not in this file); data quality (5,1,1,1,5)
- ETHYLENETHIOUREA: 4.38103e-14 kg; data quality (5,2,1,1,5)
- 2,3,4'-TRICHLOROBIPHENYL: 1.71291e-16 kg; data quality (2,2,1,1,5)
- Water, fresh: 0.0013835 m3; data quality (3,2,1,4,2)
- Methyl acrylate: 2.85673e-11 kg; data quality (3,1,1,1,5)
- Ethylene glycol monoethyl ether: 1.0939e-10, 7.7677e-7, 2.42292e-12 kg (3 entries, compartments not in this file); data quality (5,1,1,1,5)
- polychlorinated biphenyls: 3.80729e-18 kg; data quality (3,2,1,1,3)
- acetophenone: 3.82845e-9 kg; data quality (3,2,1,1,5)
- silver: 3.35301e-10 kg; data quality (4,1,1,1,3)
- NITROGLYCERIN: 2.92314e-11 kg; data quality (5,1,1,1,5)
- 1-Methyl-2-pyrrolidinone: 6.74812e-13 kg; data quality (5,1,1,1,4)
- o-cresol: 8.47883e-10 kg; data quality (4,2,1,1,3)
- Phosphorus: 4.58771e-8 kg; data quality (4,1,1,1,5)
- Sodium formate: 6.69165e-11, 8.73222e-11 kg (2 entries, compartments not in this file); data quality (3,1,1,1,5)
- Triethyl amine: 1.33988e-7 kg; data quality (4,2,1,1,5)
- lead: 1.4188e-10 kg; data quality (3,1,1,1,4)
- benzene: 1.12331e-12 kg; data quality (3,1,1,1,3)
- Naphthalene: 5.93806e-10 kg; data quality (4,1,1,1,4)
- ethylbenzene: 1.95057e-8 kg; data quality (4,1,1,1,4)
- 2,2,4-trimethylpentane: 8.81137e-9 kg; data quality (3,2,1,3,3)
- carbon disulfide: 1.23682e-7 kg; data quality (4,2,1,1,5)
- acrolein: 3.79223e-9 kg; data quality (3,2,1,2,2)
- Acrylonitrile: 2.6849e-15, 7.87571e-14 kg (2 entries, compartments not in this file); data quality (3,1,1,1,5)
- phenanthrene: 2.79965e-10 kg; data quality (3,2,1,2,3)
- 2,4/2,6-toluenediisocyanate (mixture): 1.75262e-11 kg; data quality (3,1,1,1,5)
- 2,4-dimethylphenol: 4.28287e-10 kg; data quality (4,1,1,1,4)
- AMMONIA: 9.37861e-10 kg; data quality (3,1,1,1,4)
- Propane, 1,1,1,3,3,3-hexafluoro-, HCFC-236fa: 8.83726e-10 kg; data quality (4,2,1,4,1)
- DIETHANOLAMINE: 3.15028e-13, 1.71769e-12 kg (2 entries, compartments not in this file); data quality (4,1,1,1,5)
- Hydrocarbons, aromatic: 9.21934e-9 kg; data quality (4,2,1,2,3)
- mercury: 2.43554e-10 kg; data quality (2,2,1,1,3)
- manganese: 1.25758e-8 kg; data quality (4,1,1,1,3)
- Dimethyl sulfate: 2.35069e-12 kg; data quality (2,2,1,1,5)
- 1,2-DICHLOROETHYLENE: 2.26049e-9 kg; data quality (5,1,1,1,5)
- ethane, 1,1,2-trichloro-: 6.81207e-13 kg; data quality (4,2,1,1,3)
- ACRYLAMIDE: 5.4455e-12 kg; data quality (4,2,1,1,4)
- Phenol: 5.64277e-9 kg; data quality (3,1,1,1,5)
- manganese: 2.56438e-7 kg; data quality (3,2,1,1,5)
- 4-nitrophenol: 1.03982e-14 kg; data quality (2,2,1,1,5)
- monochloroethane: 4.67711e-13 kg; data quality (3,2,1,1,5)
- particulates, < 2.5 um: 2.49129e-5 kg; data quality (3,2,1,1,5)
- 2-PHENYLPHENOL: 3.57987e-14 kg; data quality (3,1,1,1,5)
- beryllium: 8.54846e-13 kg; data quality (5,1,1,1,3)
- nickel: 6.13479e-8 kg; data quality (3,2,1,1,5)
- benzene, ethyl-: 1.60642e-6 kg; data quality (4,2,1,1,5)
- 1-Methyl-2-pyrrolidinone: 2.16272e-8 kg; data quality (5,1,1,1,3)
- Benzo(b)fluoranthene: 8.40384e-13 kg; data quality (3,2,1,3,2)
- methane, monochloro-, r-40: 9.91641e-10 kg; data quality (3,2,1,1,5)
- fluorene: 4.84417e-11 kg; data quality (3,2,1,4,1)
- toluene-2,4-diisocyante: 1.01562e-9 kg; data quality (3,2,1,1,5)
- diisocyanates: 7.38691e-9 kg; data quality (4,1,1,1,3)
- Water, saline: 3.2598e-5 m3; data quality (4,2,1,4,2)
- Decabromodiphenyl oxide: 2.29658e-11 kg; data quality (4,1,1,1,4)
- silver: 6.69165e-11 kg; data quality (4,1,1,1,5)
- acrylic acid: 9.31984e-10 kg; data quality (4,2,1,1,4)
- Bisphenol A: 6.70616e-10 kg; data quality (4,1,1,1,4)
- Dibenz(a,h)anthracene: 1.42966e-13 kg; data quality (2,2,1,1,5)
- chlorine: 2.11283e-8 kg; data quality (4,2,1,1,5)
- Formaldehyde: 1.78993e-13 kg; data quality (2,1,1,1,5)
- CHLORONAPHTHALENE: 1.9759e-16 kg; data quality (1,2,1,1,5)
- 1,2-BUTYLENE OXIDE: 7.84089e-9 kg; data quality (4,2,1,1,5)
- Phthalate, dimethyl-: 2.26135e-8 kg; data quality (4,2,1,1,5)
- hexane: 2.16654e-5 kg; data quality (3,2,1,1,5)
- ALLYL ALCOHOL: 4.40682e-12 kg; data quality (4,1,1,1,5)
- Butyraldehyde: 8.94854e-10, 3.3794e-9 kg (2 entries, compartments not in this file); data quality (4,1,1,1,5)
- methanol: 5.71684e-10, 4.28296e-11 kg (2 entries, compartments not in this file); data quality (3,1,1,1,5)
- Asbestos: 1.03453e-11 kg; data quality (5,2,1,1,5)
- Tetrafluoroethylene (TFE): 1.2568e-9 kg; data quality (4,1,1,1,5)
- p-cresol: 7.83037e-13 kg; data quality (4,2,1,1,5)
- 1,2,4-trimethylbenzene: 6.51885e-8 kg; data quality (5,1,1,1,4)
- 2,4/2,6-toluenediisocyanate (mixture): 2.69593e-15 kg; data quality (4,1,1,1,3)
- ammonia: 5.27487e-7 kg; data quality (3,2,1,1,4)
- 2-METHOXYETHANOL: 9.33182e-11 kg; data quality (4,2,1,1,5)
- beryllium: 2.39256e-10 kg; data quality (2,2,1,1,5)
- formic acid: 2.61581e-10 kg; data quality (3,1,1,1,5)
- Benzo(a)anthracene: 1.05713e-12 kg; data quality (2,2,1,1,5)
- 1,4-BENZOQUINONE: 5.27846e-15 kg; data quality (3,2,1,1,5)
- 1,1,2,2-tetrachloroethane: 1.1203e-12 kg; data quality (3,2,1,1,3)
- formaldehyde: 1.46255e-7 kg; data quality (3,2,1,3,3)
- 2-chloro-1-phenylethanone: 1.88206e-13 kg; data quality (2,2,1,1,5)
- ethylene oxide: 1.54461e-10 kg; data quality (3,2,1,1,5)
- benzene, chloro-: 3.4123e-10 kg; data quality (3,2,1,1,5)
- biphenyl: 4.90429e-10 kg; data quality (4,2,1,1,3)
- 2,4/2,6-toluenediisocyanate (mixture): 2.75502e-11 kg; data quality (4,1,1,1,5)
- acenaphthylene: 4.75967e-11 kg; data quality (3,2,1,4,1)
- N,N-DIMETHYLANILINE: 5.20898e-10 kg; data quality (5,2,1,1,4)
- phenol: 1.13573e-6 kg; data quality (4,2,1,1,5)
- ozone: 1.09066e-8 kg; data quality (4,1,1,1,5)
- Benzo(g,h,i)perylene: 3.39152e-17 kg; data quality (2,1,1,1,4)
- lead: 9.05337e-10 kg; data quality (3,1,1,1,3)
- lead: 6.01298e-8 kg; data quality (3,2,1,1,5)
- VINYLFLUORIDE: 1.59919e-9 kg; data quality (4,1,1,1,5)
- Cumene hydroperoxide: 1.62937e-10 kg; data quality (2,1,1,1,5)
- Ethanol, 2-butoxy-: 3.67927e-9 kg; data quality (5,2,1,1,3)
- aniline: 3.55142e-9 kg; data quality (4,2,1,1,3)
- 1,1,1-trichloroethane: 2.01922e-7 kg; data quality (3,2,1,1,5)
- cumene: 4.33346e-8 kg; data quality (4,2,1,1,5)
- Benzo(k)fluoranthene: 7.82369e-13 kg; data quality (3,2,1,3,2)
- formaldehyde: 5.3698e-15 kg; data quality (2,1,1,1,5)
- Phthalate, dioctyl-: 2.90757e-10 kg; data quality (4,1,1,1,5)
- phenol: 2.62651e-11 kg; data quality (3,1,1,1,3)
- Dinitrogen monoxide: 5.64175e-8 kg; data quality (4,2,1,4,1)
- 3-Iodo-2-propynyl butylcarbamate: 7.15974e-14 kg; data quality (4,1,1,1,5)
- TERT-BUTYL ALCOHOL: 1.81798e-7 kg; data quality (4,1,1,1,5)
- Propene, 1,3-dichloro-: 9.88654e-13 kg; data quality (3,2,1,1,4)
- diethanolamine: 1.49535e-10 kg; data quality (3,2,1,1,5)
- Cobalt: 1.54942e-11 kg; data quality (4,1,1,1,3)
- biphenyl: 7.15974e-18 kg; data quality (3,1,1,1,5)
- Benzene, ethyl-: 6.10553e-12 kg; data quality (4,1,1,1,4)
- HCFC-225ca: 1.06506e-10 kg; data quality (5,1,1,1,5)
- 2-PHENOXYETHANOL: 6.70282e-10 kg; data quality (3,2,1,1,5)
- 1,4-dioxane: 7.15974e-17 kg; data quality (4,1,1,1,5)
- Carbon dioxide: 0.0237388 kg; data quality (4,2,1,4,1)
- cyanide: 7.01128e-9 kg; data quality (2,2,1,1,3)
- NITRIC ACID: 1.29367e-10 kg; data quality (3,1,1,1,5)
- naphthalene: 4.91541e-11 kg; data quality (4,1,1,1,3)
- Dinitrotoluene, technical grade (2,4 (77%)- and 2,6 (19%)-): 2.25341e-16 kg; data quality (5,1,1,1,5)
- Titanium: 5.51849e-11 kg; data quality (5,2,1,1,3)
- sodium dimethyldithiocarbamate: 1.3992e-12 kg; data quality (5,1,1,1,5)
- hydrogen fluoride: 1.73659e-7 kg; data quality (2,2,1,1,5)
- nitric acid: 6.90267e-13 kg; data quality (3,1,1,1,4)
- Butanol: 7.15974e-15 kg; data quality (5,1,1,1,5)
- Hydrazine: 1.07205e-13 kg; data quality (4,2,1,1,5)
- selenium: 2.02693e-9 kg; data quality (2,2,1,1,5)
- 2,4-dinitrophenol: 1.69461e-14 kg; data quality (5,2,1,1,5)
- 2-(2-BUTOXYETHOXY) ETHYL ACETATE: 6.08606e-10 kg; data quality (4,2,1,1,4)
- Dimethoxy methane: 3.93269e-11 kg; data quality (2,2,1,1,5)
- Nitrogen: 1.33135e-7 kg; data quality (4,2,1,1,5)
- Chloroacetic acid: 3.94815e-12 kg; data quality (3,2,1,1,5)
- trichloroethylene: 2.86842e-6 kg; data quality (4,2,1,1,5)
- 2-(2-ETHOXYETHOXY) ETHYL ACETATE: 4.82461e-13 kg; data quality (5,2,1,1,5)
- PHOSPHORUS: 6.61465e-11 kg; data quality (2,2,1,1,4)
- carbon monoxide: 7.01127e-5 kg; data quality (3,2,1,1,2)
- methane, dichloro-, hcc-30: 1.4165e-6 kg; data quality (4,2,1,1,5)
- methyl methacrylate: 8.67165e-8 kg; data quality (4,2,1,1,5)
- Nitrobenzene: 1.56811e-13 kg; data quality (4,2,1,1,3)
- methane, bromo-, halon 1001: 2.10018e-12 kg; data quality (3,2,1,1,5)
- cadmium: 6.38929e-10 kg; data quality (3,2,1,1,4)
- BUTYL ACRYLATE: 2.36649e-11 kg; data quality (4,1,1,1,5)
- Phenol, 2,4-dimethyl-: 5.44488e-14 kg; data quality (4,1,1,1,3)
- phthalic anhydride: 9.24746e-11 kg; data quality (2,2,1,1,5)
- Dimethylamine: 7.87571e-14 kg; data quality (3,1,1,1,5)
- benzidine: 2.27912e-14 kg; data quality (2,2,1,1,5)
- copper: 4.35779e-8 kg; data quality (4,1,1,1,4)
- Aluminum: 8.65318e-8 kg; data quality (4,1,1,1,5)
- PCB-1: 1.44958e-17 kg; data quality (2,2,1,1,5)
- epichlorohydrin: 7.30625e-10 kg; data quality (3,2,1,1,5)
- 3-methylcholanthrene: 1.26149e-13 kg; data quality (2,2,1,1,5)
- pentachlorophenol: 7.29326e-13 kg; data quality (5,1,1,1,5)
- para-xylene: 4.60303e-7 kg; data quality (3,2,1,1,5)
- Benzene, 1,2,4-trimethyl-: 3.63951e-11 kg; data quality (5,1,1,1,3)
- anthracene: 4.33529e-12 kg; data quality (3,2,1,3,2)
- naphthalene: 1.87219e-7 kg; data quality (3,2,1,1,5)
- Chrysene: 2.71129e-10 kg; data quality (2,2,1,1,3)
- hydrogen chloride: 6.15877e-7 kg; data quality (2,2,1,1,5)
- Ethylene glycol: 1.4423e-9 kg; data quality (5,1,1,1,5)
- antimony: 8.38904e-9 kg; data quality (3,2,1,1,5)
- styrene: 5.42233e-11 kg; data quality (3,1,1,1,5)
- ethene, tetrachloro-: 3.50172e-7 kg; data quality (3,2,1,1,5)
- Cumene: 4.94255e-15 kg; data quality (3,1,1,1,3)
- 1,2,4-trichlorobenzene: 9.05591e-13 kg; data quality (4,2,1,1,5)
- manganese: 2.31138e-9 kg; data quality (4,1,1,1,5)
- 4-Methyl-2-pentanone: 1.1929e-11 kg; data quality (4,1,1,1,4)
- Styrene: 1.27787e-11 kg; data quality (3,1,1,1,5)
- Triethyl amine: 2.90972e-12 kg; data quality (5,1,1,1,5)
- Indeno(1,2,3-cd)pyrene: 5.59035e-13 kg; data quality (3,2,1,3,2)
- toluene: 1.77151e-5 kg; data quality (3,2,1,1,5)
- Butanol: 1.26149e-11 kg; data quality (5,1,1,1,4)
- acetonitrile: 7.35448e-11 kg; data quality (3,2,1,1,5)
- Creosol: 4.81268e-13, 5.25754e-14 kg (2 entries, compartments not in this file); data quality (5,1,1,1,5)
- Ethane, 1,1,1-trifluoro-, HFC-143a: 3.27121e-8 kg; data quality (4,2,1,4,1)
- 1,1-DICHLOROETHYLENE: 6.76082e-12 kg; data quality (3,2,1,1,5)
- Ethene, chloro-: 3.18525e-10 kg; data quality (3,2,1,1,5)
- butadiene: 2.78652e-9 kg; data quality (3,2,1,4,1)
- BUTYL ISOCYANATE: 2.67708e-9 kg; data quality (4,2,1,1,5)
- Phenol, pentachloro-: 3.6226e-13 kg; data quality (5,1,1,1,5)
- 4,4'-METHYLENEDIANILINE: 4.7831e-12 kg; data quality (4,2,1,1,5)
- NITRATE: 9.81715e-12 kg; data quality (5,1,1,1,5)
- 4,4'-isopropylidenediphenol: 3.11648e-9 kg; data quality (4,1,1,1,3)
- benzene: 3.67553e-7 kg; data quality (3,2,1,1,5)
- Propene: 6.36432e-7 kg; data quality (3,1,1,1,5)
- nitrogen oxides: 4.0667e-5 kg; data quality (2,2,1,1,4)
- VOC, volatile organic compounds: 0.000259766 kg; data quality (3,2,1,1,5)
- 2,4,5,2',5'-PENTACHLOROBIPHENYL: 3.02139e-16 kg; data quality (2,2,1,1,5)
- dibenzofuran: 9.73395e-12 kg; data quality (4,2,1,1,3)
- methyl isobutyl ketone: 4.6015e-6 kg; data quality (3,2,1,1,5)
- vinyl acetate: 3.60232e-9 kg; data quality (4,2,1,1,4)
- Diethylene glycol butyl ether: 1.33101e-7 kg; data quality (4,2,1,1,5)
- styrene: 7.11552e-7 kg; data quality (4,2,1,1,5)
- hydroquinone: 3.82466e-11 kg; data quality (3,2,1,1,5)
- Ethane, 1,1,1,2-tetrafluoro-, HFC-134a: 2.94437e-7 kg; data quality (4,2,1,4,1)
- acrylonitrile: 7.44196e-11 kg; data quality (4,2,1,1,5)
- sulfur dioxide: 1.3708e-6 kg; data quality (2,2,1,1,4)
- 2-methylnaphthalene: 2.90626e-11 kg; data quality (2,2,1,1,3)
- 2,2-BIS(4-HYDROXY-3,5-DIBROMOPHENYL)PROPANE: 7.69893e-12 kg; data quality (5,1,1,1,5)
- chloroform: 1.87308e-10 kg; data quality (4,2,1,1,5)
- methane, tetrachloro-, R-10: 1.05327e-8 kg; data quality (3,1,1,1,5)
- Methane: 4.87256e-7 kg; data quality (4,2,1,4,1)
- fluoranthene: 1.95807e-11 kg; data quality (3,2,1,3,3)
- Benzo(g,h,i)perylene: 6.41239e-10 kg; data quality (3,2,1,1,4)
- Xylene: 7.71819e-6 kg; data quality (4,2,1,1,5)
- carbonyl sulfide: 3.59747e-10 kg; data quality (4,2,1,1,5)
- Nickel, ion: 8.0675e-10 kg; data quality (3,2,1,1,5)
- 2-ethoxyethyl acetate: 1.58766e-8 kg; data quality (5,2,1,1,5)

## Inventory method
Input-output

## Modelling constants
The reference unit of all processes is 1 USD2013 of the good or service. The technosphere inputs are based on the US BEA detailed input-output tables for 2007. The IO tables are combined to develop a commodity-by-commodity model based on the the industry-technology assumption (see Suh et al., 2010), which assumes all commodities produced by a given industry have the same input structure, but that multiple industries can produce the same commodity. Thus, model technosphere flows represent commodity outputs (and not industry outputs) from other processes in the model. There are no by-products included in these processes. All commodity production is based on US-conditions, despite in reality that some goods and services are produced overseas, as USEEIO v1.1 is a single-region IO model.

## Completeness
The input-output approach assures that all purchased inputs associated with the sectors making these commodities as reported in the US census for 2007 are included. The direct resources extracted including minerals, energy sources, water and land occupied are included. Emissions to air include all critieria air pollutants, greenhouse gases, and hazardous and toxic air pollutants as defined by US EPA. Releases to water include toxics, total nitrogen and total phosphorus, and water discharges. Releases to soil or groundwater include toxics and agriculutural pesticides. Some metal releases to air, water and soil are not included because they could not be speciated. Solid hazardous and non-hazardous wastes generated are not included as an elementary flows although purchases of waste services are included.

## Data treatment
Greenhouse gases are primarily from the US Greenhouse Gas Emission Inventory (USEPA 2016a). Biogenic C uptake is not included (change from version 1.0), as biogenic C emission are not included. Toxic releases to air, water and soil (except pesticides) are from the 2013 Toxic Release Inventory (USEPA 2015a). Criteria air pollutants and hazardous air pollutants are from the 2011 National Emissions Inventory (USEPA 2015b). All estimates are normalized by industry based on sector output in the data year, then converted to 2013 USD using relative sector-specific CPIs (if data year is not 2013). Energy use represent raw renewables or fossil fuel energies and is based on EIA data for 2014. See Table 1 in Yang, Ingwersen et al. 2017 and Supporting Information 1, and the v1.1 data update notes (Ingwersen et al. 2017) for all details on environmental data sources used.Land occupation associated with manufacturing buildings was estimated based on the building floorspace data provided by the U.S. Energy Information Administration in the 2010 Manufacturing Energy Consumption Survey (EIA 2013). Portions of total renewable energy (EIA 2016) based on EIA-923 reports for 2014 (EIA 2017) are included. Nitrogen and Phosphorus releases are modeled in total N and total P equivalents as estimated by the Discharge Monitoring Report Nutrient Loading tool (USEPA 2016b). Self-supplied withdrawals were assigned to industrial sectors based on water use statistics for Canadian industries by NAICS 3-digit sector scaled to US production levels based on gross domestic product by industry (BEA 2015; Statistics Canada 2010), and further disaggregated to the manufacturing sectors based on compensation of employees as provided by the 2007 IO tables (BEA 2015). Water withdrawals associated with public supply were allocated to sectors based on their use of water, sewage, and other services in USD based on the IO tables (BEA 2015). Portions of total renewable energy (EIA 2016) by type are assigned to sectors (hydro, wind, solar, or) based on EIA-923 reports for 2014 (EIA 2017).

## Data collection
2015-2016

## Sampling procedure
US federal government sources, including surveys and US EPA emissions databases are used as the primary sources. From these sources, data for US reporting establishments/facilities are aggregated by the NAICS sector as defined in the BEA detailed 2007 input-output tables. When level of sector aggregation differs, or when direct emissions are not reported but modeled, additional sources are used to make allocations and estimates.

## Review details
In regard to quality assurance and peer-review, each dataset created went through Quality Assurance as defined in a quality assurance project plans at US EPA, CSRA or ERG. The model was assembled with the IO model builder model (USEPA 2016c). Validation functions were used to check that all the model components were properly assembled and harmonized. Bayou Demeke and Santosh Ghimire provided internal peer review of the model methodology and the manuscript underwent standard EPA management review. An editor and two anonymous reviewers at the Journal of Cleaner Production reviewed the model. In regard to data quality evaluation, data quality assessment was performed at the flow and process levels according to the updated US EPA data quality assessment guidelines as defined in US EPA (2016b).

## Intended application
The primary application is for use in the US Environmentally-Extended Input-Ouput model, USEEIO, version 1.1. This model is being used by the US EPA for supporting tools that prioritize goods and services based on potential environmental impacts, resource use or emissions for large regions, including the US and US states, and as a strealined tool for organizations as a starting point to consider sustainable materials management. Model results are designed to provide meso/macro-level decision support.

## Project
USEEIO v1.1 was developed by the US EPA with CSRA and ERG with Wesley W. Ingwersen and David E. Meyer as research leads. Yi Yang was the technical lead on the work for CSRA (contract EP-C-15-012); Troy Hawkins was lead for ERG (contract EP-C-12-021).

## Sources
- USGS 2015
- Yienger et al. 1995
- Nickerson et al. 2011
- EIA 2017
- Ingwersen et al. 2017
- USDA 2014
- USEPA 2016c
- Macknick et al. 2011
- BEA 2015
- EIA 2016
- Maupin et al. 2014
- EIA 2013
- EIA 2015
- Kim et el. 2013
- Ingwersen et al. DRAFT
- USEPA 2015a
- BLM 2008
- USDA 2006
- Lovelace 2009
- USEPA 2016a
- Blackhurst et al. 2010
- USEPA 2016b
- Torcellini et al. 2003
- USEPA 2015b
- USDA 2009b
- Edelen and Ingwersen 2017
- USDA 2016
- Goebes et al. 2003
- USGS 2016
- Statistics Canada 2010
- USDA 2009a
