# All other foods; at manufacturer

Dataset: openLCA process, unit process
Category: 3119: Other Food Manufacturing
Geography: United States
Time period: 2017-01-01 to 2017-12-31
Data quality: US EPA - Process Pedigree Matrix (1;1)
Exchange data quality scheme: US EPA - Flow Pedigree Matrix
Generated by: US EPA with CSRA and ERG
Owner: US EPA
Published in: Yang, Ingwersen et al. 2017
restrictionsDescription: This model shold be appropriately cited (see Yang, Ingwersen et al. 2017 source or Publication field) when used. Any changes or derivations of this model by the user should be documented. The model itself and any results from use of this model shall not be construed to consitute US EPA opinion or policy.
copyright: false

## General comment
BEA Code & Name is '311990:All other food manufacturing'. Description of the primary industry producing this good or service, adapted from the Census Bureau NAICS 2007 descriptions: This industry comprises establishments primarily engaged in manufacturing food (except animal food; grain and oilseed milling; sugar and confectionery products; preserved fruits, vegetables, and specialties; dairy products; meat products; seafood products; bakeries and tortillas; snack foods; coffee and tea; flavoring syrups and concentrates; seasonings; and dressings). Included in this industry are establishments primarily engaged in mixing purchased dried and/or dehydrated ingredients including those mixing purchased dried and/or dehydrated ingredients for soup mixes and bouillon.

## Technology
The process describes the average US production of this good or service within this NAICS-based grouping defined in the BEA 2007 detailed input-output tables (BEA 2015). Distribution, wholesale and retailing of this good or service, use, and final disposal are not included. Creation of a product system with this process will enable modeling of all upstream (supply-chain) activities.

## Geography
Data represent the 50 US states

## Time period
2017 was the year in which this version of USEEIO was released and is the target date for the model

## Reference product
- All other foods; at manufacturer: 1 USD

## Inputs from technosphere
All rows: data quality (1,3,1,1,1)
- Polystyrene foam products; at manufacturer: 1.38603e-5 USD
- Telecommunications: 0.00206667 USD
- Electronic equipment repair and maintenance: 0.00052126 USD
- State and local government enterprises: 0.00156354 USD
- Coal; at mine: 0.00166234 USD
- Investment advice, portfolio management, and other financial advising services: 0.000171909 USD
- Fertilizers; at manufacturer: 3.17991e-5 USD
- Petrochemicals; at manufacturer: 0.00025313 USD
- Independent artists, writers, and performers: 0.000118716 USD
- Insurance carriers: 0.00185554 USD
- Company and enterprise management: 0.0418493 USD
- Animal farms and aquaculture ponds (except cattle and poultry): 0.0185576 USD
- Securities and commodities brokerage and exchanges: 0.000435847 USD
- Drinking water and wastewater treatment; at consumer: 0.00146371 USD
- Dry, condensed, and evaporated dairy; at manufacturer: 0.00256296 USD
- Passenger ground transport: 0.000287262 USD
- Food and beverage stores: 4.42479e-6 USD
- Other textiles; at manufacturer: 3.39377e-6 USD
- Gaskets, seals, musical instruments, fasteners, brooms, brushes, mop and other misc. goods; at manufacturer: 5.89227e-5 USD
- Limited-service restaurants: 0.000974214 USD
- Vehicle engines and engine parts; at manufacturer: 5.42618e-5 USD
- Air and gas compressors; at manufacturer: 4.616e-6 USD
- Welding and Soldering Equipment, Scales and Balances, and other general purpose machinery; at manufacturer: 4.1699e-6 USD
- Newspapers; at publisher: 1.28222e-7 USD
- All other food and drinking places: 8.16356e-6 USD
- Metal pipe fittings, ball and roller bearings, industrial patterns, metal bath fixtures, other misc. fabricated metals; at manufacturer: 0.00424536 USD
- Paper; at manufacturer: 0.000175953 USD
- Performances: 2.88766e-6 USD
- Cookies, crackers, pastas, and tortillas; at manufacturer: 0.000834867 USD
- Sugar, candy, and chocolate; at manufacturer: 0.0181833 USD
- Full-service restaurants: 0.000571724 USD
- Wiring devices; at manufacturer: 6.81846e-8 USD
- Gasoline, fuels, and by-products of petroleum refining; at manufacturer: 0.00193877 USD
- Rubber tires; at manufacturer: 2.56011e-5 USD
- Computer terminals and other computer peripheral equipment; at manufacturer: 0.000208782 USD
- Hotels and campgrounds: 0.000523912 USD
- Consumer goods and general rental centers: 0.000155807 USD
- Management consulting: 0.000747733 USD
- Accounting, tax preparation, bookkeeping, and payroll: 0.00228109 USD
- Plastics; at manufacturer: 0.000363268 USD
- Analytical laboratory instruments; at manufacturer: 2.78411e-8 USD
- Fruit and vegetable preservation; at manufacturer: 0.0113031 USD
- Cardboard; at manufacturer: 0.00213558 USD
- Vehicle repair: 0.00114591 USD
- Relay and industrial controls; at manufacturer: 0.000128257 USD
- Wireless telecommunications: 0.000583025 USD
- Chemicals (except basic chemicals, agrichemicals, polymers, paints, pharmaceuticals,soaps, cleaning compounds); at manufacturer: 0.00383851 USD
- Vehicle rental and leasing: 0.00217864 USD
- Custom metal rolls; at manufacturer: 1.28222e-7 USD
- Vegetable oils and by-products; at manufacturer: 0.0149307 USD
- Lessors of nonfinancial intangible assets: 0.00304268 USD
- Satellite, telecommunications resellers, and all other telecommunications: 0.000106486 USD
- Ground or treated minerals and earth; at manufacturer: 1.28222e-5 USD
- Vending, commercial laundry, and other commercial and service industry machinery; at manufacturer: 1.28222e-7 USD
- Truck transport: 0.0278882 USD
- Metal hinges, keys, lock, and other hardware; at manufacturer: 1.00817e-6 USD
- Distilleries and spirits; at manufacturer: 2.04045e-5 USD
- Dimensional stone; at mine: 1.2694e-5 USD
- Fresh wheat, corn, rice, and other grains; at farm: 0.0238399 USD
- Surgical appliance and supplies; at manufacturer: 2.48077e-6 USD
- Vehicle electrical and electronic equipment; at manufacturer: 0.000142526 USD
- Transmission and power train parts; at manufacturer: 0.000121179 USD
- Primary iron, steel, and ferroalloy products; at manufacturer: 1.37045e-6 USD
- Sanitary paper (tissues, napkins, diapers, etc.); at manufacturer: 1.14509e-6 USD
- Business support: 0.00132079 USD
- Fluid milk and butter; at manufacturer: 0.0082958 USD
- Other basic organic chemicals; at manufacturer: 0.00460508 USD
- Fluid meters and counting devices; at manufacturer: 9.40162e-8 USD
- Frozen food; at manufacturer: 0.00360627 USD
- Electronic capacitors, resistors, coils, transformers, connectors and other components (except semiconductors and printed circuit assemblies); at manufacturer: 0.00053855 USD
- Seafood; at manufacturer: 6.87472e-6 USD
- Fresh fruits and tree nuts; at farm: 0.092749 USD
- Fresh vegetables, melons, and potatoes; at farm: 0.0543802 USD
- Specialized design: 0.00110979 USD
- Nonresidential building repair and maintanence: 0.00312227 USD
- Air purification and ventilation equipment; at manufacturer: 5.38533e-6 USD
- Toiletries; at manufacturer: 3.78917e-6 USD
- Nondepository credit intermediation and related activities: 0.00191066 USD
- Paper bags and coated paper; at manufacturer: 0.0225267 USD
- Wireless communications; at manufacturer: 4.73486e-7 USD
- Other basic inorganic chemicals; at manufacturer: 0.000212597 USD
- Household goods repair: 0.000415284 USD
- Communications equipment; at manufacturer: 9.48198e-9 USD
- Insurance agencies and brokerages: 0.000772841 USD
- Civic, social, professional, and similar organizations: 0.000792662 USD
- Flours and malts; at manufacturer: 0.02756 USD
- Dairies: 0.0317453 USD
- Heavy gauge metal tanks; at manufacturer: 3.82981e-6 USD
- Soap and cleaning compounds; at manufacturer: 0.000813592 USD
- Other support services: 0.00406388 USD
- Industrial process variable instruments; at manufacturer: 2.56444e-7 USD
- Breakfast cereals; at manufacturer: 3.37154e-6 USD
- Tobacco, cotton, sugarcane, peanuts, sugar beets, herbs and spices, and other crops; at farm: 0.00523073 USD
- Air conditioning, refrigeration, and warm air heating equipment; at manufacturer: 0.000425965 USD
- Buildings and dwellings services: 0.00408281 USD
- Packaged meat (except poultry); at manufacturer: 0.0088814 USD
- Travel arrangement and reservation: 0.000444857 USD
- Marketing research and all other miscellaneous professional, scientific, and technical services: 0.00429279 USD
- Flavored drink concentrates; at manufacturer: 0.00803004 USD
- Glass and glass products; at manufacturer: 0.00184185 USD
- Architectural, engineering, and related services: 0.00473067 USD
- Seasonings and dressings; at manufacturer: 0.00211042 USD
- Other real estate: 0.000620272 USD
- Unrefined oil and gas; at extraction site: 1.79949e-5 USD
- Office administration: 0.00020249 USD
- Investigation and security: 0.000650692 USD
- Plastic pipe, fittings, and sausage casings; at manufacturer: 3.35362e-6 USD
- Machine shops; at manufacturer: 0.000369109 USD
- Golf courses, marinas, ski resorts, fitness and other rec centers and industries: 0.000117459 USD
- All other converted paper products; at manufacturer: 0.00435808 USD
- Other vehicle parts; at manufacturer: 0.000263516 USD
- Monetary authorities and depository credit intermediation: 0.00419048 USD
- Veneer, plywood, and engineered wood; at manufacturer: 3.80816e-5 USD
- Natural gas; at consumer: 0.00844112 USD
- Bread and other baked goods; at manufacturer: 2.72647e-6 USD
- Packaging machinery; at manufacturer: 2.86763e-7 USD
- Legal services: 0.00173515 USD
- Specialty transformers; at manufacturer: 1.01419e-5 USD
- Optical instruments and lenses; at manufacturer: 1.154e-6 USD
- Light bulbs; at manufacturer: 0.000109693 USD
- Fresh soybeans, canola, flaxseeds, and other oilseeds; at farm: 0.000546449 USD
- Warehousing: 0.00114198 USD
- Synthetic rubber and artificial and synthetic fibers; at manufacturer: 6.15466e-6 USD
- Commercial machinery repair: 0.00228607 USD
- Light gauge metal cans, boxes, and containers; at manufacturer: 0.00506148 USD
- Other computer related services, including facilities management: 0.000269948 USD
- Abrasive products; at manufacturer: 3.89608e-6 USD
- Books, newspapers, magazines, and other print media; at manufacturer: 8.71897e-5 USD
- Poultry farms: 0.0239049 USD
- Urethane and other foam products; at manufacturer: 2.84092e-6 USD
- Nonferrous metal casts; at manufacturer: 1.28222e-6 USD
- Promoters and agents: 5.3287e-5 USD
- Refined vegetable, olive, and seed oils; at manufacturer: 0.00943555 USD
- Cheese; at manufacturer: 0.00136403 USD
- Commercial equipment rental: 0.000843286 USD
- Cardboard containers; at manufacturer: 0.0242983 USD
- Rail transport: 0.0062443 USD
- Adhesives; at manufacturer: 0.000107701 USD
- Valve and fittings (except for plumbing); at manufacturer: 3.59439e-5 USD
- Other retail: 6.8494e-5 USD
- Data processing and hosting: 0.00182749 USD
- Wholesale trade: 0.0874149 USD
- Power boilers and heat exchangers; at manufacturer: 4.75211e-6 USD
- Cattle ranches and feedlots: 3.73931e-5 USD
- All other foods; at manufacturer: 0.0192872 USD
- Semiconductors; at manufacturer: 1.65093e-5 USD
- Metal coatings, engravings, and heat treatments; at manufacturer: 2.13649e-5 USD
- Paints and coatings; at manufacturer: 5.45992e-7 USD
- Ball and roller bearings; at manufacturer: 1.28222e-7 USD
- Laminated plastic plates and shapes; at manufacturer: 7.04205e-7 USD
- Wild-caught fish and game; at place of capture: 0.000258447 USD
- other miscellaneous electrical equipment and components; at manufacturer: 2.12948e-6 USD
- Noncomparable imports: 0.00350998 USD
- Magazines and journals; at publisher: 9.1401e-7 USD
- Material handling equipment; at manufacturer: 0.000819815 USD
- Screws, nuts, and bolts; at manufacturer: 4.65761e-6 USD
- Office supplies (not paper); at manufacturer: 9.40162e-8 USD
- Employment services: 0.00084769 USD
- Vehicles and parts sales: 3.83841e-5 USD
- Coffee and tea; at manufacturer: 0.000219941 USD
- Compressed Gases; at manufacturer: 2.32082e-5 USD
- Ice cream and frozen desserts; at manufacturer: 0.000253437 USD
- Iron, gold, silver, and other metal ores; at mine: 3.71844e-6 USD
- Metal structural products; at manufacturer: 2.56444e-7 USD
- Corn products; at manufacturer: 0.00420683 USD
- Air transport: 0.00196735 USD
- Advertising and public relations: 0.00843825 USD
- Software: 4.80058e-5 USD
- Sports: 5.62742e-5 USD
- Rubber and plastic belts and hoses; at manufacturer: 2.0324e-7 USD
- Facilities support: 0.00034021 USD
- Other animal food; at manufacturer: 3.09716e-6 USD
- General merchandise stores: 9.59585e-6 USD
- Medicinal and botanical ingredients; at manufacturer: 2.42407e-5 USD
- Computer systems design: 0.000649094 USD
- Waste management and remediation: 0.00413755 USD
- Snack foods; at manufacturer: 8.03652e-5 USD
- Environmental and other technical consulting services: 0.000160251 USD
- Motor vehicle steering, suspension components (except spring), and brake systems; at manufacturer: 2.13123e-5 USD
- Other petroleum and coal products; at manufacturer: 0.00200799 USD
- Synthetic dyes and pigments; at manufacturer: 4.46796e-5 USD
- Scenic and sightseeing transportation and support activities for transportation: 0.000111685 USD
- Packaged poultry; at manufacturer: 0.00479946 USD
- Pipeline transport: 5.63436e-5 USD
- Greenhouse crops, mushrooms, nurseries, and flowers; at farm: 0.0154458 USD
- Scientific research and development: 0.000200203 USD
- Timber and raw forest products; at forest: 0.0012644 USD
- Cutlery and handtools; at manufacturer: 4.83161e-6 USD
- Sand, gravel, clay, phosphate, other nonmetallic minerals; at mine: 6.19601e-6 USD
- Other rubber products; at manufacturer: 3.59242e-7 USD
- Machinery for the paper, textile, food or other industries (except semiconductor machinery); at manufacturer: 6.79577e-6 USD
- Plastic bags, films, and sheets; at manufacturer: 0.0111773 USD
- Dry-cleaning and laundry: 1.88032e-7 USD
- Custom computer programming: 6.66755e-6 USD
- Water transport (boats, ships, ferries): 0.00409385 USD
- Plastic bottles; at manufacturer: 0.00478409 USD
- Leather; at manufacturer: 1.32748e-7 USD
- Wooden windows, door, and flooring; at manufacturer: 9.40162e-8 USD
- Electricity; at consumer: 0.00737039 USD
- Lids, jars, bottle caps, other metal closures and crowns; at manufacturer: 5.41398e-5 USD
- Other plastic products; at manufacturer: 0.0150916 USD
- Cutting and machine tool accessory, rolling mill, and other metalworking machines; at manufacturer: 5.61278e-5 USD
- Printed circuit and electronic assembly; at manufacturer: 1.26937e-5 USD

## Inputs from nature
- Occupation, urban, discontinuously built: 8.0007e-5 m2*a; data quality (4,2,1,1,1)
- Water, fresh: 0.000888209 m3; data quality (2,2,1,4,2)
- Water, fresh: 0.00265643 m3; data quality (3,2,1,4,2)
- Energy, wind: 0.00169737 MJ; data quality (3,1,1,1,1)
- Energy, solar: 7.16711e-5 MJ; data quality (3,1,1,1,1)
- Water, saline: 0.000156031 m3; data quality (4,2,1,4,2)
- Occupation, industrial area: 0.000238484 m2*a; data quality (4,2,1,1,1)
- Energy, biomass: 0.178241 MJ; data quality (3,1,1,1,1)
- Occupation, industrial area, built up: 7.94946e-5 m2*a; data quality (4,2,1,1,1)

## Emissions to nature
- Ethylene glycol monoethyl ether: 1.64918e-11 kg; data quality (3,2,1,1,4)
- 2,2-BIS(4-HYDROXY-3,5-DIBROMOPHENYL)PROPANE: 6.36419e-13 kg; data quality (5,1,1,1,4)
- ethene, tetrachloro-: 1.7242e-9 kg; data quality (3,2,1,1,4)
- PHOSPHORUS: 2.33863e-9 kg; data quality (3,2,1,1,5)
- PYRIDINE: 1.12699e-11, 9.84206e-12 kg (2 entries, compartments not in this file); data quality (4,1,1,1,4)
- TERT-BUTYL ALCOHOL: 2.1418e-12, 3.97838e-10 kg (2 entries, compartments not in this file); data quality (4,1,1,1,4)
- 4-nitrophenol: 1.15418e-10 kg; data quality (3,2,1,1,5)
- Phthalate, dimethyl-: 9.59204e-13 kg; data quality (4,2,1,1,4)
- ethylbenzene: 5.79127e-10 kg; data quality (4,1,1,1,4)
- cumene: 1.43724e-10 kg; data quality (4,2,1,1,4)
- THIOUREA: 1.27947e-14 kg; data quality (3,1,1,1,4)
- p-phenylenediamine: 2.46715e-13 kg; data quality (5,2,1,1,5)
- ACETONE CYANOHYDRIN: 2.91692e-10 kg; data quality (3,1,1,1,4)
- Triethyl amine: 8.95561e-11 kg; data quality (4,2,1,1,4)
- Carbon dioxide: 0.0415947 kg; data quality (4,2,1,4,1)
- o-Xylene: 1.5759e-9 kg; data quality (3,2,1,2,4)
- CATECHOL: 6.11942e-13 kg; data quality (2,1,1,1,4)
- polychlorinated biphenyls: 1.93305e-13 kg; data quality (3,2,1,1,4)
- Benzo(g,h,i)perylene: 7.00015e-10 kg; data quality (3,2,1,1,5)
- 1,4-BENZOQUINONE: 4.69505e-13 kg; data quality (3,2,1,1,4)
- 2-nitropropane: 5.04844e-13 kg; data quality (5,2,1,1,4)
- 2,3,4'-TRICHLOROBIPHENYL: 2.3948e-18 kg; data quality (2,2,1,1,4)
- PERACETIC ACID: 1.92091e-13, 2.28319e-10 kg (2 entries, compartments not in this file); data quality (4,1,1,1,4)
- 2-PHENYLPHENOL: 7.49629e-12, 6.62937e-12 kg (2 entries, compartments not in this file); data quality (3,1,1,1,4)
- Phthalate, dimethyl-: 2.72627e-11 kg; data quality (4,1,1,1,4)
- t-Butyl methyl ether: 6.81805e-11 kg; data quality (4,1,1,1,4)
- Methyl iodide: 1.68959e-17 kg; data quality (4,2,1,1,4)
- biphenyl: 3.28062e-9 kg; data quality (4,2,1,1,5)
- aniline: 8.68488e-9 kg; data quality (4,2,1,1,5)
- naphthalene: 2.42782e-8 kg; data quality (3,2,1,1,5)
- dibenzofuran: 1.40426e-10 kg; data quality (4,2,1,1,5)
- PERACETIC ACID: 6.85331e-10 kg; data quality (4,1,1,1,5)
- 1-Methyl-2-pyrrolidinone: 4.7024e-10 kg; data quality (5,1,1,1,4)
- CHLORINE: 5.09951e-14 kg; data quality (2,1,1,1,4)
- NITRIC ACID: 2.19748e-8 kg; data quality (3,1,1,1,5)
- Cobalt: 1.39419e-9 kg; data quality (3,2,1,1,5)
- 2-METHOXYETHANOL: 5.33111e-10 kg; data quality (4,2,1,1,4)
- toluene, 2,4-dinitro-: 2.222e-10 kg; data quality (5,2,1,1,4)
- Phthalate, dioctyl-: 3.52086e-11, 2.54976e-13 kg (2 entries, compartments not in this file); data quality (4,1,1,1,4)
- Chrysene, 5-methyl-: 6.22917e-17 kg; data quality (2,2,1,1,4)
- Chloroform: 1.65194e-11, 1.33286e-11 kg (2 entries, compartments not in this file); data quality (3,1,1,1,4)
- particulates, < 10 um: 9.1899e-6 kg; data quality (3,2,1,1,5)
- chromium: 3.00871e-14, 6.62937e-14 kg (2 entries, compartments not in this file); data quality (4,1,1,1,4)
- antimony: 4.15814e-10, 2.54976e-13 kg (2 entries, compartments not in this file); data quality (2,1,1,1,4)
- Naphthalene: 3.48093e-10 kg; data quality (4,1,1,1,4)
- nitrogen oxides: 3.46963e-5 kg; data quality (2,2,1,1,5)
- Xylene: 1.4382e-8 kg; data quality (3,2,1,2,3)
- Formaldehyde: 2.79614e-11 kg; data quality (2,1,1,1,4)
- methane, monochloro-, r-40: 2.32155e-9 kg; data quality (3,2,1,1,4)
- methanol: 4.31266e-9 kg; data quality (3,1,1,1,4)
- NITROUS ACID: 1.21328e-8, 2.88296e-10 kg (2 entries, compartments not in this file); data quality (5,1,1,1,4)
- 2,4,5,2',5'-PENTACHLOROBIPHENYL: 4.22482e-18 kg; data quality (2,2,1,1,4)
- MOLYBDENUM(VI): 3.50745e-11 kg; data quality (3,1,1,1,4)
- lead: 4.26099e-9 kg; data quality (3,2,1,1,5)
- Hydrazine: 1.66239e-12 kg; data quality (4,2,1,1,4)
- Ethylene glycol monoethyl ether: 3.66808e-10, 3.64436e-10 kg (2 entries, compartments not in this file); data quality (5,1,1,1,4)
- HCFC-225cb: 4.00312e-12 kg; data quality (2,1,1,1,4)
- Indeno(1,2,3-cd)pyrene: 1.01494e-11 kg; data quality (3,2,1,1,5)
- PHTHALIC ANHYDRIDE: 2.54976e-13 kg; data quality (3,1,1,1,4)
- PHENOTHRIN: 2.09074e-13 kg; data quality (5,1,1,1,4)
- benzene, chloro-: 4.42281e-10 kg; data quality (4,2,1,1,5)
- AMMONIA: 3.28738e-7 kg; data quality (3,1,1,1,5)
- 2-chloro-1-phenylethanone: 1.712e-12 kg; data quality (2,2,1,1,3)
- Nitrogen: 2.47051e-5 kg; data quality (2,2,1,1,5)
- lead: 1.1705e-11, 3.48143e-10 kg (2 entries, compartments not in this file); data quality (3,1,1,1,4)
- Chromium VI: 6.88287e-10 kg; data quality (3,2,1,1,5)
- 2-Mercaptobenzothiazole: 5.89504e-11 kg; data quality (3,1,1,1,4)
- butanol: 4.84082e-10 kg; data quality (5,1,1,1,4)
- Captan: 4.28792e-14 kg; data quality (5,2,1,1,4)
- phosgene: 1.51453e-13 kg; data quality (5,2,1,1,4)
- epichlorohydrin: 1.03443e-9 kg; data quality (3,2,1,1,4)
- formic acid: 1.43035e-9 kg; data quality (3,1,1,1,4)
- MALEIC ANHYDRIDE: 7.89761e-11 kg; data quality (4,1,1,1,4)
- BENZOIC TRICHLORIDE (BENZOTRICHLORIDE): 1.3126e-12 kg; data quality (3,2,1,1,4)
- diethanolamine: 1.6862e-10 kg; data quality (3,2,1,1,4)
- copper: 5.15051e-12, 1.50589e-11 kg (2 entries, compartments not in this file); data quality (4,1,1,1,4)
- 1,1,2,2-tetrachloroethane: 5.12814e-12 kg; data quality (3,2,1,1,4)
- Water, saline: 7.90606e-5 m3; data quality (4,2,1,4,2)
- toluene-2,4-diisocyante: 1.71647e-11 kg; data quality (3,2,1,1,4)
- CHLOROPRENE: 3.02907e-13 kg; data quality (2,2,1,1,4)
- Methane: 9.77347e-7 kg; data quality (4,2,1,4,1)
- Benzene, ethyl-: 5.09951e-14, 9.4299e-11 kg (2 entries, compartments not in this file); data quality (4,1,1,1,4)
- phthalate, dioctyl-: 5.52179e-10 kg; data quality (3,2,1,1,4)
- isophorone: 2.0931e-10 kg; data quality (2,2,1,1,3)
- nitric acid: 3.97079e-8 kg; data quality (3,1,1,1,5)
- formaldehyde: 1.83533e-11 kg; data quality (2,1,1,1,3)
- Asbestos: 1.91793e-13 kg; data quality (5,2,1,1,5)
- silver: 2.80473e-14 kg; data quality (4,1,1,1,4)
- Dinitrogen monoxide: 1.11974e-7 kg; data quality (4,2,1,4,1)
- Propylene oxide: 9.21065e-14, 9.21065e-14 kg (2 entries, compartments not in this file); data quality (3,1,1,1,3)
- benzo(a)pyrene: 2.41607e-11 kg; data quality (2,2,1,1,5)
- ethane, 1,2-dichloro-: 1.38691e-9 kg; data quality (3,2,1,1,4)
- Methane, difluoro-, HFC-32: 4.48635e-8 kg; data quality (4,2,1,4,1)
- AZIRIDINE: 4.44378e-12 kg; data quality (4,2,1,1,4)
- CHLORONAPHTHALENE: 7.12116e-18 kg; data quality (1,2,1,1,4)
- chlorine: 9.84624e-9 kg; data quality (4,2,1,1,5)
- ammonia: 1.55349e-6 kg; data quality (3,1,1,1,5)
- ALUMINUM OXIDE: 7.25151e-11 kg; data quality (5,1,1,1,4)
- Xylene: 3.72319e-10, 1.37687e-12 kg (2 entries, compartments not in this file); data quality (4,1,1,1,4)
- ethylene glycol: 8.68138e-9 kg; data quality (5,2,1,1,4)
- ETHYLENETHIOUREA: 6.68036e-12 kg; data quality (2,1,1,1,4)
- Methyl acrylate: 1.52985e-13, 5.60437e-10 kg (2 entries, compartments not in this file); data quality (3,1,1,1,4)
- formaldehyde: 2.92781e-7 kg; data quality (2,2,1,1,5)
- acetamide: 5.09951e-14 kg; data quality (4,1,1,1,4)
- methyl isobutyl ketone: 1.70257e-9 kg; data quality (4,2,1,1,4)
- Permethrin: 8.4142e-12 kg; data quality (2,1,1,1,4)
- Benzene, 1,2,4-trimethyl-: 2.54976e-13 kg; data quality (5,1,1,1,4)
- butadiene: 1.65973e-9 kg; data quality (3,2,1,3,2)
- m-xylene: 1.19743e-9 kg; data quality (3,2,1,4,1)
- 1,2-BUTYLENE OXIDE: 5.65976e-13 kg; data quality (4,2,1,1,4)
- Phenol: 1.76647e-10 kg; data quality (3,1,1,1,4)
- Triethyl amine: 3.1515e-11 kg; data quality (5,1,1,1,4)
- VOC, volatile organic compounds: 7.35847e-5 kg; data quality (3,2,1,1,5)
- hydroquinone: 5.78408e-12 kg; data quality (3,2,1,1,4)
- DIETHANOLAMINE: 1.56912e-10, 1.60401e-11 kg (2 entries, compartments not in this file); data quality (4,1,1,1,4)
- Methane, tetrachloro-, R-10: 1.27488e-13, 1.75423e-11 kg (2 entries, compartments not in this file); data quality (3,1,1,1,4)
- Diethylene glycol butyl ether: 1.41791e-8 kg; data quality (3,2,1,1,5)
- Phosphine: 3.8966e-8 kg; data quality (4,2,1,1,5)
- ALLYL CHLORIDE: 2.33996e-10 kg; data quality (3,2,1,1,4)
- phenol: 3.61935e-8 kg; data quality (4,2,1,1,4)
- acetaldehyde: 3.07119e-6 kg; data quality (3,2,1,1,5)
- isobutyraldehyde: 7.95465e-10 kg; data quality (2,1,1,1,3)
- catechol: 6.74156e-11 kg; data quality (2,1,1,1,4)
- Butanol: 1.43329e-12, 3.50847e-11 kg (2 entries, compartments not in this file); data quality (5,1,1,1,4)
- SELENIUM(IV): 3.05526e-9 kg; data quality (4,1,1,1,3)
- Ethene, chloro-: 1.33917e-9 kg; data quality (3,2,1,1,4)
- 2-PHENOXYETHANOL: 1.15508e-10 kg; data quality (5,2,1,1,4)
- benzyl chloride: 3.2905e-10 kg; data quality (2,2,1,1,3)
- ACRYLAMIDE: 9.97307e-10 kg; data quality (4,2,1,1,4)
- 2,4-D: 3.15684e-23 kg; data quality (3,2,1,1,5)
- Epichlorohydrin: 1.05546e-10 kg; data quality (2,1,1,1,4)
- arsenic: 1.23463e-9 kg; data quality (3,2,1,1,4)
- 2,4,6-trichlorophenol: 2.61048e-17 kg; data quality (2,2,1,1,4)
- Bis(2-chloroethyl)ether: 5.09951e-14 kg; data quality (2,1,1,1,4)
- carbon tetrachloride: 8.85495e-10 kg; data quality (4,2,1,1,5)
- monochloroethane: 7.1017e-11 kg; data quality (3,2,1,1,4)
- acrylonitrile: 4.46285e-10 kg; data quality (4,2,1,1,4)
- 2-ethoxyethyl acetate: 1.93834e-13 kg; data quality (5,2,1,1,4)
- cyclohexane: 1.025e-9 kg; data quality (4,1,1,1,4)
- Thiram: 2.26418e-11 kg; data quality (4,1,1,1,4)
- ozone: 3.68242e-12 kg; data quality (4,1,1,1,4)
- bromine: 1.52985e-13 kg; data quality (5,1,1,1,4)
- trichloroethylene: 2.67565e-9 kg; data quality (4,2,1,1,4)
- Sodium formate: 1.40747e-12, 5.86444e-12 kg (2 entries, compartments not in this file); data quality (3,1,1,1,4)
- POTASSIUM BROMATE: 4.12963e-9 kg; data quality (5,1,1,1,5)
- Water, fresh: 0.0030277 m3; data quality (3,2,1,4,2)
- Cumene hydroperoxide: 6.60741e-9 kg; data quality (3,1,1,1,5)
- o-toluidine: 1.60772e-15 kg; data quality (4,2,1,1,4)
- Dimethylamine: 4.15516e-10 kg; data quality (3,1,1,1,4)
- 1,4-dioxane: 4.82768e-10 kg; data quality (4,2,1,1,4)
- propanal: 4.79194e-9 kg; data quality (3,2,1,2,3)
- selenium: 9.04487e-10 kg; data quality (2,2,1,1,4)
- hexachlorobenzene: 1.71647e-18 kg; data quality (3,2,1,1,4)
- propargyl alcohol: 4.84766e-12, 1.58446e-11 kg (2 entries, compartments not in this file); data quality (4,1,1,1,4)
- chlorine: 5.39841e-10 kg; data quality (2,1,1,1,4)
- acetophenone: 4.63409e-11 kg; data quality (3,2,1,1,5)
- 2,2,4-trimethylpentane: 1.42693e-6 kg; data quality (3,2,1,1,5)
- dimethyl formamide: 1.07757e-10 kg; data quality (4,2,1,1,4)
- methanol: 3.18378e-7 kg; data quality (4,2,1,1,5)
- benz[a]anthracene: 1.64921e-11 kg; data quality (3,2,1,1,5)
- Chromium, ion: 5.88927e-9 kg; data quality (2,2,1,1,5)
- Benzo(b)fluoranthene: 1.14311e-12 kg; data quality (2,2,1,2,3)
- Nitrilotriacetic acid: 1.0454e-12 kg; data quality (5,1,1,1,4)
- chloroform: 8.87666e-9 kg; data quality (4,2,1,1,3)
- styrene: 7.79236e-8 kg; data quality (4,2,1,1,5)
- BUTYL ACRYLATE: 1.1974e-10, 2.7487e-10 kg (2 entries, compartments not in this file); data quality (4,1,1,1,4)
- m-cresol: 5.78451e-13 kg; data quality (4,2,1,1,4)
- HYDROCHLORIC ACID: 2.76598e-10 kg; data quality (2,1,1,1,4)
- acetonitrile: 3.7534e-9 kg; data quality (3,2,1,1,4)
- Propene: 2.53536e-9 kg; data quality (3,1,1,1,4)
- phenol: 1.24683e-12 kg; data quality (3,1,1,1,4)
- cadmium: 8.91184e-10 kg; data quality (3,2,1,1,5)
- Phosphorus: 2.93879e-6 kg; data quality (3,1,1,1,5)
- DMTT (DAZOMET): 2.85573e-12 kg; data quality (4,1,1,1,4)
- Benzo(k)fluoranthene: 8.11847e-13 kg; data quality (2,2,1,2,3)
- Chrysene: 3.71879e-11 kg; data quality (2,2,1,1,5)
- Methane, monochloro-, R-40: 2.54976e-13 kg; data quality (3,1,1,1,4)
- HYDROQUINONE: 1.27034e-11 kg; data quality (2,1,1,1,4)
- mercury: 9.08031e-11 kg; data quality (2,2,1,1,4)
- methane, chlorodifluoro-, hcfc-22: 5.94179e-10 kg; data quality (4,1,1,1,3)
- hydrogen chloride: 7.86215e-7 kg; data quality (2,2,1,1,4)
- Propane, 1,1,1,3,3,3-hexafluoro-, HCFC-236fa: 8.90463e-10 kg; data quality (4,2,1,4,1)
- Methane, dibromo-: 5.19855e-11 kg; data quality (5,1,1,1,4)
- PCB-1: 2.02711e-19 kg; data quality (2,2,1,1,4)
- Propene, 1,3-dichloro-: 2.08907e-14 kg; data quality (3,2,1,1,4)
- Dimethyl sulfate: 9.62731e-11 kg; data quality (2,2,1,1,4)
- toluene: 2.75793e-6 kg; data quality (3,2,1,1,5)
- acrylic acid: 3.41018e-9 kg; data quality (4,2,1,1,4)
- methane, bromo-, halon 1001: 1.5827e-7 kg; data quality (3,2,1,1,5)
- ethylene glycol: 5.80999e-11 kg; data quality (5,1,1,1,4)
- ETHENE: 7.39166e-10 kg; data quality (3,1,1,1,4)
- nickel: 1.16155e-10, 2.12393e-11 kg (2 entries, compartments not in this file); data quality (4,1,1,1,3)
- METHACRYLONITRILE: 5.09951e-14 kg; data quality (5,1,1,1,4)
- Sulfuric acid: 7.14165e-8 kg; data quality (2,1,1,1,4)
- 4,4'-isopropylidenediphenol: 1.86132e-11 kg; data quality (4,1,1,1,4)
- Dichlorvos: 2.19837e-9 kg; data quality (3,2,1,1,5)
- Hydrazine, methyl-: 6.27738e-11 kg; data quality (2,2,1,1,3)
- bis(2-chloroethyl)ether: 1.2457e-11 kg; data quality (2,1,1,1,4)
- 4-Methyl-2-pentanone: 1.27488e-11 kg; data quality (4,1,1,1,4)
- Nitrobenzene: 1.92851e-11 kg; data quality (4,2,1,1,4)
- pentachlorophenol: 1.09794e-12 kg; data quality (3,2,1,1,5)
- Acetaldehyde: 1.0048e-12 kg; data quality (3,1,1,1,3)
- 1,1,1-trichloroethane: 4.43811e-9 kg; data quality (4,2,1,1,5)
- ACRYLAMIDE: 9.17913e-13 kg; data quality (4,1,1,1,4)
- ethane, 1,1,2-trichloro-: 1.40483e-11 kg; data quality (4,2,1,1,4)
- HYDROGEN SULFIDE: 5.38702e-9, 6.66945e-10 kg (2 entries, compartments not in this file); data quality (3,1,1,1,3)
- QUINOLINE: 1.04722e-11 kg; data quality (2,1,1,1,4)
- ethane, 1,2-dibromo-: 5.12967e-13 kg; data quality (2,2,1,1,3)
- Ethylene glycol: 4.1965e-10 kg; data quality (5,1,1,1,4)
- Phthalate, dibutyl-: 4.05527e-11 kg; data quality (3,2,1,1,5)
- 2,4-dimethylphenol: 3.55487e-12 kg; data quality (4,1,1,1,4)
- cyanide: 1.04772e-9 kg; data quality (3,2,1,1,3)
- benzene: 1.09714e-7 kg; data quality (3,2,1,1,5)
- methylene diphenyl diisocyanate: 1.14178e-11 kg; data quality (4,2,1,1,4)
- NITROGLYCERIN: 1.12123e-9 kg; data quality (5,1,1,1,4)
- 4-nitroaniline: 2.1163e-12 kg; data quality (5,1,1,1,4)
- beryllium: 8.32973e-11 kg; data quality (2,2,1,1,4)
- Ethane, 1,1,1,2-tetrafluoro-, HFC-134a: 2.90367e-7 kg; data quality (4,2,1,4,1)
- dimethyl formamide: 4.67371e-12, 1.076e-11 kg (2 entries, compartments not in this file); data quality (4,1,1,1,4)
- phthalic anhydride: 4.13957e-9 kg; data quality (2,2,1,1,4)
- hydrogen fluoride: 3.27028e-8 kg; data quality (2,2,1,1,4)
- DIPHENYLAMINE: 2.1265e-12 kg; data quality (1,1,1,1,4)
- Propane, 1,2-dichloro-: 1.82563e-13 kg; data quality (5,1,1,1,4)
- manganese: 5.3035e-11 kg; data quality (4,1,1,1,4)
- 1,2-DICHLOROETHYLENE: 9.07714e-13 kg; data quality (5,1,1,1,4)
- 1,2,4-trimethylbenzene: 2.27784e-10, 6.47351e-10 kg (2 entries, compartments not in this file); data quality (5,1,1,1,4)
- fluorene: 7.22646e-11 kg; data quality (3,2,1,2,4)
- anthracene: 5.34631e-11 kg; data quality (3,2,1,1,5)
- methyl methacrylate: 1.01886e-9 kg; data quality (4,2,1,1,4)
- Hydrocarbons, aromatic: 1.11092e-9 kg; data quality (3,2,1,2,2)
- diisocyanates: 1.77739e-11 kg; data quality (4,1,1,1,4)
- Propane, 1,2-dichloro-: 3.92749e-10 kg; data quality (4,2,1,1,5)
- 2,4-Diaminotoluene: 9.99592e-12 kg; data quality (2,2,1,1,4)
- hexane: 1.79218e-6 kg; data quality (3,2,1,1,5)
- O-ANISIDINE: 5.04844e-14 kg; data quality (5,2,1,1,4)
- benzene: 2.08496e-11 kg; data quality (3,1,1,1,3)
- SEC-BUTYL ALCOHOL: 3.88226e-11 kg; data quality (5,1,1,1,4)
- Benzo(a)anthracene: 9.20895e-14 kg; data quality (2,2,1,1,5)
- ethyl acrylate: 2.6072e-10 kg; data quality (4,2,1,1,4)
- mercury: 1.87937e-13, 5.2525e-14 kg (2 entries, compartments not in this file); data quality (3,1,1,1,4)
- Acetonitrile: 5.2474e-11 kg; data quality (3,1,1,1,4)
- ethylene oxide: 7.02731e-10 kg; data quality (3,2,1,1,5)
- Decabromodiphenyl oxide: 5.71146e-13, 1.58416e-11 kg (2 entries, compartments not in this file); data quality (4,1,1,1,4)
- Ethane, pentafluoro-, HFC-125: 7.70383e-8 kg; data quality (4,2,1,4,1)
- pyrene: 7.20685e-11 kg; data quality (3,2,1,1,5)
- Dibenz(a,h)anthracene: 4.55154e-13 kg; data quality (2,2,1,1,4)
- HCFC-225ca: 2.80473e-12 kg; data quality (5,1,1,1,4)
- ammonia: 9.27534e-5 kg; data quality (3,2,1,1,5)
- Benzyl chloride: 4.81564e-10 kg; data quality (3,1,1,1,4)
- Zinc: 1.27348e-12 kg; data quality (5,1,1,1,4)
- toluene: 3.08848e-10, 9.86366e-13 kg (2 entries, compartments not in this file); data quality (5,1,1,1,4)
- 1,4-dichlorobenzene: 9.68557e-12 kg; data quality (2,2,1,1,4)
- Ethane, 1,1,1-trifluoro-, HFC-143a: 3.29615e-8 kg; data quality (4,2,1,4,1)
- manganese: 1.39063e-8 kg; data quality (3,2,1,1,5)
- benzene, ethyl-: 4.34196e-9 kg; data quality (3,2,1,3,3)
- phenanthrene: 2.66604e-10 kg; data quality (3,2,1,1,4)
- o-cresol: 2.99285e-11 kg; data quality (3,2,1,1,5)
- bromoform: 1.13489e-11 kg; data quality (3,2,1,1,3)
- barium: 5.95715e-11 kg; data quality (4,1,1,1,4)
- 2,4-dinitrophenol: 1.26299e-10 kg; data quality (5,1,1,1,4)
- 4,4'-METHYLENEBIS(2-CHLOROANALINE): 6.81742e-11 kg; data quality (5,2,1,1,4)
- particulates, < 2.5 um: 7.75577e-5 kg; data quality (3,2,1,1,5)
- propylene oxide: 1.08905e-7 kg; data quality (3,2,1,1,5)
- antimony: 8.6337e-9 kg; data quality (3,2,1,1,5)
- Aluminum: 5.00993e-11 kg; data quality (4,1,1,1,4)
- Styrene: 5.09951e-14 kg; data quality (3,1,1,1,4)
- acenaphthylene: 2.05813e-10 kg; data quality (3,2,1,1,5)
- 2-METHYLPYRIDINE: 8.31221e-15 kg; data quality (3,1,1,1,4)
- ALLYL ALCOHOL: 2.73242e-10 kg; data quality (4,1,1,1,4)
- NITRATE: 3.55695e-10 kg; data quality (5,1,1,1,4)
- t-butyl methyl ether: 1.12138e-10 kg; data quality (3,2,1,1,4)
- sulfur dioxide: 4.05389e-5 kg; data quality (2,2,1,1,5)
- Aniline: 1.77973e-12 kg; data quality (3,1,1,1,4)
- Ethene, tetrachloro-: 1.27488e-11 kg; data quality (3,1,1,1,4)
- maleic anhydride: 6.60338e-9 kg; data quality (2,2,1,1,4)
- Chloroacetic acid: 1.92346e-10 kg; data quality (3,2,1,1,4)
- BUTYL ISOCYANATE: 5.65426e-13 kg; data quality (4,2,1,1,4)
- carbon monoxide: 3.66996e-5 kg; data quality (2,2,1,1,3)
- fluoranthene: 8.51207e-11 kg; data quality (3,2,1,1,5)
- Acrylic acid: 7.02074e-11 kg; data quality (4,1,1,1,4)
- Phenol, 2,4-dimethyl-: 3.03421e-13 kg; data quality (4,1,1,1,4)
- hydrogen sulfide: 6.79932e-9 kg; data quality (3,1,1,1,4)
- nickel: 1.48228e-8 kg; data quality (3,2,1,1,5)
- SULFURYL FLUORIDE: 2.68701e-7 kg; data quality (4,1,1,1,5)
- QUINOLINE: 8.07751e-12 kg; data quality (3,2,1,1,4)
- Bisphenol A: 5.09951e-14 kg; data quality (4,1,1,1,4)
- 1,1-DICHLOROETHYLENE: 2.05163e-13 kg; data quality (3,2,1,1,4)
- Methane, dichloro-, HCC-30: 6.88434e-12 kg; data quality (5,1,1,1,4)
- acetaldehyde: 5.78596e-10 kg; data quality (3,1,1,1,3)
- Formic acid: 4.177e-11 kg; data quality (3,1,1,1,4)
- 3-methylcholanthrene: 1.28196e-14 kg; data quality (2,2,1,1,4)
- para-xylene: 5.43705e-11 kg; data quality (3,2,1,4,1)
- vinyl acetate: 8.5368e-10 kg; data quality (4,2,1,1,4)
- carbon disulfide: 3.32473e-9 kg; data quality (4,2,1,1,4)
- methane, dichloro-, hcc-30: 6.51682e-8 kg; data quality (4,2,1,1,5)
- M-CRESOL: 2.101e-12 kg; data quality (3,1,1,1,4)
- acrolein: 9.11789e-8 kg; data quality (2,2,1,1,5)
- 2-methylnaphthalene: 9.88649e-12 kg; data quality (2,2,1,1,5)
- p-cresol: 6.00051e-11 kg; data quality (3,2,1,1,5)
- methanol: 1.44066e-9 kg; data quality (3,1,1,1,3)
- Cresol: 1.72206e-11 kg; data quality (4,2,1,1,5)
- 2,6-Dinitrotoluene: 8.15922e-11 kg; data quality (5,1,1,1,4)
- acenaphthene: 4.8133e-11 kg; data quality (3,2,1,2,3)
- carbonyl sulfide: 9.53122e-13 kg; data quality (4,2,1,1,4)
- N,N-DIMETHYLANILINE: 1.52985e-13 kg; data quality (3,1,1,1,4)
- Vinyl acetate: 8.97296e-11 kg; data quality (4,1,1,1,4)

## Inventory method
Input-output

## Modelling constants
The reference unit of all processes is 1 USD2013 of the good or service. The technosphere inputs are based on the US BEA detailed input-output tables for 2007. The IO tables are combined to develop a commodity-by-commodity model based on the the industry-technology assumption (see Suh et al., 2010), which assumes all commodities produced by a given industry have the same input structure, but that multiple industries can produce the same commodity. Thus, model technosphere flows represent commodity outputs (and not industry outputs) from other processes in the model. There are no by-products included in these processes. All commodity production is based on US-conditions, despite in reality that some goods and services are produced overseas, as USEEIO v1.1 is a single-region IO model.

## Completeness
The input-output approach assures that all purchased inputs associated with the sectors making these commodities as reported in the US census for 2007 are included. The direct resources extracted including minerals, energy sources, water and land occupied are included. Emissions to air include all critieria air pollutants, greenhouse gases, and hazardous and toxic air pollutants as defined by US EPA. Releases to water include toxics, total nitrogen and total phosphorus, and water discharges. Releases to soil or groundwater include toxics and agriculutural pesticides. Some metal releases to air, water and soil are not included because they could not be speciated. Solid hazardous and non-hazardous wastes generated are not included as an elementary flows although purchases of waste services are included.

## Data treatment
Greenhouse gases are primarily from the US Greenhouse Gas Emission Inventory (USEPA 2016a). Biogenic C uptake is not included (change from version 1.0), as biogenic C emission are not included. Toxic releases to air, water and soil (except pesticides) are from the 2013 Toxic Release Inventory (USEPA 2015a). Criteria air pollutants and hazardous air pollutants are from the 2011 National Emissions Inventory (USEPA 2015b). All estimates are normalized by industry based on sector output in the data year, then converted to 2013 USD using relative sector-specific CPIs (if data year is not 2013). Energy use represent raw renewables or fossil fuel energies and is based on EIA data for 2014. See Table 1 in Yang, Ingwersen et al. 2017 and Supporting Information 1, and the v1.1 data update notes (Ingwersen et al. 2017) for all details on environmental data sources used.Land occupation associated with manufacturing buildings was estimated based on the building floorspace data provided by the U.S. Energy Information Administration in the 2010 Manufacturing Energy Consumption Survey (EIA 2013). Portions of total renewable energy (EIA 2016) based on EIA-923 reports for 2014 (EIA 2017) are included. Nitrogen and Phosphorus releases are modeled in total N and total P equivalents as estimated by the Discharge Monitoring Report Nutrient Loading tool (USEPA 2016b). Self-supplied withdrawals were assigned to industrial sectors based on water use statistics for Canadian industries by NAICS 3-digit sector scaled to US production levels based on gross domestic product by industry (BEA 2015; Statistics Canada 2010), and further disaggregated to the manufacturing sectors based on compensation of employees as provided by the 2007 IO tables (BEA 2015). Water withdrawals associated with public supply were allocated to sectors based on their use of water, sewage, and other services in USD based on the IO tables (BEA 2015). Portions of total renewable energy (EIA 2016) by type are assigned to sectors (hydro, wind, solar, or) based on EIA-923 reports for 2014 (EIA 2017).

## Data collection
2015-2016

## Sampling procedure
US federal government sources, including surveys and US EPA emissions databases are used as the primary sources. From these sources, data for US reporting establishments/facilities are aggregated by the NAICS sector as defined in the BEA detailed 2007 input-output tables. When level of sector aggregation differs, or when direct emissions are not reported but modeled, additional sources are used to make allocations and estimates.

## Review details
In regard to quality assurance and peer-review, each dataset created went through Quality Assurance as defined in a quality assurance project plans at US EPA, CSRA or ERG. The model was assembled with the IO model builder model (USEPA 2016c). Validation functions were used to check that all the model components were properly assembled and harmonized. Bayou Demeke and Santosh Ghimire provided internal peer review of the model methodology and the manuscript underwent standard EPA management review. An editor and two anonymous reviewers at the Journal of Cleaner Production reviewed the model. In regard to data quality evaluation, data quality assessment was performed at the flow and process levels according to the updated US EPA data quality assessment guidelines as defined in US EPA (2016b).

## Intended application
The primary application is for use in the US Environmentally-Extended Input-Ouput model, USEEIO, version 1.1. This model is being used by the US EPA for supporting tools that prioritize goods and services based on potential environmental impacts, resource use or emissions for large regions, including the US and US states, and as a strealined tool for organizations as a starting point to consider sustainable materials management. Model results are designed to provide meso/macro-level decision support.

## Project
USEEIO v1.1 was developed by the US EPA with CSRA and ERG with Wesley W. Ingwersen and David E. Meyer as research leads. Yi Yang was the technical lead on the work for CSRA (contract EP-C-15-012); Troy Hawkins was lead for ERG (contract EP-C-12-021).

## Sources
- Macknick et al. 2011
- Yienger et al. 1995
- USDA 2009b
- USEPA 2016c
- USDA 2014
- Goebes et al. 2003
- USGS 2016
- USDA 2016
- BEA 2015
- USEPA 2016b
- USGS 2015
- USDA 2009a
- Lovelace 2009
- Edelen and Ingwersen 2017
- Nickerson et al. 2011
- Maupin et al. 2014
- USEPA 2015b
- Blackhurst et al. 2010
- USEPA 2015a
- BLM 2008
- Kim et el. 2013
- EIA 2015
- Ingwersen et al. 2017
- Torcellini et al. 2003
- EIA 2016
- USDA 2006
- Statistics Canada 2010
- EIA 2017
- EIA 2013
- Ingwersen et al. DRAFT
- USEPA 2016a
