# Limited-service restaurants

Dataset: openLCA process, unit process
Category: 72: Accommodation and Food Services
Geography: United States
Time period: 2017-01-01 to 2017-12-31
Data quality: US EPA - Process Pedigree Matrix (1;1)
Exchange data quality scheme: US EPA - Flow Pedigree Matrix
Generated by: US EPA with CSRA and ERG
Owner: US EPA
Published in: Yang, Ingwersen et al. 2017
restrictionsDescription: This model shold be appropriately cited (see Yang, Ingwersen et al. 2017 source or Publication field) when used. Any changes or derivations of this model by the user should be documented. The model itself and any results from use of this model shall not be construed to consitute US EPA opinion or policy.
copyright: false

## General comment
BEA Code & Name is '722211:Limited-service restaurants'. Description of the primary industry producing this good or service, adapted from the Census Bureau NAICS 2007 descriptions: This U.S. industry comprises establishments primarily engaged in providing food services (except snack and nonalcoholic beverage bars) where patrons generally order or select items and pay before eating. Food and drink may be consumed on premises, taken out, or delivered to the customer's location. Some establishments in this industry may provide these food services in combination with selling alcoholic beverages.

## Technology
The process describes the average US production of this good or service within this NAICS-based grouping defined in the BEA 2007 detailed input-output tables (BEA 2015). Distribution, wholesale and retailing of this good or service, use, and final disposal are not included. Creation of a product system with this process will enable modeling of all upstream (supply-chain) activities.

## Geography
Data represent the 50 US states

## Time period
2017 was the year in which this version of USEEIO was released and is the target date for the model

## Reference product
- Limited-service restaurants: 1 USD

## Inputs from technosphere
All rows: data quality (1,3,1,1,1)
- Paper; at manufacturer: 0.00202314 USD
- News syndicates, libraries, archives, Internet publishing and all other information services: 6.89315e-6 USD
- Advertising and public relations: 0.0242122 USD
- Books; at publisher: 3.44658e-6 USD
- Veneer, plywood, and engineered wood; at manufacturer: 0.000978828 USD
- Springs and wires; at manufacturer: 3.44658e-6 USD
- Fresh fruits and tree nuts; at farm: 3.79123e-5 USD
- Data processing and hosting: 0.00217479 USD
- Natural gas; at consumer: 0.00218858 USD
- Unrefined oil and gas; at extraction site: 0.000323978 USD
- Secondary steel products; at manufacturer: 3.79123e-5 USD
- Directory, mailing list, and other publishers; at publisher: 2.06795e-5 USD
- Other plastic products; at manufacturer: 0.00350517 USD
- Clothing; at manufacturer: 2.4126e-5 USD
- Commercial machinery repair: 0.00349138 USD
- Computer systems design: 0.000854751 USD
- Business support: 0.00111324 USD
- Snack foods; at manufacturer: 0.00411177 USD
- Scenic and sightseeing transportation and support activities for transportation: 0.0002516 USD
- Plywood and veneer; at manufacturer: 0.000158543 USD
- Sound recording: 0.000706548 USD
- All other converted paper products; at manufacturer: 0.000454948 USD
- Other rubber products; at manufacturer: 0.000210241 USD
- Wineries and wine; at manufacturer: 0.00268144 USD
- Lumber and treated lumber; at manufacturer: 0.000248153 USD
- Coal; at mine: 0.000189562 USD
- Tobacco, cotton, sugarcane, peanuts, sugar beets, herbs and spices, and other crops; at farm: 1.03397e-5 USD
- Household goods repair: 0.00144756 USD
- Commercial equipment rental: 0.000437715 USD
- Metal pipe fittings, ball and roller bearings, industrial patterns, metal bath fixtures, other misc. fabricated metals; at manufacturer: 0.000389463 USD
- Wood kitchen cabinets and countertops; at manufacturer: 0.000610044 USD
- Food and beverage stores: 5.85918e-5 USD
- Concrete pipe, bricks, and blocks; at manufacturer: 0.0014579 USD
- Breweries and beer; at manufacturer: 0.00343968 USD
- Packaged meat (except poultry); at manufacturer: 0.0137898 USD
- Gasoline, fuels, and by-products of petroleum refining; at manufacturer: 0.00516986 USD
- Marketing research and all other miscellaneous professional, scientific, and technical services: 0.000689315 USD
- Metal plumbing drains, faucets, valves, and other fittings; at manufacturer: 0.000365337 USD
- Cookies, crackers, pastas, and tortillas; at manufacturer: 0.00174397 USD
- Light fixtures; at manufacturer: 0.000375677 USD
- Polystyrene foam products; at manufacturer: 0.00469424 USD
- Fluid meters and counting devices; at manufacturer: 3.44658e-6 USD
- Curtains and linens; at manufacturer: 0.000741014 USD
- External hard drives, CDs, other storage media; at manufacturer: 0.000427375 USD
- Office supplies (not paper); at manufacturer: 1.37863e-5 USD
- Chemicals (except basic chemicals, agrichemicals, polymers, paints, pharmaceuticals,soaps, cleaning compounds); at manufacturer: 0.000144756 USD
- Wiring devices; at manufacturer: 8.9611e-5 USD
- Buildings and dwellings services: 0.00376366 USD
- Software: 1.72329e-5 USD
- Secondary copper products; at manufacturer: 4.82521e-5 USD
- Laminated plastic plates and shapes; at manufacturer: 4.13589e-5 USD
- Environmental and other technical consulting services: 0.000592811 USD
- Architectural, engineering, and related services: 0.00103397 USD
- Full-service restaurants: 0.00126834 USD
- Other computer related services, including facilities management: 0.000672082 USD
- Newspapers; at publisher: 3.44658e-6 USD
- Pesticides; at manufacturer: 0.000103397 USD
- Lime and gypsum products; at manufacturer: 0.00150271 USD
- Other textiles; at manufacturer: 3.10192e-5 USD
- General merchandise stores: 0.000682422 USD
- Sporting and athletic goods; at manufacturer: 0.000172329 USD
- Welding and Soldering Equipment, Scales and Balances, and other general purpose machinery; at manufacturer: 7.58247e-5 USD
- Nonferrous metal casts; at manufacturer: 1.37863e-5 USD
- Stationery; at manufacturer: 0.000161989 USD
- Truck transport: 0.0039739 USD
- Promoters and agents: 0.000106844 USD
- Cheese; at manufacturer: 0.0163161 USD
- Cut stone and stone products; at manufacturer: 0.00120286 USD
- Motor vehicle steering, suspension components (except spring), and brake systems; at manufacturer: 5.85918e-5 USD
- Wild-caught fish and game; at place of capture: 0.00126834 USD
- Couriers and messengers: 0.000344658 USD
- Travel arrangement and reservation: 3.44658e-6 USD
- Aluminum products; at manufacturer: 0.000155096 USD
- Cardboard containers; at manufacturer: 0.0047287 USD
- Cement; at manufacturer: 0.000137863 USD
- Performances: 0.00265386 USD
- Corn products; at manufacturer: 2.06795e-5 USD
- Employment services: 0.00185426 USD
- Vegetable oils and by-products; at manufacturer: 0.000544559 USD
- Air transport: 0.00124077 USD
- Jewelry and silverware; at manufacturer: 5.16986e-5 USD
- Investigation and security: 0.000506647 USD
- Telecommunications: 0.00253668 USD
- Storage batteries; at manufacturer: 3.44658e-5 USD
- Warehousing: 0.000692762 USD
- Packaged poultry; at manufacturer: 0.00927474 USD
- Urethane and other foam products; at manufacturer: 0.00148547 USD
- Noncomparable imports: 0.00194042 USD
- Coffee and tea; at manufacturer: 0.00192319 USD
- Other concrete products; at manufacturer: 0.00118907 USD
- Securities and commodities brokerage and exchanges: 0.000179222 USD
- Passenger ground transport: 0.000434269 USD
- Movies and film: 0.000354997 USD
- Management consulting: 0.00263663 USD
- Adhesives; at manufacturer: 3.44658e-6 USD
- Sugar, candy, and chocolate; at manufacturer: 0.000379123 USD
- Satellite, telecommunications resellers, and all other telecommunications: 0.000224027 USD
- Plastic pipe, fittings, and sausage casings; at manufacturer: 0.00111669 USD
- Other engine equipment; at manufacturer: 3.44658e-6 USD
- Fluid milk and butter; at manufacturer: 0.000768587 USD
- All other forging, stamping, and sintering; at manufacturer: 0.00116839 USD
- Golf courses, marinas, ski resorts, fitness and other rec centers and industries: 0.000210241 USD
- Communication and energy wire and cable; at manufacturer: 0.00177154 USD
- Flavored drink concentrates; at manufacturer: 0.00450812 USD
- Other basic organic chemicals; at manufacturer: 0.000537666 USD
- Other petroleum and coal products; at manufacturer: 7.23781e-5 USD
- Clay and ceramic products; at manufacturer: 0.000747907 USD
- Plastic bags, films, and sheets; at manufacturer: 0.000723781 USD
- Cutlery and handtools; at manufacturer: 0.000244707 USD
- Air conditioning, refrigeration, and warm air heating equipment; at manufacturer: 0.000809945 USD
- Consumer goods and general rental centers: 9.99507e-5 USD
- Photographers: 1.03397e-5 USD
- Paper bags and coated paper; at manufacturer: 0.00116839 USD
- Carpets and rugs; at manufacturer: 3.44658e-6 USD
- Accounting, tax preparation, bookkeeping, and payroll: 0.00390497 USD
- Bread and other baked goods; at manufacturer: 0.00587297 USD
- Civic, social, professional, and similar organizations: 0.000217134 USD
- Machinery for the paper, textile, food or other industries (except semiconductor machinery); at manufacturer: 0.000182669 USD
- Frozen food; at manufacturer: 0.0018646 USD
- Company and enterprise management: 0.0334352 USD
- Dolls, toys, and games; at manufacturer: 3.10192e-5 USD
- Air and gas compressors; at manufacturer: 0.000692762 USD
- Pipeline transport: 3.44658e-5 USD
- Vehicle engines and engine parts; at manufacturer: 3.79123e-5 USD
- All other foods; at manufacturer: 0.000630723 USD
- Investment advice, portfolio management, and other financial advising services: 0.000217134 USD
- Other support services: 8.61644e-5 USD
- Heating equipment other than warm air furnaces; at manufacturer: 8.9611e-5 USD
- Audio and video equipment; at manufacturer: 3.44658e-6 USD
- Primary iron, steel, and ferroalloy products; at manufacturer: 0.000134416 USD
- Rail transport: 0.000510093 USD
- Books, newspapers, magazines, and other print media; at manufacturer: 0.00103742 USD
- Insurance carriers: 0.00583505 USD
- Power boilers and heat exchangers; at manufacturer: 0.000592811 USD
- Semiconductors; at manufacturer: 0.000313638 USD
- Soft drinks, bottled water, and ice; at manufacturer: 0.00596602 USD
- Switchgear and switchboards; at manufacturer: 0.000310192 USD
- Animal farms and aquaculture ponds (except cattle and poultry): 0.000871984 USD
- Distilleries and spirits; at manufacturer: 0.00321221 USD
- Screws, nuts, and bolts; at manufacturer: 0.000168882 USD
- Gaskets, seals, musical instruments, fasteners, brooms, brushes, mop and other misc. goods; at manufacturer: 0.000568685 USD
- Office administration: 0.000410143 USD
- Wireless telecommunications: 0.00101329 USD
- Vehicle repair: 0.00176809 USD
- Seafood; at manufacturer: 0.00524224 USD
- Nondepository credit intermediation and related activities: 0.0033225 USD
- Rubber tires; at manufacturer: 6.20384e-5 USD
- Vehicles and parts sales: 9.65041e-5 USD
- Vehicle electrical and electronic equipment; at manufacturer: 2.4126e-5 USD
- Glass and glass products; at manufacturer: 0.000551452 USD
- All other food and drinking places: 0.000161989 USD
- Breakfast cereals; at manufacturer: 1.37863e-5 USD
- Poultry farms: 6.20384e-5 USD
- Facilities support: 8.9611e-5 USD
- Fruit and vegetable preservation; at manufacturer: 0.00240226 USD
- Wholesale trade: 0.0196283 USD
- Other vehicle parts; at manufacturer: 0.000175775 USD
- Internet publishing and broadcasting: 0.000427375 USD
- Flours and malts; at manufacturer: 7.23781e-5 USD
- State and local government enterprises: 0.000868537 USD
- Other secondary nonferrous metal products; at manufacturer: 3.79123e-5 USD
- Cardboard; at manufacturer: 0.000224027 USD
- Ice cream and frozen desserts; at manufacturer: 0.0050837 USD
- Insurance agencies and brokerages: 1.37863e-5 USD
- Hotels and campgrounds: 0.00106155 USD
- Valve and fittings (except for plumbing); at manufacturer: 0.00011029 USD
- Other retail: 0.00635893 USD
- Copper, nickel, lead, and zinc; at mine: 5.85918e-5 USD
- Magazines and journals; at publisher: 0.000124077 USD
- Fabric; at manufacturer: 1.37863e-5 USD
- Wooden windows, door, and flooring; at manufacturer: 0.000737567 USD
- Electricity; at consumer: 0.0118286 USD
- Light gauge metal cans, boxes, and containers; at manufacturer: 1.72329e-5 USD
- Refined vegetable, olive, and seed oils; at manufacturer: 0.000186115 USD
- Fresh vegetables, melons, and potatoes; at farm: 0.000224027 USD
- Nonresidential building repair and maintanence: 0.00204037 USD
- Metal windows, doors, and architectural products; at manufacturer: 0.00281585 USD
- Transmission and power train parts; at manufacturer: 6.89315e-6 USD
- Light bulbs; at manufacturer: 6.89315e-5 USD
- Monetary authorities and depository credit intermediation: 0.00131659 USD
- Limited-service restaurants: 0.00243328 USD
- Soap and cleaning compounds; at manufacturer: 0.00014131 USD
- Postal service: 0.00441506 USD
- Electronic equipment repair and maintenance: 0.00177154 USD
- Plastic bottles; at manufacturer: 0.00024126 USD
- Water transport (boats, ships, ferries): 0.00027228 USD
- Power tools; at manufacturer: 3.79123e-5 USD
- Pet care, photofinishing, parking and other sundry services: 3.44658e-6 USD
- Metal hinges, keys, lock, and other hardware; at manufacturer: 0.000475628 USD
- Metal structural products; at manufacturer: 0.0011546 USD
- Drinking water and wastewater treatment; at consumer: 0.000792713 USD
- Vehicle rental and leasing: 0.000954702 USD
- Sports: 8.27178e-5 USD
- Fresh wheat, corn, rice, and other grains; at farm: 1.37863e-5 USD
- Other real estate: 0.055128 USD
- Lessors of nonfinancial intangible assets: 0.0070517 USD
- Legal services: 0.00227819 USD
- Dry, condensed, and evaporated dairy; at manufacturer: 0.000934022 USD
- Independent artists, writers, and performers: 0.000189562 USD
- Fresh soybeans, canola, flaxseeds, and other oilseeds; at farm: 2.06795e-5 USD
- Dry-cleaning and laundry: 0.000930576 USD
- Paints and coatings; at manufacturer: 2.75726e-5 USD
- Waste management and remediation: 0.00213343 USD
- Specialized design: 0.000179222 USD
- Seasonings and dressings; at manufacturer: 0.00248153 USD

## Inputs from nature
- Water, fresh: 0.000288911, 0.000499989 m3 (2 entries, compartments not in this file); data quality (1,2,1,4,2)
- Occupation, urban, discontinuously built: 0.00110472 m2*a; data quality (4,2,1,1,1)

## Emissions to nature
- acrolein: 2.63575e-9 kg; data quality (3,2,1,4,1)
- o-cresol: 6.79417e-9 kg; data quality (3,2,1,1,5)
- manganese: 9.80681e-10 kg; data quality (3,2,1,1,5)
- hexane: 1.89122e-7 kg; data quality (3,2,1,2,4)
- particulates, < 2.5 um: 0.000136241 kg; data quality (3,2,1,1,5)
- anthracene: 9.79024e-9 kg; data quality (3,2,1,1,5)
- propanal: 3.41849e-7 kg; data quality (3,2,1,1,5)
- toluene: 1.25887e-6 kg; data quality (3,2,1,1,4)
- acetophenone: 1.01797e-8 kg; data quality (3,2,1,1,5)
- sulfur dioxide: 3.28662e-8 kg; data quality (3,2,1,2,4)
- Cobalt: 1.1749e-10 kg; data quality (3,2,1,1,5)
- fluorene: 9.79194e-9 kg; data quality (3,2,1,1,5)
- Nitrogen: 2.23411e-10 kg; data quality (2,2,1,1,5)
- Chrysene: 5.35709e-12 kg; data quality (3,2,1,4,1)
- nitrogen oxides: 3.66089e-6 kg; data quality (3,2,1,1,1)
- mercury: 1.63944e-13 kg; data quality (3,2,1,5,1)
- biphenyl: 1.29658e-8 kg; data quality (3,2,1,1,5)
- nickel: 3.85466e-10 kg; data quality (3,2,1,1,5)
- cadmium: 2.34981e-11 kg; data quality (3,2,1,1,5)
- Dinitrogen monoxide: 2.98872e-8 kg; data quality (4,2,1,4,1)
- Hydrocarbons, aromatic: 7.14081e-9 kg; data quality (3,2,1,2,4)
- 2,2,4-trimethylpentane: 2.40262e-7 kg; data quality (3,2,1,2,4)
- ammonia: 1.13921e-8 kg; data quality (3,2,1,4,1)
- Chromium VI: 5.02945e-11 kg; data quality (3,2,1,1,5)
- Phosphorus: 2.89878e-9 kg; data quality (4,1,1,1,5)
- Indeno(1,2,3-cd)pyrene: 9.07339e-10 kg; data quality (3,2,1,1,5)
- particulates, < 10 um: 7.40814e-6 kg; data quality (3,2,1,1,5)
- styrene: 8.31985e-7 kg; data quality (3,2,1,1,5)
- Benzo(g,h,i)perylene: 1.19921e-9 kg; data quality (3,2,1,1,5)
- p-cresol: 1.34063e-8 kg; data quality (3,2,1,1,5)
- Methane: 1.04668e-6 kg; data quality (4,2,1,4,1)
- Ethane, pentafluoro-, HFC-125: 3.57651e-7 kg; data quality (4,2,1,4,1)
- 4-nitrophenol: 2.16862e-8 kg; data quality (3,2,1,1,5)
- o-Xylene: 1.35872e-7 kg; data quality (3,2,1,1,5)
- ethane, 1,2-dichloro-: 6.46681e-8 kg; data quality (3,2,1,1,5)
- Phthalate, dibutyl-: 7.76793e-9 kg; data quality (3,2,1,1,5)
- butadiene: 2.08367e-8 kg; data quality (3,2,1,4,1)
- Ethane, 1,1,1-trifluoro-, HFC-143a: 1.53024e-7 kg; data quality (4,2,1,4,1)
- para-xylene: 1.26713e-10 kg; data quality (3,2,1,4,1)
- phenanthrene: 4.92226e-8 kg; data quality (3,2,1,1,5)
- Xylene: 1.65665e-7 kg; data quality (3,2,1,4,1)
- arsenic: 2.2265e-11 kg; data quality (3,2,1,3,3)
- benzene: 2.35721e-6 kg; data quality (3,2,1,1,5)
- PHOSPHORUS: 5.40456e-10 kg; data quality (3,2,1,1,5)
- benzo(a)pyrene: 1.38625e-9 kg; data quality (3,2,1,1,5)
- Benzo(b)fluoranthene: 5.76144e-12 kg; data quality (3,2,1,4,1)
- m-xylene: 6.77045e-9 kg; data quality (3,2,1,4,1)
- Methane, difluoro-, HFC-32: 2.08279e-7 kg; data quality (4,2,1,4,1)
- fluoranthene: 1.54655e-8 kg; data quality (3,2,1,1,5)
- carbon monoxide: 0.000126589 kg; data quality (3,2,1,1,3)
- phenol: 9.35153e-8 kg; data quality (3,2,1,1,5)
- formaldehyde: 1.84147e-6 kg; data quality (3,2,1,1,5)
- Carbon dioxide: 0.0116684 kg; data quality (4,2,1,4,1)
- acetaldehyde: 1.30915e-6 kg; data quality (3,2,1,1,5)
- benzene, ethyl-: 2.12347e-7 kg; data quality (3,2,1,2,4)
- antimony: 2.11483e-10 kg; data quality (3,2,1,1,5)
- Benzo(k)fluoranthene: 5.66308e-12 kg; data quality (3,2,1,4,1)
- Dibenz(a,h)anthracene: 3.66117e-14 kg; data quality (3,2,1,4,1)
- benz[a]anthracene: 2.87812e-9 kg; data quality (3,2,1,1,5)
- pyrene: 2.08563e-8 kg; data quality (3,2,1,1,5)
- Chromium, ion: 1.00904e-10 kg; data quality (3,2,1,1,5)
- acenaphthylene: 2.89507e-8 kg; data quality (3,2,1,1,5)
- VOC, volatile organic compounds: 2.47518e-5 kg; data quality (3,2,1,1,4)
- Propane, 1,1,1,3,3,3-hexafluoro-, HCFC-236fa: 4.13398e-9 kg; data quality (4,2,1,4,1)
- acenaphthene: 1.77194e-9 kg; data quality (3,2,1,1,5)
- naphthalene: 1.55798e-7 kg; data quality (3,2,1,1,5)
- Water, fresh: 0.000667973 m3; data quality (1,2,1,4,2)
- Ethane, 1,1,1,2-tetrafluoro-, HFC-134a: 1.34803e-6 kg; data quality (4,2,1,4,1)

## Inventory method
Input-output

## Modelling constants
The reference unit of all processes is 1 USD2013 of the good or service. The technosphere inputs are based on the US BEA detailed input-output tables for 2007. The IO tables are combined to develop a commodity-by-commodity model based on the the industry-technology assumption (see Suh et al., 2010), which assumes all commodities produced by a given industry have the same input structure, but that multiple industries can produce the same commodity. Thus, model technosphere flows represent commodity outputs (and not industry outputs) from other processes in the model. There are no by-products included in these processes. All commodity production is based on US-conditions, despite in reality that some goods and services are produced overseas, as USEEIO v1.1 is a single-region IO model.

## Completeness
The input-output approach assures that all purchased inputs associated with the sectors making these commodities as reported in the US census for 2007 are included. The direct resources extracted including minerals, energy sources, water and land occupied are included. Emissions to air include all critieria air pollutants, greenhouse gases, and hazardous and toxic air pollutants as defined by US EPA. Releases to water include toxics, total nitrogen and total phosphorus, and water discharges. Releases to soil or groundwater include toxics and agriculutural pesticides. Some metal releases to air, water and soil are not included because they could not be speciated. Solid hazardous and non-hazardous wastes generated are not included as an elementary flows although purchases of waste services are included.

## Data treatment
Greenhouse gases are primarily from the US Greenhouse Gas Emission Inventory (USEPA 2016a). Biogenic C uptake is not included (change from version 1.0), as biogenic C emission are not included. Toxic releases to air, water and soil (except pesticides) are from the 2013 Toxic Release Inventory (USEPA 2015a). Criteria air pollutants and hazardous air pollutants are from the 2011 National Emissions Inventory (USEPA 2015b). All estimates are normalized by industry based on sector output in the data year, then converted to 2013 USD using relative sector-specific CPIs (if data year is not 2013). Energy use represent raw renewables or fossil fuel energies and is based on EIA data for 2014. See Table 1 in Yang, Ingwersen et al. 2017 and Supporting Information 1, and the v1.1 data update notes (Ingwersen et al. 2017) for all details on environmental data sources used.Land occupation for commercial buildings was estimated based on the building floorspace data provided by the U.S. Energy Information Administration 2012 Commercial Building Energy Consumption Survey (CBECS) (EIA 2015). Total commercial public supply water use is reported by USGS (Maupin et al. 2014). Water use is allocated across commercial sectors based on their use of water, sewage, and other services in USD based on the 2007 Benchmark Use Table before redefinitions (BEA 2015).

## Data collection
2015-2016

## Sampling procedure
US federal government sources, including surveys and US EPA emissions databases are used as the primary sources. From these sources, data for US reporting establishments/facilities are aggregated by the NAICS sector as defined in the BEA detailed 2007 input-output tables. When level of sector aggregation differs, or when direct emissions are not reported but modeled, additional sources are used to make allocations and estimates.

## Review details
In regard to quality assurance and peer-review, each dataset created went through Quality Assurance as defined in a quality assurance project plans at US EPA, CSRA or ERG. The model was assembled with the IO model builder model (USEPA 2016c). Validation functions were used to check that all the model components were properly assembled and harmonized. Bayou Demeke and Santosh Ghimire provided internal peer review of the model methodology and the manuscript underwent standard EPA management review. An editor and two anonymous reviewers at the Journal of Cleaner Production reviewed the model. In regard to data quality evaluation, data quality assessment was performed at the flow and process levels according to the updated US EPA data quality assessment guidelines as defined in US EPA (2016b).

## Intended application
The primary application is for use in the US Environmentally-Extended Input-Ouput model, USEEIO, version 1.1. This model is being used by the US EPA for supporting tools that prioritize goods and services based on potential environmental impacts, resource use or emissions for large regions, including the US and US states, and as a strealined tool for organizations as a starting point to consider sustainable materials management. Model results are designed to provide meso/macro-level decision support.

## Project
USEEIO v1.1 was developed by the US EPA with CSRA and ERG with Wesley W. Ingwersen and David E. Meyer as research leads. Yi Yang was the technical lead on the work for CSRA (contract EP-C-15-012); Troy Hawkins was lead for ERG (contract EP-C-12-021).

## Sources
- BLM 2008
- Yienger et al. 1995
- Edelen and Ingwersen 2017
- Statistics Canada 2010
- EIA 2016
- USGS 2015
- USEPA 2016a
- Goebes et al. 2003
- USEPA 2015b
- BEA 2015
- USEPA 2016b
- EIA 2013
- Kim et el. 2013
- USDA 2016
- USGS 2016
- Nickerson et al. 2011
- USEPA 2016c
- Ingwersen et al. 2017
- USDA 2006
- Maupin et al. 2014
- Torcellini et al. 2003
- Blackhurst et al. 2010
- EIA 2015
- USDA 2014
- USDA 2009a
- EIA 2017
- USDA 2009b
- Ingwersen et al. DRAFT
- Macknick et al. 2011
- Lovelace 2009
- USEPA 2015a
