# Lime and gypsum products; at manufacturer

Dataset: openLCA process, unit process
Category: 3274: Lime and Gypsum Product Manufacturing
Geography: United States
Time period: 2017-01-01 to 2017-12-31
Data quality: US EPA - Process Pedigree Matrix (1;1)
Exchange data quality scheme: US EPA - Flow Pedigree Matrix
Generated by: US EPA with CSRA and ERG
Owner: US EPA
Published in: Yang, Ingwersen et al. 2017
restrictionsDescription: This model shold be appropriately cited (see Yang, Ingwersen et al. 2017 source or Publication field) when used. Any changes or derivations of this model by the user should be documented. The model itself and any results from use of this model shall not be construed to consitute US EPA opinion or policy.
copyright: false

## General comment
BEA Code & Name is '327400:Lime and gypsum product manufacturing'. Description of the primary industry producing this good or service, adapted from the Census Bureau NAICS 2007 descriptions: This industry group comprises (1) Lime Manufacturing, and (2) Gypsum Product Manufacturing.

## Technology
The process describes the average US production of this good or service within this NAICS-based grouping defined in the BEA 2007 detailed input-output tables (BEA 2015). Distribution, wholesale and retailing of this good or service, use, and final disposal are not included. Creation of a product system with this process will enable modeling of all upstream (supply-chain) activities.

## Geography
Data represent the 50 US states

## Time period
2017 was the year in which this version of USEEIO was released and is the target date for the model

## Reference product
- Lime and gypsum products; at manufacturer: 1 USD

## Inputs from technosphere
All rows: data quality (1,3,1,1,1)
- Warehousing: 0.00101755 USD
- Finished and coated fabric; at manufacturer: 0.000402573 USD
- Relay and industrial controls; at manufacturer: 0.000151004 USD
- Computer terminals and other computer peripheral equipment; at manufacturer: 0.000293906 USD
- Other vehicle parts; at manufacturer: 0.000548787 USD
- Limited-service restaurants: 0.00160932 USD
- Other rubber products; at manufacturer: 0.000950245 USD
- Iron, gold, silver, and other metal ores; at mine: 1.87395e-5 USD
- Light gauge metal cans, boxes, and containers; at manufacturer: 2.00891e-6 USD
- Plywood and veneer; at manufacturer: 1.43282e-5 USD
- Marketing research and all other miscellaneous professional, scientific, and technical services: 0.000817171 USD
- Air and gas compressors; at manufacturer: 5.15876e-8 USD
- Scenic and sightseeing transportation and support activities for transportation: 0.00127085 USD
- Petrochemicals; at manufacturer: 5.15876e-7 USD
- Urethane and other foam products; at manufacturer: 2.74634e-7 USD
- Software: 1.7811e-7 USD
- Scientific research and development: 2.21295e-7 USD
- Household goods repair: 0.00040373 USD
- Magazines and journals; at publisher: 6.52665e-7 USD
- Lessors of nonfinancial intangible assets: 0.00406161 USD
- Other support services: 0.00147983 USD
- Company and enterprise management: 0.0191249 USD
- Promoters and agents: 0.000133602 USD
- Other real estate: 0.000807826 USD
- Industrial process variable instruments; at manufacturer: 0.00106911 USD
- Other primary nonferrous metals; at manufacturer: 4.1195e-7 USD
- Other basic organic chemicals; at manufacturer: 0.00135609 USD
- Secondary copper products; at manufacturer: 8.37633e-6 USD
- Glass and glass products; at manufacturer: 0.000674104 USD
- Other secondary nonferrous metal products; at manufacturer: 6.11306e-6 USD
- Satellite, telecommunications resellers, and all other telecommunications: 0.000135883 USD
- Telecommunications: 0.00177262 USD
- Coal; at mine: 0.0421229 USD
- Primary iron, steel, and ferroalloy products; at manufacturer: 0.0017894 USD
- Water transport (boats, ships, ferries): 0.0116413 USD
- Commercial equipment rental: 0.00180777 USD
- Wireless communications; at manufacturer: 3.2956e-6 USD
- Valve and fittings (except for plumbing); at manufacturer: 2.71509e-6 USD
- Screws, nuts, and bolts; at manufacturer: 0.000544546 USD
- Pipeline transport: 0.00027263 USD
- Buildings and dwellings services: 0.0044561 USD
- Aluminum products; at manufacturer: 1.54769e-6 USD
- Other petroleum and coal products; at manufacturer: 6.59483e-6 USD
- Dry-cleaning and laundry: 1.7233e-7 USD
- Sand, gravel, clay, phosphate, other nonmetallic minerals; at mine: 0.0299415 USD
- Wholesale trade: 0.0326559 USD
- Investment advice, portfolio management, and other financial advising services: 0.000524772 USD
- Hotels and campgrounds: 0.000673079 USD
- Metal structural products; at manufacturer: 1.42541e-5 USD
- Metal plumbing drains, faucets, valves, and other fittings; at manufacturer: 5.08072e-6 USD
- Cement; at manufacturer: 0.00246658 USD
- Cutting and machine tool accessory, rolling mill, and other metalworking machines; at manufacturer: 8.68844e-6 USD
- Civic, social, professional, and similar organizations: 5.64498e-6 USD
- Mineral wool; at manufacturer: 0.000674237 USD
- Fertilizers; at manufacturer: 2.57938e-7 USD
- Switchgear and switchboards; at manufacturer: 1.63407e-5 USD
- Metal coatings, engravings, and heat treatments; at manufacturer: 0.00269841 USD
- Electronic capacitors, resistors, coils, transformers, connectors and other components (except semiconductors and printed circuit assemblies); at manufacturer: 0.000209688 USD
- Architectural, engineering, and related services: 0.0117019 USD
- Power boilers and heat exchangers; at manufacturer: 4.64288e-7 USD
- Construction machinery; at manufacturer: 9.91691e-5 USD
- Dimensional stone; at mine: 0.0505723 USD
- Investigation and security: 0.00134509 USD
- Custom metal rolls; at manufacturer: 4.7853e-6 USD
- Food and beverage stores: 0.000667773 USD
- Gasoline, fuels, and by-products of petroleum refining; at manufacturer: 0.0331927 USD
- Motor vehicle steering, suspension components (except spring), and brake systems; at manufacturer: 0.000141323 USD
- Clay and ceramic products; at manufacturer: 0.00162569 USD
- Shelving and lockers; at manufacturer: 6.89319e-8 USD
- Other plastic products; at manufacturer: 0.000165359 USD
- Metal hinges, keys, lock, and other hardware; at manufacturer: 1.25925e-5 USD
- Gaskets, seals, musical instruments, fasteners, brooms, brushes, mop and other misc. goods; at manufacturer: 2.01444e-6 USD
- Light fixtures; at manufacturer: 2.97566e-6 USD
- Wooden windows, door, and flooring; at manufacturer: 0.000148293 USD
- Consumer goods and general rental centers: 0.000267722 USD
- Vehicles and parts sales: 0.000270033 USD
- Business support: 0.00295921 USD
- Synthetic dyes and pigments; at manufacturer: 0.00027017 USD
- Metal pipe fittings, ball and roller bearings, industrial patterns, metal bath fixtures, other misc. fabricated metals; at manufacturer: 0.000960863 USD
- Carpets and rugs; at manufacturer: 3.79636e-8 USD
- Insurance carriers: 0.00365891 USD
- Adhesives; at manufacturer: 4.04644e-6 USD
- Employment services: 0.00174491 USD
- Other basic inorganic chemicals; at manufacturer: 0.00201414 USD
- Vehicle rental and leasing: 0.00281889 USD
- Cutlery and handtools; at manufacturer: 4.49355e-7 USD
- All other forging, stamping, and sintering; at manufacturer: 0.000172553 USD
- Natural gas; at consumer: 0.0969864 USD
- Other computer related services, including facilities management: 0.000402981 USD
- Machinery for the paper, textile, food or other industries (except semiconductor machinery); at manufacturer: 2.88891e-6 USD
- Vehicle electrical and electronic equipment; at manufacturer: 0.000136584 USD
- Fresh soybeans, canola, flaxseeds, and other oilseeds; at farm: 5.15876e-8 USD
- Abrasive products; at manufacturer: 0.000402415 USD
- Corn products; at manufacturer: 0.0166943 USD
- Noncomparable imports: 0.00121659 USD
- Lids, jars, bottle caps, other metal closures and crowns; at manufacturer: 6.04194e-6 USD
- Wiring devices; at manufacturer: 6.72852e-6 USD
- Lumber and treated lumber; at manufacturer: 0.000160216 USD
- Motors and generators; at manufacturer: 1.41436e-5 USD
- Full-service restaurants: 0.000938974 USD
- Metal windows, doors, and architectural products; at manufacturer: 2.49261e-5 USD
- Plastic pipe, fittings, and sausage casings; at manufacturer: 4.7237e-5 USD
- Ready-mix concrete; at manufacturer: 5.99707e-6 USD
- Tobacco, cotton, sugarcane, peanuts, sugar beets, herbs and spices, and other crops; at farm: 1.73981e-6 USD
- Other retail: 0.000403313 USD
- Electronic equipment repair and maintenance: 0.000540791 USD
- Advertising and public relations: 0.00136718 USD
- Printed circuit and electronic assembly; at manufacturer: 0.000961603 USD
- Securities and commodities brokerage and exchanges: 0.000276452 USD
- State and local government enterprises: 0.000536749 USD
- Drinking water and wastewater treatment; at consumer: 0.000407161 USD
- Other support activities for mining: 0.000166442 USD
- Plastics; at manufacturer: 7.62862e-6 USD
- Passenger ground transport: 0.000269412 USD
- Cast iron and steel; at manufacturer: 1.37317e-7 USD
- All other food and drinking places: 1.50518e-7 USD
- Monetary authorities and depository credit intermediation: 0.00261887 USD
- Nonresidential building repair and maintanence: 0.00346053 USD
- Mining and oil/gas field machinery; at manufacturer: 6.20532e-5 USD
- Copper, nickel, lead, and zinc; at mine: 1.44961e-5 USD
- Paints and coatings; at manufacturer: 6.42979e-6 USD
- Aluminum; at manufacturer: 5.49267e-7 USD
- Insurance agencies and brokerages: 0.00134517 USD
- Unrefined oil and gas; at extraction site: 0.000137226 USD
- Ball and roller bearings; at manufacturer: 1.37317e-6 USD
- Facilities support: 0.00107222 USD
- Cardboard containers; at manufacturer: 0.0100284 USD
- Surgical appliance and supplies; at manufacturer: 0.00120296 USD
- Secondary steel products; at manufacturer: 2.49061e-5 USD
- Vehicle repair: 0.0012096 USD
- Compressed Gases; at manufacturer: 0.0010708 USD
- Plastic bags, films, and sheets; at manufacturer: 1.66508e-5 USD
- Signal testing instruments; at manufacturer: 9.61218e-7 USD
- Travel arrangement and reservation: 1.27586e-5 USD
- Clothing; at manufacturer: 3.44659e-8 USD
- Transmission and power train parts; at manufacturer: 0.000279217 USD
- Concrete pipe, bricks, and blocks; at manufacturer: 4.66877e-6 USD
- Heavy gauge metal tanks; at manufacturer: 1.03175e-7 USD
- Timber and raw forest products; at forest: 1.48438e-5 USD
- Environmental and other technical consulting services: 3.23206e-6 USD
- Office administration: 2.59882e-6 USD
- other miscellaneous electrical equipment and components; at manufacturer: 8.51364e-6 USD
- Lime and gypsum products; at manufacturer: 0.00214499 USD
- Computers; at manufacturer: 4.51772e-5 USD
- Commercial machinery repair: 0.00228067 USD
- Nonferrous metal casts; at manufacturer: 1.37317e-7 USD
- Management consulting: 0.00027874 USD
- Nondepository credit intermediation and related activities: 0.0047034 USD
- Paper bags and coated paper; at manufacturer: 0.0040127 USD
- Material handling equipment; at manufacturer: 0.000200269 USD
- Semiconductors; at manufacturer: 0.000560123 USD
- Specialized design: 0.00134867 USD
- Other concrete products; at manufacturer: 0.000145811 USD
- Computer systems design: 0.00067294 USD
- Chemicals (except basic chemicals, agrichemicals, polymers, paints, pharmaceuticals,soaps, cleaning compounds); at manufacturer: 0.000366319 USD
- Wood kitchen cabinets and countertops; at manufacturer: 1.04614e-5 USD
- Sports: 2.49434e-7 USD
- Waste management and remediation: 0.0010914 USD
- Ground or treated minerals and earth; at manufacturer: 0.0467825 USD
- Vehicle engines and engine parts; at manufacturer: 0.000138048 USD
- Primary batteries; at manufacturer: 1.92244e-6 USD
- Air transport: 0.00108145 USD
- Wireless telecommunications: 0.000410387 USD
- Veneer, plywood, and engineered wood; at manufacturer: 0.00174564 USD
- Legal services: 0.00153198 USD
- Rubber tires; at manufacturer: 1.95081e-5 USD
- Computer storage device readers; at manufacturer: 2.2108e-5 USD
- Data processing and hosting: 0.00174505 USD
- Other nonmetallic mineral products; at manufacturer: 0.000402377 USD
- Electricity; at consumer: 0.020695 USD
- Storage batteries; at manufacturer: 1.51048e-6 USD
- Rail transport: 0.0349076 USD
- Communication and energy wire and cable; at manufacturer: 1.13973e-5 USD
- General merchandise stores: 0.000801465 USD
- Rubber and plastic belts and hoses; at manufacturer: 1.27586e-5 USD
- Performances: 3.44659e-8 USD
- Truck transport: 0.0196018 USD
- Newspapers; at publisher: 1.37317e-7 USD
- Accounting, tax preparation, bookkeeping, and payroll: 0.00178557 USD
- Golf courses, marinas, ski resorts, fitness and other rec centers and industries: 0.000134605 USD
- Machine shops; at manufacturer: 0.00202496 USD
- Cardboard; at manufacturer: 0.0633118 USD
- External hard drives, CDs, other storage media; at manufacturer: 2.19707e-6 USD
- Independent artists, writers, and performers: 0.00026761 USD

## Inputs from nature
- Water, saline: 0.000695365 m3; data quality (4,2,1,4,2)
- Occupation, industrial area, built up: 0.000585415 m2*a; data quality (4,2,1,1,1)
- Energy, biomass: 0.000124067 MJ; data quality (3,1,1,1,1)
- Occupation, industrial area: 0.00175624 m2*a; data quality (4,2,1,1,1)
- Occupation, mineral extraction site: 2.06034e-5 m2*a; data quality (1,3,1,1,1)
- Stone: 0.5776 kg; data quality (1,1,1,1,1)
- Sand and gravel: 0.467625 kg; data quality (1,1,1,1,1)
- Water, fresh: 0.00130958, 0.00059149 m3 (2 entries, compartments not in this file); data quality (3,2,1,4,2)
- Occupation, urban, discontinuously built: 0.000126465 m2*a; data quality (4,2,1,1,1)
- Limestone: 0.00899279 kg; data quality (1,1,1,1,1)

## Emissions to nature
- ammonia: 9.28272e-11 kg; data quality (3,1,1,1,4)
- methanol: 1.60495e-10 kg; data quality (3,1,1,1,4)
- 3,3'-Dichlorobenzidine: 5.27991e-15 kg; data quality (3,2,1,1,3)
- Benzo(g,h,i)perylene: 5.37791e-16 kg; data quality (2,1,1,1,5)
- methane, dichloro-, hcc-30: 1.19853e-8 kg; data quality (4,2,1,1,3)
- benzo(a)pyrene: 5.68725e-12 kg; data quality (3,2,1,4,1)
- 4-nitroaniline: 9.10121e-14 kg; data quality (5,1,1,1,3)
- pyrene: 8.34243e-11 kg; data quality (3,2,1,3,1)
- BUTYL ISOCYANATE: 9.07184e-18 kg; data quality (4,2,1,1,3)
- diethanolamine: 2.82413e-10 kg; data quality (3,2,1,1,3)
- 2,4-dimethylphenol: 1.91125e-14 kg; data quality (4,1,1,1,3)
- DNOC: 1.20438e-13 kg; data quality (2,2,1,1,3)
- ethylene glycol: 1.07921e-7 kg; data quality (5,2,1,1,3)
- methylene diphenyl diisocyanate: 3.10324e-11 kg; data quality (4,2,1,1,5)
- Cresol: 5.33196e-11 kg; data quality (4,2,1,1,3)
- Methane: 9.29178e-5 kg; data quality (4,2,1,4,1)
- Hydrazine, methyl-: 4.64221e-9 kg; data quality (2,2,1,1,3)
- hydrogen chloride: 0.000134985 kg; data quality (2,2,1,1,3)
- monochloroethane: 1.16525e-9 kg; data quality (3,2,1,1,3)
- Dimethylamine: 1.03177e-11, 5.15887e-12 kg (2 entries, compartments not in this file); data quality (3,1,1,1,4)
- C.I. DIRECT BLUE 218: 6.69828e-13 kg; data quality (5,1,1,1,4)
- selenium: 6.55221e-8 kg; data quality (2,2,1,1,3)
- PHTHALIC ANHYDRIDE: 5.15887e-12 kg; data quality (3,1,1,1,4)
- 2-chloro-1-phenylethanone: 1.94707e-10 kg; data quality (2,2,1,1,3)
- lead: 8.9707e-8 kg; data quality (3,2,1,1,3)
- antimony: 2.10105e-9 kg; data quality (3,2,1,1,3)
- 2-ethoxyethyl acetate: 3.81056e-14 kg; data quality (5,2,1,1,5)
- Nickel, ion: 1.05972e-9 kg; data quality (3,2,1,1,3)
- ethylene oxide: 9.18654e-13 kg; data quality (3,2,1,1,3)
- nickel: 8.25266e-8 kg; data quality (3,2,1,1,3)
- Water, saline: 0.000587236 m3; data quality (4,2,1,1,2)
- ALUMINUM PHOSPHIDE: 5.46072e-12 kg; data quality (5,1,1,1,3)
- toluene, 2,4-dinitro-: 5.20816e-12 kg; data quality (5,2,1,1,3)
- 2,4-dinitrophenol: 1.5757e-13 kg; data quality (5,2,1,1,4)
- sulfur dioxide: 0.00335126 kg; data quality (2,2,1,1,3)
- Ethane, 1,1,1-trifluoro-, HFC-143a: 3.54814e-12 kg; data quality (4,2,1,4,1)
- Epichlorohydrin: 9.90504e-13 kg; data quality (2,1,1,1,4)
- nickel: 1.01226e-13 kg; data quality (4,1,1,1,5)
- styrene: 8.23736e-9 kg; data quality (3,2,1,3,2)
- Propane, 1,1,1,3,3,3-hexafluoro-, HCFC-236fa: 9.58538e-14 kg; data quality (4,2,1,4,1)
- QUINOLINE: 8.9792e-8 kg; data quality (3,2,1,1,3)
- acenaphthene: 3.70887e-10 kg; data quality (3,2,1,4,1)
- 1,2-DICHLOROBENZENE: 3.94474e-10 kg; data quality (5,1,1,1,3)
- 2,3,4'-TRICHLOROBIPHENYL: 5.00257e-18 kg; data quality (2,2,1,1,5)
- particulates, < 2.5 um: 0.000731528 kg; data quality (3,2,1,1,3)
- STYRENE OXIDE: 3.23099e-11 kg; data quality (5,2,1,1,3)
- TERT-BUTYL ALCOHOL: 3.49486e-11 kg; data quality (4,1,1,1,3)
- Creosol: 2.73036e-13 kg; data quality (5,1,1,1,3)
- DICHLOROBENZENE: 9.10121e-14 kg; data quality (4,1,1,1,3)
- isophorone: 2.01256e-8 kg; data quality (2,2,1,1,3)
- Benzene, hexachloro-: 1.22898e-14 kg; data quality (4,1,1,1,4)
- Xylene: 2.01165e-7 kg; data quality (3,2,1,3,2)
- hydrogen fluoride: 4.24908e-6 kg; data quality (2,2,1,1,3)
- copper: 4.56357e-10 kg; data quality (4,1,1,1,3)
- barium: 4.49418e-11 kg; data quality (4,1,1,1,3)
- Chromium, ion: 9.25233e-8 kg; data quality (3,2,1,1,3)
- vinyl acetate: 2.01713e-9 kg; data quality (4,2,1,1,3)
- propylene oxide: 4.01658e-12 kg; data quality (3,2,1,1,3)
- naphthalene: 1.48905e-6 kg; data quality (3,2,1,1,3)
- 1-Methyl-2-pyrrolidinone: 2.94279e-11 kg; data quality (5,1,1,1,3)
- benzene, ethyl-: 8.0797e-8 kg; data quality (3,2,1,3,2)
- chromium: 1.23742e-13 kg; data quality (4,1,1,1,5)
- nitric acid: 5.75742e-11 kg; data quality (3,1,1,1,4)
- mercury: 7.20963e-15 kg; data quality (3,1,1,1,3)
- acenaphthylene: 5.42688e-10 kg; data quality (3,2,1,3,1)
- arsenic: 1.55227e-8 kg; data quality (3,2,1,1,3)
- particulates, < 10 um: 0.000660145 kg; data quality (3,2,1,1,3)
- Benzene, pentachloro-: 8.99708e-15, 2.16489e-13 kg (2 entries, compartments not in this file); data quality (5,1,1,1,4)
- 4,4'-METHYLENEDIANILINE: 2.48766e-14 kg; data quality (3,1,1,1,4)
- Propanal: 1.74478e-13 kg; data quality (2,1,1,1,5)
- ALUMINUM OXIDE: 8.46412e-12 kg; data quality (5,1,1,1,3)
- DIPHENYLAMINE: 4.5506e-13 kg; data quality (1,1,1,1,3)
- Benzo(b)fluoranthene: 8.04929e-11 kg; data quality (2,2,1,1,3)
- [1,1'-BIPHENYL]-4,4'-DIAMINE, 3,3'-DIMETHOXY-, DIHYDROCHLORIDE: 3.49153e-13 kg; data quality (5,1,1,1,4)
- p-cresol: 5.42914e-12 kg; data quality (4,2,1,1,3)
- phthalate, dioctyl-: 2.08719e-9 kg; data quality (3,2,1,1,3)
- carbon disulfide: 7.59608e-8 kg; data quality (4,2,1,1,3)
- Aniline: 1.03177e-11 kg; data quality (3,1,1,1,4)
- phosgene: 9.65554e-12 kg; data quality (5,2,1,1,3)
- 2,6-XYLIDINE: 8.55513e-12 kg; data quality (5,1,1,1,3)
- 2-METHOXYETHANOL: 6.53623e-11 kg; data quality (4,2,1,1,5)
- Nitrobenzene: 1.30821e-11 kg; data quality (4,2,1,1,3)
- Formaldehyde: 9.09124e-13 kg; data quality (2,1,1,1,5)
- carbon tetrachloride: 2.03359e-10 kg; data quality (4,2,1,1,3)
- phenol: 5.17158e-12 kg; data quality (3,1,1,1,4)
- N,N-DIMETHYLANILINE: 5.45776e-13 kg; data quality (5,2,1,1,3)
- p-Cresidine: 5.83985e-12, 3.09532e-13 kg (2 entries, compartments not in this file); data quality (5,1,1,1,4)
- epichlorohydrin: 2.39996e-13 kg; data quality (3,2,1,1,3)
- Cyclohexanol: 8.55513e-12 kg; data quality (4,1,1,1,3)
- aniline: 1.4791e-11 kg; data quality (4,2,1,1,3)
- maleic anhydride: 1.32612e-9 kg; data quality (2,2,1,1,3)
- manganese: 6.28459e-11 kg; data quality (4,1,1,1,5)
- t-butyl methyl ether: 1.0744e-9 kg; data quality (3,2,1,1,3)
- Propane, 1,2-dichloro-: 2.27174e-11 kg; data quality (4,2,1,1,4)
- PCB-1: 4.23278e-19 kg; data quality (2,2,1,1,5)
- benz[a]anthracene: 1.16927e-11 kg; data quality (3,2,1,3,2)
- Dibenz(a,h)anthracene: 1.48297e-12 kg; data quality (2,2,1,1,3)
- ammonia: 5.56682e-5 kg; data quality (3,2,1,1,3)
- methane, chlorodifluoro-, hcfc-22: 1.61803e-10 kg; data quality (4,1,1,1,4)
- Triethyl amine: 4.11072e-12 kg; data quality (4,2,1,1,3)
- Ethylene glycol monoethyl ether: 2.81965e-10 kg; data quality (5,1,1,1,3)
- 2,2,4-trimethylpentane: 2.05693e-7 kg; data quality (3,2,1,2,2)
- chromium: 2.01317e-11 kg; data quality (4,1,1,1,3)
- acrylonitrile: 8.60722e-11 kg; data quality (4,2,1,1,3)
- benzene, chloro-: 8.6197e-10 kg; data quality (4,2,1,1,3)
- lead: 7.72358e-12, 1.88681e-8 kg (2 entries, compartments not in this file); data quality (3,1,1,1,4)
- cyanide: 7.99698e-8 kg; data quality (3,2,1,1,3)
- CARBAZOLE: 4.00023e-15 kg; data quality (2,2,1,1,5)
- Dinitrogen monoxide: 1.52062e-5 kg; data quality (4,2,1,4,1)
- p-phenylenediamine: 3.8777e-19 kg; data quality (5,2,1,1,3)
- ethene, tetrachloro-: 1.20606e-9 kg; data quality (3,2,1,1,3)
- ethane, 1,2-dichloro-: 1.06492e-9 kg; data quality (3,2,1,1,3)
- Chrysene, 5-methyl-: 6.05946e-17 kg; data quality (2,2,1,1,3)
- para-xylene: 1.13279e-9 kg; data quality (3,2,1,4,1)
- manganese: 1.58077e-9 kg; data quality (4,1,1,1,4)
- Ethane, 1,1,1,2-tetrafluoro-, HFC-134a: 3.12565e-11 kg; data quality (4,2,1,4,1)
- Methyl iodide: 3.85647e-15 kg; data quality (4,2,1,1,3)
- NITROUS ACID: 5.9994e-11, 9.08581e-11 kg (2 entries, compartments not in this file); data quality (5,1,1,1,4)
- ethylene glycol: 1.4668e-10 kg; data quality (5,1,1,1,4)
- toluene: 5.15887e-12 kg; data quality (5,1,1,1,4)
- Asbestos: 6.55408e-12 kg; data quality (5,2,1,1,3)
- ethyl acrylate: 8.06094e-11 kg; data quality (4,2,1,1,3)
- ethane, 1,1,2-trichloro-: 1.68423e-9 kg; data quality (4,2,1,1,3)
- ethane, 1,2-dibromo-: 1.02021e-10 kg; data quality (2,2,1,1,3)
- hexachlorobenzene: 2.35716e-12 kg; data quality (3,2,1,1,5)
- mercury: 3.68728e-8 kg; data quality (2,2,1,1,3)
- Vinyl acetate: 3.10763e-10 kg; data quality (4,1,1,1,4)
- Propene, 1,3-dichloro-: 1.48916e-11 kg; data quality (3,2,1,1,3)
- CHLORONAPHTHALENE: 9.59231e-17 kg; data quality (1,2,1,1,5)
- SEC-BUTYL ALCOHOL: 1.22093e-11 kg; data quality (5,1,1,1,3)
- 3,3'-DICHLOROBENZIDINE DIHYDROCHLORIDE: 2.88897e-14 kg; data quality (5,1,1,1,4)
- m-xylene: 2.97455e-8 kg; data quality (3,2,1,4,1)
- m-cresol: 8.63887e-12 kg; data quality (4,2,1,1,3)
- N-Nitrosodipropylamine: 9.10121e-14 kg; data quality (5,1,1,1,3)
- Zinc: 6.15634e-10, 5.40728e-8 kg (2 entries, compartments not in this file); data quality (5,1,1,1,4)
- hydroquinone: 4.03662e-12 kg; data quality (3,2,1,1,3)
- cyclohexane: 2.27339e-11 kg; data quality (4,1,1,1,3)
- vanadium: 8.66435e-10 kg; data quality (5,1,1,1,3)
- ACRYLAMIDE: 5.87726e-12, 3.92074e-13 kg (2 entries, compartments not in this file); data quality (4,1,1,1,4)
- 2-METHYLANTHRACENE: 9.55709e-15 kg; data quality (2,2,1,1,5)
- dibenzofuran: 2.6799e-11 kg; data quality (4,2,1,1,3)
- nitrogen oxides: 0.00471985 kg; data quality (2,2,1,1,3)
- phthalic anhydride: 8.34585e-10 kg; data quality (2,2,1,1,3)
- diisocyanates: 4.80973e-11 kg; data quality (4,1,1,1,5)
- Hydrazine: 4.28343e-14 kg; data quality (4,2,1,1,3)
- Indeno(1,2,3-cd)pyrene: 3.67539e-12 kg; data quality (3,2,1,4,1)
- VOC, volatile organic compounds: 0.000150503 kg; data quality (3,2,1,1,3)
- Phosphorus: 6.06526e-5 kg; data quality (2,1,1,1,5)
- 2-nitropropane: 2.78346e-11 kg; data quality (5,2,1,1,3)
- hydrogen sulfide: 3.13006e-6 kg; data quality (3,1,1,1,4)
- 1,2,4-trimethylbenzene: 1.50975e-10 kg; data quality (5,1,1,1,4)
- Ethane, pentafluoro-, HFC-125: 8.29278e-12 kg; data quality (4,2,1,4,1)
- 4-CHLOROANILINE: 5.15887e-12, 5.36523e-12 kg (2 entries, compartments not in this file); data quality (2,1,1,1,4)
- formaldehyde: 4.3892e-6 kg; data quality (2,2,1,1,3)
- beryllium: 6.36409e-10 kg; data quality (2,2,1,1,3)
- bromoform: 1.0652e-9 kg; data quality (3,2,1,1,3)
- Acetaldehyde: 2.11211e-13 kg; data quality (3,1,1,1,5)
- 3-methylcholanthrene: 1.08161e-13 kg; data quality (2,2,1,1,3)
- methyl isobutyl ketone: 6.04168e-10 kg; data quality (4,2,1,1,4)
- toluene: 6.76867e-7 kg; data quality (3,2,1,2,2)
- formaldehyde: 8.29581e-12 kg; data quality (2,1,1,1,4)
- Dimethyl sulfate: 1.30557e-9 kg; data quality (2,2,1,1,3)
- HYDROCHLORIC ACID: 1.05414e-5 kg; data quality (2,1,1,1,4)
- 2-Propanol: 4.73263e-12 kg; data quality (2,1,1,1,3)
- 1,3-PHENYLENEDIAMINE: 3.71439e-13 kg; data quality (4,1,1,1,4)
- DIETHANOLAMINE: 1.54766e-11 kg; data quality (4,1,1,1,4)
- 1,4-BENZOQUINONE: 6.23476e-11 kg; data quality (3,2,1,1,3)
- BUTYL ACRYLATE: 1.77474e-11 kg; data quality (4,1,1,1,3)
- Chromium VI: 4.86355e-8 kg; data quality (3,2,1,1,3)
- methane, monochloro-, r-40: 4.84781e-8 kg; data quality (3,2,1,1,3)
- carbon monoxide: 0.00440707 kg; data quality (2,2,1,1,3)
- methanol: 8.84429e-7 kg; data quality (4,2,1,1,3)
- anthracene: 3.78275e-11 kg; data quality (3,2,1,4,1)
- dimethyl formamide: 5.22702e-11 kg; data quality (4,2,1,1,3)
- propanal: 6.18853e-8 kg; data quality (3,2,1,3,1)
- phenanthrene: 1.43887e-9 kg; data quality (3,2,1,3,2)
- benzene: 4.629e-7 kg; data quality (3,2,1,2,2)
- acrolein: 2.87467e-8 kg; data quality (3,2,1,3,2)
- 2,4,5,2',5'-PENTACHLOROBIPHENYL: 8.44551e-18 kg; data quality (2,2,1,1,5)
- acetonitrile: 1.29413e-10 kg; data quality (3,2,1,1,3)
- hexachloroethane: 9.07166e-13 kg; data quality (4,2,1,1,3)
- phenol: 3.8318e-9 kg; data quality (4,2,1,1,4)
- methanol: 7.97396e-12 kg; data quality (3,1,1,1,5)
- butanol: 3.08897e-10 kg; data quality (5,1,1,1,3)
- 1,4-dioxane: 4.64402e-11 kg; data quality (4,2,1,1,5)
- Chloroacetic acid: 7.71014e-15 kg; data quality (3,2,1,1,3)
- Methane, dibromo-: 8.19108e-13 kg; data quality (5,1,1,1,3)
- Methane, difluoro-, HFC-32: 4.82933e-12 kg; data quality (4,2,1,4,1)
- hexane: 3.23549e-6 kg; data quality (3,2,1,1,3)
- Aluminum: 3.42147e-9 kg; data quality (4,1,1,1,3)
- formic acid: 1.85504e-11 kg; data quality (3,1,1,1,5)
- Formic acid: 1.53051e-14 kg; data quality (3,1,1,1,5)
- 2,4,6-trichlorophenol: 2.45041e-15 kg; data quality (2,2,1,1,5)
- Benzo(k)fluoranthene: 6.01362e-12 kg; data quality (3,2,1,4,1)
- benzyl chloride: 2.48646e-8 kg; data quality (2,2,1,1,3)
- Carbon dioxide: 3.13379 kg; data quality (3,2,1,4,1)
- 2-methylnaphthalene: 4.95971e-11 kg; data quality (2,2,1,1,3)
- AMMONIA: 2.76104e-12 kg; data quality (3,1,1,1,5)
- Diethylene glycol butyl ether: 7.72281e-12 kg; data quality (4,2,1,1,4)
- Ethylene glycol monoethyl ether: 5.15887e-12 kg; data quality (5,1,1,1,4)
- Benzo(g,h,i)perylene: 3.48491e-11 kg; data quality (3,2,1,2,2)
- Water, fresh: 0.00150236 m3; data quality (3,2,1,3,2)
- polychlorinated biphenyls: 2.00435e-12 kg; data quality (3,2,1,1,3)
- 2,6-Dinitrotoluene: 9.10121e-14 kg; data quality (5,1,1,1,3)
- Phenol: 2.75492e-14 kg; data quality (3,1,1,1,5)
- TOXAPHENE (EXAMPLE ISOMER SHOWN BELOW): 2.54437e-14 kg; data quality (4,2,1,1,5)
- cumene: 5.23412e-10 kg; data quality (4,2,1,1,4)
- Phthalate, dimethyl-: 1.17738e-12 kg; data quality (4,1,1,1,3)
- chlorine: 1.1027e-8 kg; data quality (4,2,1,1,3)
- butadiene: 2.52395e-8 kg; data quality (3,2,1,4,1)
- bis(2-chloroethyl)ether: 1.09194e-11 kg; data quality (3,2,1,1,3)
- OCTACHLORONAPHTHALENE: 7.26369e-15, 1.13495e-17 kg (2 entries, compartments not in this file); data quality (5,1,1,1,4)
- Sulfuric acid: 1.46187e-5 kg; data quality (2,1,1,1,4)
- Titanium: 1.84872e-10 kg; data quality (5,2,1,1,3)
- Benzoyl chloride: 3.86709e-13 kg; data quality (2,1,1,1,4)
- Nitrogen: 3.405e-6 kg; data quality (4,2,1,1,5)
- carbonyl sulfide: 1.92861e-7 kg; data quality (4,2,1,1,3)
- 1,2,4-trichlorobenzene: 6.54977e-12 kg; data quality (4,2,1,1,3)
- mercury: 3.56994e-9 kg; data quality (3,1,1,1,4)
- hexachloro-1,3-butadiene: 2.75211e-11 kg; data quality (4,2,1,1,3)
- cadmium: 2.67139e-8 kg; data quality (3,2,1,1,3)
- Benzo(a)anthracene: 2.34773e-12 kg; data quality (2,2,1,1,3)
- methyl methacrylate: 6.12845e-10 kg; data quality (4,2,1,1,3)
- acrylic acid: 1.14075e-10 kg; data quality (4,2,1,1,3)
- biphenyl: 4.01404e-11 kg; data quality (4,2,1,1,3)
- NITROGEN TRIFLUORIDE: 2.21159e-11 kg; data quality (3,1,1,1,3)
- Polychlorinated biphenyls: 2.5134e-15 kg; data quality (3,1,1,1,4)
- o-toluidine: 3.43538e-12 kg; data quality (4,2,1,1,3)
- pentachlorophenol: 1.9514e-13 kg; data quality (5,1,1,1,3)
- Methyl acrylate: 1.79033e-11 kg; data quality (3,1,1,1,3)
- 1,1,2,2-tetrachloroethane: 8.10671e-12 kg; data quality (3,2,1,1,3)
- trichloroethylene: 1.40091e-10 kg; data quality (4,2,1,1,3)
- methane, bromo-, halon 1001: 5.01795e-9 kg; data quality (3,2,1,1,3)
- Phthalate, dibutyl-: 5.85345e-11 kg; data quality (4,2,1,1,3)
- manganese: 4.79858e-8 kg; data quality (3,2,1,1,3)
- fluorene: 4.91777e-10 kg; data quality (3,2,1,4,1)
- acetaldehyde: 2.19475e-12 kg; data quality (3,1,1,1,5)
- ethylbenzene: 2.1954e-10 kg; data quality (4,1,1,1,3)
- chloroform: 1.755e-9 kg; data quality (4,2,1,1,3)
- 1,4-dichlorobenzene: 5.99163e-9 kg; data quality (2,2,1,1,3)
- acetaldehyde: 5.93529e-7 kg; data quality (3,2,1,2,2)
- Cobalt: 3.11658e-9 kg; data quality (3,2,1,1,3)
- 4-nitrophenol: 2.87733e-14 kg; data quality (2,2,1,1,5)
- o-Xylene: 1.15249e-8 kg; data quality (3,2,1,4,1)
- Ethene, chloro-: 1.04442e-10 kg; data quality (3,2,1,1,3)
- Hydrocarbons, aromatic: 4.1532e-8 kg; data quality (4,2,1,2,2)
- 1,1,1-trichloroethane: 5.00805e-10 kg; data quality (3,2,1,1,4)
- acetophenone: 4.33682e-10 kg; data quality (4,2,1,1,3)
- PYRIDINE: 5.51533e-11 kg; data quality (4,1,1,1,3)
- PHOSPHORUS: 1.73247e-8 kg; data quality (3,2,1,1,3)
- 1,1-DICHLOROETHYLENE: 4.82913e-12 kg; data quality (3,2,1,1,3)
- fluoranthene: 1.26876e-10 kg; data quality (3,2,1,3,1)
- ALPHA-NAPHTHYLAMINE: 3.64048e-13 kg; data quality (3,1,1,1,3)
- Chrysene: 1.27831e-11 kg; data quality (3,2,1,4,1)

## Inventory method
Input-output

## Modelling constants
The reference unit of all processes is 1 USD2013 of the good or service. The technosphere inputs are based on the US BEA detailed input-output tables for 2007. The IO tables are combined to develop a commodity-by-commodity model based on the the industry-technology assumption (see Suh et al., 2010), which assumes all commodities produced by a given industry have the same input structure, but that multiple industries can produce the same commodity. Thus, model technosphere flows represent commodity outputs (and not industry outputs) from other processes in the model. There are no by-products included in these processes. All commodity production is based on US-conditions, despite in reality that some goods and services are produced overseas, as USEEIO v1.1 is a single-region IO model.

## Completeness
The input-output approach assures that all purchased inputs associated with the sectors making these commodities as reported in the US census for 2007 are included. The direct resources extracted including minerals, energy sources, water and land occupied are included. Emissions to air include all critieria air pollutants, greenhouse gases, and hazardous and toxic air pollutants as defined by US EPA. Releases to water include toxics, total nitrogen and total phosphorus, and water discharges. Releases to soil or groundwater include toxics and agriculutural pesticides. Some metal releases to air, water and soil are not included because they could not be speciated. Solid hazardous and non-hazardous wastes generated are not included as an elementary flows although purchases of waste services are included.

## Data treatment
Greenhouse gases are primarily from the US Greenhouse Gas Emission Inventory (USEPA 2016a). Biogenic C uptake is not included (change from version 1.0), as biogenic C emission are not included. Toxic releases to air, water and soil (except pesticides) are from the 2013 Toxic Release Inventory (USEPA 2015a). Criteria air pollutants and hazardous air pollutants are from the 2011 National Emissions Inventory (USEPA 2015b). All estimates are normalized by industry based on sector output in the data year, then converted to 2013 USD using relative sector-specific CPIs (if data year is not 2013). Energy use represent raw renewables or fossil fuel energies and is based on EIA data for 2014. See Table 1 in Yang, Ingwersen et al. 2017 and Supporting Information 1, and the v1.1 data update notes (Ingwersen et al. 2017) for all details on environmental data sources used.Land occupation associated with manufacturing buildings was estimated based on the building floorspace data provided by the U.S. Energy Information Administration in the 2010 Manufacturing Energy Consumption Survey (EIA 2013). Portions of total renewable energy (EIA 2016) based on EIA-923 reports for 2014 (EIA 2017) are included. Nitrogen and Phosphorus releases are modeled in total N and total P equivalents as estimated by the Discharge Monitoring Report Nutrient Loading tool (USEPA 2016b). Self-supplied withdrawals were assigned to industrial sectors based on water use statistics for Canadian industries by NAICS 3-digit sector scaled to US production levels based on gross domestic product by industry (BEA 2015; Statistics Canada 2010), and further disaggregated to the manufacturing sectors based on compensation of employees as provided by the 2007 IO tables (BEA 2015). Water withdrawals associated with public supply were allocated to sectors based on their use of water, sewage, and other services in USD based on the IO tables (BEA 2015). Portions of total renewable energy (EIA 2016) by type are assigned to sectors (hydro, wind, solar, or) based on EIA-923 reports for 2014 (EIA 2017).

## Data collection
2015-2016

## Sampling procedure
US federal government sources, including surveys and US EPA emissions databases are used as the primary sources. From these sources, data for US reporting establishments/facilities are aggregated by the NAICS sector as defined in the BEA detailed 2007 input-output tables. When level of sector aggregation differs, or when direct emissions are not reported but modeled, additional sources are used to make allocations and estimates.

## Review details
In regard to quality assurance and peer-review, each dataset created went through Quality Assurance as defined in a quality assurance project plans at US EPA, CSRA or ERG. The model was assembled with the IO model builder model (USEPA 2016c). Validation functions were used to check that all the model components were properly assembled and harmonized. Bayou Demeke and Santosh Ghimire provided internal peer review of the model methodology and the manuscript underwent standard EPA management review. An editor and two anonymous reviewers at the Journal of Cleaner Production reviewed the model. In regard to data quality evaluation, data quality assessment was performed at the flow and process levels according to the updated US EPA data quality assessment guidelines as defined in US EPA (2016b).

## Intended application
The primary application is for use in the US Environmentally-Extended Input-Ouput model, USEEIO, version 1.1. This model is being used by the US EPA for supporting tools that prioritize goods and services based on potential environmental impacts, resource use or emissions for large regions, including the US and US states, and as a strealined tool for organizations as a starting point to consider sustainable materials management. Model results are designed to provide meso/macro-level decision support.

## Project
USEEIO v1.1 was developed by the US EPA with CSRA and ERG with Wesley W. Ingwersen and David E. Meyer as research leads. Yi Yang was the technical lead on the work for CSRA (contract EP-C-15-012); Troy Hawkins was lead for ERG (contract EP-C-12-021).

## Sources
- Maupin et al. 2014
- USEPA 2016b
- USGS 2016
- USDA 2009a
- Nickerson et al. 2011
- Edelen and Ingwersen 2017
- USGS 2015
- USDA 2006
- EIA 2013
- Yienger et al. 1995
- USEPA 2015a
- EIA 2017
- Lovelace 2009
- BLM 2008
- Kim et el. 2013
- USEPA 2015b
- USEPA 2016a
- Statistics Canada 2010
- Torcellini et al. 2003
- Ingwersen et al. 2017
- Blackhurst et al. 2010
- Ingwersen et al. DRAFT
- Macknick et al. 2011
- USDA 2016
- Goebes et al. 2003
- USEPA 2016c
- USDA 2014
- EIA 2015
- USDA 2009b
- EIA 2016
- BEA 2015
