# Storage batteries; at manufacturer

Dataset: openLCA process, unit process
Category: 3359: Other Electrical Equipment and Component Manufacturing
Geography: United States
Time period: 2017-01-01 to 2017-12-31
Data quality: US EPA - Process Pedigree Matrix (1;1)
Exchange data quality scheme: US EPA - Flow Pedigree Matrix
Generated by: US EPA with CSRA and ERG
Owner: US EPA
Published in: Yang, Ingwersen et al. 2017
restrictionsDescription: This model shold be appropriately cited (see Yang, Ingwersen et al. 2017 source or Publication field) when used. Any changes or derivations of this model by the user should be documented. The model itself and any results from use of this model shall not be construed to consitute US EPA opinion or policy.
copyright: false

## General comment
BEA Code & Name is '335911:Storage battery manufacturing'. Description of the primary industry producing this good or service, adapted from the Census Bureau NAICS 2007 descriptions: This U.S. industry comprises establishments primarily engaged in manufacturing storage batteries.

## Technology
The process describes the average US production of this good or service within this NAICS-based grouping defined in the BEA 2007 detailed input-output tables (BEA 2015). Distribution, wholesale and retailing of this good or service, use, and final disposal are not included. Creation of a product system with this process will enable modeling of all upstream (supply-chain) activities.

## Geography
Data represent the 50 US states

## Time period
2017 was the year in which this version of USEEIO was released and is the target date for the model

## Reference product
- Storage batteries; at manufacturer: 1 USD

## Inputs from technosphere
All rows: data quality (1,3,1,1,1)
- Lids, jars, bottle caps, other metal closures and crowns; at manufacturer: 0.00270491 USD
- Other basic inorganic chemicals; at manufacturer: 0.0114694 USD
- Metal coatings, engravings, and heat treatments; at manufacturer: 0.00252273 USD
- Management consulting: 0.000721919 USD
- Other primary nonferrous metals; at manufacturer: 0.317919 USD
- Sports: 1.54314e-7 USD
- Transmission and power train parts; at manufacturer: 2.31471e-7 USD
- Insurance carriers: 0.00269016 USD
- Cardboard; at manufacturer: 0.000720141 USD
- Natural gas; at consumer: 0.00985777 USD
- Relay and industrial controls; at manufacturer: 9.0238e-6 USD
- Investment advice, portfolio management, and other financial advising services: 0.000179361 USD
- All other forging, stamping, and sintering; at manufacturer: 0.0026889 USD
- Ball and roller bearings; at manufacturer: 0.000899158 USD
- Other plastic products; at manufacturer: 0.029222 USD
- Monetary authorities and depository credit intermediation: 0.00143698 USD
- Investigation and security: 0.000179593 USD
- Communication and energy wire and cable; at manufacturer: 2.85481e-6 USD
- Machine shops; at manufacturer: 0.00342173 USD
- Hotels and campgrounds: 0.000180827 USD
- Company and enterprise management: 0.0147276 USD
- Chemicals (except basic chemicals, agrichemicals, polymers, paints, pharmaceuticals,soaps, cleaning compounds); at manufacturer: 0.000741794 USD
- Printed circuit and electronic assembly; at manufacturer: 0.00127033 USD
- Accounting, tax preparation, bookkeeping, and payroll: 0.00053961 USD
- Plastic bags, films, and sheets; at manufacturer: 0.00251552 USD
- Computer systems design: 0.000359725 USD
- Paper; at manufacturer: 3.98365e-7 USD
- Secondary copper products; at manufacturer: 6.78981e-6 USD
- Truck transport: 0.01094 USD
- State and local government enterprises: 0.000358799 USD
- Adhesives; at manufacturer: 0.000537681 USD
- Lessors of nonfinancial intangible assets: 0.0041476 USD
- Other retail: 0.00519789 USD
- Passenger ground transport: 0.000180055 USD
- Nonresidential building repair and maintanence: 0.00197295 USD
- Metal structural products; at manufacturer: 0.00537742 USD
- Custom computer programming: 2.93196e-6 USD
- Aluminum products; at manufacturer: 2.00608e-6 USD
- Metal windows, doors, and architectural products; at manufacturer: 1.15735e-5 USD
- Waste management and remediation: 0.00107623 USD
- Food and beverage stores: 0.000358491 USD
- Cutting and machine tool accessory, rolling mill, and other metalworking machines; at manufacturer: 0.000180145 USD
- Coal; at mine: 0.000179207 USD
- Electricity; at consumer: 0.0107559 USD
- All other food and drinking places: 1.54314e-7 USD
- Air conditioning, refrigeration, and warm air heating equipment; at manufacturer: 1.3817e-7 USD
- Commercial machinery repair: 0.00143489 USD
- Motor vehicle steering, suspension components (except spring), and brake systems; at manufacturer: 7.7157e-8 USD
- Consumer goods and general rental centers: 7.7157e-8 USD
- Satellite, telecommunications resellers, and all other telecommunications: 3.08628e-7 USD
- Welding and Soldering Equipment, Scales and Balances, and other general purpose machinery; at manufacturer: 7.7157e-8 USD
- Semiconductors; at manufacturer: 0.00269311 USD
- Data processing and hosting: 0.00125653 USD
- Cardboard containers; at manufacturer: 0.0050291 USD
- Valve and fittings (except for plumbing); at manufacturer: 0.00556049 USD
- Gasoline, fuels, and by-products of petroleum refining; at manufacturer: 0.00197172 USD
- Abrasive products; at manufacturer: 0.00018021 USD
- Storage batteries; at manufacturer: 0.0026881 USD
- other miscellaneous electrical equipment and components; at manufacturer: 1.00304e-6 USD
- Architectural, engineering, and related services: 0.00269449 USD
- Other basic organic chemicals; at manufacturer: 0.000179824 USD
- Buildings and dwellings services: 0.0025111 USD
- Electronic capacitors, resistors, coils, transformers, connectors and other components (except semiconductors and printed circuit assemblies); at manufacturer: 0.000370865 USD
- General merchandise stores: 0.000716904 USD
- Plastic pipe, fittings, and sausage casings; at manufacturer: 0.000358475 USD
- Office administration: 6.94413e-7 USD
- Screws, nuts, and bolts; at manufacturer: 0.00771922 USD
- Cutlery and handtools; at manufacturer: 0.000898406 USD
- Employment services: 0.000180287 USD
- Custom metal rolls; at manufacturer: 0.000538413 USD
- Commercial equipment rental: 0.000538067 USD
- Drinking water and wastewater treatment; at consumer: 0.000358722 USD
- Nondepository credit intermediation and related activities: 0.00107721 USD
- Material handling equipment; at manufacturer: 1.3817e-7 USD
- Insurance agencies and brokerages: 0.000538282 USD
- Marketing research and all other miscellaneous professional, scientific, and technical services: 0.00107732 USD
- Vending, commercial laundry, and other commercial and service industry machinery; at manufacturer: 5.40099e-7 USD
- Other vehicle parts; at manufacturer: 0.00233617 USD
- Software: 1.54314e-7 USD
- Signal testing instruments; at manufacturer: 3.86556e-5 USD
- Civic, social, professional, and similar organizations: 0.000179438 USD
- Springs and wires; at manufacturer: 0.000358921 USD
- Motors and generators; at manufacturer: 5.16952e-6 USD
- Laminated plastic plates and shapes; at manufacturer: 0.000537742 USD
- Electronic equipment repair and maintenance: 0.000358783 USD
- Limited-service restaurants: 0.000539549 USD
- Facilities support: 3.08628e-7 USD
- Independent artists, writers, and performers: 7.7157e-8 USD
- Analytical laboratory instruments; at manufacturer: 5.24667e-6 USD
- Nonferrous metal casts; at manufacturer: 0.000180283 USD
- Aluminum; at manufacturer: 3.31775e-6 USD
- Wireless communications; at manufacturer: 1.05705e-5 USD
- Cast iron and steel; at manufacturer: 0.000179991 USD
- Light gauge metal cans, boxes, and containers; at manufacturer: 0.000717347 USD
- Vehicle engines and engine parts; at manufacturer: 1.54314e-7 USD
- Rail transport: 0.00215143 USD
- Golf courses, marinas, ski resorts, fitness and other rec centers and industries: 3.85785e-7 USD
- Plastics; at manufacturer: 0.0051988 USD
- Telecommunications: 0.000900416 USD
- Optical instruments and lenses; at manufacturer: 1.0802e-6 USD
- Other support services: 0.000179747 USD
- Synthetic dyes and pigments; at manufacturer: 0.00896095 USD
- Household goods repair: 0.000179422 USD
- Metal pipe fittings, ball and roller bearings, industrial patterns, metal bath fixtures, other misc. fabricated metals; at manufacturer: 0.00430788 USD
- Warehousing: 0.000718184 USD
- Legal services: 0.000541539 USD
- Other computer related services, including facilities management: 0.000179593 USD
- Specialized design: 0.0003594 USD
- Carbon and graphite products; at manufacturer: 0.000182379 USD
- Vehicle electrical and electronic equipment; at manufacturer: 1.15735e-6 USD
- Business support: 0.000359571 USD
- Advertising and public relations: 0.00126159 USD
- Vehicle repair: 0.000717412 USD
- Environmental and other technical consulting services: 0.000180364 USD
- Glass and glass products; at manufacturer: 6.01824e-6 USD
- Other petroleum and coal products; at manufacturer: 0.000722429 USD
- Other real estate: 0.000896371 USD
- Performances: 7.7157e-8 USD
- Securities and commodities brokerage and exchanges: 0.00305176 USD
- Primary batteries; at manufacturer: 3.05064e-7 USD
- Water transport (boats, ships, ferries): 0.000358767 USD
- Air transport: 0.000720437 USD
- Computer terminals and other computer peripheral equipment; at manufacturer: 2.24527e-5 USD
- Other secondary nonferrous metal products; at manufacturer: 0.0295862 USD
- Specialty transformers; at manufacturer: 1.54314e-7 USD
- Vehicle rental and leasing: 0.000717505 USD
- Wiring devices; at manufacturer: 8.95021e-6 USD
- Wholesale trade: 0.0412596 USD
- Primary iron, steel, and ferroalloy products; at manufacturer: 0.0588158 USD
- Full-service restaurants: 0.000180364 USD
- Compressed Gases; at manufacturer: 0.000716888 USD
- Wireless telecommunications: 0.00035988 USD
- Pipeline transport: 0.000179284 USD
- Paper bags and coated paper; at manufacturer: 0.000179853 USD
- Noncomparable imports: 0.00287124 USD

## Inputs from nature
- Water, saline: 9.17943e-6 m3; data quality (4,2,1,4,2)
- Water, fresh: 0.000138117, 0.000304874 m3 (2 entries, compartments not in this file); data quality (2,2,1,4,2)
- Occupation, urban, discontinuously built: 0.000113692 m2*a; data quality (4,2,1,1,1)
- Occupation, industrial area: 0.000426757 m2*a; data quality (4,2,1,1,1)
- Occupation, industrial area, built up: 0.000142252 m2*a; data quality (4,2,1,1,1)

## Emissions to nature
- beryllium: 3.39748e-13 kg; data quality (2,2,1,1,4)
- hexane: 6.13631e-7 kg; data quality (3,2,1,1,4)
- 2-methylnaphthalene: 9.69776e-13 kg; data quality (2,2,1,1,4)
- copper: 3.5085e-13, 3.09573e-13, 3.09573e-13 kg (3 entries, compartments not in this file); data quality (4,1,1,1,4)
- manganese: 2.32895e-9 kg; data quality (3,2,1,1,4)
- cumene: 2.00433e-11 kg; data quality (3,2,1,1,4)
- 2,2,4-trimethylpentane: 2.14145e-9 kg; data quality (3,2,1,4,1)
- Benzo(k)fluoranthene: 2.81159e-13 kg; data quality (3,2,1,3,2)
- o-Xylene: 1.2289e-8 kg; data quality (3,2,1,1,4)
- methylene diphenyl diisocyanate: 1.22511e-16 kg; data quality (4,2,1,1,5)
- lead: 1.03375e-6 kg; data quality (3,2,1,1,4)
- Water, saline: 4.65119e-6 m3; data quality (4,2,1,4,2)
- benz[a]anthracene: 3.04373e-13 kg; data quality (3,2,1,3,2)
- styrene: 1.67881e-10 kg; data quality (3,2,1,4,1)
- particulates, < 2.5 um: 2.66115e-5 kg; data quality (3,2,1,1,4)
- Dibenz(a,h)anthracene: 3.45558e-14 kg; data quality (2,2,1,1,4)
- benzene, ethyl-: 1.48891e-8 kg; data quality (3,2,1,1,4)
- acenaphthene: 1.51527e-11 kg; data quality (3,2,1,4,1)
- benzene, chloro-: 8.39067e-18 kg; data quality (4,2,1,1,5)
- pyrene: 2.63056e-12 kg; data quality (3,2,1,4,1)
- antimony: 8.16015e-11, 4.16903e-12 kg (2 entries, compartments not in this file); data quality (2,1,1,1,3)
- 3-methylcholanthrene: 4.26469e-15 kg; data quality (2,2,1,1,4)
- Ethane, pentafluoro-, HFC-125: 2.28827e-11 kg; data quality (4,2,1,4,1)
- nitric acid: 7.50565e-8 kg; data quality (3,1,1,1,3)
- nitrogen oxides: 1.72726e-5 kg; data quality (2,2,1,1,3)
- Indeno(1,2,3-cd)pyrene: 1.84877e-13 kg; data quality (3,2,1,3,2)
- phenol: 1.94722e-9 kg; data quality (4,2,1,1,4)
- nickel: 1.03191e-13, 1.03191e-13 kg (2 entries, compartments not in this file); data quality (4,1,1,1,4)
- Methane, difluoro-, HFC-32: 1.33258e-11 kg; data quality (4,2,1,4,1)
- biphenyl: 1.06905e-21 kg; data quality (4,2,1,1,5)
- selenium: 6.68417e-13 kg; data quality (2,2,1,1,4)
- Propane, 1,1,1,3,3,3-hexafluoro-, HCFC-236fa: 2.64495e-13 kg; data quality (4,2,1,4,1)
- PYRIDINE: 7.10729e-12 kg; data quality (4,1,1,1,5)
- Cadmium: 1.43117e-13 kg; data quality (3,1,1,1,3)
- tertiary-Butyl Acetate: 5.48889e-8 kg; data quality (3,2,1,1,4)
- acetonitrile: 1.19212e-9 kg; data quality (3,2,1,1,5)
- methyl methacrylate: 1.78175e-13 kg; data quality (4,2,1,1,5)
- formaldehyde: 2.59434e-8 kg; data quality (3,2,1,4,1)
- antimony: 4.53365e-9 kg; data quality (3,2,1,1,4)
- particulates, < 10 um: 1.12698e-6 kg; data quality (3,2,1,1,4)
- Xylene: 2.64669e-8 kg; data quality (3,2,1,2,3)
- VOC, volatile organic compounds: 1.41481e-5 kg; data quality (3,2,1,1,4)
- trichloroethylene: 2.5272e-8 kg; data quality (3,2,1,1,4)
- methyl isobutyl ketone: 8.09743e-8 kg; data quality (3,2,1,1,4)
- chromium: 2.78717e-14 kg; data quality (4,1,1,1,5)
- Benzo(b)fluoranthene: 3.00989e-13 kg; data quality (3,2,1,3,2)
- propanal: 2.03758e-9 kg; data quality (3,2,1,4,1)
- Sulfuric acid: 3.96242e-8 kg; data quality (2,1,1,1,3)
- ethene, tetrachloro-: 1.21473e-8 kg; data quality (3,2,1,1,4)
- Sodium formate: 2.26586e-9 kg; data quality (3,1,1,1,3)
- Zinc: 3.09573e-13, 1.76127e-11 kg (2 entries, compartments not in this file); data quality (5,1,1,1,4)
- benzene: 7.67055e-9 kg; data quality (3,2,1,4,1)
- lead: 2.19505e-10, 7.61773e-10 kg (2 entries, compartments not in this file); data quality (3,1,1,1,3)
- Water, fresh: 0.000368602 m3; data quality (2,2,1,4,2)
- Triethyl amine: 1.03845e-9 kg; data quality (3,2,1,1,4)
- toluene: 1.32356e-6 kg; data quality (4,2,1,1,4)
- Benzo(g,h,i)perylene: 4.62389e-13 kg; data quality (3,2,1,4,1)
- carbon monoxide: 2.5153e-5 kg; data quality (3,2,1,1,2)
- acetophenone: 9.97821e-12 kg; data quality (3,2,1,1,4)
- cadmium: 7.54719e-10 kg; data quality (3,2,1,1,4)
- arsenic: 7.0808e-13 kg; data quality (2,1,1,1,3)
- Methane: 7.83589e-7 kg; data quality (4,2,1,4,1)
- 1,1,1-trichloroethane: 3.66053e-7 kg; data quality (3,2,1,1,4)
- ammonia: 8.09467e-8 kg; data quality (3,2,1,1,4)
- fluorene: 1.64921e-11 kg; data quality (3,2,1,4,1)
- Dinitrogen monoxide: 7.74497e-8 kg; data quality (4,2,1,4,1)
- Hydrocarbons, aromatic: 6.21624e-10 kg; data quality (3,2,1,4,1)
- nickel: 1.86356e-8 kg; data quality (3,2,1,1,4)
- naphthalene: 9.9457e-10 kg; data quality (3,2,1,2,3)
- chloroform: 2.03464e-12 kg; data quality (3,1,1,1,5)
- Chromium VI: 4.49374e-12 kg; data quality (3,2,1,1,4)
- mercury: 4.89008e-10 kg; data quality (2,2,1,1,4)
- Phthalate, dibutyl-: 5.20353e-10 kg; data quality (3,2,1,1,4)
- acrolein: 1.1132e-9 kg; data quality (3,2,1,3,2)
- Cobalt: 1.66009e-8 kg; data quality (3,2,1,1,4)
- butadiene: 1.04498e-9 kg; data quality (3,2,1,4,1)
- arsenic: 4.68487e-14 kg; data quality (2,1,1,1,4)
- isophorone: 8.79818e-11 kg; data quality (3,2,1,1,4)
- Ethane, 1,1,1,2-tetrafluoro-, HFC-134a: 8.62478e-11 kg; data quality (4,2,1,4,1)
- para-xylene: 1.20568e-8 kg; data quality (3,2,1,1,4)
- 1-Methyl-2-pyrrolidinone: 2.00358e-7 kg; data quality (5,1,1,1,3)
- methanol: 7.10062e-7 kg; data quality (4,2,1,1,4)
- hydrogen chloride: 4.27836e-12 kg; data quality (2,2,1,1,4)
- Chrysene: 4.69195e-13 kg; data quality (3,2,1,4,1)
- toluene: 2.06382e-13 kg; data quality (5,1,1,1,4)
- acenaphthylene: 1.80007e-11 kg; data quality (3,2,1,4,1)
- Carbon dioxide: 0.0413061 kg; data quality (4,2,1,4,1)
- sulfur dioxide: 3.81834e-7 kg; data quality (2,2,1,1,4)
- Ethylene glycol monoethyl ether: 1.46074e-9 kg; data quality (3,2,1,1,4)
- Chromium, ion: 1.02256e-10 kg; data quality (2,2,1,1,4)
- arsenic: 5.57595e-10 kg; data quality (3,2,1,1,4)
- acetaldehyde: 1.06701e-8 kg; data quality (3,2,1,4,1)
- m-xylene: 2.81167e-8 kg; data quality (3,2,1,1,4)
- methane, dichloro-, hcc-30: 8.42362e-8 kg; data quality (4,2,1,1,4)
- anthracene: 1.40904e-12 kg; data quality (3,2,1,4,1)
- ethylene glycol: 2.15178e-8 kg; data quality (3,2,1,1,4)
- fluoranthene: 3.97543e-12 kg; data quality (3,2,1,4,1)
- benzo(a)pyrene: 2.36129e-13 kg; data quality (3,2,1,4,1)
- Diethylene glycol butyl ether: 5.94562e-13 kg; data quality (3,2,1,1,4)
- Ethane, 1,1,1-trifluoro-, HFC-143a: 9.79056e-12 kg; data quality (4,2,1,4,1)
- phenanthrene: 4.13809e-11 kg; data quality (3,2,1,4,1)

## Inventory method
Input-output

## Modelling constants
The reference unit of all processes is 1 USD2013 of the good or service. The technosphere inputs are based on the US BEA detailed input-output tables for 2007. The IO tables are combined to develop a commodity-by-commodity model based on the the industry-technology assumption (see Suh et al., 2010), which assumes all commodities produced by a given industry have the same input structure, but that multiple industries can produce the same commodity. Thus, model technosphere flows represent commodity outputs (and not industry outputs) from other processes in the model. There are no by-products included in these processes. All commodity production is based on US-conditions, despite in reality that some goods and services are produced overseas, as USEEIO v1.1 is a single-region IO model.

## Completeness
The input-output approach assures that all purchased inputs associated with the sectors making these commodities as reported in the US census for 2007 are included. The direct resources extracted including minerals, energy sources, water and land occupied are included. Emissions to air include all critieria air pollutants, greenhouse gases, and hazardous and toxic air pollutants as defined by US EPA. Releases to water include toxics, total nitrogen and total phosphorus, and water discharges. Releases to soil or groundwater include toxics and agriculutural pesticides. Some metal releases to air, water and soil are not included because they could not be speciated. Solid hazardous and non-hazardous wastes generated are not included as an elementary flows although purchases of waste services are included.

## Data treatment
Greenhouse gases are primarily from the US Greenhouse Gas Emission Inventory (USEPA 2016a). Biogenic C uptake is not included (change from version 1.0), as biogenic C emission are not included. Toxic releases to air, water and soil (except pesticides) are from the 2013 Toxic Release Inventory (USEPA 2015a). Criteria air pollutants and hazardous air pollutants are from the 2011 National Emissions Inventory (USEPA 2015b). All estimates are normalized by industry based on sector output in the data year, then converted to 2013 USD using relative sector-specific CPIs (if data year is not 2013). Energy use represent raw renewables or fossil fuel energies and is based on EIA data for 2014. See Table 1 in Yang, Ingwersen et al. 2017 and Supporting Information 1, and the v1.1 data update notes (Ingwersen et al. 2017) for all details on environmental data sources used.Land occupation associated with manufacturing buildings was estimated based on the building floorspace data provided by the U.S. Energy Information Administration in the 2010 Manufacturing Energy Consumption Survey (EIA 2013). Portions of total renewable energy (EIA 2016) based on EIA-923 reports for 2014 (EIA 2017) are included. Nitrogen and Phosphorus releases are modeled in total N and total P equivalents as estimated by the Discharge Monitoring Report Nutrient Loading tool (USEPA 2016b). Self-supplied withdrawals were assigned to industrial sectors based on water use statistics for Canadian industries by NAICS 3-digit sector scaled to US production levels based on gross domestic product by industry (BEA 2015; Statistics Canada 2010), and further disaggregated to the manufacturing sectors based on compensation of employees as provided by the 2007 IO tables (BEA 2015). Water withdrawals associated with public supply were allocated to sectors based on their use of water, sewage, and other services in USD based on the IO tables (BEA 2015). Portions of total renewable energy (EIA 2016) by type are assigned to sectors (hydro, wind, solar, or) based on EIA-923 reports for 2014 (EIA 2017).

## Data collection
2015-2016

## Sampling procedure
US federal government sources, including surveys and US EPA emissions databases are used as the primary sources. From these sources, data for US reporting establishments/facilities are aggregated by the NAICS sector as defined in the BEA detailed 2007 input-output tables. When level of sector aggregation differs, or when direct emissions are not reported but modeled, additional sources are used to make allocations and estimates.

## Review details
In regard to quality assurance and peer-review, each dataset created went through Quality Assurance as defined in a quality assurance project plans at US EPA, CSRA or ERG. The model was assembled with the IO model builder model (USEPA 2016c). Validation functions were used to check that all the model components were properly assembled and harmonized. Bayou Demeke and Santosh Ghimire provided internal peer review of the model methodology and the manuscript underwent standard EPA management review. An editor and two anonymous reviewers at the Journal of Cleaner Production reviewed the model. In regard to data quality evaluation, data quality assessment was performed at the flow and process levels according to the updated US EPA data quality assessment guidelines as defined in US EPA (2016b).

## Intended application
The primary application is for use in the US Environmentally-Extended Input-Ouput model, USEEIO, version 1.1. This model is being used by the US EPA for supporting tools that prioritize goods and services based on potential environmental impacts, resource use or emissions for large regions, including the US and US states, and as a strealined tool for organizations as a starting point to consider sustainable materials management. Model results are designed to provide meso/macro-level decision support.

## Project
USEEIO v1.1 was developed by the US EPA with CSRA and ERG with Wesley W. Ingwersen and David E. Meyer as research leads. Yi Yang was the technical lead on the work for CSRA (contract EP-C-15-012); Troy Hawkins was lead for ERG (contract EP-C-12-021).

## Sources
- USEPA 2016c
- Nickerson et al. 2011
- Goebes et al. 2003
- BLM 2008
- Edelen and Ingwersen 2017
- Lovelace 2009
- USEPA 2015b
- USEPA 2016b
- EIA 2016
- Ingwersen et al. 2017
- Statistics Canada 2010
- EIA 2015
- USDA 2009a
- USDA 2014
- Macknick et al. 2011
- USDA 2016
- BEA 2015
- Ingwersen et al. DRAFT
- USDA 2009b
- Maupin et al. 2014
- Kim et el. 2013
- EIA 2017
- USGS 2015
- EIA 2013
- Blackhurst et al. 2010
- USEPA 2016a
- USDA 2006
- Torcellini et al. 2003
- USGS 2016
- USEPA 2015a
- Yienger et al. 1995
