# Copper, nickel, lead, and zinc; at mine

Dataset: openLCA process, unit process
Category: 2122: Metal Ore Mining
Geography: United States
Time period: 2017-01-01 to 2017-12-31
Data quality: US EPA - Process Pedigree Matrix (1;1)
Exchange data quality scheme: US EPA - Flow Pedigree Matrix
Generated by: US EPA with CSRA and ERG
Owner: US EPA
Published in: Yang, Ingwersen et al. 2017
restrictionsDescription: This model shold be appropriately cited (see Yang, Ingwersen et al. 2017 source or Publication field) when used. Any changes or derivations of this model by the user should be documented. The model itself and any results from use of this model shall not be construed to consitute US EPA opinion or policy.
copyright: false

## General comment
BEA Code & Name is '212230:Copper, nickel, lead, and zinc mining'. Description of the primary industry producing this good or service, adapted from the Census Bureau NAICS 2007 descriptions: This industry comprises establishments primarily engaged in developing the mine site, mining, and/or beneficiating (i.e., preparing) ores valued chiefly for their copper, nickel, lead, or zinc content. Beneficiating includes the transformation of ores into concentrates.

## Technology
The process describes the average US production of this good or service within this NAICS-based grouping defined in the BEA 2007 detailed input-output tables (BEA 2015). Distribution, wholesale and retailing of this good or service, use, and final disposal are not included. Creation of a product system with this process will enable modeling of all upstream (supply-chain) activities.

## Geography
Data represent the 50 US states

## Time period
2017 was the year in which this version of USEEIO was released and is the target date for the model

## Reference product
- Copper, nickel, lead, and zinc; at mine: 1 USD

## Inputs from technosphere
All rows: data quality (1,3,1,1,1)
- Pipeline transport: 0.000280166 USD
- Secondary steel products; at manufacturer: 0.000490823 USD
- Vehicle repair: 0.000168515 USD
- Architectural, engineering, and related services: 0.00325242 USD
- Wholesale trade: 0.0353929 USD
- Advertising and public relations: 9.0579e-5 USD
- Other petroleum and coal products; at manufacturer: 0.000627759 USD
- Veneer, plywood, and engineered wood; at manufacturer: 0.000271737 USD
- Hotels and campgrounds: 4.21422e-6 USD
- Insurance agencies and brokerages: 0.000379173 USD
- Ground or treated minerals and earth; at manufacturer: 0.000657205 USD
- Water transport (boats, ships, ferries): 0.00174415 USD
- Computer systems design: 9.0579e-5 USD
- Insurance carriers: 0.00319134 USD
- Other plastic products; at manufacturer: 0.000709909 USD
- Mining and oil/gas field machinery; at manufacturer: 0.0460888 USD
- Warehousing: 8.42845e-6 USD
- Other computer related services, including facilities management: 4.21422e-6 USD
- Gaskets, seals, musical instruments, fasteners, brooms, brushes, mop and other misc. goods; at manufacturer: 0.000185372 USD
- Electricity; at consumer: 0.0174924 USD
- Cutting and machine tool accessory, rolling mill, and other metalworking machines; at manufacturer: 0.00145348 USD
- Cardboard; at manufacturer: 0.000417101 USD
- Other retail: 4.21422e-6 USD
- Cutlery and handtools; at manufacturer: 8.84987e-5 USD
- Management consulting: 9.47932e-5 USD
- Company and enterprise management: 0.00715793 USD
- Nonresidential building repair and maintanence: 0.0151916 USD
- Cement; at manufacturer: 0.000164301 USD
- Other basic organic chemicals; at manufacturer: 0.00789088 USD
- Metal coatings, engravings, and heat treatments; at manufacturer: 0.00254891 USD
- Environmental and other technical consulting services: 1.26427e-5 USD
- Paints and coatings; at manufacturer: 0.00123226 USD
- Vehicle electrical and electronic equipment; at manufacturer: 0.000185372 USD
- Petrochemicals; at manufacturer: 0.00147455 USD
- Paper; at manufacturer: 0.000328602 USD
- Iron, gold, silver, and other metal ores; at mine: 0.0316367 USD
- Wooden windows, door, and flooring; at manufacturer: 8.21506e-5 USD
- Lime and gypsum products; at manufacturer: 0.00315133 USD
- Chemicals (except basic chemicals, agrichemicals, polymers, paints, pharmaceuticals,soaps, cleaning compounds); at manufacturer: 0.009479 USD
- Waste management and remediation: 0.00779801 USD
- Pumps and pumping equipment; at manufacturer: 0.00533979 USD
- Used and secondhand goods: -0.00221807 USD
- Cast iron and steel; at manufacturer: 4.21422e-5 USD
- Scenic and sightseeing transportation and support activities for transportation: 8.42845e-6 USD
- Nondepository credit intermediation and related activities: 0.000848925 USD
- Plastic pipe, fittings, and sausage casings; at manufacturer: 0.000164301 USD
- Other vehicle parts; at manufacturer: 0.000714123 USD
- Metal structural products; at manufacturer: 0.00230864 USD
- Custom computer programming: 0.00197161 USD
- Air transport: 0.000436038 USD
- Construction machinery; at manufacturer: 0.0167296 USD
- Rubber tires; at manufacturer: 0.0244728 USD
- Noncomparable imports: 0.00129547 USD
- Vehicle engines and engine parts; at manufacturer: 0.000387601 USD
- Electronic equipment repair and maintenance: 9.0579e-5 USD
- Investigation and security: 1.26427e-5 USD
- Vehicle rental and leasing: 0.000362316 USD
- Transmission and power train parts; at manufacturer: 0.000758346 USD
- Other real estate: 0.000107436 USD
- Marketing research and all other miscellaneous professional, scientific, and technical services: 9.90075e-5 USD
- Telecommunications: 0.00102795 USD
- Radio and television: 4.21422e-6 USD
- Watches, clocks, and other measuring and controlling devices; at manufacturer: 0.000164301 USD
- Monetary authorities and depository credit intermediation: 0.00108065 USD
- Motors and generators; at manufacturer: 8.21506e-5 USD
- Light fixtures; at manufacturer: 0.000410753 USD
- Lessors of nonfinancial intangible assets: 0.000688838 USD
- Other support activities for mining: 0.0119879 USD
- Asphalt pavement; at manufacturer: 0.000164301 USD
- Welding and Soldering Equipment, Scales and Balances, and other general purpose machinery; at manufacturer: 0.00381264 USD
- Machine shops; at manufacturer: 0.000783631 USD
- Postal service: 0.00017273 USD
- Business support: 9.47932e-5 USD
- Other support services: 8.63648e-5 USD
- Tobacco, cotton, sugarcane, peanuts, sugar beets, herbs and spices, and other crops; at farm: 0.000206443 USD
- Copper, nickel, lead, and zinc; at mine: 0.0158803 USD
- Buildings and dwellings services: 0.00132497 USD
- Truck transport: 0.0094327 USD
- Cardboard containers; at manufacturer: 0.000417101 USD
- Primary iron, steel, and ferroalloy products; at manufacturer: 0.00691351 USD
- Sand, gravel, clay, phosphate, other nonmetallic minerals; at mine: 0.000250666 USD
- Compressed Gases; at manufacturer: 0.00461745 USD
- Metal windows, doors, and architectural products; at manufacturer: 0.000903656 USD
- Rail transport: 0.00181579 USD
- Vehicles and parts sales: 0.000362316 USD
- Civic, social, professional, and similar organizations: 9.47932e-5 USD
- Lumber and treated lumber; at manufacturer: 9.0579e-5 USD
- Paper bags and coated paper; at manufacturer: 0.000351807 USD
- Storage batteries; at manufacturer: 0.000246452 USD
- Commercial equipment rental: 0.00676387 USD
- Gasoline, fuels, and by-products of petroleum refining; at manufacturer: 0.0443756 USD
- Metal pipe fittings, ball and roller bearings, industrial patterns, metal bath fixtures, other misc. fabricated metals; at manufacturer: 0.000996423 USD
- Material handling equipment; at manufacturer: 0.0155501 USD
- Springs and wires; at manufacturer: 0.000328602 USD
- Screws, nuts, and bolts; at manufacturer: 0.0012218 USD
- Natural gas; at consumer: 0.0188211 USD
- Accounting, tax preparation, bookkeeping, and payroll: 0.000907924 USD
- Valve and fittings (except for plumbing); at manufacturer: 0.000821506 USD
- Drinking water and wastewater treatment; at consumer: 0.000267523 USD
- Legal services: 0.00477343 USD
- Wireless telecommunications: 0.00025488 USD
- Investment advice, portfolio management, and other financial advising services: 0.000878425 USD
- Satellite, telecommunications resellers, and all other telecommunications: 8.63648e-5 USD
- Unrefined oil and gas; at extraction site: 2.52853e-5 USD
- Other basic inorganic chemicals; at manufacturer: 0.000998503 USD
- Data processing and hosting: 4.21422e-6 USD
- Coal; at mine: 0.00154406 USD
- All other forging, stamping, and sintering; at manufacturer: 7.16418e-5 USD
- Motor vehicle steering, suspension components (except spring), and brake systems; at manufacturer: 0.000636187 USD
- Securities and commodities brokerage and exchanges: 0.000198015 USD

## Inputs from nature
- Gold: 5.13306e-7 kg; data quality (1,1,1,1,1)
- Palladium: 2.96793e-8 kg; data quality (1,1,1,1,1)
- Silver: 2.87062e-6 kg; data quality (1,1,1,1,1)
- Zirconium: 0.00010806 kg; data quality (1,1,1,1,1)
- Water, fresh: 0.0105904, 0.0108039 m3 (2 entries, compartments not in this file); data quality (4,2,1,4,2)
- Platinum: 8.87946e-9 kg; data quality (1,1,1,1,1)
- Iron: 0.0413881 kg; data quality (1,1,1,1,1)
- Copper: 0.0916057 kg; data quality (1,1,1,1,1)
- Occupation, mineral extraction site: 0.00169421 m2*a; data quality (1,3,1,1,1)
- Rhenium, in crude ore: 2.06782e-8 kg; data quality (1,1,1,1,1)
- Molybdenum: 1.65912e-5 kg; data quality (1,1,1,1,1)
- Energy, solar: 0.000253172 MJ; data quality (3,1,1,1,1)
- Occupation, urban, discontinuously built: 6.54994e-5 m2*a; data quality (4,2,1,1,1)
- Magnesium: 0.000700626 kg; data quality (1,1,1,1,1)
- Beryllium: 5.83855e-7 kg; data quality (1,1,1,1,1)
- Water, saline: 0.0289135 m3; data quality (4,2,1,4,2)
- Lead: 0.0237372 kg; data quality (1,1,1,1,1)
- Zinc: 0.0556321 kg; data quality (1,1,1,1,1)
- Cobalt: 2.91928e-7 kg; data quality (1,1,1,1,1)
- Titanium: 0.000145804 kg; data quality (1,1,1,1,1)
- Cerium: 1.06944e-5 kg; data quality (1,1,1,1,1)
- Nickel: 0.000240716 kg; data quality (1,1,1,1,1)

## Emissions to nature
- ethane, 1,2-dibromo-: 1.40003e-10 kg; data quality (2,2,1,1,4)
- ethene, tetrachloro-: 1.94551e-10 kg; data quality (3,2,1,1,4)
- 1,4-dichlorobenzene: 5.16311e-11 kg; data quality (2,2,1,1,3)
- Chromium VI: 3.71992e-9 kg; data quality (3,2,1,1,3)
- hydrogen chloride: 8.33217e-7 kg; data quality (2,2,1,1,4)
- particulates, < 2.5 um: 0.000504873 kg; data quality (3,2,1,1,3)
- Titanium: 8.67335e-11 kg; data quality (5,2,1,1,4)
- bromoform: 4.39647e-10 kg; data quality (3,2,1,1,4)
- Indeno(1,2,3-cd)pyrene: 2.29288e-13 kg; data quality (3,2,1,2,2)
- 2,2,4-trimethylpentane: 1.17302e-8 kg; data quality (3,2,1,1,3)
- acetaldehyde: 1.51419e-7 kg; data quality (3,2,1,4,1)
- NITROUS ACID: 7.21616e-11 kg; data quality (5,1,1,1,4)
- pentachlorophenol: 1.17264e-13 kg; data quality (3,2,1,1,4)
- Xylene: 3.11851e-7 kg; data quality (4,2,1,1,3)
- hexane: 1.63358e-7 kg; data quality (3,2,1,1,3)
- lead: 1.25148e-6 kg; data quality (3,2,1,1,3)
- carbon disulfide: 1.06639e-10 kg; data quality (4,2,1,1,4)
- pyrene: 2.38135e-11 kg; data quality (2,2,1,2,3)
- carbon tetrachloride: 1.03458e-10 kg; data quality (4,2,1,1,4)
- Dibenz(a,h)anthracene: 3.84667e-14 kg; data quality (2,2,1,1,3)
- propanal: 3.35272e-8 kg; data quality (3,2,1,4,1)
- Benzene, ethyl-: 1.64306e-10 kg; data quality (4,1,1,1,4)
- 3-methylcholanthrene: 2.95539e-14 kg; data quality (2,2,1,1,3)
- isophorone: 4.75731e-10 kg; data quality (2,2,1,1,4)
- benzene: 2.19693e-7 kg; data quality (3,2,1,2,3)
- phenanthrene: 6.79032e-10 kg; data quality (3,2,1,3,2)
- nitric acid: 4.04738e-9 kg; data quality (3,1,1,1,4)
- Propene: 3.20914e-8 kg; data quality (3,1,1,1,4)
- Hydrocarbons, aromatic: 4.85471e-10 kg; data quality (4,2,1,1,3)
- manganese: 4.28378e-9, 2.22036e-12 kg (2 entries, compartments not in this file); data quality (4,1,1,1,4)
- ammonia: 4.84856e-8 kg; data quality (3,1,1,1,4)
- Zinc: 4.50129e-7 kg; data quality (5,1,1,1,3)
- antimony: 1.82742e-8 kg; data quality (3,2,1,1,3)
- PCB-1: 5.05875e-16 kg; data quality (2,2,1,1,4)
- MOLYBDENUM(VI): 6.06053e-7 kg; data quality (3,1,1,1,3)
- 2,4,5,2',5'-PENTACHLOROBIPHENYL: 9.78075e-15 kg; data quality (2,2,1,1,4)
- manganese: 8.66431e-8 kg; data quality (3,2,1,1,3)
- acrolein: 1.80428e-8 kg; data quality (2,2,1,2,3)
- Benzo(a)anthracene: 4.54908e-14 kg; data quality (2,2,1,1,4)
- sulfur dioxide: 0.000922404 kg; data quality (2,2,1,1,3)
- nickel: 1.13633e-8 kg; data quality (3,2,1,1,3)
- Chromium, ion: 2.07207e-8 kg; data quality (2,2,1,1,3)
- Hydrazine, methyl-: 1.39426e-10 kg; data quality (2,2,1,1,4)
- butadiene: 5.21932e-9 kg; data quality (3,2,1,4,1)
- toluene, 2,4-dinitro-: 2.29651e-13 kg; data quality (5,2,1,1,4)
- nickel: 1.27853e-9 kg; data quality (4,1,1,1,4)
- Cresol: 8.4174e-9, 8.4174e-9 kg (2 entries, compartments not in this file); data quality (2,1,1,1,3)
- acenaphthylene: 1.95448e-10 kg; data quality (3,2,1,3,1)
- VOC, volatile organic compounds: 4.0427e-5 kg; data quality (3,2,1,1,3)
- benz[a]anthracene: 4.68155e-11 kg; data quality (2,2,1,1,3)
- ethane, 1,2-dichloro-: 1.66339e-10 kg; data quality (3,2,1,1,4)
- formaldehyde: 6.88328e-7 kg; data quality (2,2,1,2,3)
- m-xylene: 2.81738e-9 kg; data quality (3,2,1,1,3)
- chromium: 1.8201e-6, 8.82141e-9 kg (2 entries, compartments not in this file); data quality (4,1,1,1,3)
- copper: 5.55089e-12 kg; data quality (4,1,1,1,4)
- cumene: 1.1493e-10 kg; data quality (4,2,1,1,3)
- benzene, chloro-: 9.39275e-11 kg; data quality (4,2,1,1,4)
- methanol: 1.84877e-6 kg; data quality (3,1,1,1,4)
- Propane, 1,2-dichloro-: 7.58844e-11 kg; data quality (4,2,1,1,4)
- trichloroethylene: 6.8977e-11 kg; data quality (4,2,1,1,4)
- 1,2,4-trimethylbenzene: 7.57568e-8 kg; data quality (5,1,1,1,3)
- acenaphthene: 1.9114e-10 kg; data quality (3,2,1,4,1)
- CHLORONAPHTHALENE: 5.51968e-15 kg; data quality (1,2,1,1,4)
- Benzo(k)fluoranthene: 6.19132e-13 kg; data quality (3,2,1,4,1)
- naphthalene: 1.61113e-8 kg; data quality (3,2,1,1,3)
- ammonia: 2.20412e-6 kg; data quality (3,2,1,1,3)
- acetophenone: 1.23138e-11 kg; data quality (4,2,1,1,4)
- Dimethyl sulfate: 4.60784e-10 kg; data quality (2,2,1,1,4)
- Benzo(b)fluoranthene: 6.16225e-12 kg; data quality (2,2,1,1,3)
- methane, dichloro-, hcc-30: 2.2672e-8 kg; data quality (4,2,1,1,4)
- Cyanide: 3.99664e-10, 5.10682e-11 kg (2 entries, compartments not in this file); data quality (3,1,1,1,4)
- Water, fresh: 0.0127342 m3; data quality (4,2,1,1,2)
- anthracene: 1.40392e-11 kg; data quality (3,2,1,1,4)
- biphenyl: 1.39426e-12 kg; data quality (4,2,1,1,4)
- styrene: 6.05563e-9 kg; data quality (4,2,1,2,3)
- 2,3,4'-TRICHLOROBIPHENYL: 5.97858e-15 kg; data quality (2,2,1,1,4)
- polychlorinated biphenyls: 1.42785e-14 kg; data quality (3,2,1,1,4)
- Benzo(g,h,i)perylene: 6.18343e-13 kg; data quality (3,2,1,3,2)
- cyanide: 1.31357e-7 kg; data quality (3,2,1,1,4)
- Carbon dioxide: 0.736995 kg; data quality (4,2,1,4,1)
- mercury: 2.14916e-8 kg; data quality (2,2,1,1,3)
- chlorine: 4.78248e-8 kg; data quality (4,2,1,1,3)
- Ethene, chloro-: 4.13881e-11 kg; data quality (3,2,1,1,4)
- 2-methylnaphthalene: 1.36625e-12 kg; data quality (2,2,1,1,4)
- t-butyl methyl ether: 2.87086e-11 kg; data quality (3,2,1,1,4)
- methanol: 1.30623e-5 kg; data quality (4,2,1,1,3)
- methane, monochloro-, r-40: 4.8761e-10 kg; data quality (3,2,1,1,4)
- copper: 2.55889e-7 kg; data quality (4,1,1,1,3)
- fluoranthene: 4.98036e-11 kg; data quality (3,2,1,3,2)
- Water, saline: 0.0253872 m3; data quality (4,2,1,1,2)
- Xylene: 1.8873e-12 kg; data quality (4,1,1,1,4)
- Sulfuric acid: 1.7369e-5 kg; data quality (2,1,1,1,3)
- chloroform: 2.11415e-10 kg; data quality (4,2,1,1,4)
- 1,1,2,2-tetrachloroethane: 2.27711e-14 kg; data quality (3,2,1,1,3)
- 1,1,1-trichloroethane: 8.77265e-11 kg; data quality (4,2,1,1,4)
- 1,2,4-trimethylbenzene: 1.8873e-12 kg; data quality (5,1,1,1,4)
- Methane: 5.21562e-5 kg; data quality (4,2,1,4,1)
- benzene, ethyl-: 9.72984e-9 kg; data quality (3,2,1,4,1)
- Chrysene, 5-methyl-: 1.80431e-14 kg; data quality (2,2,1,1,4)
- methyl methacrylate: 1.64048e-11 kg; data quality (4,2,1,1,4)
- ethylbenzene: 3.40981e-8 kg; data quality (4,1,1,1,3)
- Cobalt: 1.51952e-9 kg; data quality (3,2,1,1,3)
- ethylene glycol: 1.08417e-12 kg; data quality (5,2,1,1,4)
- Naphthalene: 9.9916e-13 kg; data quality (4,1,1,1,4)
- benzyl chloride: 5.74182e-10 kg; data quality (2,2,1,1,4)
- Cadmium: 5.28949e-8 kg; data quality (3,1,1,1,3)
- monochloroethane: 4.73471e-10 kg; data quality (3,2,1,1,4)
- hydrogen fluoride: 3.21015e-7 kg; data quality (2,2,1,1,4)
- selenium: 2.12934e-8 kg; data quality (2,2,1,1,3)
- cadmium: 4.62444e-8 kg; data quality (3,2,1,1,3)
- 4-nitrophenol: 2.52915e-13 kg; data quality (2,2,1,1,4)
- benzo(a)pyrene: 7.12649e-13 kg; data quality (3,2,1,4,1)
- Phosphorus: 1.59474e-6 kg; data quality (2,1,1,1,4)
- vinyl acetate: 6.23473e-12 kg; data quality (4,2,1,1,4)
- particulates, < 10 um: 0.00295009 kg; data quality (3,2,1,1,3)
- PHOSPHORUS: 6.5866e-11 kg; data quality (2,2,1,1,4)
- AMMONIA: 3.67963e-8 kg; data quality (3,1,1,1,4)
- Chrysene: 1.16956e-11 kg; data quality (2,2,1,2,2)
- o-Xylene: 5.75045e-11 kg; data quality (3,2,1,1,4)
- NITRATE: 3.21952e-9 kg; data quality (5,1,1,1,4)
- fluorene: 2.40589e-10 kg; data quality (3,2,1,3,2)
- nitrogen oxides: 0.000693132 kg; data quality (2,2,1,1,3)
- 2-chloro-1-phenylethanone: 5.74182e-12 kg; data quality (2,2,1,1,4)
- arsenic: 2.16145e-7 kg; data quality (3,2,1,1,3)
- phthalate, dioctyl-: 5.63187e-11 kg; data quality (3,2,1,1,4)
- Nitrogen: 1.21065e-6 kg; data quality (5,2,1,1,5)
- 2,4-dinitrophenol: 4.13881e-13 kg; data quality (5,2,1,1,4)
- beryllium: 3.26634e-10 kg; data quality (2,2,1,1,4)
- phenol: 1.30387e-10 kg; data quality (4,2,1,1,4)
- methane, bromo-, halon 1001: 1.57065e-9 kg; data quality (3,2,1,1,4)
- carbon monoxide: 0.00034415 kg; data quality (2,2,1,1,3)
- toluene: 1.7993e-7 kg; data quality (4,2,1,2,3)
- Dinitrogen monoxide: 2.05554e-5 kg; data quality (4,2,1,4,1)

## Inventory method
Input-output

## Modelling constants
The reference unit of all processes is 1 USD2013 of the good or service. The technosphere inputs are based on the US BEA detailed input-output tables for 2007. The IO tables are combined to develop a commodity-by-commodity model based on the the industry-technology assumption (see Suh et al., 2010), which assumes all commodities produced by a given industry have the same input structure, but that multiple industries can produce the same commodity. Thus, model technosphere flows represent commodity outputs (and not industry outputs) from other processes in the model. There are no by-products included in these processes. All commodity production is based on US-conditions, despite in reality that some goods and services are produced overseas, as USEEIO v1.1 is a single-region IO model.

## Completeness
The input-output approach assures that all purchased inputs associated with the sectors making these commodities as reported in the US census for 2007 are included. The direct resources extracted including minerals, energy sources, water and land occupied are included. Emissions to air include all critieria air pollutants, greenhouse gases, and hazardous and toxic air pollutants as defined by US EPA. Releases to water include toxics, total nitrogen and total phosphorus, and water discharges. Releases to soil or groundwater include toxics and agriculutural pesticides. Some metal releases to air, water and soil are not included because they could not be speciated. Solid hazardous and non-hazardous wastes generated are not included as an elementary flows although purchases of waste services are included.

## Data treatment
Greenhouse gases are primarily from the US Greenhouse Gas Emission Inventory (USEPA 2016a). Biogenic C uptake is not included (change from version 1.0), as biogenic C emission are not included. Toxic releases to air, water and soil (except pesticides) are from the 2013 Toxic Release Inventory (USEPA 2015a). Criteria air pollutants and hazardous air pollutants are from the 2011 National Emissions Inventory (USEPA 2015b). All estimates are normalized by industry based on sector output in the data year, then converted to 2013 USD using relative sector-specific CPIs (if data year is not 2013). Energy use represent raw renewables or fossil fuel energies and is based on EIA data for 2014. See Table 1 in Yang, Ingwersen et al. 2017 and Supporting Information 1, and the v1.1 data update notes (Ingwersen et al. 2017) for all details on environmental data sources used.Mineral use is based on the Mineral Commodity Survey (USDA 2016). Only minerals extracted or imported in raw form by these sectors for further processing are included. Total mining water use is from the USGS report Water Use in the US (Maupin et al. 2014) and allocated to the eight mining sectors with employment-based factors provided by Blackhurst and colleagues (Blackhurst et al. 2010) and 2007 employment levels by mining sector provided by the U.S. Bureau of Labor Statistics. Land use for mining, oil, and gas extraction activities was estimated based on the Bureau of Land Management (BLM) Public Land Statistics 2007 report (BLM 2008). In all cases except hard rock leases, the BLM data could be mapped to a sector in the EEIO model without allocation. Land for hard rock leases were allocated to relevant mining sectors based on shares of employee compensation from the 2007 Use tables (BEA 2015).

## Data collection
2015-2016

## Sampling procedure
US federal government sources, including surveys and US EPA emissions databases are used as the primary sources. From these sources, data for US reporting establishments/facilities are aggregated by the NAICS sector as defined in the BEA detailed 2007 input-output tables. When level of sector aggregation differs, or when direct emissions are not reported but modeled, additional sources are used to make allocations and estimates.

## Review details
In regard to quality assurance and peer-review, each dataset created went through Quality Assurance as defined in a quality assurance project plans at US EPA, CSRA or ERG. The model was assembled with the IO model builder model (USEPA 2016c). Validation functions were used to check that all the model components were properly assembled and harmonized. Bayou Demeke and Santosh Ghimire provided internal peer review of the model methodology and the manuscript underwent standard EPA management review. An editor and two anonymous reviewers at the Journal of Cleaner Production reviewed the model. In regard to data quality evaluation, data quality assessment was performed at the flow and process levels according to the updated US EPA data quality assessment guidelines as defined in US EPA (2016b).

## Intended application
The primary application is for use in the US Environmentally-Extended Input-Ouput model, USEEIO, version 1.1. This model is being used by the US EPA for supporting tools that prioritize goods and services based on potential environmental impacts, resource use or emissions for large regions, including the US and US states, and as a strealined tool for organizations as a starting point to consider sustainable materials management. Model results are designed to provide meso/macro-level decision support.

## Project
USEEIO v1.1 was developed by the US EPA with CSRA and ERG with Wesley W. Ingwersen and David E. Meyer as research leads. Yi Yang was the technical lead on the work for CSRA (contract EP-C-15-012); Troy Hawkins was lead for ERG (contract EP-C-12-021).

## Sources
- Maupin et al. 2014
- USEPA 2015a
- EIA 2016
- Ingwersen et al. 2017
- Kim et el. 2013
- Blackhurst et al. 2010
- USDA 2014
- Edelen and Ingwersen 2017
- USEPA 2016b
- BLM 2008
- Lovelace 2009
- Ingwersen et al. DRAFT
- USDA 2009a
- Macknick et al. 2011
- EIA 2013
- USDA 2006
- EIA 2015
- Nickerson et al. 2011
- USDA 2009b
- USEPA 2016c
- Statistics Canada 2010
- USGS 2015
- USEPA 2016a
- EIA 2017
- Yienger et al. 1995
- USEPA 2015b
- Torcellini et al. 2003
- USGS 2016
- Goebes et al. 2003
- BEA 2015
- USDA 2016
