# Consumer goods and general rental centers

Dataset: openLCA process, unit process
Category: 53: Real Estate and Rental and Leasing
Geography: United States
Time period: 2017-01-01 to 2017-12-31
Data quality: US EPA - Process Pedigree Matrix (1;1)
Exchange data quality scheme: US EPA - Flow Pedigree Matrix
Generated by: US EPA with CSRA and ERG
Owner: US EPA
Published in: Yang, Ingwersen et al. 2017
restrictionsDescription: This model shold be appropriately cited (see Yang, Ingwersen et al. 2017 source or Publication field) when used. Any changes or derivations of this model by the user should be documented. The model itself and any results from use of this model shall not be construed to consitute US EPA opinion or policy.
copyright: false

## General comment
BEA Code & Name is '532A00:Consumer goods and general rental centers'. Description of the primary industry producing this good or service, adapted from the Census Bureau NAICS 2007 descriptions: The Real Estate and Rental and Leasing sector comprises establishments primarily engaged in renting, leasing, or otherwise allowing the use of tangible or intangible assets, and establishments providing related services. The major portion of this sector comprises establishments that rent, lease, or otherwise allow the use of their own assets by others. The assets may be tangible, as is the case of real estate and equipment, or intangible, as is the case with patents and trademarks. This sector also includes establishments primarily engaged in managing real estate for others, selling, renting and/or buying real estate for others, and appraising real estate. These activities are closely related to this sectors main activity, and it was felt that from a production basis they would best be included here. In addition, a substantial proportion of property management is self-performed by lessors. The main components of this sector are the real estate lessors industries (including equity real estate investment trusts (REITs)); equipment lessors industries (including motor vehicles, computers, and consumer goods); and lessors of nonfinancial intangible assets (except copyrighted works). Excluded from this sector are establishments primarily engaged in renting or leasing equipment with operators. Establishments renting or leasing equipment with operators are classified in various subsectors of NAICS depending on the nature of the services provided (e.g., transportation, construction, agriculture). These activities are excluded from this sector because the client is paying for the expertise and knowledge of the equipment operator, in addition to the rental of the equipment. In many cases, such as the rental of heavy construction equipment, the operator is essential to operate the equipment. Related NAICS codes are: 5322-3

## Technology
The process describes the average US production of this good or service within this NAICS-based grouping defined in the BEA 2007 detailed input-output tables (BEA 2015). Distribution, wholesale and retailing of this good or service, use, and final disposal are not included. Creation of a product system with this process will enable modeling of all upstream (supply-chain) activities.

## Geography
Data represent the 50 US states

## Time period
2017 was the year in which this version of USEEIO was released and is the target date for the model

## Reference product
- Consumer goods and general rental centers: 1 USD

## Inputs from technosphere
All rows: data quality (1,3,1,1,1)
- Software: 7.13966e-5 USD
- News syndicates, libraries, archives, Internet publishing and all other information services: 3.24923e-8 USD
- Natural gas; at consumer: 0.00152462 USD
- Scenic and sightseeing transportation and support activities for transportation: 0.000954829 USD
- Semiconductor machinery; at manufacturer: 0.000143075 USD
- Other engine equipment; at manufacturer: 3.06541e-7 USD
- Springs and wires; at manufacturer: 1.38748e-8 USD
- Waste management and remediation: 0.000404697 USD
- Office supplies (not paper); at manufacturer: 4.64377e-7 USD
- Metal pipe fittings, ball and roller bearings, industrial patterns, metal bath fixtures, other misc. fabricated metals; at manufacturer: 7.17217e-5 USD
- Insurance agencies and brokerages: 0.000665932 USD
- All other food and drinking places: 0.000119143 USD
- Other retail: 9.54132e-5 USD
- Storage batteries; at manufacturer: 4.62495e-8 USD
- Unrefined oil and gas; at extraction site: 0.000238229 USD
- Other vehicle parts; at manufacturer: 7.20488e-5 USD
- Copper, nickel, lead, and zinc; at mine: 0.00435316 USD
- Machinery for the paper, textile, food or other industries (except semiconductor machinery); at manufacturer: 1.39337e-7 USD
- Nonresidential building repair and maintanence: 0.000880469 USD
- Other plastic products; at manufacturer: 0.000169123 USD
- Chemicals (except basic chemicals, agrichemicals, polymers, paints, pharmaceuticals,soaps, cleaning compounds); at manufacturer: 2.9635e-7 USD
- Insurance carriers: 0.00733876 USD
- Aluminum products; at manufacturer: 2.77497e-8 USD
- Independent artists, writers, and performers: 0.00118939 USD
- Other petroleum and coal products; at manufacturer: 3.23746e-8 USD
- Other rubber products; at manufacturer: 6.49846e-8 USD
- Metal structural products; at manufacturer: 2.70187e-6 USD
- Environmental and other technical consulting services: 0.000309975 USD
- Directory, mailing list, and other publishers; at publisher: 2.78674e-8 USD
- Legal services: 0.0017414 USD
- Business support: 0.000765599 USD
- Rubber tires; at manufacturer: 7.17102e-7 USD
- Heating equipment other than warm air furnaces; at manufacturer: 6.01243e-8 USD
- Fabricated pipe and pipe fittings; at manufacturer: 1.00322e-6 USD
- Drinking water and wastewater treatment; at consumer: 0.000142826 USD
- Motor vehicle steering, suspension components (except spring), and brake systems; at manufacturer: 2.42013e-5 USD
- Advertising and public relations: 0.0118005 USD
- Couriers and messengers: 0.00131269 USD
- Investment advice, portfolio management, and other financial advising services: 0.000119073 USD
- Lids, jars, bottle caps, other metal closures and crowns; at manufacturer: 5.57347e-7 USD
- Wireless telecommunications: 0.00142915 USD
- Paints and coatings; at manufacturer: 0.000786134 USD
- Securities and commodities brokerage and exchanges: 0.000239552 USD
- Accounting, tax preparation, bookkeeping, and payroll: 0.00254886 USD
- Other computer related services, including facilities management: 0.000690371 USD
- Other basic organic chemicals; at manufacturer: 9.2499e-9 USD
- Passenger ground transport: 0.000619851 USD
- Sports: 0.000119175 USD
- Rail transport: 0.00011912 USD
- Wood kitchen cabinets and countertops; at manufacturer: 2.84247e-6 USD
- Books, newspapers, magazines, and other print media; at manufacturer: 0.000737714 USD
- Internet publishing and broadcasting: 0.00016661 USD
- Facilities support: 0.000166792 USD
- Dry-cleaning and laundry: 4.7783e-5 USD
- Cement; at manufacturer: 3.06541e-7 USD
- Electronic equipment repair and maintenance: 0.000743301 USD
- State and local government enterprises: 0.000144167 USD
- Used and secondhand goods: -0.000594391 USD
- Vehicle seating and interior trim (upholstery); at manufacturer: 2.50806e-7 USD
- Stationery; at manufacturer: 2.38035e-5 USD
- Light gauge metal cans, boxes, and containers; at manufacturer: 2.78674e-8 USD
- Postal service: 0.001264 USD
- Carbon and graphite products; at manufacturer: 4.62495e-9 USD
- Other primary nonferrous metals; at manufacturer: 1.17043e-6 USD
- Motorcycle, bicycle, and parts; at manufacturer: 1.11469e-7 USD
- Plywood and veneer; at manufacturer: 2.09005e-6 USD
- Metal coatings, engravings, and heat treatments; at manufacturer: 8.8999e-7 USD
- Vehicles and parts sales: 2.42106e-5 USD
- Urethane and other foam products; at manufacturer: 9.4749e-7 USD
- Metal hinges, keys, lock, and other hardware; at manufacturer: 4.08643e-7 USD
- Management consulting: 0.00138294 USD
- Printed circuit and electronic assembly; at manufacturer: 8.36021e-8 USD
- Telecommunications: 0.00238164 USD
- Air purification and ventilation equipment; at manufacturer: 1.84998e-8 USD
- Ready-mix concrete; at manufacturer: 2.31299e-6 USD
- Semiconductors; at manufacturer: 8.36021e-8 USD
- Lime and gypsum products; at manufacturer: 1.08683e-6 USD
- Home cooking appliances; at manufacturer: 5.93575e-6 USD
- Material handling equipment; at manufacturer: 2.38314e-5 USD
- Watches, clocks, and other measuring and controlling devices; at manufacturer: 1.67204e-7 USD
- Computer systems design: 0.000809389 USD
- Communication and energy wire and cable; at manufacturer: 8.35903e-7 USD
- General merchandise stores: 2.38405e-5 USD
- Vehicle repair: 0.000699007 USD
- Paper bags and coated paper; at manufacturer: 7.15638e-5 USD
- Machine shops; at manufacturer: 8.45271e-7 USD
- Other real estate: 0.079841 USD
- Company and enterprise management: 0.013841 USD
- Communications equipment; at manufacturer: 5.08744e-8 USD
- Asphalt pavement; at manufacturer: 1.67204e-7 USD
- Clothing; at manufacturer: 0.000927251 USD
- Paper; at manufacturer: 7.15359e-5 USD
- Lessors of nonfinancial intangible assets: 0.00542334 USD
- Wooden windows, door, and flooring; at manufacturer: 0.0107998 USD
- Electricity; at consumer: 0.00287949 USD
- External hard drives, CDs, other storage media; at manufacturer: 2.38035e-5 USD
- Other support services: 4.76674e-5 USD
- Buildings and dwellings services: 0.00185763 USD
- Consumer goods and general rental centers: 0.00028775 USD
- Cardboard containers; at manufacturer: 0.000309608 USD
- Soap and cleaning compounds; at manufacturer: 1.15624e-7 USD
- Other textiles; at manufacturer: 3.28489e-7 USD
- Secondary steel products; at manufacturer: 1.02102e-7 USD
- Adhesives; at manufacturer: 1.11469e-7 USD
- Commercial machinery repair: 0.00151674 USD
- Satellite, telecommunications resellers, and all other telecommunications: 0.000309585 USD
- Welding and Soldering Equipment, Scales and Balances, and other general purpose machinery; at manufacturer: 1.61631e-6 USD
- Full-service restaurants: 0.00221615 USD
- Cutlery and handtools; at manufacturer: 3.98805e-7 USD
- Civic, social, professional, and similar organizations: 9.57615e-5 USD
- Irradiation apparatuses; at manufacturer: 3.45555e-6 USD
- Household goods repair: 0.000385339 USD
- Light fixtures; at manufacturer: 1.39337e-7 USD
- Office administration: 0.000452685 USD
- Switchgear and switchboards; at manufacturer: 4.1801e-7 USD
- Secondary copper products; at manufacturer: 2.26622e-7 USD
- Lawn and garden equipment; at manufacturer: 3.05753e-5 USD
- Other secondary nonferrous metal products; at manufacturer: 1.38748e-8 USD
- Books; at publisher: 4.62495e-9 USD
- Vehicle engines and engine parts; at manufacturer: 2.86864e-7 USD
- Newspapers; at publisher: 9.2499e-9 USD
- Water transport (boats, ships, ferries): 0.000118985 USD
- Transmission and power train parts; at manufacturer: 4.81714e-5 USD
- Commercial equipment rental: 0.0012947 USD
- Glass and glass products; at manufacturer: 2.38638e-5 USD
- Computer terminals and other computer peripheral equipment; at manufacturer: 2.38314e-5 USD
- Investigation and security: 0.000287017 USD
- Coal; at mine: 8.79917e-8 USD
- Architectural, engineering, and related services: 0.000239312 USD
- Laminated plastic plates and shapes; at manufacturer: 5.2948e-7 USD
- Motors and generators; at manufacturer: 1.84998e-8 USD
- Wiring devices; at manufacturer: 9.32909e-7 USD
- Performances: 4.76534e-5 USD
- Travel arrangement and reservation: 0.000119872 USD
- Metal plumbing drains, faucets, valves, and other fittings; at manufacturer: 3.06541e-7 USD
- Noncomparable imports: 0.00200169 USD
- Employment services: 0.00169188 USD
- Marketing research and all other miscellaneous professional, scientific, and technical services: 0.00047777 USD
- Hotels and campgrounds: 0.00147753 USD
- Data processing and hosting: 0.000428361 USD
- Vehicle electrical and electronic equipment; at manufacturer: 4.78059e-5 USD
- Air transport: 0.00202634 USD
- Aluminum; at manufacturer: 0.00235506 USD
- Valve and fittings (except for plumbing); at manufacturer: 2.78674e-7 USD
- Air conditioning, refrigeration, and warm air heating equipment; at manufacturer: 2.50203e-5 USD
- Carpets and rugs; at manufacturer: 4.62495e-9 USD
- Movies and film: 2.38035e-5 USD
- Vehicle rental and leasing: 0.00256674 USD
- Cardboard; at manufacturer: 0.000594503 USD
- Plastic bottles; at manufacturer: 4.76999e-5 USD
- Screws, nuts, and bolts; at manufacturer: 2.40868e-5 USD
- Industrial process variable instruments; at manufacturer: 8.33667e-8 USD
- Monetary authorities and depository credit intermediation: 0.00824247 USD
- Specialized design: 0.000143694 USD
- Abrasive products; at manufacturer: 4.27025e-7 USD
- Nondepository credit intermediation and related activities: 0.0028109 USD
- Speed changers, industrial high-speed drives, and gears; at manufacturer: 4.73745e-7 USD
- Clay and ceramic products; at manufacturer: 3.06541e-7 USD
- Limited-service restaurants: 0.0010488 USD
- Polystyrene foam products; at manufacturer: 3.71173e-8 USD
- Finished and coated fabric; at manufacturer: 4.73745e-7 USD
- Wholesale trade: 0.0463969 USD
- Warehousing: 0.000429457 USD
- Golf courses, marinas, ski resorts, fitness and other rec centers and industries: 0.000262173 USD
- Gaskets, seals, musical instruments, fasteners, brooms, brushes, mop and other misc. goods; at manufacturer: 2.46858e-5 USD
- Custom metal rolls; at manufacturer: 5.01612e-7 USD
- Metal windows, doors, and architectural products; at manufacturer: 2.28512e-6 USD
- Fabric; at manufacturer: 2.50806e-7 USD
- Pipeline transport: 2.3808e-5 USD
- Truck transport: 0.00138202 USD
- Electronic capacitors, resistors, coils, transformers, connectors and other components (except semiconductors and printed circuit assemblies); at manufacturer: 2.78674e-8 USD
- Plastic pipe, fittings, and sausage casings; at manufacturer: 4.84198e-5 USD
- Food and beverage stores: 4.62495e-9 USD
- Lumber and treated lumber; at manufacturer: 1.75564e-6 USD
- Magazines and journals; at publisher: 4.78109e-5 USD
- Photographers: 2.50806e-7 USD
- Other concrete products; at manufacturer: 2.424e-5 USD
- Leather; at manufacturer: 7.52419e-7 USD
- Promoters and agents: 7.15079e-5 USD
- Primary iron, steel, and ferroalloy products; at manufacturer: 0.0024741 USD
- Veneer, plywood, and engineered wood; at manufacturer: 2.41147e-5 USD
- Gasoline, fuels, and by-products of petroleum refining; at manufacturer: 0.00247845 USD
- Plastic bags, films, and sheets; at manufacturer: 9.5423e-5 USD

## Inputs from nature
- Water, fresh: 0.000127716, 7.37986e-5 m3 (2 entries, compartments not in this file); data quality (1,2,1,4,2)
- Occupation, urban, discontinuously built: 0.000767967 m2*a; data quality (4,2,1,1,1)
- Energy, solar: 0.0220564 MJ; data quality (3,1,1,1,1)

## Emissions to nature
- o-Xylene: 2.32765e-9 kg; data quality (3,2,1,4,1)
- naphthalene: 4.19779e-9 kg; data quality (3,2,1,4,1)
- 3-methylcholanthrene: 3.92809e-20 kg; data quality (2,2,1,1,5)
- Dinitrogen monoxide: 2.92768e-8 kg; data quality (4,2,1,4,1)
- Hydrocarbons, aromatic: 1.35609e-9 kg; data quality (3,2,1,4,1)
- styrene: 1.88731e-9 kg; data quality (3,2,1,4,1)
- Phosphorus: 1.73707e-6 kg; data quality (4,1,1,1,5)
- phenol: 1.58098e-12 kg; data quality (4,2,1,1,5)
- Benzo(g,h,i)perylene: 1.46232e-11 kg; data quality (3,2,1,4,1)
- cadmium: 2.9172e-14 kg; data quality (3,2,1,1,5)
- Xylene: 1.5813e-7 kg; data quality (3,2,1,4,1)
- Nitrogen: 2.99472e-9 kg; data quality (2,2,1,1,5)
- formaldehyde: 6.75384e-8 kg; data quality (3,2,1,4,1)
- Benzo(k)fluoranthene: 5.42838e-12 kg; data quality (3,2,1,4,1)
- benzene, ethyl-: 4.84249e-8 kg; data quality (3,2,1,4,1)
- manganese: 5.32173e-12 kg; data quality (3,2,1,5,1)
- VOC, volatile organic compounds: 3.30523e-6 kg; data quality (3,2,1,1,1)
- nickel: 2.09069e-11 kg; data quality (3,2,1,5,1)
- BUTYL ISOCYANATE: 8.02307e-16 kg; data quality (4,2,1,1,5)
- 2,2,4-trimethylpentane: 6.87716e-8 kg; data quality (3,2,1,4,1)
- acetaldehyde: 3.15179e-8 kg; data quality (3,2,1,4,1)
- benzene: 1.2323e-7 kg; data quality (3,2,1,4,1)
- fluorene: 8.83649e-11 kg; data quality (3,2,1,4,1)
- Benzo(b)fluoranthene: 5.5214e-12 kg; data quality (3,2,1,4,1)
- propanal: 6.87385e-9 kg; data quality (3,2,1,4,1)
- particulates, < 10 um: 1.4451e-8 kg; data quality (3,2,1,4,1)
- Dibenz(a,h)anthracene: 4.95572e-14 kg; data quality (3,2,1,3,2)
- Chromium VI: 2.25992e-12 kg; data quality (3,2,1,5,1)
- Ethane, 1,1,1-trifluoro-, HFC-143a: 3.3214e-9 kg; data quality (4,2,1,4,1)
- Ethane, 1,1,1,2-tetrafluoro-, HFC-134a: 2.92592e-8 kg; data quality (4,2,1,4,1)
- ethane, 1,2-dichloro-: 4.921e-14 kg; data quality (3,2,1,1,5)
- carbon monoxide: 7.3279e-5 kg; data quality (3,2,1,1,1)
- Diethylene glycol butyl ether: 1.17206e-14 kg; data quality (3,2,1,1,5)
- Carbon dioxide: 0.0111664 kg; data quality (4,2,1,4,1)
- particulates, < 2.5 um: 2.74382e-7 kg; data quality (3,2,1,4,1)
- m-xylene: 6.48532e-9 kg; data quality (3,2,1,4,1)
- anthracene: 3.69955e-11 kg; data quality (3,2,1,4,1)
- cumene: 7.04681e-13 kg; data quality (4,2,1,1,5)
- 4,4'-METHYLENEDIANILINE: 4.63035e-12 kg; data quality (4,2,1,1,5)
- lead: 5.41474e-16 kg; data quality (3,2,1,1,5)
- Benzo(a)anthracene: 3.49164e-19 kg; data quality (2,2,1,1,5)
- selenium: 3.82597e-17 kg; data quality (2,2,1,1,5)
- butadiene: 2.00006e-8 kg; data quality (3,2,1,4,1)
- arsenic: 1.01025e-11 kg; data quality (3,2,1,5,1)
- hexane: 3.97711e-8 kg; data quality (3,2,1,4,1)
- Chrysene: 5.14123e-12 kg; data quality (3,2,1,4,1)
- acrolein: 2.52706e-9 kg; data quality (3,2,1,4,1)
- ammonia: 1.06508e-8 kg; data quality (3,2,1,4,1)
- acenaphthene: 4.77202e-11 kg; data quality (3,2,1,4,1)
- methanol: 2.60529e-11 kg; data quality (4,2,1,1,5)
- t-butyl methyl ether: 6.31175e-14 kg; data quality (3,2,1,1,5)
- chlorine: 5.78794e-14 kg; data quality (4,2,1,1,5)
- Indeno(1,2,3-cd)pyrene: 4.48479e-12 kg; data quality (3,2,1,4,1)
- sulfur dioxide: 1.05967e-8 kg; data quality (3,2,1,4,1)
- Propane, 1,1,1,3,3,3-hexafluoro-, HCFC-236fa: 8.97285e-11 kg; data quality (4,2,1,4,1)
- Methane: 1.01935e-6 kg; data quality (4,2,1,4,1)
- phenanthrene: 1.57878e-10 kg; data quality (3,2,1,4,1)
- Methane, difluoro-, HFC-32: 4.52072e-9 kg; data quality (4,2,1,4,1)
- ethane, 1,2-dibromo-: 4.12245e-15 kg; data quality (2,2,1,1,5)
- Cobalt: 3.18e-16 kg; data quality (3,2,1,1,5)
- fluoranthene: 4.94721e-11 kg; data quality (3,2,1,4,1)
- toluene: 1.89885e-7 kg; data quality (3,2,1,4,1)
- 2-methylnaphthalene: 1.30259e-17 kg; data quality (2,2,1,1,5)
- para-xylene: 1.21376e-10 kg; data quality (3,2,1,4,1)
- nitrogen oxides: 3.53788e-6 kg; data quality (3,2,1,1,1)
- benz[a]anthracene: 5.41227e-12 kg; data quality (3,2,1,4,1)
- methyl isobutyl ketone: 2.27871e-11 kg; data quality (4,2,1,1,5)
- Ethane, pentafluoro-, HFC-125: 7.76285e-9 kg; data quality (4,2,1,4,1)
- mercury: 1.64646e-13 kg; data quality (3,2,1,5,1)
- Chromium, ion: 7.52214e-12 kg; data quality (3,2,1,5,1)
- pyrene: 6.20426e-11 kg; data quality (3,2,1,4,1)
- benzo(a)pyrene: 5.13448e-12 kg; data quality (3,2,1,4,1)
- Water, fresh: 0.000170625 m3; data quality (1,2,1,4,2)
- Ethylene glycol monoethyl ether: 1.85455e-13 kg; data quality (3,2,1,1,5)
- beryllium: 2.75654e-17 kg; data quality (2,2,1,1,5)
- ethylene glycol: 2.3633e-9 kg; data quality (5,2,1,1,5)
- acenaphthylene: 1.85269e-10 kg; data quality (3,2,1,4,1)

## Inventory method
Input-output

## Modelling constants
The reference unit of all processes is 1 USD2013 of the good or service. The technosphere inputs are based on the US BEA detailed input-output tables for 2007. The IO tables are combined to develop a commodity-by-commodity model based on the the industry-technology assumption (see Suh et al., 2010), which assumes all commodities produced by a given industry have the same input structure, but that multiple industries can produce the same commodity. Thus, model technosphere flows represent commodity outputs (and not industry outputs) from other processes in the model. There are no by-products included in these processes. All commodity production is based on US-conditions, despite in reality that some goods and services are produced overseas, as USEEIO v1.1 is a single-region IO model.

## Completeness
The input-output approach assures that all purchased inputs associated with the sectors making these commodities as reported in the US census for 2007 are included. The direct resources extracted including minerals, energy sources, water and land occupied are included. Emissions to air include all critieria air pollutants, greenhouse gases, and hazardous and toxic air pollutants as defined by US EPA. Releases to water include toxics, total nitrogen and total phosphorus, and water discharges. Releases to soil or groundwater include toxics and agriculutural pesticides. Some metal releases to air, water and soil are not included because they could not be speciated. Solid hazardous and non-hazardous wastes generated are not included as an elementary flows although purchases of waste services are included.

## Data treatment
Greenhouse gases are primarily from the US Greenhouse Gas Emission Inventory (USEPA 2016a). Biogenic C uptake is not included (change from version 1.0), as biogenic C emission are not included. Toxic releases to air, water and soil (except pesticides) are from the 2013 Toxic Release Inventory (USEPA 2015a). Criteria air pollutants and hazardous air pollutants are from the 2011 National Emissions Inventory (USEPA 2015b). All estimates are normalized by industry based on sector output in the data year, then converted to 2013 USD using relative sector-specific CPIs (if data year is not 2013). Energy use represent raw renewables or fossil fuel energies and is based on EIA data for 2014. See Table 1 in Yang, Ingwersen et al. 2017 and Supporting Information 1, and the v1.1 data update notes (Ingwersen et al. 2017) for all details on environmental data sources used.Land occupation for commercial buildings was estimated based on the building floorspace data provided by the U.S. Energy Information Administration 2012 Commercial Building Energy Consumption Survey (CBECS) (EIA 2015). Total commercial public supply water use is reported by USGS (Maupin et al. 2014). Water use is allocated across commercial sectors based on their use of water, sewage, and other services in USD based on the 2007 Benchmark Use Table before redefinitions (BEA 2015).

## Data collection
2015-2016

## Sampling procedure
US federal government sources, including surveys and US EPA emissions databases are used as the primary sources. From these sources, data for US reporting establishments/facilities are aggregated by the NAICS sector as defined in the BEA detailed 2007 input-output tables. When level of sector aggregation differs, or when direct emissions are not reported but modeled, additional sources are used to make allocations and estimates.

## Review details
In regard to quality assurance and peer-review, each dataset created went through Quality Assurance as defined in a quality assurance project plans at US EPA, CSRA or ERG. The model was assembled with the IO model builder model (USEPA 2016c). Validation functions were used to check that all the model components were properly assembled and harmonized. Bayou Demeke and Santosh Ghimire provided internal peer review of the model methodology and the manuscript underwent standard EPA management review. An editor and two anonymous reviewers at the Journal of Cleaner Production reviewed the model. In regard to data quality evaluation, data quality assessment was performed at the flow and process levels according to the updated US EPA data quality assessment guidelines as defined in US EPA (2016b).

## Intended application
The primary application is for use in the US Environmentally-Extended Input-Ouput model, USEEIO, version 1.1. This model is being used by the US EPA for supporting tools that prioritize goods and services based on potential environmental impacts, resource use or emissions for large regions, including the US and US states, and as a strealined tool for organizations as a starting point to consider sustainable materials management. Model results are designed to provide meso/macro-level decision support.

## Project
USEEIO v1.1 was developed by the US EPA with CSRA and ERG with Wesley W. Ingwersen and David E. Meyer as research leads. Yi Yang was the technical lead on the work for CSRA (contract EP-C-15-012); Troy Hawkins was lead for ERG (contract EP-C-12-021).

## Sources
- USEPA 2016a
- Blackhurst et al. 2010
- USGS 2015
- Ingwersen et al. DRAFT
- Maupin et al. 2014
- USDA 2016
- Statistics Canada 2010
- USEPA 2016c
- EIA 2016
- EIA 2013
- EIA 2017
- Edelen and Ingwersen 2017
- Goebes et al. 2003
- USDA 2006
- EIA 2015
- USEPA 2015a
- Torcellini et al. 2003
- USEPA 2015b
- USDA 2014
- BLM 2008
- USDA 2009b
- Lovelace 2009
- Nickerson et al. 2011
- USEPA 2016b
- USGS 2016
- Kim et el. 2013
- BEA 2015
- Ingwersen et al. 2017
- USDA 2009a
- Yienger et al. 1995
- Macknick et al. 2011
