# Iron, gold, silver, and other metal ores; at mine

Dataset: openLCA process, unit process
Category: 2122: Metal Ore Mining
Geography: United States
Time period: 2017-01-01 to 2017-12-31
Data quality: US EPA - Process Pedigree Matrix (1;1)
Exchange data quality scheme: US EPA - Flow Pedigree Matrix
Generated by: US EPA with CSRA and ERG
Owner: US EPA
Published in: Yang, Ingwersen et al. 2017
restrictionsDescription: This model shold be appropriately cited (see Yang, Ingwersen et al. 2017 source or Publication field) when used. Any changes or derivations of this model by the user should be documented. The model itself and any results from use of this model shall not be construed to consitute US EPA opinion or policy.
copyright: false

## General comment
BEA Code & Name is '2122A0:Iron, gold, silver, and other metal ore mining'. Description of the primary industry producing this good or service, adapted from the Census Bureau NAICS 2007 descriptions: This industry group comprises establishments primarily engaged in developing mine sites or mining metallic minerals, and establishments primarily engaged in ore dressing and beneficiating (i.e., preparing) operations, such as crushing, grinding, washing, drying, sintering, concentrating, calcining, and leaching. Beneficiating may be performed at mills operated in conjunction with the mines served or at mills, such as custom mills, operated separately. Related NAICS codes are: 21221, 21222, 21229

## Technology
The process describes the average US production of this good or service within this NAICS-based grouping defined in the BEA 2007 detailed input-output tables (BEA 2015). Distribution, wholesale and retailing of this good or service, use, and final disposal are not included. Creation of a product system with this process will enable modeling of all upstream (supply-chain) activities.

## Geography
Data represent the 50 US states

## Time period
2017 was the year in which this version of USEEIO was released and is the target date for the model

## Reference product
- Iron, gold, silver, and other metal ores; at mine: 1 USD

## Inputs from technosphere
All rows: data quality (1,3,1,1,1)
- Advertising and public relations: 0.000158652 USD
- Metal windows, doors, and architectural products; at manufacturer: 6.80474e-5 USD
- Legal services: 0.0151638 USD
- Mining and oil/gas field machinery; at manufacturer: 0.0137661 USD
- Noncomparable imports: 0.00122416 USD
- Scenic and sightseeing transportation and support activities for transportation: 0.000150822 USD
- Springs and wires; at manufacturer: 2.47445e-5 USD
- Hotels and campgrounds: 7.57192e-5 USD
- Accounting, tax preparation, bookkeeping, and payroll: 0.0030791 USD
- Environmental and other technical consulting services: 0.000226439 USD
- Other basic inorganic chemicals; at manufacturer: 0.00323447 USD
- Lime and gypsum products; at manufacturer: 0.00662027 USD
- Vehicle electrical and electronic equipment; at manufacturer: 0.000389838 USD
- Buildings and dwellings services: 0.00175635 USD
- Nondepository credit intermediation and related activities: 0.00202427 USD
- Satellite, telecommunications resellers, and all other telecommunications: 8.18026e-5 USD
- Specialized design: 4.10895e-7 USD
- Electronic equipment repair and maintenance: 0.000157522 USD
- Gasoline, fuels, and by-products of petroleum refining; at manufacturer: 0.0944526 USD
- Petrochemicals; at manufacturer: 0.0029646 USD
- Data processing and hosting: 7.56165e-5 USD
- Business support: 0.000233652 USD
- Telecommunications: 0.000831734 USD
- Asphalt pavement; at manufacturer: 1.23723e-5 USD
- Insurance carriers: 0.0058895 USD
- Custom computer programming: 0.000148467 USD
- Other plastic products; at manufacturer: 0.00245882 USD
- Full-service restaurants: 1.02724e-7 USD
- Compressed Gases; at manufacturer: 0.00943404 USD
- Metal coatings, engravings, and heat treatments; at manufacturer: 0.00755389 USD
- Other retail: 7.55138e-5 USD
- Material handling equipment; at manufacturer: 0.0264955 USD
- Investigation and security: 0.000226747 USD
- Nonresidential building repair and maintanence: 0.00545522 USD
- Postal service: 0.000163297 USD
- Computer terminals and other computer peripheral equipment; at manufacturer: 2.05448e-7 USD
- Lessors of nonfinancial intangible assets: 0.0020869 USD
- Storage batteries; at manufacturer: 1.85584e-5 USD
- Other rubber products; at manufacturer: 5.13619e-7 USD
- Cutting and machine tool accessory, rolling mill, and other metalworking machines; at manufacturer: 0.00258867 USD
- Securities and commodities brokerage and exchanges: 0.000617201 USD
- Waste management and remediation: 0.00194157 USD
- Architectural, engineering, and related services: 0.0055439 USD
- Wholesale trade: 0.0449057 USD
- Tobacco, cotton, sugarcane, peanuts, sugar beets, herbs and spices, and other crops; at farm: 0.000767202 USD
- Golf courses, marinas, ski resorts, fitness and other rec centers and industries: 1.02724e-7 USD
- Wooden windows, door, and flooring; at manufacturer: 6.18613e-6 USD
- Light fixtures; at manufacturer: 3.09306e-5 USD
- Computer systems design: 0.000157419 USD
- Cutlery and handtools; at manufacturer: 0.00158363 USD
- Coal; at mine: 0.00275061 USD
- Screws, nuts, and bolts; at manufacturer: 0.00429879 USD
- Metal pipe fittings, ball and roller bearings, industrial patterns, metal bath fixtures, other misc. fabricated metals; at manufacturer: 0.00465606 USD
- Motor vehicle steering, suspension components (except spring), and brake systems; at manufacturer: 0.00260304 USD
- Transmission and power train parts; at manufacturer: 0.00186151 USD
- Secondary steel products; at manufacturer: 0.00146549 USD
- Other vehicle parts; at manufacturer: 0.00253413 USD
- Office administration: 1.02724e-7 USD
- Pumps and pumping equipment; at manufacturer: 0.000402098 USD
- Cement; at manufacturer: 1.23723e-5 USD
- Radio and television: 7.5411e-5 USD
- Vehicle repair: 8.81942e-5 USD
- Paints and coatings; at manufacturer: 9.27919e-5 USD
- Motors and generators; at manufacturer: 6.18613e-6 USD
- Employment services: 1.02724e-7 USD
- Cast iron and steel; at manufacturer: 0.00075411 USD
- Rail transport: 0.00322122 USD
- Chemicals (except basic chemicals, agrichemicals, polymers, paints, pharmaceuticals,soaps, cleaning compounds); at manufacturer: 0.00567994 USD
- Travel arrangement and reservation: 1.02724e-6 USD
- Electricity; at consumer: 0.0349204 USD
- Other computer related services, including facilities management: 7.56165e-5 USD
- Lumber and treated lumber; at manufacturer: 0.000157008 USD
- Valve and fittings (except for plumbing); at manufacturer: 6.18613e-5 USD
- Gaskets, seals, musical instruments, fasteners, brooms, brushes, mop and other misc. goods; at manufacturer: 0.000389838 USD
- Paper; at manufacturer: 2.47445e-5 USD
- Veneer, plywood, and engineered wood; at manufacturer: 0.00047123 USD
- Used and secondhand goods: -0.000167025 USD
- Metal structural products; at manufacturer: 0.000324034 USD
- Cardboard containers; at manufacturer: 0.0016092 USD
- Limited-service restaurants: 3.08171e-7 USD
- Wireless telecommunications: 0.000170305 USD
- Ground or treated minerals and earth; at manufacturer: 4.9489e-5 USD
- Other petroleum and coal products; at manufacturer: 0.00245058 USD
- Water transport (boats, ships, ferries): 0.00193554 USD
- Vehicle rental and leasing: 0.000630293 USD
- Commercial equipment rental: 0.0083501 USD
- Natural gas; at consumer: 0.0103841 USD
- Insurance agencies and brokerages: 0.000933169 USD
- Air transport: 0.000484321 USD
- Paper bags and coated paper; at manufacturer: 0.00190496 USD
- Primary iron, steel, and ferroalloy products; at manufacturer: 0.0124721 USD
- Unrefined oil and gas; at extraction site: 0.000456575 USD
- All other forging, stamping, and sintering; at manufacturer: 0.00128199 USD
- Pipeline transport: 0.000622463 USD
- Passenger ground transport: 1.02724e-7 USD
- Management consulting: 0.000233138 USD
- Cardboard; at manufacturer: 0.0016092 USD
- Investment advice, portfolio management, and other financial advising services: 0.00255913 USD
- Watches, clocks, and other measuring and controlling devices; at manufacturer: 1.23723e-5 USD
- Other basic organic chemicals; at manufacturer: 0.0123922 USD
- Vehicle engines and engine parts; at manufacturer: 0.00108153 USD
- Other support activities for mining: 0.0139929 USD
- Company and enterprise management: 0.0168791 USD
- Rubber and plastic belts and hoses; at manufacturer: 6.16343e-7 USD
- Vehicles and parts sales: 0.000628855 USD
- Other real estate: 0.00046122 USD
- Other support services: 8.21108e-5 USD
- Sand, gravel, clay, phosphate, other nonmetallic minerals; at mine: 0.000114822 USD
- Copper, nickel, lead, and zinc; at mine: 0.00164639 USD
- Rubber tires; at manufacturer: 0.0221946 USD
- Iron, gold, silver, and other metal ores; at mine: 0.0201044 USD
- Plastic pipe, fittings, and sausage casings; at manufacturer: 1.23723e-5 USD
- Household goods repair: 2.05448e-7 USD
- Construction machinery; at manufacturer: 0.0241825 USD
- Warehousing: 0.000150822 USD
- Monetary authorities and depository credit intermediation: 0.00324414 USD
- Civic, social, professional, and similar organizations: 0.000232933 USD
- Dimensional stone; at mine: 8.73152e-6 USD
- Welding and Soldering Equipment, Scales and Balances, and other general purpose machinery; at manufacturer: 0.00088785 USD
- Truck transport: 0.00777569 USD
- Marketing research and all other miscellaneous professional, scientific, and technical services: 0.000308857 USD
- Drinking water and wastewater treatment; at consumer: 0.000396333 USD
- Machine shops; at manufacturer: 0.00231264 USD

## Inputs from nature
- Gold: 9.18531e-6 kg; data quality (1,1,1,1,1)
- Fluorspar: 6.37353e-6 kg; data quality (1,1,1,1,1)
- Water, fresh: 0.0115276, 0.0117498 m3 (2 entries, compartments not in this file); data quality (4,2,1,4,2)
- Talc: 3.4104e-5 kg; data quality (1,1,1,1,1)
- Pumice: 1.55425e-5 kg; data quality (1,1,1,1,1)
- Perlite: 2.52146e-5 kg; data quality (1,1,1,1,1)
- Zinc: 0.00418922 kg; data quality (1,1,1,1,1)
- Iron: 0.740616 kg; data quality (1,1,1,1,1)
- Clay, unspecified: 0.00082951 kg; data quality (1,1,1,1,1)
- Lithium: 4.86401e-8 kg; data quality (1,1,1,1,1)
- Phosphate ore: 0.00141448 kg; data quality (1,1,1,1,1)
- Zirconium: 0.00193366 kg; data quality (1,1,1,1,1)
- Nickel: 1.81265e-5 kg; data quality (1,1,1,1,1)
- Mica: 2.57178e-6 kg; data quality (1,1,1,1,1)
- Beryllium: 1.04477e-5 kg; data quality (1,1,1,1,1)
- Sodium carbonate: 0.000654126 kg; data quality (1,1,1,1,1)
- Titanium: 0.00260907 kg; data quality (1,1,1,1,1)
- Zeolites: 3.58371e-6 kg; data quality (1,1,1,1,1)
- Lead: 0.00178747 kg; data quality (1,1,1,1,1)
- Boron: 0.000218415 kg; data quality (1,1,1,1,1)
- Rhenium, in crude ore: 3.70024e-7 kg; data quality (1,1,1,1,1)
- Diatomite: 5.03733e-5 kg; data quality (1,1,1,1,1)
- Water, saline: 0.0315113 m3; data quality (4,2,1,4,2)
- Barite: 3.70671e-5 kg; data quality (1,1,1,1,1)
- Silver: 5.13681e-5 kg; data quality (1,1,1,1,1)
- Platinum: 1.58893e-7 kg; data quality (1,1,1,1,1)
- Palladium: 5.31094e-7 kg; data quality (1,1,1,1,1)
- Occupation, urban, discontinuously built: 5.5251e-5 m2*a; data quality (4,2,1,1,1)
- Clay, bentonite: 0.000268359 kg; data quality (1,1,1,1,1)
- Gypsum: 0.00061499 kg; data quality (1,1,1,1,1)
- Cobalt: 5.22387e-6 kg; data quality (1,1,1,1,1)
- Kyanite: 6.1499e-6 kg; data quality (1,1,1,1,1)
- Potassium: 3.94502e-5 kg; data quality (1,1,1,1,1)
- Occupation, mineral extraction site: 0.00185248 m2*a; data quality (1,3,1,1,1)
- Cerium: 0.00019137 kg; data quality (1,1,1,1,1)
- Vermiculite: 5.59082e-6 kg; data quality (1,1,1,1,1)
- Sodium chloride: 0.00253264 kg; data quality (1,1,1,1,1)
- Feldspar: 2.96313e-5 kg; data quality (1,1,1,1,1)
- Magnesium: 0.0125373 kg; data quality (1,1,1,1,1)
- Peat: 2.6165e-5 kg; data quality (1,1,1,1,1)
- Garnet: 1.80024e-6 kg; data quality (1,1,1,1,1)
- Kaolin: 0.000352781 kg; data quality (1,1,1,1,1)
- Molybdenum: 0.00029689 kg; data quality (1,1,1,1,1)
- Energy, solar: 0.00453037 MJ; data quality (3,1,1,1,1)
- Copper: 0.00689812 kg; data quality (1,1,1,1,1)

## Emissions to nature
- chloroform: 3.78685e-9 kg; data quality (4,2,1,1,4)
- Naphthalene: 1.78794e-11 kg; data quality (4,1,1,1,4)
- benzene, ethyl-: 1.88634e-8 kg; data quality (3,2,1,3,2)
- fluoranthene: 7.95588e-11 kg; data quality (2,2,1,2,3)
- cumene: 5.2182e-10 kg; data quality (4,2,1,1,1)
- 1,1,2,2-tetrachloroethane: 6.70066e-15 kg; data quality (3,2,1,1,2)
- phthalate, dioctyl-: 1.08311e-9 kg; data quality (3,2,1,1,4)
- ethane, 1,2-dibromo-: 2.50594e-9 kg; data quality (2,2,1,1,4)
- chromium: 4.23361e-9 kg; data quality (4,1,1,1,4)
- hexane: 8.55604e-7 kg; data quality (3,2,1,1,4)
- 2,3,4'-TRICHLOROBIPHENYL: 1.06983e-13 kg; data quality (2,2,1,1,4)
- biphenyl: 3.916e-11 kg; data quality (4,2,1,1,3)
- acetaldehyde: 2.39244e-7 kg; data quality (3,2,1,3,2)
- cyanide: 2.35055e-6 kg; data quality (3,2,1,1,4)
- beryllium: 3.19987e-9 kg; data quality (2,2,1,1,4)
- methane, dichloro-, hcc-30: 4.08502e-7 kg; data quality (4,2,1,1,4)
- 1,4-dichlorobenzene: 3.94374e-12 kg; data quality (2,2,1,1,3)
- Dibenz(a,h)anthracene: 1.60557e-13 kg; data quality (2,2,1,1,4)
- 1,2,4-trimethylbenzene: 3.37722e-11 kg; data quality (5,1,1,1,4)
- formaldehyde: 6.70675e-6 kg; data quality (2,2,1,1,4)
- ethane, 1,1,2-trichloro-: 3.96318e-15 kg; data quality (4,2,1,1,1)
- propanal: 5.15712e-8 kg; data quality (3,2,1,4,1)
- pyrene: 3.13326e-11 kg; data quality (2,2,1,2,3)
- methanol: 3.30827e-5 kg; data quality (3,1,1,1,4)
- Dimethyl sulfate: 8.24546e-9 kg; data quality (2,2,1,1,4)
- Sulfuric acid: 1.78433e-6 kg; data quality (2,1,1,1,3)
- manganese: 7.36558e-8, 3.97319e-11 kg (2 entries, compartments not in this file); data quality (4,1,1,1,4)
- acenaphthene: 2.78065e-10 kg; data quality (3,2,1,3,2)
- Cresol: 6.3385e-10, 6.3385e-10 kg (2 entries, compartments not in this file); data quality (2,1,1,1,3)
- ethylbenzene: 1.02121e-8 kg; data quality (4,1,1,1,4)
- m-xylene: 2.1217e-10 kg; data quality (3,2,1,1,3)
- toluene, 2,4-dinitro-: 4.10948e-12 kg; data quality (5,2,1,1,4)
- Cyanide: 9.13835e-10, 7.15175e-9 kg (2 entries, compartments not in this file); data quality (3,1,1,1,4)
- PHOSPHORUS: 1.18023e-9 kg; data quality (2,2,1,1,4)
- benzo(a)pyrene: 2.87738e-12 kg; data quality (2,2,1,2,3)
- Carbon dioxide: 0.430279 kg; data quality (4,2,1,4,1)
- Hydrazine, methyl-: 2.49495e-9 kg; data quality (2,2,1,1,4)
- vinyl acetate: 1.11567e-10 kg; data quality (4,2,1,1,4)
- lead: 2.16753e-7 kg; data quality (3,2,1,1,4)
- methane, bromo-, halon 1001: 2.81067e-8 kg; data quality (3,2,1,1,4)
- Chrysene, 5-methyl-: 3.2287e-13 kg; data quality (2,2,1,1,4)
- VOC, volatile organic compounds: 2.55426e-5 kg; data quality (3,2,1,1,4)
- Dinitrogen monoxide: 1.98612e-5 kg; data quality (4,2,1,4,1)
- carbon disulfide: 2.12121e-9 kg; data quality (4,2,1,1,4)
- manganese: 6.54186e-7 kg; data quality (3,2,1,1,4)
- MOLYBDENUM(VI): 4.56372e-8 kg; data quality (3,1,1,1,3)
- Chromium VI: 1.68656e-8 kg; data quality (3,2,1,1,4)
- CHLORONAPHTHALENE: 9.87713e-14 kg; data quality (1,2,1,1,4)
- bromoform: 7.86722e-9 kg; data quality (3,2,1,1,4)
- selenium: 2.71434e-8 kg; data quality (2,2,1,1,4)
- butanol: 1.98515e-12 kg; data quality (5,1,1,1,5)
- Ethene, chloro-: 7.40619e-10 kg; data quality (3,2,1,1,4)
- Nitrogen: 1.95956e-5 kg; data quality (5,2,1,1,5)
- Cobalt: 6.42821e-9 kg; data quality (3,2,1,1,4)
- o-Xylene: 1.0291e-9 kg; data quality (3,2,1,1,4)
- Benzene, ethyl-: 2.94016e-9 kg; data quality (4,1,1,1,4)
- trichloroethylene: 1.23465e-9 kg; data quality (4,2,1,1,4)
- methyl isobutyl ketone: 1.23849e-9 kg; data quality (4,2,1,1,1)
- 1,4-BENZOQUINONE: 7.5897e-12 kg; data quality (3,2,1,1,1)
- naphthalene: 1.95016e-8 kg; data quality (3,2,1,1,4)
- particulates, < 2.5 um: 0.000706515 kg; data quality (3,2,1,1,4)
- Hydrocarbons, aromatic: 6.1451e-11 kg; data quality (4,2,1,1,3)
- chromium: 1.6873e-7 kg; data quality (4,1,1,1,3)
- acrylonitrile: 2.84537e-11 kg; data quality (4,2,1,1,1)
- antimony: 1.42937e-8 kg; data quality (3,2,1,1,4)
- Titanium: 1.55204e-9 kg; data quality (5,2,1,1,4)
- chlorine: 1.00197e-7 kg; data quality (4,2,1,1,4)
- Water, saline: 0.0276682 m3; data quality (4,2,1,1,2)
- ETHENE: 3.96838e-10 kg; data quality (3,1,1,1,5)
- acrolein: 1.80932e-7 kg; data quality (2,2,1,1,4)
- Cadmium: 3.98311e-9 kg; data quality (3,1,1,1,3)
- lead: 3.20185e-15 kg; data quality (3,1,1,1,5)
- copper: 9.93299e-11 kg; data quality (4,1,1,1,4)
- ammonia: 1.65926e-5 kg; data quality (3,2,1,1,4)
- Benzo(a)anthracene: 4.54232e-13 kg; data quality (2,2,1,1,4)
- AMMONIA: 6.55685e-7 kg; data quality (3,1,1,1,4)
- 3-methylcholanthrene: 1.09046e-13 kg; data quality (2,2,1,1,4)
- 2,2,4-trimethylpentane: 3.38076e-9 kg; data quality (3,2,1,3,2)
- Chrysene: 2.97666e-11 kg; data quality (2,2,1,1,4)
- nickel: 1.98787e-8 kg; data quality (4,1,1,1,4)
- phenanthrene: 1.56978e-9 kg; data quality (3,2,1,2,3)
- styrene: 8.177e-8 kg; data quality (4,2,1,1,4)
- methylene diphenyl diisocyanate: 4.26972e-12 kg; data quality (4,2,1,1,1)
- ethylene glycol: 2.03262e-11 kg; data quality (5,2,1,1,4)
- Benzo(k)fluoranthene: 9.07762e-13 kg; data quality (3,2,1,4,1)
- 2,4-dinitrophenol: 7.40616e-12 kg; data quality (5,2,1,1,4)
- ethane, 1,2-dichloro-: 2.9783e-9 kg; data quality (3,2,1,1,4)
- Propene, 1,3-dichloro-: 3.29388e-15 kg; data quality (3,2,1,1,1)
- 2,4,5,2',5'-PENTACHLOROBIPHENYL: 1.75021e-13 kg; data quality (2,2,1,1,4)
- PCB-1: 9.05234e-15 kg; data quality (2,2,1,1,4)
- pentachlorophenol: 2.09837e-12 kg; data quality (3,2,1,1,4)
- mercury: 5.37103e-8 kg; data quality (2,2,1,1,4)
- acetophenone: 2.37394e-10 kg; data quality (4,2,1,1,4)
- nitrogen oxides: 0.00144427 kg; data quality (2,2,1,1,4)
- Xylene: 3.37722e-11 kg; data quality (4,1,1,1,4)
- methanol: 9.97444e-7 kg; data quality (4,2,1,1,3)
- propylene oxide: 5.99663e-13 kg; data quality (3,2,1,1,1)
- methyl methacrylate: 2.93553e-10 kg; data quality (4,2,1,1,4)
- 2-chloro-1-phenylethanone: 1.02746e-10 kg; data quality (2,2,1,1,4)
- benzyl chloride: 1.02747e-8 kg; data quality (2,2,1,1,4)
- Water, fresh: 0.0138466 m3; data quality (4,2,1,1,2)
- Xylene: 1.87104e-7 kg; data quality (4,2,1,2,3)
- cadmium: 7.62795e-9 kg; data quality (3,2,1,1,4)
- Zinc: 3.38957e-8 kg; data quality (5,1,1,1,3)
- 1,2,4-trimethylbenzene: 5.70862e-9 kg; data quality (5,1,1,1,3)
- Methane: 4.60626e-5 kg; data quality (4,2,1,4,1)
- 4-nitrophenol: 4.52576e-12 kg; data quality (2,2,1,1,4)
- 1,1,1-trichloroethane: 1.57119e-9 kg; data quality (4,2,1,1,4)
- Indeno(1,2,3-cd)pyrene: 1.27415e-12 kg; data quality (2,2,1,1,4)
- hydrogen chloride: 1.30341e-5 kg; data quality (2,2,1,1,4)
- hydrogen fluoride: 5.74501e-6 kg; data quality (2,2,1,1,4)
- Propene: 5.74276e-7 kg; data quality (3,1,1,1,4)
- t-butyl methyl ether: 5.15948e-10 kg; data quality (3,2,1,1,4)
- Benzo(b)fluoranthene: 4.53021e-12 kg; data quality (2,2,1,2,3)
- ammonia: 8.67621e-7 kg; data quality (3,1,1,1,4)
- phenol: 8.26093e-9 kg; data quality (4,2,1,1,2)
- benzene: 1.14661e-6 kg; data quality (3,2,1,1,4)
- carbon monoxide: 0.000193859 kg; data quality (2,2,1,1,4)
- NITROUS ACID: 1.29129e-9 kg; data quality (5,1,1,1,4)
- 2-methylnaphthalene: 1.82775e-11 kg; data quality (2,2,1,1,4)
- ethene, tetrachloro-: 3.49103e-9 kg; data quality (3,2,1,1,4)
- Phthalate, dibutyl-: 2.35018e-13 kg; data quality (4,2,1,1,1)
- methane, monochloro-, r-40: 8.72632e-9 kg; data quality (3,2,1,1,4)
- isophorone: 8.51293e-9 kg; data quality (2,2,1,1,4)
- toluene: 8.6875e-7 kg; data quality (4,2,1,1,4)
- Propane, 1,2-dichloro-: 1.35802e-9 kg; data quality (4,2,1,1,4)
- anthracene: 1.34569e-10 kg; data quality (3,2,1,1,4)
- Asbestos: 2.87357e-14 kg; data quality (5,2,1,1,1)
- nickel: 6.11846e-8 kg; data quality (3,2,1,1,4)
- fluorene: 4.51705e-10 kg; data quality (2,2,1,2,3)
- particulates, < 10 um: 0.00287553 kg; data quality (3,2,1,1,4)
- butadiene: 1.57745e-8 kg; data quality (2,2,1,2,1)
- nitric acid: 7.24254e-8 kg; data quality (3,1,1,1,4)
- arsenic: 5.3877e-7 kg; data quality (3,2,1,1,4)
- acenaphthylene: 4.21324e-10 kg; data quality (3,2,1,2,3)
- carbon tetrachloride: 1.85132e-9 kg; data quality (4,2,1,1,4)
- Chromium, ion: 9.20192e-8 kg; data quality (2,2,1,1,4)
- benzene, chloro-: 1.68078e-9 kg; data quality (4,2,1,1,4)
- sulfur dioxide: 0.000441136 kg; data quality (2,2,1,1,4)
- dibenzofuran: 2.79867e-10 kg; data quality (4,2,1,1,1)
- monochloroethane: 8.47305e-9 kg; data quality (3,2,1,1,4)
- copper: 1.9269e-8 kg; data quality (4,1,1,1,3)
- Benzo(g,h,i)perylene: 5.24626e-12 kg; data quality (3,2,1,1,4)
- Phosphorus: 1.09059e-5 kg; data quality (2,1,1,1,5)
- benz[a]anthracene: 1.28288e-11 kg; data quality (2,2,1,1,4)
- Methyl iodide: 8.74266e-14 kg; data quality (4,2,1,1,1)
- hydrogen sulfide: 2.06815e-10 kg; data quality (3,2,1,1,1)
- hexachloro-1,3-butadiene: 1.59447e-14 kg; data quality (4,2,1,1,1)
- polychlorinated biphenyls: 7.73485e-13 kg; data quality (3,2,1,1,2)
- NITRATE: 5.76113e-8 kg; data quality (5,1,1,1,4)

## Inventory method
Input-output

## Modelling constants
The reference unit of all processes is 1 USD2013 of the good or service. The technosphere inputs are based on the US BEA detailed input-output tables for 2007. The IO tables are combined to develop a commodity-by-commodity model based on the the industry-technology assumption (see Suh et al., 2010), which assumes all commodities produced by a given industry have the same input structure, but that multiple industries can produce the same commodity. Thus, model technosphere flows represent commodity outputs (and not industry outputs) from other processes in the model. There are no by-products included in these processes. All commodity production is based on US-conditions, despite in reality that some goods and services are produced overseas, as USEEIO v1.1 is a single-region IO model.

## Completeness
The input-output approach assures that all purchased inputs associated with the sectors making these commodities as reported in the US census for 2007 are included. The direct resources extracted including minerals, energy sources, water and land occupied are included. Emissions to air include all critieria air pollutants, greenhouse gases, and hazardous and toxic air pollutants as defined by US EPA. Releases to water include toxics, total nitrogen and total phosphorus, and water discharges. Releases to soil or groundwater include toxics and agriculutural pesticides. Some metal releases to air, water and soil are not included because they could not be speciated. Solid hazardous and non-hazardous wastes generated are not included as an elementary flows although purchases of waste services are included.

## Data treatment
Greenhouse gases are primarily from the US Greenhouse Gas Emission Inventory (USEPA 2016a). Biogenic C uptake is not included (change from version 1.0), as biogenic C emission are not included. Toxic releases to air, water and soil (except pesticides) are from the 2013 Toxic Release Inventory (USEPA 2015a). Criteria air pollutants and hazardous air pollutants are from the 2011 National Emissions Inventory (USEPA 2015b). All estimates are normalized by industry based on sector output in the data year, then converted to 2013 USD using relative sector-specific CPIs (if data year is not 2013). Energy use represent raw renewables or fossil fuel energies and is based on EIA data for 2014. See Table 1 in Yang, Ingwersen et al. 2017 and Supporting Information 1, and the v1.1 data update notes (Ingwersen et al. 2017) for all details on environmental data sources used.Mineral use is based on the Mineral Commodity Survey (USDA 2016). Only minerals extracted or imported in raw form by these sectors for further processing are included. Total mining water use is from the USGS report Water Use in the US (Maupin et al. 2014) and allocated to the eight mining sectors with employment-based factors provided by Blackhurst and colleagues (Blackhurst et al. 2010) and 2007 employment levels by mining sector provided by the U.S. Bureau of Labor Statistics. Land use for mining, oil, and gas extraction activities was estimated based on the Bureau of Land Management (BLM) Public Land Statistics 2007 report (BLM 2008). In all cases except hard rock leases, the BLM data could be mapped to a sector in the EEIO model without allocation. Land for hard rock leases were allocated to relevant mining sectors based on shares of employee compensation from the 2007 Use tables (BEA 2015).

## Data collection
2015-2016

## Sampling procedure
US federal government sources, including surveys and US EPA emissions databases are used as the primary sources. From these sources, data for US reporting establishments/facilities are aggregated by the NAICS sector as defined in the BEA detailed 2007 input-output tables. When level of sector aggregation differs, or when direct emissions are not reported but modeled, additional sources are used to make allocations and estimates.

## Review details
In regard to quality assurance and peer-review, each dataset created went through Quality Assurance as defined in a quality assurance project plans at US EPA, CSRA or ERG. The model was assembled with the IO model builder model (USEPA 2016c). Validation functions were used to check that all the model components were properly assembled and harmonized. Bayou Demeke and Santosh Ghimire provided internal peer review of the model methodology and the manuscript underwent standard EPA management review. An editor and two anonymous reviewers at the Journal of Cleaner Production reviewed the model. In regard to data quality evaluation, data quality assessment was performed at the flow and process levels according to the updated US EPA data quality assessment guidelines as defined in US EPA (2016b).

## Intended application
The primary application is for use in the US Environmentally-Extended Input-Ouput model, USEEIO, version 1.1. This model is being used by the US EPA for supporting tools that prioritize goods and services based on potential environmental impacts, resource use or emissions for large regions, including the US and US states, and as a strealined tool for organizations as a starting point to consider sustainable materials management. Model results are designed to provide meso/macro-level decision support.

## Project
USEEIO v1.1 was developed by the US EPA with CSRA and ERG with Wesley W. Ingwersen and David E. Meyer as research leads. Yi Yang was the technical lead on the work for CSRA (contract EP-C-15-012); Troy Hawkins was lead for ERG (contract EP-C-12-021).

## Sources
- Lovelace 2009
- USGS 2015
- EIA 2016
- USEPA 2016b
- USEPA 2016c
- Kim et el. 2013
- Goebes et al. 2003
- USDA 2009b
- Ingwersen et al. 2017
- Macknick et al. 2011
- USEPA 2015b
- EIA 2017
- Yienger et al. 1995
- USDA 2006
- Torcellini et al. 2003
- Ingwersen et al. DRAFT
- USGS 2016
- USEPA 2016a
- Blackhurst et al. 2010
- Edelen and Ingwersen 2017
- USEPA 2015a
- BLM 2008
- Nickerson et al. 2011
- EIA 2013
- USDA 2009a
- EIA 2015
- BEA 2015
- Maupin et al. 2014
- USDA 2014
- Statistics Canada 2010
- USDA 2016
