# Sand, gravel, clay, phosphate, other nonmetallic minerals; at mine

Dataset: openLCA process, unit process
Category: 2123: Nonmetallic Mineral Mining and Quarrying
Geography: United States
Time period: 2017-01-01 to 2017-12-31
Data quality: US EPA - Process Pedigree Matrix (1;1)
Exchange data quality scheme: US EPA - Flow Pedigree Matrix
Generated by: US EPA with CSRA and ERG
Owner: US EPA
Published in: Yang, Ingwersen et al. 2017
restrictionsDescription: This model shold be appropriately cited (see Yang, Ingwersen et al. 2017 source or Publication field) when used. Any changes or derivations of this model by the user should be documented. The model itself and any results from use of this model shall not be construed to consitute US EPA opinion or policy.
copyright: false

## General comment
BEA Code & Name is '2123A0:Other nonmetallic mineral mining and quarrying'. Description of the primary industry producing this good or service, adapted from the Census Bureau NAICS 2007 descriptions: This industry group comprises establishments primarily engaged in developing mine sites, or in mining or quarrying nonmetallic minerals (except fuels). Also included are certain well and brine operations, and preparation plants primarily engaged in beneficiating (e.g., crushing, grinding, washing, and concentrating) nonmetallic minerals. Beneficiation is the process whereby the extracted material is reduced to particles which can be separated into mineral and waste, the former suitable for further processing or direct use. The operations that take place in beneficiation are primarily mechanical, such as grinding, washing, magnetic separation, and centrifugal separation. In contrast, manufacturing operations primarily use chemical and electrochemical processes, such as electrolysis and distillation. However, some treatments, such as heat treatments, take place in both the beneficiation and the manufacturing (i.e., smelting/refining) stages. The range of preparation activities varies by mineral and the purity of any given ore deposit. While some minerals, such as petroleum and natural gas, require little or no preparation, others are washed and screened, while yet others, such as gold and silver, can be transformed into bullion before leaving the mine site. Related NAICS codes are: 21232, 21239

## Technology
The process describes the average US production of this good or service within this NAICS-based grouping defined in the BEA 2007 detailed input-output tables (BEA 2015). Distribution, wholesale and retailing of this good or service, use, and final disposal are not included. Creation of a product system with this process will enable modeling of all upstream (supply-chain) activities.

## Geography
Data represent the 50 US states

## Time period
2017 was the year in which this version of USEEIO was released and is the target date for the model

## Reference product
- Sand, gravel, clay, phosphate, other nonmetallic minerals; at mine: 1 USD

## Inputs from technosphere
All rows: data quality (1,3,1,1,1)
- Construction machinery; at manufacturer: 0.0135026 USD
- Other engine equipment; at manufacturer: 6.51252e-6 USD
- Rail transport: 0.00438321 USD
- Scenic and sightseeing transportation and support activities for transportation: 0.000167228 USD
- Semiconductors; at manufacturer: 0.000118068 USD
- Primary iron, steel, and ferroalloy products; at manufacturer: 0.00831047 USD
- Company and enterprise management: 0.033084 USD
- Paints and coatings; at manufacturer: 7.51567e-6 USD
- Hotels and campgrounds: 0.000274135 USD
- Clay and ceramic products; at manufacturer: 4.74216e-5 USD
- Heating equipment other than warm air furnaces; at manufacturer: 1.07571e-5 USD
- Communications equipment; at manufacturer: 5.89908e-7 USD
- Water transport (boats, ships, ferries): 0.00149401 USD
- All other food and drinking places: 4.92232e-6 USD
- Other concrete products; at manufacturer: 1.73177e-5 USD
- Other support services: 0.000376973 USD
- Light gauge metal cans, boxes, and containers; at manufacturer: 1.65494e-6 USD
- Other vehicle parts; at manufacturer: 0.00173655 USD
- Golf courses, marinas, ski resorts, fitness and other rec centers and industries: 8.437e-5 USD
- Primary copper; at manufacturer: 2.64791e-5 USD
- Gaskets, seals, musical instruments, fasteners, brooms, brushes, mop and other misc. goods; at manufacturer: 0.000297187 USD
- Commercial machinery repair: 8.75206e-5 USD
- Books, newspapers, magazines, and other print media; at manufacturer: 1.01298e-5 USD
- Other rubber products; at manufacturer: 0.000388093 USD
- Dimensional stone; at mine: 0.00743705 USD
- Synthetic rubber and artificial and synthetic fibers; at manufacturer: 4.24421e-6 USD
- Data processing and hosting: 0.000274044 USD
- Plastic pipe, fittings, and sausage casings; at manufacturer: 2.58167e-5 USD
- Wireless communications; at manufacturer: 2.75211e-8 USD
- Telecommunications: 0.00251635 USD
- Specialized design: 0.000303435 USD
- Metal hinges, keys, lock, and other hardware; at manufacturer: 8.24435e-6 USD
- Accounting, tax preparation, bookkeeping, and payroll: 0.00505083 USD
- Performances: 1.15943e-6 USD
- Electricity; at consumer: 0.0257952 USD
- Printed circuit and electronic assembly; at manufacturer: 4.85945e-5 USD
- Industrial process variable instruments; at manufacturer: 3.65101e-7 USD
- Custom computer programming: 6.10502e-6 USD
- Waste management and remediation: 0.00196486 USD
- Business support: 0.000909256 USD
- Cutlery and handtools; at manufacturer: 9.08013e-6 USD
- Corn products; at manufacturer: 5.70471e-6 USD
- Secondary steel products; at manufacturer: 0.00125744 USD
- Household goods repair: 0.000161202 USD
- Screws, nuts, and bolts; at manufacturer: 0.00111247 USD
- Aluminum; at manufacturer: 5.7923e-6 USD
- Gasoline, fuels, and by-products of petroleum refining; at manufacturer: 0.0722662 USD
- Wholesale trade: 0.0283097 USD
- Rubber tires; at manufacturer: 0.00097247 USD
- Other real estate: 0.00182184 USD
- Environmental and other technical consulting services: 0.000151049 USD
- Limited-service restaurants: 0.000314815 USD
- Other plastic products; at manufacturer: 0.00170806 USD
- Air transport: 0.000782893 USD
- Transmission and power train parts; at manufacturer: 0.00153806 USD
- Paper bags and coated paper; at manufacturer: 0.000801723 USD
- Chemicals (except basic chemicals, agrichemicals, polymers, paints, pharmaceuticals,soaps, cleaning compounds); at manufacturer: 0.00719167 USD
- Tobacco, cotton, sugarcane, peanuts, sugar beets, herbs and spices, and other crops; at farm: 0.000503929 USD
- Mining and oil/gas field machinery; at manufacturer: 0.00555559 USD
- Fabric; at manufacturer: 1.98593e-5 USD
- Insurance agencies and brokerages: 0.00245103 USD
- Natural gas; at consumer: 0.0220601 USD
- Consumer goods and general rental centers: 6.98213e-6 USD
- Motors and generators; at manufacturer: 2.00165e-7 USD
- Metal pipe fittings, ball and roller bearings, industrial patterns, metal bath fixtures, other misc. fabricated metals; at manufacturer: 0.000287906 USD
- Advertising and public relations: 0.00125133 USD
- Rubber and plastic belts and hoses; at manufacturer: 0.000453946 USD
- Computer terminals and other computer peripheral equipment; at manufacturer: 0.000154818 USD
- Pipeline transport: 0.000667937 USD
- Other secondary nonferrous metal products; at manufacturer: 2.6503e-7 USD
- Satellite, telecommunications resellers, and all other telecommunications: 0.000152812 USD
- Plastics; at manufacturer: 4.27435e-7 USD
- Sand, gravel, clay, phosphate, other nonmetallic minerals; at mine: 0.0168915 USD
- Wireless telecommunications: 0.000693625 USD
- Aluminum products; at manufacturer: 1.4984e-7 USD
- Unrefined oil and gas; at extraction site: 0.00478542 USD
- Computer systems design: 0.000327504 USD
- Lumber and treated lumber; at manufacturer: 1.19706e-6 USD
- Sports: 4.30485e-6 USD
- Air conditioning, refrigeration, and warm air heating equipment; at manufacturer: 1.04623e-5 USD
- Scientific research and development: 3.1108e-6 USD
- Metal coatings, engravings, and heat treatments; at manufacturer: 0.00209696 USD
- Metal windows, doors, and architectural products; at manufacturer: 5.81151e-6 USD
- Metal structural products; at manufacturer: 1.43924e-5 USD
- Vehicle repair: 0.000335808 USD
- Other support activities for mining: 0.0171799 USD
- Other nonmetallic mineral products; at manufacturer: 0.000112082 USD
- Machine shops; at manufacturer: 0.000685324 USD
- Material handling equipment; at manufacturer: 0.0126585 USD
- Watches, clocks, and other measuring and controlling devices; at manufacturer: 2.11436e-5 USD
- Storage batteries; at manufacturer: 4.57861e-5 USD
- Other petroleum and coal products; at manufacturer: 0.000269582 USD
- Concrete pipe, bricks, and blocks; at manufacturer: 1.17082e-7 USD
- Insurance carriers: 0.0120626 USD
- Civic, social, professional, and similar organizations: 0.000386713 USD
- Other retail: 7.42096e-5 USD
- Vehicle engines and engine parts; at manufacturer: 0.000735312 USD
- Management consulting: 0.000533174 USD
- Securities and commodities brokerage and exchanges: 0.00113397 USD
- Carbon and graphite products; at manufacturer: 9.92965e-6 USD
- Cutting and machine tool accessory, rolling mill, and other metalworking machines; at manufacturer: 0.000833199 USD
- External hard drives, CDs, other storage media; at manufacturer: 4.96482e-6 USD
- Other basic organic chemicals; at manufacturer: 0.00706631 USD
- Cardboard containers; at manufacturer: 0.000715641 USD
- Dry-cleaning and laundry: 2.86713e-6 USD
- Food and beverage stores: 2.28188e-7 USD
- Investigation and security: 0.000379333 USD
- Relay and industrial controls; at manufacturer: 3.09943e-5 USD
- Abrasive products; at manufacturer: 3.30715e-5 USD
- News syndicates, libraries, archives, Internet publishing and all other information services: 8.25633e-8 USD
- Shelving and lockers; at manufacturer: 1.42705e-8 USD
- Compressed Gases; at manufacturer: 1.91845e-5 USD
- Other textiles; at manufacturer: 2.97889e-5 USD
- Clothing; at manufacturer: 7.13523e-9 USD
- Timber and raw forest products; at forest: 2.13718e-7 USD
- Wiring devices; at manufacturer: 2.50206e-7 USD
- Facilities support: 1.15591e-6 USD
- Legal services: 0.00777329 USD
- All other forging, stamping, and sintering; at manufacturer: 6.86791e-7 USD
- Coal; at mine: 0.00441428 USD
- Investment advice, portfolio management, and other financial advising services: 0.0106498 USD
- Ground or treated minerals and earth; at manufacturer: 0.000215387 USD
- Full-service restaurants: 0.000122812 USD
- Travel arrangement and reservation: 0.000741114 USD
- Nonresidential building repair and maintanence: 0.0223776 USD
- Veneer, plywood, and engineered wood; at manufacturer: 0.000150564 USD
- Other basic inorganic chemicals; at manufacturer: 0.00417423 USD
- Noncomparable imports: 0.000215895 USD
- Marketing research and all other miscellaneous professional, scientific, and technical services: 0.00089657 USD
- Promoters and agents: 2.56741e-6 USD
- Truck transport: 0.0056672 USD
- Vehicle rental and leasing: 0.00167075 USD
- Surgical appliance and supplies; at manufacturer: 1.12106e-5 USD
- Ball and roller bearings; at manufacturer: 2.00165e-6 USD
- Independent artists, writers, and performers: 8.76006e-6 USD
- General merchandise stores: 1.44864e-6 USD
- Springs and wires; at manufacturer: 1.65127e-7 USD
- Motor vehicle steering, suspension components (except spring), and brake systems; at manufacturer: 0.00138264 USD
- Glass and glass products; at manufacturer: 9.04806e-5 USD
- Paper; at manufacturer: 1.37605e-7 USD
- Commercial equipment rental: 0.022203 USD
- Power tools; at manufacturer: 5.65465e-6 USD
- Software: 1.09746e-6 USD
- Speed changers, industrial high-speed drives, and gears; at manufacturer: 1.98593e-5 USD
- Passenger ground transport: 0.000100901 USD
- Lessors of nonfinancial intangible assets: 0.00548961 USD
- Iron, gold, silver, and other metal ores; at mine: 1.82883e-5 USD
- Architectural, engineering, and related services: 0.0304005 USD
- Asphalt pavement; at manufacturer: 6.30804e-5 USD
- Nondepository credit intermediation and related activities: 0.00561411 USD
- Vending, commercial laundry, and other commercial and service industry machinery; at manufacturer: 1.95161e-6 USD
- Wooden windows, door, and flooring; at manufacturer: 5.59766e-7 USD
- Electronic equipment repair and maintenance: 0.000390754 USD
- Employment services: 9.9534e-5 USD
- Fluid meters and counting devices; at manufacturer: 3.50288e-7 USD
- Mineral wool; at manufacturer: 0.000109649 USD
- Radio and television: 1.05086e-6 USD
- Pumps and pumping equipment; at manufacturer: 1.02133e-5 USD
- Cardboard; at manufacturer: 0.000648649 USD
- Copper, nickel, lead, and zinc; at mine: 6.53153e-6 USD
- Custom metal rolls; at manufacturer: 1.38937e-6 USD
- Vegetable oils and by-products; at manufacturer: 9.92965e-6 USD
- Light fixtures; at manufacturer: 2.32047e-5 USD
- Welding and Soldering Equipment, Scales and Balances, and other general purpose machinery; at manufacturer: 5.99985e-6 USD
- Monetary authorities and depository credit intermediation: 0.00651493 USD
- Buildings and dwellings services: 0.00338272 USD
- Postal service: 7.14687e-5 USD
- Drinking water and wastewater treatment; at consumer: 0.000547003 USD
- Finished and coated fabric; at manufacturer: 2.66024e-6 USD
- Vehicle electrical and electronic equipment; at manufacturer: 0.000306292 USD
- Warehousing: 0.000190845 USD
- Office administration: 7.78139e-5 USD
- Other computer related services, including facilities management: 0.000163576 USD
- Vehicles and parts sales: 0.000599052 USD
- Valve and fittings (except for plumbing); at manufacturer: 8.11974e-5 USD
- State and local government enterprises: 1.79383e-5 USD
- Ready-mix concrete; at manufacturer: 0.000117471 USD
- Cement; at manufacturer: 0.00407918 USD
- Mechanical power transmission equipment; at manufacturer: 4.30285e-5 USD
- Magazines and journals; at publisher: 2.29047e-6 USD
- Synthetic dyes and pigments; at manufacturer: 3.83336e-5 USD
- Soap and cleaning compounds; at manufacturer: 1.92753e-5 USD
- Lime and gypsum products; at manufacturer: 1.67962e-5 USD
- Adhesives; at manufacturer: 9.6173e-7 USD
- Electronic capacitors, resistors, coils, transformers, connectors and other components (except semiconductors and printed circuit assemblies); at manufacturer: 1.70887e-5 USD
- Petrochemicals; at manufacturer: 0.000203309 USD
- Plastic bags, films, and sheets; at manufacturer: 3.73732e-6 USD

## Inputs from nature
- Pumice: 0.0108135 kg; data quality (1,1,1,1,1)
- Garnet: 0.0012525 kg; data quality (1,1,1,1,1)
- Kyanite: 0.00427871 kg; data quality (1,1,1,1,1)
- Peat: 0.018204 kg; data quality (1,1,1,1,1)
- Lithium: 3.38407e-5 kg; data quality (1,1,1,1,1)
- Gypsum: 0.427871 kg; data quality (1,1,1,1,1)
- Occupation, mineral extraction site: 0.0766966 m2*a; data quality (1,3,1,1,1)
- Sand and gravel: 0.921198 kg; data quality (1,1,1,1,1)
- Occupation, urban, discontinuously built: 0.000108716 m2*a; data quality (4,2,1,1,1)
- Water, fresh: 0.0218166, 0.0224393 m3 (2 entries, compartments not in this file); data quality (4,2,1,4,2)
- Stone: 1.13784 kg; data quality (1,1,1,1,1)
- Feldspar: 0.0206156 kg; data quality (1,1,1,1,1)
- Zeolites: 0.00249332 kg; data quality (1,1,1,1,1)
- Talc: 0.0237274 kg; data quality (1,1,1,1,1)
- Potassium: 0.027447 kg; data quality (1,1,1,1,1)
- Clay, bentonite: 0.186707 kg; data quality (1,1,1,1,1)
- Perlite: 0.0175427 kg; data quality (1,1,1,1,1)
- Phosphate ore: 0.984103 kg; data quality (1,1,1,1,1)
- Natural gas, dry: 0.815369 MJ; data quality (1,1,1,1,1)
- Clay, unspecified: 0.57712 kg; data quality (1,1,1,1,1)
- Kaolin: 0.245442 kg; data quality (1,1,1,1,1)
- Occupation, industrial area: 1.83666e-5 m2*a; data quality (4,2,1,1,1)
- Water, saline: 0.0594935 m3; data quality (4,2,1,4,2)
- Fluorspar: 0.0044343 kg; data quality (1,1,1,1,1)
- Sodium chloride: 1.76205 kg; data quality (1,1,1,1,1)
- Diatomite: 0.0350465 kg; data quality (1,1,1,1,1)
- Crude oil: 0.566174 MJ; data quality (1,1,1,1,1)
- Boron: 0.151959 kg; data quality (1,1,1,1,1)
- Sodium carbonate: 0.455099 kg; data quality (1,1,1,1,1)
- Limestone: 0.0177153 kg; data quality (1,1,1,1,1)
- Occupation, industrial area, built up: 6.12221e-6 m2*a; data quality (4,2,1,1,1)
- Natural gas liquids: 0.125012 MJ; data quality (1,1,1,1,1)
- Barite: 0.025789 kg; data quality (1,1,1,1,1)
- Vermiculite: 0.00388974 kg; data quality (1,1,1,1,1)
- Mica: 0.00178928 kg; data quality (1,1,1,1,1)

## Emissions to nature
- chromium: 2.56174e-14 kg; data quality (4,1,1,1,5)
- ammonia: 6.94438e-9 kg; data quality (3,1,1,1,4)
- acenaphthylene: 8.16511e-10 kg; data quality (3,2,1,2,1)
- ethane, 1,2-dibromo-: 7.96764e-10 kg; data quality (2,2,1,1,1)
- 1,2,4-trimethylbenzene: 2.87818e-11 kg; data quality (5,1,1,1,5)
- 2,4,6-trichlorophenol: 1.78875e-20 kg; data quality (2,2,1,1,1)
- particulates, < 10 um: 0.00300423 kg; data quality (3,2,1,1,1)
- Xylene: 6.46894e-6 kg; data quality (4,2,1,1,1)
- hydroquinone: 5.04916e-15 kg; data quality (3,2,1,1,5)
- phenanthrene: 3.69715e-9 kg; data quality (3,2,1,1,1)
- isophorone: 1.1051e-11 kg; data quality (2,2,1,1,2)
- Chrysene: 3.05078e-10 kg; data quality (2,2,1,1,1)
- methanol: 1.60348e-7 kg; data quality (4,2,1,1,1)
- ACIFLUORFEN-SODIUM: 1.51434e-12 kg; data quality (3,1,1,1,4)
- trichloroethylene: 5.61436e-10 kg; data quality (4,2,1,1,1)
- o-toluidine: 1.04286e-11 kg; data quality (4,2,1,1,3)
- 1,1,1-trichloroethane: 1.76641e-9 kg; data quality (4,2,1,1,1)
- m-cresol: 1.58684e-11 kg; data quality (4,2,1,1,3)
- Ethane, 1,1,1-trifluoro-, HFC-143a: 9.64573e-10 kg; data quality (4,2,1,4,1)
- benzo(a)pyrene: 1.304e-10 kg; data quality (2,2,1,1,1)
- Indeno(1,2,3-cd)pyrene: 4.06671e-12 kg; data quality (2,2,1,1,1)
- toluene: 5.62633e-6 kg; data quality (4,2,1,1,1)
- Phosphorus: 2.19767e-5 kg; data quality (2,1,1,1,5)
- Benzo(a)anthracene: 9.31507e-12 kg; data quality (2,2,1,1,1)
- 2,2,4-trimethylpentane: 2.36488e-8 kg; data quality (3,2,1,2,2)
- benzene: 6.8456e-14 kg; data quality (3,1,1,1,5)
- 2,4-Diaminotoluene: 2.8804e-12 kg; data quality (2,2,1,1,5)
- butadiene: 6.22038e-6 kg; data quality (2,2,1,1,1)
- ethylene glycol: 5.01229e-14 kg; data quality (5,1,1,1,4)
- sulfur dioxide: 0.000525847 kg; data quality (2,2,1,1,1)
- Propene: 1.84532e-8 kg; data quality (3,1,1,1,5)
- Cobalt: 4.98119e-9 kg; data quality (3,2,1,1,1)
- ethane, 1,1,2-trichloro-: 2.49304e-10 kg; data quality (3,2,1,1,1)
- 2,4-dinitrophenol: 4.293e-16 kg; data quality (5,2,1,1,1)
- Triethyl amine: 3.46877e-12 kg; data quality (4,2,1,1,3)
- benzyl chloride: 1.35923e-11 kg; data quality (2,2,1,1,2)
- copper: 8.20971e-13 kg; data quality (4,1,1,1,5)
- propargyl alcohol: 1.26242e-11 kg; data quality (4,1,1,1,4)
- ethylene glycol: 1.47788e-9 kg; data quality (5,2,1,1,1)
- ACRYLAMIDE: 3.07769e-14 kg; data quality (4,1,1,1,4)
- ETHENE: 2.77215e-7 kg; data quality (3,1,1,1,5)
- carbon disulfide: 1.49038e-7 kg; data quality (4,2,1,1,1)
- methane, monochloro-, r-40: 6.3606e-10 kg; data quality (3,2,1,1,1)
- o-Xylene: 1.176e-9 kg; data quality (3,2,1,4,1)
- pyrene: 4.13924e-10 kg; data quality (2,2,1,1,1)
- Benzo(g,h,i)perylene: 2.66666e-15 kg; data quality (2,1,1,1,5)
- Ethylene glycol: 1.63389e-11 kg; data quality (5,1,1,1,5)
- Carbon dioxide: 0.739222 kg; data quality (4,2,1,4,1)
- ethylbenzene: 6.41534e-9 kg; data quality (4,1,1,1,5)
- Ethylene glycol monoethyl ether: 7.72551e-11 kg; data quality (5,1,1,1,4)
- Ethene, chloro-: 1.73175e-10 kg; data quality (3,2,1,1,1)
- beryllium: 1.71399e-10 kg; data quality (2,2,1,1,1)
- Cresol: 6.76059e-13 kg; data quality (3,1,1,1,3)
- 2-methylnaphthalene: 3.19362e-9 kg; data quality (2,2,1,1,1)
- 1-Methyl-2-pyrrolidinone: 4.08942e-12 kg; data quality (5,1,1,1,4)
- Nitrogen: 0.000155307 kg; data quality (5,2,1,1,5)
- propanal: 6.11894e-8 kg; data quality (3,2,1,3,1)
- formic acid: 6.52272e-11 kg; data quality (3,1,1,1,5)
- Hydrazine: 2.55305e-12 kg; data quality (4,2,1,1,3)
- pentachlorophenol: 1.21993e-16 kg; data quality (3,2,1,1,1)
- ALLYL CHLORIDE: 5.0085e-20 kg; data quality (3,2,1,1,1)
- cadmium: 3.05398e-9 kg; data quality (3,2,1,1,1)
- vinyl acetate: 2.7399e-9 kg; data quality (4,2,1,1,3)
- benzene, chloro-: 6.28058e-10 kg; data quality (4,2,1,1,1)
- carbon tetrachloride: 2.95186e-10 kg; data quality (3,2,1,1,1)
- ethylene oxide: 2.97924e-10 kg; data quality (3,2,1,1,1)
- copper: 4.06313e-13 kg; data quality (4,1,1,1,4)
- Benzo(b)fluoranthene: 5.85566e-11 kg; data quality (2,2,1,1,1)
- Chromium, ion: 3.34527e-8 kg; data quality (2,2,1,1,1)
- Dimethyl sulfate: 4.90029e-13 kg; data quality (2,2,1,1,3)
- MOLYBDENUM(VI): 1.74463e-10 kg; data quality (3,1,1,1,4)
- Chromium VI: 6.72039e-9 kg; data quality (3,2,1,1,1)
- chromium: 3.42991e-13 kg; data quality (4,1,1,1,4)
- ethane, 1,2-dichloro-: 1.44744e-9 kg; data quality (3,2,1,1,1)
- biphenyl: 1.09842e-8 kg; data quality (4,2,1,1,1)
- 2-METHOXYETHANOL: 3.50754e-12 kg; data quality (4,2,1,1,1)
- formaldehyde: 4.12872e-6 kg; data quality (2,2,1,1,1)
- Hexachlorocyclopentadiene: 6.79725e-19 kg; data quality (3,2,1,1,1)
- Ethane, 1,1,2-trichloro-1,2,2-trifluoro-, CFC-113: 3.39622e-13 kg; data quality (4,1,1,1,4)
- Nitrobenzene: 2.57898e-11 kg; data quality (4,2,1,1,3)
- selenium: 3.8759e-9 kg; data quality (2,2,1,1,1)
- benz[a]anthracene: 1.38319e-10 kg; data quality (2,2,1,1,1)
- nickel: 4.19903e-8 kg; data quality (3,2,1,1,1)
- lead: 1.67855e-8, 5.78043e-12 kg (2 entries, compartments not in this file); data quality (3,1,1,1,5)
- Sodium formate: 7.57854e-12 kg; data quality (3,1,1,1,5)
- polychlorinated biphenyls: 4.10668e-10 kg; data quality (3,2,1,1,1)
- Nickel, ion: 3.62124e-13 kg; data quality (3,2,1,1,3)
- methane, dichloro-, hcc-30: 1.94959e-6 kg; data quality (4,2,1,1,1)
- ammonia: 2.29859e-5 kg; data quality (3,2,1,1,1)
- ethyl acrylate: 1.55808e-10 kg; data quality (4,2,1,1,3)
- avermectin B1: 4.41973e-14 kg; data quality (3,1,1,1,4)
- phthalic anhydride: 3.68404e-13 kg; data quality (2,2,1,1,5)
- naphthalene: 5.74255e-7 kg; data quality (3,2,1,1,1)
- styrene: 7.27018e-7 kg; data quality (4,2,1,1,1)
- diethanolamine: 2.91601e-11 kg; data quality (3,2,1,1,1)
- Aluminum: 3.88183e-10 kg; data quality (4,1,1,1,4)
- methane, bromo-, halon 1001: 6.1501e-10 kg; data quality (3,2,1,1,1)
- toluene: 8.60126e-14 kg; data quality (5,1,1,1,5)
- nickel: 1.50775e-12 kg; data quality (4,1,1,1,4)
- dimethyl formamide: 4.82293e-11 kg; data quality (4,2,1,1,3)
- anthracene: 1.49591e-10 kg; data quality (3,2,1,1,1)
- Asbestos: 4.01133e-11 kg; data quality (5,2,1,1,1)
- dibenzofuran: 1.94716e-7 kg; data quality (4,2,1,1,1)
- Dinitrogen monoxide: 1.36384e-5 kg; data quality (4,2,1,4,1)
- chlorine: 1.81749e-9 kg; data quality (4,2,1,1,2)
- AMMONIA: 1.64601e-7 kg; data quality (3,1,1,1,5)
- Dibenz(a,h)anthracene: 6.18693e-12 kg; data quality (2,2,1,1,1)
- acetonitrile: 5.76735e-11 kg; data quality (3,2,1,1,3)
- catechol: 1.42007e-16 kg; data quality (5,2,1,1,5)
- Ethane, 1,1,1,2-tetrafluoro-, HFC-134a: 8.49719e-9 kg; data quality (4,2,1,4,1)
- Propane, 1,2-dichloro-: 3.08648e-10 kg; data quality (3,2,1,1,1)
- 4-nitrophenol: 2.62946e-16 kg; data quality (2,2,1,1,1)
- 1,1,2,2-tetrachloroethane: 3.97993e-10 kg; data quality (3,2,1,1,1)
- QUINOLINE: 4.70292e-11 kg; data quality (3,2,1,1,2)
- 1,4-BENZOQUINONE: 7.52797e-9 kg; data quality (3,2,1,1,1)
- aniline: 1.04146e-11 kg; data quality (4,2,1,1,3)
- Propane, 1,1,1,3,3,3-hexafluoro-, HCFC-236fa: 2.60582e-11 kg; data quality (4,2,1,4,1)
- methylene diphenyl diisocyanate: 2.97063e-9 kg; data quality (4,2,1,1,1)
- Methyl iodide: 6.14469e-11 kg; data quality (4,2,1,1,1)
- arsenic: 2.95313e-9 kg; data quality (3,2,1,1,1)
- ALUMINUM OXIDE: 4.83448e-10 kg; data quality (5,1,1,1,4)
- hexane: 3.04686e-6 kg; data quality (3,2,1,1,1)
- monochloroethane: 4.25482e-10 kg; data quality (3,2,1,1,1)
- Benzo(k)fluoranthene: 3.7886e-12 kg; data quality (2,2,1,2,1)
- acetaldehyde: 1.08561e-6 kg; data quality (3,2,1,2,1)
- Zinc: 1.84775e-11, 1.55041e-13 kg (2 entries, compartments not in this file); data quality (5,1,1,1,4)
- chloroform: 2.80556e-9 kg; data quality (4,2,1,1,1)
- 2-chloro-1-phenylethanone: 6.64904e-14 kg; data quality (2,2,1,1,3)
- Titanium: 4.99817e-11 kg; data quality (5,2,1,1,1)
- mercury: 8.49541e-19 kg; data quality (3,1,1,1,4)
- maleic anhydride: 1.19391e-13 kg; data quality (2,2,1,1,5)
- cumene: 3.03527e-7 kg; data quality (4,2,1,1,1)
- phthalate, dioctyl-: 5.2416e-8 kg; data quality (3,2,1,1,1)
- toluene, 2,4-dinitro-: 1.77294e-15 kg; data quality (5,2,1,1,3)
- fluorene: 2.16576e-9 kg; data quality (2,2,1,1,1)
- methyl methacrylate: 2.71287e-10 kg; data quality (4,2,1,1,4)
- 1,4-dioxane: 2.28732e-11 kg; data quality (4,2,1,1,1)
- t-butyl methyl ether: 1.57843e-9 kg; data quality (3,2,1,1,1)
- m-xylene: 2.49265e-9 kg; data quality (3,2,1,4,1)
- 1,1-DICHLOROETHYLENE: 2.51077e-12 kg; data quality (3,2,1,1,1)
- hexachloro-1,3-butadiene: 1.10933e-11 kg; data quality (4,2,1,1,1)
- hydrogen fluoride: 4.5155e-7 kg; data quality (2,2,1,1,1)
- 3-methylcholanthrene: 1.40272e-14 kg; data quality (2,2,1,1,1)
- acetophenone: 1.19006e-8 kg; data quality (4,2,1,1,1)
- Vinyl acetate: 1.06193e-13 kg; data quality (4,1,1,1,4)
- Styrene: 1.71821e-12 kg; data quality (3,1,1,1,5)
- Hydrazine, methyl-: 1.58525e-12 kg; data quality (2,2,1,1,3)
- bromoform: 3.63811e-13 kg; data quality (3,2,1,1,3)
- cyanide: 2.73449e-11 kg; data quality (3,2,1,1,3)
- benzene: 1.01948e-5 kg; data quality (3,2,1,1,1)
- ethene, tetrachloro-: 6.98852e-9 kg; data quality (3,2,1,1,1)
- Sulfuric acid: 9.20972e-7 kg; data quality (2,1,1,1,5)
- lead: 1.26892e-8 kg; data quality (3,2,1,1,1)
- Methane, tetrachloro-, R-10: 1.36469e-13 kg; data quality (3,1,1,1,5)
- butanol: 1.43247e-9 kg; data quality (5,1,1,1,5)
- hexachlorobenzene: 4.25331e-16 kg; data quality (4,1,1,1,4)
- propylene oxide: 4.66975e-10 kg; data quality (3,2,1,1,1)
- toluene-2,4-diisocyante: 4.47061e-15 kg; data quality (3,2,1,1,5)
- arsenic: 1.35916e-12 kg; data quality (2,1,1,1,4)
- manganese: 2.01089e-13 kg; data quality (4,1,1,1,5)
- VOC, volatile organic compounds: 0.000503135 kg; data quality (3,2,1,1,1)
- acrylic acid: 1.47267e-16 kg; data quality (4,2,1,1,5)
- Benzo(g,h,i)perylene: 4.97998e-11 kg; data quality (3,2,1,1,2)
- Water, saline: 0.0522296 m3; data quality (4,2,1,1,2)
- nitrogen oxides: 0.000958644 kg; data quality (2,2,1,1,1)
- acrylonitrile: 1.99112e-8 kg; data quality (4,2,1,1,1)
- cyclohexane: 4.38784e-11 kg; data quality (4,1,1,1,5)
- methyl isobutyl ketone: 8.61774e-7 kg; data quality (4,2,1,1,1)
- nitric acid: 6.78971e-10 kg; data quality (3,1,1,1,5)
- Methane: 0.00016028 kg; data quality (4,2,1,4,1)
- particulates, < 2.5 um: 0.000807482 kg; data quality (3,2,1,1,1)
- mercury: 2.98773e-11 kg; data quality (3,1,1,1,5)
- benzene, ethyl-: 6.84032e-7 kg; data quality (4,2,1,1,1)
- Water, fresh: 0.0264173 m3; data quality (4,2,1,1,2)
- hydrogen sulfide: 5.77284e-7 kg; data quality (3,2,1,1,1)
- phenol: 4.12567e-6 kg; data quality (4,2,1,1,1)
- hexachloroethane: 1.96762e-19 kg; data quality (4,2,1,1,1)
- acrolein: 3.02056e-7 kg; data quality (2,2,1,1,1)
- HYDROCHLORIC ACID: 3.65134e-9 kg; data quality (2,1,1,1,4)
- Methane, difluoro-, HFC-32: 1.31287e-9 kg; data quality (4,2,1,4,1)
- Phthalate, dibutyl-: 1.85434e-10 kg; data quality (4,2,1,1,1)
- manganese: 1.8077e-7 kg; data quality (3,2,1,1,1)
- Hydrocarbons, aromatic: 1.09065e-8 kg; data quality (4,2,1,2,1)
- antimony: 8.14894e-10 kg; data quality (3,2,1,1,1)
- p-cresol: 9.61697e-12 kg; data quality (4,2,1,1,3)
- 1,4-dichlorobenzene: 1.93277e-10 kg; data quality (2,2,1,1,1)
- PYRIDINE: 3.2813e-11 kg; data quality (4,1,1,1,4)
- diisocyanates: 4.62086e-17 kg; data quality (4,1,1,1,5)
- PHOSPHORUS: 3.86725e-9 kg; data quality (2,2,1,1,2)
- carbonyl sulfide: 9.95525e-8 kg; data quality (4,2,1,1,3)
- carbon monoxide: 0.00105456 kg; data quality (2,2,1,1,1)
- fluoranthene: 1.26871e-9 kg; data quality (2,2,1,1,1)
- Propene, 1,3-dichloro-: 2.06664e-10 kg; data quality (3,2,1,1,1)
- hydrogen chloride: 1.543e-6 kg; data quality (2,2,1,1,1)
- chlorine: 5.79176e-12 kg; data quality (2,1,1,1,5)
- Ethane, pentafluoro-, HFC-125: 2.25442e-9 kg; data quality (4,2,1,4,1)
- acenaphthene: 6.21502e-10 kg; data quality (3,2,1,2,1)
- mercury: 9.53137e-10 kg; data quality (2,2,1,1,1)
- para-xylene: 1.46564e-10 kg; data quality (3,2,1,3,1)

## Inventory method
Input-output

## Modelling constants
The reference unit of all processes is 1 USD2013 of the good or service. The technosphere inputs are based on the US BEA detailed input-output tables for 2007. The IO tables are combined to develop a commodity-by-commodity model based on the the industry-technology assumption (see Suh et al., 2010), which assumes all commodities produced by a given industry have the same input structure, but that multiple industries can produce the same commodity. Thus, model technosphere flows represent commodity outputs (and not industry outputs) from other processes in the model. There are no by-products included in these processes. All commodity production is based on US-conditions, despite in reality that some goods and services are produced overseas, as USEEIO v1.1 is a single-region IO model.

## Completeness
The input-output approach assures that all purchased inputs associated with the sectors making these commodities as reported in the US census for 2007 are included. The direct resources extracted including minerals, energy sources, water and land occupied are included. Emissions to air include all critieria air pollutants, greenhouse gases, and hazardous and toxic air pollutants as defined by US EPA. Releases to water include toxics, total nitrogen and total phosphorus, and water discharges. Releases to soil or groundwater include toxics and agriculutural pesticides. Some metal releases to air, water and soil are not included because they could not be speciated. Solid hazardous and non-hazardous wastes generated are not included as an elementary flows although purchases of waste services are included.

## Data treatment
Greenhouse gases are primarily from the US Greenhouse Gas Emission Inventory (USEPA 2016a). Biogenic C uptake is not included (change from version 1.0), as biogenic C emission are not included. Toxic releases to air, water and soil (except pesticides) are from the 2013 Toxic Release Inventory (USEPA 2015a). Criteria air pollutants and hazardous air pollutants are from the 2011 National Emissions Inventory (USEPA 2015b). All estimates are normalized by industry based on sector output in the data year, then converted to 2013 USD using relative sector-specific CPIs (if data year is not 2013). Energy use represent raw renewables or fossil fuel energies and is based on EIA data for 2014. See Table 1 in Yang, Ingwersen et al. 2017 and Supporting Information 1, and the v1.1 data update notes (Ingwersen et al. 2017) for all details on environmental data sources used.Mineral use is based on the Mineral Commodity Survey (USDA 2016). Only minerals extracted or imported in raw form by these sectors for further processing are included. Total mining water use is from the USGS report Water Use in the US (Maupin et al. 2014) and allocated to the eight mining sectors with employment-based factors provided by Blackhurst and colleagues (Blackhurst et al. 2010) and 2007 employment levels by mining sector provided by the U.S. Bureau of Labor Statistics. Land use for mining, oil, and gas extraction activities was estimated based on the Bureau of Land Management (BLM) Public Land Statistics 2007 report (BLM 2008). In all cases except hard rock leases, the BLM data could be mapped to a sector in the EEIO model without allocation. Land for hard rock leases were allocated to relevant mining sectors based on shares of employee compensation from the 2007 Use tables (BEA 2015).

## Data collection
2015-2016

## Sampling procedure
US federal government sources, including surveys and US EPA emissions databases are used as the primary sources. From these sources, data for US reporting establishments/facilities are aggregated by the NAICS sector as defined in the BEA detailed 2007 input-output tables. When level of sector aggregation differs, or when direct emissions are not reported but modeled, additional sources are used to make allocations and estimates.

## Review details
In regard to quality assurance and peer-review, each dataset created went through Quality Assurance as defined in a quality assurance project plans at US EPA, CSRA or ERG. The model was assembled with the IO model builder model (USEPA 2016c). Validation functions were used to check that all the model components were properly assembled and harmonized. Bayou Demeke and Santosh Ghimire provided internal peer review of the model methodology and the manuscript underwent standard EPA management review. An editor and two anonymous reviewers at the Journal of Cleaner Production reviewed the model. In regard to data quality evaluation, data quality assessment was performed at the flow and process levels according to the updated US EPA data quality assessment guidelines as defined in US EPA (2016b).

## Intended application
The primary application is for use in the US Environmentally-Extended Input-Ouput model, USEEIO, version 1.1. This model is being used by the US EPA for supporting tools that prioritize goods and services based on potential environmental impacts, resource use or emissions for large regions, including the US and US states, and as a strealined tool for organizations as a starting point to consider sustainable materials management. Model results are designed to provide meso/macro-level decision support.

## Project
USEEIO v1.1 was developed by the US EPA with CSRA and ERG with Wesley W. Ingwersen and David E. Meyer as research leads. Yi Yang was the technical lead on the work for CSRA (contract EP-C-15-012); Troy Hawkins was lead for ERG (contract EP-C-12-021).

## Sources
- BLM 2008
- USGS 2016
- Blackhurst et al. 2010
- Goebes et al. 2003
- USEPA 2016c
- USDA 2009b
- USDA 2016
- BEA 2015
- USEPA 2015b
- Nickerson et al. 2011
- USEPA 2015a
- Lovelace 2009
- Torcellini et al. 2003
- USEPA 2016b
- Kim et el. 2013
- Maupin et al. 2014
- EIA 2015
- Macknick et al. 2011
- EIA 2017
- USDA 2014
- Ingwersen et al. DRAFT
- Edelen and Ingwersen 2017
- USDA 2006
- Yienger et al. 1995
- Ingwersen et al. 2017
- EIA 2013
- EIA 2016
- USEPA 2016a
- Statistics Canada 2010
- USGS 2015
- USDA 2009a
