# Ink and ink cartridges; at manufacturer

Dataset: openLCA process, unit process
Category: 3259: Other Chemical Product and Preparation Manufacturing
Geography: United States
Time period: 2017-01-01 to 2017-12-31
Data quality: US EPA - Process Pedigree Matrix (1;1)
Exchange data quality scheme: US EPA - Flow Pedigree Matrix
Generated by: US EPA with CSRA and ERG
Owner: US EPA
Published in: Yang, Ingwersen et al. 2017
restrictionsDescription: This model shold be appropriately cited (see Yang, Ingwersen et al. 2017 source or Publication field) when used. Any changes or derivations of this model by the user should be documented. The model itself and any results from use of this model shall not be construed to consitute US EPA opinion or policy.
copyright: false

## General comment
BEA Code & Name is '325910:Printing ink manufacturing'. Description of the primary industry producing this good or service, adapted from the Census Bureau NAICS 2007 descriptions: This industry comprises establishments primarily engaged in manufacturing printing and inkjet inks and inkjet cartridges.

## Technology
The process describes the average US production of this good or service within this NAICS-based grouping defined in the BEA 2007 detailed input-output tables (BEA 2015). Distribution, wholesale and retailing of this good or service, use, and final disposal are not included. Creation of a product system with this process will enable modeling of all upstream (supply-chain) activities.

## Geography
Data represent the 50 US states

## Time period
2017 was the year in which this version of USEEIO was released and is the target date for the model

## Reference product
- Ink and ink cartridges; at manufacturer: 1 USD

## Inputs from technosphere
All rows: data quality (1,3,1,1,1)
- Wireless telecommunications: 0.000638873 USD
- Communication and energy wire and cable; at manufacturer: 1.9231e-5 USD
- Dimensional stone; at mine: 2.30864e-5 USD
- Wood kitchen cabinets and countertops; at manufacturer: 1.76091e-5 USD
- Telecommunications: 0.00254979 USD
- Ground or treated minerals and earth; at manufacturer: 4.50694e-5 USD
- Light bulbs; at manufacturer: 2.33196e-7 USD
- Independent artists, writers, and performers: 1.14664e-6 USD
- Full-service restaurants: 0.000216042 USD
- Semiconductors; at manufacturer: 0.0059644 USD
- Vehicle electrical and electronic equipment; at manufacturer: 6.95097e-7 USD
- Promoters and agents: 2.33196e-7 USD
- Other basic organic chemicals; at manufacturer: 0.00719643 USD
- Scientific research and development: 2.99709e-7 USD
- Architectural, engineering, and related services: 0.00277245 USD
- Advertising and public relations: 0.0032161 USD
- Environmental and other technical consulting services: 0.000426446 USD
- Primary batteries; at manufacturer: 3.24379e-6 USD
- Machine shops; at manufacturer: 0.00531429 USD
- Securities and commodities brokerage and exchanges: 4.45107e-6 USD
- Rubber and plastic belts and hoses; at manufacturer: 1.86237e-6 USD
- Consumer goods and general rental centers: 0.000211484 USD
- Commercial equipment rental: 0.000848646 USD
- Legal services: 0.00087064 USD
- Civic, social, professional, and similar organizations: 1.99357e-6 USD
- State and local government enterprises: 0.000644305 USD
- Household goods repair: 0.000214475 USD
- Timber and raw forest products; at forest: 3.82571e-6 USD
- Primary iron, steel, and ferroalloy products; at manufacturer: 1.82974e-5 USD
- Synthetic rubber and artificial and synthetic fibers; at manufacturer: 1.9308e-5 USD
- Urethane and other foam products; at manufacturer: 4.63398e-7 USD
- Signal testing instruments; at manufacturer: 1.62189e-6 USD
- Cutlery and handtools; at manufacturer: 1.39768e-6 USD
- Other computer related services, including facilities management: 0.000213096 USD
- Aluminum; at manufacturer: 9.26796e-7 USD
- Refined vegetable, olive, and seed oils; at manufacturer: 1.31255e-5 USD
- Cement; at manufacturer: 2.08529e-6 USD
- Chemicals (except basic chemicals, agrichemicals, polymers, paints, pharmaceuticals,soaps, cleaning compounds); at manufacturer: 0.00135434 USD
- Other retail: 1.2623e-5 USD
- Buildings and dwellings services: 0.00235284 USD
- Motor vehicle steering, suspension components (except spring), and brake systems; at manufacturer: 2.99709e-7 USD
- Copper, nickel, lead, and zinc; at mine: 2.39764e-5 USD
- Vehicle rental and leasing: 0.00106179 USD
- Computers; at manufacturer: 7.6229e-5 USD
- Motors and generators; at manufacturer: 2.3865e-5 USD
- Metal coatings, engravings, and heat treatments; at manufacturer: 0.00573909 USD
- Coal; at mine: 3.41635e-6 USD
- Gasoline, fuels, and by-products of petroleum refining; at manufacturer: 0.0606866 USD
- Electricity; at consumer: 0.00408763 USD
- Industrial process variable instruments; at manufacturer: 9.29791e-7 USD
- Metal windows, doors, and architectural products; at manufacturer: 3.79986e-5 USD
- Water transport (boats, ships, ferries): 0.000224517 USD
- Veneer, plywood, and engineered wood; at manufacturer: 0.00148313 USD
- Soap and cleaning compounds; at manufacturer: 1.67901e-5 USD
- Electronic capacitors, resistors, coils, transformers, connectors and other components (except semiconductors and printed circuit assemblies); at manufacturer: 0.00118582 USD
- Office administration: 0.000213646 USD
- Pipeline transport: 0.00168933 USD
- Commercial machinery repair: 0.00128417 USD
- Machinery for the paper, textile, food or other industries (except semiconductor machinery); at manufacturer: 3.44452e-5 USD
- Wooden windows, door, and flooring; at manufacturer: 2.13163e-5 USD
- Specialty transformers; at manufacturer: 3.35931e-6 USD
- Computer systems design: 0.000849613 USD
- Other concrete products; at manufacturer: 1.08899e-5 USD
- Other vehicle parts; at manufacturer: 2.30756e-5 USD
- Other basic inorganic chemicals; at manufacturer: 0.0159649 USD
- Custom metal rolls; at manufacturer: 2.55019e-6 USD
- Lumber and treated lumber; at manufacturer: 1.27434e-5 USD
- Investment advice, portfolio management, and other financial advising services: 1.37984e-6 USD
- Storage batteries; at manufacturer: 2.54869e-6 USD
- Vehicle repair: 0.000642509 USD
- Monetary authorities and depository credit intermediation: 0.00298017 USD
- Paper; at manufacturer: 0.000114266 USD
- Limited-service restaurants: 0.000219767 USD
- Insurance agencies and brokerages: 0.00212128 USD
- Wholesale trade: 0.0383063 USD
- Secondary copper products; at manufacturer: 1.41336e-5 USD
- Screws, nuts, and bolts; at manufacturer: 0.00170064 USD
- Management consulting: 0.00170756 USD
- Air transport: 0.00170761 USD
- Vending, commercial laundry, and other commercial and service industry machinery; at manufacturer: 2.33196e-7 USD
- Other real estate: 0.000637967 USD
- Electronic equipment repair and maintenance: 0.000427257 USD
- Air purification and ventilation equipment; at manufacturer: 9.79424e-6 USD
- Ink and ink cartridges; at manufacturer: 0.00673297 USD
- Petrochemicals; at manufacturer: 0.000705232 USD
- Printed circuit and electronic assembly; at manufacturer: 0.00258761 USD
- External hard drives, CDs, other storage media; at manufacturer: 3.70719e-6 USD
- Other petroleum and coal products; at manufacturer: 1.27378e-5 USD
- Rubber tires; at manufacturer: 6.65131e-8 USD
- Polystyrene foam products; at manufacturer: 2.39767e-6 USD
- Hotels and campgrounds: 0.000215942 USD
- Nondepository credit intermediation and related activities: 0.00403443 USD
- Nonresidential building repair and maintanence: 0.00192338 USD
- Metal structural products; at manufacturer: 8.11246e-6 USD
- Plastic pipe, fittings, and sausage casings; at manufacturer: 8.08705e-5 USD
- Magazines and journals; at publisher: 1.85958e-6 USD
- Cast iron and steel; at manufacturer: 2.31699e-7 USD
- Sand, gravel, clay, phosphate, other nonmetallic minerals; at mine: 2.23201e-5 USD
- Golf courses, marinas, ski resorts, fitness and other rec centers and industries: 1.21315e-6 USD
- Software: 7.64605e-7 USD
- Cardboard containers; at manufacturer: 0.00688676 USD
- Light gauge metal cans, boxes, and containers; at manufacturer: 0.00677652 USD
- Truck transport: 0.00833722 USD
- Material handling equipment; at manufacturer: 0.000211785 USD
- Fertilizers; at manufacturer: 5.85029e-5 USD
- Paints and coatings; at manufacturer: 0.0987014 USD
- Accounting, tax preparation, bookkeeping, and payroll: 0.00128331 USD
- Paper bags and coated paper; at manufacturer: 3.23096e-5 USD
- Warehousing: 0.00149483 USD
- Satellite, telecommunications resellers, and all other telecommunications: 0.000212015 USD
- Cutting and machine tool accessory, rolling mill, and other metalworking machines; at manufacturer: 4.74176e-6 USD
- Relay and industrial controls; at manufacturer: 0.00151669 USD
- All other forging, stamping, and sintering; at manufacturer: 6.58025e-5 USD
- Compressed Gases; at manufacturer: 4.5189e-5 USD
- Drinking water and wastewater treatment; at consumer: 0.000433352 USD
- other miscellaneous electrical equipment and components; at manufacturer: 1.43653e-5 USD
- Other plastic products; at manufacturer: 0.000305258 USD
- Synthetic dyes and pigments; at manufacturer: 0.162645 USD
- Surgical appliance and supplies; at manufacturer: 4.43073e-6 USD
- Welding and Soldering Equipment, Scales and Balances, and other general purpose machinery; at manufacturer: 1.32794e-5 USD
- Other support services: 0.000212887 USD
- Other secondary nonferrous metal products; at manufacturer: 9.26796e-6 USD
- Custom computer programming: 1.21262e-5 USD
- Computer terminals and other computer peripheral equipment; at manufacturer: 0.000267149 USD
- Wiring devices; at manufacturer: 1.13533e-5 USD
- Business support: 0.000429403 USD
- Other primary nonferrous metals; at manufacturer: 6.95097e-7 USD
- Clay and ceramic products; at manufacturer: 2.13163e-5 USD
- Optical instruments and lenses; at manufacturer: 2.09877e-6 USD
- Concrete pipe, bricks, and blocks; at manufacturer: 7.87777e-6 USD
- Wireless communications; at manufacturer: 5.56078e-6 USD
- Performances: 2.33196e-7 USD
- Aluminum products; at manufacturer: 1.39019e-6 USD
- Metal hinges, keys, lock, and other hardware; at manufacturer: 1.36702e-5 USD
- Computer storage device readers; at manufacturer: 3.73036e-5 USD
- Nonferrous metal casts; at manufacturer: 2.56366e-6 USD
- Facilities support: 1.62136e-6 USD
- Vegetable oils and by-products; at manufacturer: 5.25509e-5 USD
- All other food and drinking places: 2.99709e-7 USD
- Light fixtures; at manufacturer: 2.08529e-6 USD
- Plastic bags, films, and sheets; at manufacturer: 7.10207e-5 USD
- Scenic and sightseeing transportation and support activities for transportation: 1.29901e-6 USD
- Lids, jars, bottle caps, other metal closures and crowns; at manufacturer: 2.58943e-5 USD
- Cardboard; at manufacturer: 0.00148391 USD
- Metal plumbing drains, faucets, valves, and other fittings; at manufacturer: 8.57287e-6 USD
- Insurance carriers: 0.00552412 USD
- Laminated plastic plates and shapes; at manufacturer: 9.32785e-7 USD
- Food and beverage stores: 4.66392e-7 USD
- Unrefined oil and gas; at extraction site: 0.000238005 USD
- Passenger ground transport: 2.6595e-6 USD
- Investigation and security: 0.000213653 USD
- Rail transport: 0.00261355 USD
- Air conditioning, refrigeration, and warm air heating equipment; at manufacturer: 4.29081e-5 USD
- Switchgear and switchboards; at manufacturer: 2.75722e-5 USD
- Ball and roller bearings; at manufacturer: 2.55019e-6 USD
- Heavy gauge metal tanks; at manufacturer: 0.00275277 USD
- Power boilers and heat exchangers; at manufacturer: 0.00401407 USD
- Employment services: 0.000428927 USD
- Natural gas; at consumer: 0.00154603 USD
- Valve and fittings (except for plumbing); at manufacturer: 5.62443e-5 USD
- Transmission and power train parts; at manufacturer: 2.99709e-7 USD
- Air and gas compressors; at manufacturer: 8.47589e-6 USD
- Glass and glass products; at manufacturer: 2.09018e-5 USD
- Waste management and remediation: 0.00129429 USD
- Newspapers; at publisher: 4.64895e-7 USD
- Iron, gold, silver, and other metal ores; at mine: 4.0944e-5 USD
- Noncomparable imports: 0.00362056 USD
- Lime and gypsum products; at manufacturer: 3.70719e-6 USD
- Plastic bottles; at manufacturer: 2.7304e-5 USD
- Company and enterprise management: 0.104834 USD
- Marketing research and all other miscellaneous professional, scientific, and technical services: 0.000233056 USD
- Fresh soybeans, canola, flaxseeds, and other oilseeds; at farm: 8.08279e-8 USD
- Plywood and veneer; at manufacturer: 1.1585e-6 USD
- Specialized design: 0.00105807 USD
- Gaskets, seals, musical instruments, fasteners, brooms, brushes, mop and other misc. goods; at manufacturer: 4.63398e-7 USD
- Abrasive products; at manufacturer: 1.39768e-6 USD
- Adhesives; at manufacturer: 7.73802e-5 USD
- Data processing and hosting: 0.00106857 USD
- Vehicles and parts sales: 4.55547e-6 USD
- Sports: 5.32906e-7 USD
- Metal pipe fittings, ball and roller bearings, industrial patterns, metal bath fixtures, other misc. fabricated metals; at manufacturer: 0.00445831 USD
- Lessors of nonfinancial intangible assets: 0.00857045 USD
- Plastics; at manufacturer: 0.045214 USD
- General merchandise stores: 1.39768e-6 USD

## Inputs from nature
- Occupation, urban, discontinuously built: 8.93152e-5 m2*a; data quality (4,2,1,1,1)
- Occupation, industrial area, built up: 4.26845e-5 m2*a; data quality (4,2,1,1,1)
- Energy, wind: 1.9936e-5 MJ; data quality (3,1,1,1,1)
- Energy, biomass: 0.00028673 MJ; data quality (3,1,1,1,1)
- Water, fresh: 0.0012782, 0.00497056 m3 (2 entries, compartments not in this file); data quality (4,2,1,4,2)
- Water, saline: 0.00038454 m3; data quality (4,2,1,4,2)
- Occupation, industrial area: 0.000128053 m2*a; data quality (4,2,1,1,1)

## Emissions to nature
- carbonyl sulfide: 3.02176e-7 kg; data quality (4,2,1,1,3)
- Propane, 1,2-dichloro-: 1.5831e-11 kg; data quality (4,2,1,1,4)
- p-phenylenediamine: 9.48468e-16 kg; data quality (5,2,1,1,5)
- Benzene, pentachloro-: 3.39196e-13, 1.40967e-14 kg (2 entries, compartments not in this file); data quality (5,1,1,1,4)
- Triethyl amine: 1.76896e-8 kg; data quality (4,2,1,1,5)
- Benzyl chloride: 8.75814e-10 kg; data quality (3,1,1,1,4)
- DMTT (DAZOMET): 5.19368e-12 kg; data quality (4,1,1,1,4)
- O-ANISIDINE: 9.18155e-14 kg; data quality (5,2,1,1,4)
- manganese: 3.08225e-11, 2.56984e-9 kg (2 entries, compartments not in this file); data quality (4,1,1,1,4)
- particulates, < 2.5 um: 9.61314e-6 kg; data quality (3,2,1,3,2)
- CHLORINE: 9.27443e-14 kg; data quality (2,1,1,1,4)
- CATECHOL: 1.11293e-12 kg; data quality (2,1,1,1,4)
- methyl isobutyl ketone: 9.61703e-7 kg; data quality (3,2,1,1,4)
- Sodium formate: 2.58547e-12, 1.07942e-11 kg (2 entries, compartments not in this file); data quality (3,1,1,1,4)
- acetonitrile: 5.60884e-9 kg; data quality (3,2,1,1,4)
- acenaphthylene: 6.44364e-10 kg; data quality (3,2,1,4,1)
- Xylene: 4.47352e-10 kg; data quality (4,1,1,1,5)
- Hydrocarbons, aromatic: 2.20289e-8 kg; data quality (3,2,1,4,1)
- Decabromodiphenyl oxide: 2.8811e-11, 1.03874e-12 kg (2 entries, compartments not in this file); data quality (4,1,1,1,4)
- catechol: 1.22608e-10 kg; data quality (2,1,1,1,4)
- ALLYL ALCOHOL: 4.96943e-10 kg; data quality (4,1,1,1,4)
- Benzene, hexachloro-: 1.92558e-14 kg; data quality (4,1,1,1,4)
- butanol: 3.40328e-9 kg; data quality (5,1,1,1,4)
- HYDROQUINONE: 2.31035e-11 kg; data quality (2,1,1,1,4)
- methane, monochloro-, r-40: 3.81887e-9 kg; data quality (3,2,1,1,4)
- Dibenz(a,h)anthracene: 7.92715e-13 kg; data quality (2,2,1,1,4)
- benz[a]anthracene: 1.1845e-11 kg; data quality (3,2,1,3,2)
- acrolein: 2.34696e-8 kg; data quality (3,2,1,4,1)
- methane, bromo-, halon 1001: 2.44114e-10 kg; data quality (3,2,1,1,3)
- Chlorothalonil: 7.7185e-14 kg; data quality (5,1,1,1,4)
- Ethylene glycol monoethyl ether: 1.18504e-9, 6.7545e-10 kg (2 entries, compartments not in this file); data quality (5,1,1,1,4)
- 2-METHOXYETHANOL: 9.69416e-10 kg; data quality (4,2,1,1,4)
- phosgene: 1.54038e-11 kg; data quality (5,2,1,1,3)
- beryllium: 2.19759e-11 kg; data quality (2,2,1,1,4)
- antimony: 4.63722e-13, 7.56237e-10 kg (2 entries, compartments not in this file); data quality (2,1,1,1,4)
- N,N-DIMETHYLANILINE: 3.11018e-13 kg; data quality (3,1,1,1,4)
- methane, dichloro-, hcc-30: 7.15853e-8 kg; data quality (4,2,1,1,4)
- ethane, 1,1,2-trichloro-: 1.96852e-11 kg; data quality (4,2,1,1,4)
- p-cresol: 3.29195e-12 kg; data quality (4,2,1,1,3)
- Bisphenol A: 9.27443e-14 kg; data quality (4,1,1,1,4)
- barium: 2.69376e-13 kg; data quality (4,1,1,1,4)
- chlorine: 1.62578e-8 kg; data quality (4,2,1,1,4)
- lead: 3.29016e-10, 1.27264e-11 kg (2 entries, compartments not in this file); data quality (3,1,1,1,4)
- formaldehyde: 8.11541e-7 kg; data quality (3,2,1,4,1)
- o-cresol: 4.99666e-13 kg; data quality (4,2,1,1,4)
- hydrogen chloride: 1.91807e-7 kg; data quality (2,2,1,1,4)
- formaldehyde: 9.78668e-12 kg; data quality (2,1,1,1,4)
- propargyl alcohol: 3.21263e-11, 2.88164e-11 kg (2 entries, compartments not in this file); data quality (4,1,1,1,4)
- MALEIC ANHYDRIDE: 1.43633e-10 kg; data quality (4,1,1,1,4)
- Propene: 4.61104e-9 kg; data quality (3,1,1,1,4)
- cyclohexane: 1.88203e-9 kg; data quality (4,1,1,1,4)
- naphthalene: 2.41981e-8 kg; data quality (3,2,1,3,3)
- acenaphthene: 5.7319e-10 kg; data quality (3,2,1,4,1)
- 2,4-dimethylphenol: 1.72634e-11 kg; data quality (4,1,1,1,4)
- Urethane: 4.00087e-14 kg; data quality (5,2,1,1,4)
- chloroform: 2.05453e-10 kg; data quality (4,2,1,1,3)
- 4,4'-METHYLENEBIS(2-CHLOROANALINE): 1.23988e-10 kg; data quality (5,2,1,1,4)
- copper: 9.36718e-12 kg; data quality (4,1,1,1,4)
- pyrene: 8.57485e-11 kg; data quality (3,2,1,4,1)
- p-Cresidine: 9.14992e-12, 4.84978e-13 kg (2 entries, compartments not in this file); data quality (5,1,1,1,4)
- chromium: 2.74938e-13, 5.47191e-14 kg (2 entries, compartments not in this file); data quality (4,1,1,1,4)
- OCTACHLORONAPHTHALENE: 1.77825e-17, 1.13808e-14 kg (2 entries, compartments not in this file); data quality (5,1,1,1,4)
- 4-Methyl-2-pentanone: 1.28642e-13, 2.31861e-11 kg (2 entries, compartments not in this file); data quality (4,1,1,1,4)
- C.I. DIRECT BLUE 218: 1.04949e-12 kg; data quality (5,1,1,1,4)
- phenanthrene: 1.45482e-9 kg; data quality (3,2,1,4,1)
- Thiram: 4.11785e-11 kg; data quality (4,1,1,1,4)
- Butanol: 6.39367e-11, 2.60671e-12 kg (2 entries, compartments not in this file); data quality (5,1,1,1,4)
- dimethyl formamide: 1.95691e-11, 8.50003e-12 kg (2 entries, compartments not in this file); data quality (4,1,1,1,4)
- Diethylene glycol butyl ether: 8.10336e-8 kg; data quality (4,2,1,1,5)
- Propane, 1,2-dichloro-: 3.32025e-13 kg; data quality (5,1,1,1,4)
- fluoranthene: 1.62413e-10 kg; data quality (3,2,1,3,2)
- Water, fresh: 0.00544125 m3; data quality (4,2,1,4,2)
- Ethane, 1,1,1,2-tetrafluoro-, HFC-134a: 3.06654e-8 kg; data quality (4,2,1,4,1)
- 2-PHENYLPHENOL: 1.20568e-11, 1.36334e-11 kg (2 entries, compartments not in this file); data quality (3,1,1,1,4)
- Naphthalene: 6.33072e-10 kg; data quality (4,1,1,1,4)
- t-butyl methyl ether: 1.80401e-10 kg; data quality (3,2,1,1,4)
- methanol: 9.81781e-7 kg; data quality (4,2,1,1,5)
- Carbon dioxide: 0.200622 kg; data quality (4,2,1,4,1)
- 2-Mercaptobenzothiazole: 1.07212e-10 kg; data quality (3,1,1,1,4)
- Cresol: 1.2987e-11 kg; data quality (4,2,1,1,5)
- Benzo(k)fluoranthene: 9.11357e-12 kg; data quality (3,2,1,4,1)
- antimony: 3.35143e-10 kg; data quality (3,2,1,1,4)
- Propane, 1,1,1,3,3,3-hexafluoro-, HCFC-236fa: 9.40411e-11 kg; data quality (4,2,1,4,1)
- Benzo(a)anthracene: 5.11313e-14 kg; data quality (2,2,1,1,5)
- ethylene glycol: 7.48806e-11 kg; data quality (5,1,1,1,4)
- Methyl acrylate: 2.78233e-13, 1.02656e-9 kg (2 entries, compartments not in this file); data quality (3,1,1,1,4)
- Xylene: 6.79165e-10 kg; data quality (4,1,1,1,4)
- BUTYL ACRYLATE: 4.99903e-10, 4.41872e-10 kg (2 entries, compartments not in this file); data quality (4,1,1,1,4)
- 1,4-dichlorobenzene: 1.42447e-11 kg; data quality (2,2,1,1,4)
- 1,4-BENZOQUINONE: 6.57736e-12 kg; data quality (3,2,1,1,4)
- 2-methylnaphthalene: 1.05859e-10 kg; data quality (3,2,1,1,4)
- 2,4-Diaminotoluene: 1.81795e-11 kg; data quality (2,2,1,1,4)
- PYRIDINE: 2.04965e-11, 1.78997e-11 kg (2 entries, compartments not in this file); data quality (4,1,1,1,4)
- 1,1,2,2-tetrachloroethane: 9.36396e-12 kg; data quality (3,2,1,1,4)
- TERT-BUTYL ALCOHOL: 3.89526e-12, 6.96788e-10 kg (2 entries, compartments not in this file); data quality (4,1,1,1,4)
- Vinyl acetate: 1.6319e-10 kg; data quality (4,1,1,1,4)
- carbon monoxide: 0.000565778 kg; data quality (3,2,1,1,1)
- dibenzofuran: 3.51143e-11 kg; data quality (4,2,1,1,3)
- Benzene, ethyl-: 2.23151e-13, 1.715e-10 kg (2 entries, compartments not in this file); data quality (4,1,1,1,4)
- 4-nitroaniline: 3.84889e-12 kg; data quality (5,1,1,1,4)
- manganese: 2.05343e-9 kg; data quality (3,2,1,1,3)
- Titanium: 2.89317e-10 kg; data quality (5,2,1,1,3)
- MOLYBDENUM(VI): 6.37895e-11 kg; data quality (3,1,1,1,4)
- Methane, dichloro-, HCC-30: 1.25205e-11 kg; data quality (5,1,1,1,4)
- isophorone: 3.86177e-9 kg; data quality (2,2,1,1,5)
- m-cresol: 5.85308e-12 kg; data quality (4,2,1,1,3)
- bis(2-chloroethyl)ether: 1.5711e-11 kg; data quality (2,1,1,1,4)
- ethane, 1,2-dichloro-: 1.39602e-9 kg; data quality (3,2,1,1,4)
- PERACETIC ACID: 9.27443e-13 kg; data quality (4,1,1,1,4)
- mercury: 9.55266e-14, 3.2275e-13 kg (2 entries, compartments not in this file); data quality (3,1,1,1,4)
- 1,1,1-trichloroethane: 8.3858e-9 kg; data quality (3,2,1,1,4)
- 1,2-BUTYLENE OXIDE: 3.41874e-12 kg; data quality (4,2,1,1,4)
- 2,4/2,6-toluenediisocyanate (mixture): 8.83511e-13 kg; data quality (3,1,1,1,4)
- ETHENE: 9.4254e-10 kg; data quality (3,1,1,1,4)
- 2-chloro-1-phenylethanone: 2.32719e-13 kg; data quality (2,2,1,1,4)
- NITROUS ACID: 1.81514e-8 kg; data quality (5,1,1,1,4)
- hydrogen fluoride: 2.18866e-8 kg; data quality (2,2,1,1,4)
- Methane, difluoro-, HFC-32: 4.738e-9 kg; data quality (4,2,1,4,1)
- Phthalate, dibutyl-: 4.73325e-9 kg; data quality (4,2,1,1,5)
- t-Butyl methyl ether: 1.23999e-10 kg; data quality (4,1,1,1,4)
- Formic acid: 7.59666e-11 kg; data quality (3,1,1,1,4)
- Water, saline: 0.000194846 m3; data quality (4,2,1,4,2)
- acetamide: 9.27443e-14 kg; data quality (4,1,1,1,4)
- lead: 9.7057e-10 kg; data quality (3,2,1,1,4)
- hydroquinone: 6.93394e-8 kg; data quality (3,2,1,1,5)
- methane, chlorodifluoro-, hcfc-22: 2.72063e-10 kg; data quality (4,1,1,1,4)
- Dimethyl sulfate: 1.51627e-10 kg; data quality (2,2,1,1,4)
- Sulfuric acid: 2.5718e-8 kg; data quality (2,1,1,1,4)
- 2-ethoxyethyl acetate: 5.26415e-12 kg; data quality (5,2,1,1,4)
- silver: 5.10094e-14 kg; data quality (4,1,1,1,4)
- Hydrazine, methyl-: 5.76508e-12 kg; data quality (2,2,1,1,4)
- Styrene: 9.27443e-14 kg; data quality (3,1,1,1,4)
- METHACRYLONITRILE: 9.27443e-14 kg; data quality (5,1,1,1,4)
- BENZOIC TRICHLORIDE (BENZOTRICHLORIDE): 2.3872e-12 kg; data quality (3,2,1,1,4)
- NITRIC ACID: 1.62303e-10 kg; data quality (3,1,1,1,4)
- arsenic: 4.19272e-10 kg; data quality (3,2,1,3,2)
- carbon disulfide: 7.06634e-9 kg; data quality (4,2,1,1,4)
- PHOSPHORUS: 7.53469e-11 kg; data quality (2,2,1,1,4)
- o-toluidine: 2.83525e-16 kg; data quality (4,2,1,1,3)
- Ethane, pentafluoro-, HFC-125: 8.13595e-9 kg; data quality (4,2,1,4,1)
- ethylene oxide: 2.66072e-10 kg; data quality (3,2,1,1,4)
- DIPHENYLAMINE: 3.86744e-12 kg; data quality (1,1,1,1,4)
- Methane: 5.18769e-6 kg; data quality (4,2,1,4,1)
- 3,3'-Dichlorobenzidine: 8.27261e-15 kg; data quality (3,2,1,1,3)
- PHTHALIC ANHYDRIDE: 4.63722e-13, 1.56561e-10 kg (2 entries, compartments not in this file); data quality (3,1,1,1,4)
- Dimethylamine: 8.08297e-12, 7.71861e-10 kg (2 entries, compartments not in this file); data quality (3,1,1,1,4)
- Methyl iodide: 9.47663e-15 kg; data quality (4,2,1,1,4)
- chlorine: 8.95725e-10 kg; data quality (2,1,1,1,4)
- dimethyl formamide: 9.74354e-10 kg; data quality (3,2,1,1,4)
- HCFC-225cb: 7.28043e-12 kg; data quality (2,1,1,1,4)
- Methane, dibromo-: 9.45454e-11 kg; data quality (5,1,1,1,4)
- hexachlorobenzene: 8.04702e-13 kg; data quality (3,2,1,1,3)
- CHLOROPRENE: 5.50893e-13 kg; data quality (2,2,1,1,4)
- Folpet: 2.05827e-13 kg; data quality (4,1,1,1,4)
- Phenol, 2,4-dimethyl-: 6.29014e-13 kg; data quality (4,1,1,1,4)
- carbon tetrachloride: 3.62463e-10 kg; data quality (4,2,1,1,4)
- Aniline: 1.94027e-11 kg; data quality (3,1,1,1,4)
- 1,2,4-trimethylbenzene: 6.27388e-7 kg; data quality (5,1,1,1,5)
- Chloroform: 2.42406e-11, 3.00436e-11 kg (2 entries, compartments not in this file); data quality (3,1,1,1,4)
- toluene: 5.61698e-10 kg; data quality (5,1,1,1,4)
- Epichlorohydrin: 1.91955e-10, 1.55193e-12 kg (2 entries, compartments not in this file); data quality (2,1,1,1,4)
- acrylonitrile: 1.02532e-9 kg; data quality (4,2,1,1,4)
- Cyclohexanol: 4.88838e-13 kg; data quality (4,1,1,1,4)
- Methane, tetrachloro-, R-10: 2.31861e-13, 3.1904e-11 kg (2 entries, compartments not in this file); data quality (3,1,1,1,4)
- 1,4-dioxane: 9.75962e-10 kg; data quality (4,2,1,1,4)
- para-xylene: 9.79306e-8 kg; data quality (3,2,1,1,4)
- Ethene, chloro-: 1.7617e-9 kg; data quality (3,2,1,1,4)
- acetophenone: 5.91359e-13 kg; data quality (4,2,1,1,4)
- nitrogen oxides: 0.000139618 kg; data quality (3,2,1,1,1)
- 4,4'-isopropylidenediphenol: 6.93588e-11 kg; data quality (4,1,1,1,4)
- particulates, < 10 um: 2.43447e-6 kg; data quality (3,2,1,1,5)
- Benzoyl chloride: 6.05899e-13 kg; data quality (2,1,1,1,4)
- VOC, volatile organic compounds: 0.000180621 kg; data quality (3,2,1,1,4)
- Nitrogen: 5.33583e-7 kg; data quality (4,2,1,1,5)
- methanol: 6.68429e-10, 7.0216e-9 kg (2 entries, compartments not in this file); data quality (3,1,1,1,4)
- QUINOLINE: 1.90457e-11 kg; data quality (2,1,1,1,4)
- bromine: 2.78233e-13 kg; data quality (5,1,1,1,4)
- ACETONE CYANOHYDRIN: 5.30497e-10 kg; data quality (3,1,1,1,4)
- 1,2,4-trichlorobenzene: 7.83034e-12 kg; data quality (4,2,1,1,3)
- Cobalt: 2.86913e-10 kg; data quality (3,2,1,1,4)
- phenol: 1.07879e-11 kg; data quality (3,1,1,1,4)
- Chromium, ion: 5.2835e-10 kg; data quality (2,2,1,1,4)
- phthalate, dioctyl-: 1.03472e-9 kg; data quality (3,2,1,1,4)
- hexachloroethane: 5.31534e-14 kg; data quality (4,2,1,1,3)
- 4,4'-METHYLENEDIANILINE: 3.55651e-14 kg; data quality (3,1,1,1,4)
- benzene: 2.57989e-7 kg; data quality (3,2,1,4,1)
- polychlorinated biphenyls: 2.79574e-12 kg; data quality (3,2,1,1,3)
- Ethylene glycol monoethyl ether: 1.80162e-6 kg; data quality (5,1,1,1,5)
- bis(n-octyl) phthalate: 1.13769e-7 kg; data quality (5,2,1,1,5)
- ammonia: 1.51362e-9 kg; data quality (3,1,1,1,4)
- 3-Iodo-2-propynyl butylcarbamate: 2.05569e-12 kg; data quality (4,1,1,1,4)
- ethane, 1,2-dibromo-: 2.62401e-13 kg; data quality (2,2,1,1,4)
- nickel: 5.56466e-13 kg; data quality (4,1,1,1,4)
- SEC-BUTYL ALCOHOL: 1.07074e-9 kg; data quality (5,1,1,1,4)
- 2-Propanol: 1.62088e-11 kg; data quality (2,1,1,1,4)
- Aluminum: 6.40122e-10 kg; data quality (4,1,1,1,4)
- Benzo(g,h,i)perylene: 1.17338e-10 kg; data quality (3,2,1,2,3)
- mercury: 3.42415e-11 kg; data quality (2,2,1,1,3)
- toluene-2,4-diisocyante: 3.90924e-11 kg; data quality (3,2,1,1,4)
- N-(3-CHLORALLYL) HEXAMINIUM CHLORIDE: 3.57624e-11, 6.60446e-12 kg (2 entries, compartments not in this file); data quality (3,1,1,1,4)
- Benzene, 1,2,4-trimethyl-: 7.21005e-13 kg; data quality (5,1,1,1,4)
- Phosphine: 7.7125e-13 kg; data quality (4,2,1,1,4)
- 4-CHLOROANILINE: 8.40629e-12, 8.08297e-12 kg (2 entries, compartments not in this file); data quality (2,1,1,1,4)
- cumene: 2.59676e-8 kg; data quality (4,2,1,1,5)
- nickel: 1.11873e-9 kg; data quality (3,2,1,1,4)
- methyl methacrylate: 7.201e-9 kg; data quality (3,2,1,1,5)
- Nitrobenzene: 4.23701e-11 kg; data quality (4,2,1,1,4)
- diethanolamine: 3.17196e-10 kg; data quality (3,2,1,1,4)
- 2-(2-BUTOXYETHOXY) ETHYL ACETATE: 1.66703e-10 kg; data quality (5,2,1,1,4)
- monochloroethane: 8.37882e-10 kg; data quality (3,2,1,1,4)
- ethylbenzene: 3.89664e-9 kg; data quality (4,1,1,1,4)
- ACRYLAMIDE: 2.2837e-12 kg; data quality (4,1,1,1,4)
- m-xylene: 2.57341e-7 kg; data quality (3,2,1,1,4)
- benzene, ethyl-: 4.67364e-7 kg; data quality (4,2,1,2,4)
- Phthalate, dioctyl-: 6.40335e-11, 4.63722e-13 kg (2 entries, compartments not in this file); data quality (4,1,1,1,4)
- DIETHANOLAMINE: 3.09623e-10, 2.91719e-11 kg (2 entries, compartments not in this file); data quality (4,1,1,1,4)
- Ethene, tetrachloro-: 2.31861e-11 kg; data quality (3,1,1,1,4)
- NITROUS ACID: 4.11471e-8 kg; data quality (5,1,1,1,5)
- ALLYL CHLORIDE: 4.25566e-10 kg; data quality (3,2,1,1,4)
- Benzo(b)fluoranthene: 1.03654e-11 kg; data quality (3,2,1,4,1)
- cadmium: 1.83886e-10 kg; data quality (3,2,1,1,4)
- 2,2-BIS(4-HYDROXY-3,5-DIBROMOPHENYL)PROPANE: 1.15745e-12 kg; data quality (5,1,1,1,4)
- nitric acid: 1.41526e-8 kg; data quality (3,1,1,1,4)
- tertiary-Butyl Acetate: 4.22658e-7 kg; data quality (3,2,1,1,4)
- Chloroacetic acid: 3.4983e-10 kg; data quality (3,2,1,1,4)
- ethyl acrylate: 3.16675e-9 kg; data quality (3,2,1,1,5)
- benzo(a)pyrene: 1.20156e-11 kg; data quality (3,2,1,3,2)
- Propene, 1,3-dichloro-: 3.73657e-14 kg; data quality (3,2,1,1,4)
- epichlorohydrin: 1.89126e-9 kg; data quality (3,2,1,1,4)
- 2,2,4-trimethylpentane: 8.97274e-8 kg; data quality (3,2,1,4,2)
- hydrogen sulfide: 7.10106e-10 kg; data quality (3,2,1,1,3)
- Acetonitrile: 9.54339e-11 kg; data quality (3,1,1,1,4)
- ACRYLAMIDE: 1.81502e-9 kg; data quality (4,2,1,1,4)
- 1-Methyl-2-pyrrolidinone: 3.56741e-7 kg; data quality (5,1,1,1,5)
- BUTYL ISOCYANATE: 1.40086e-12 kg; data quality (4,2,1,1,4)
- copper: 2.06714e-9 kg; data quality (4,1,1,1,5)
- formic acid: 2.00348e-9 kg; data quality (3,1,1,1,4)
- Chrysene: 1.61677e-11 kg; data quality (3,2,1,4,1)
- 1-Methyl-2-pyrrolidinone: 5.66023e-13 kg; data quality (5,1,1,1,4)
- 2-PHENOXYETHANOL: 2.10074e-10 kg; data quality (5,2,1,1,4)
- 1,2-DICHLOROBENZENE: 2.57006e-10 kg; data quality (5,1,1,1,4)
- Phosphorus: 2.42878e-7 kg; data quality (2,1,1,1,5)
- 2-METHYLPYRIDINE: 1.51173e-14 kg; data quality (3,1,1,1,4)
- ammonia: 6.66956e-7 kg; data quality (3,2,1,3,2)
- 1,3-PHENYLENEDIAMINE: 5.81974e-13 kg; data quality (4,1,1,1,4)
- sulfur dioxide: 6.40543e-6 kg; data quality (2,2,1,1,4)
- Xylene: 5.9968e-7 kg; data quality (4,2,1,2,4)
- Acrylic acid: 1.27685e-10 kg; data quality (4,1,1,1,4)
- methylene diphenyl diisocyanate: 7.88608e-11 kg; data quality (3,2,1,1,4)
- trichloroethylene: 4.17833e-9 kg; data quality (4,2,1,1,4)
- Formaldehyde: 5.08531e-11 kg; data quality (2,1,1,1,4)
- 1,2-DICHLOROETHYLENE: 1.65085e-12 kg; data quality (5,1,1,1,4)
- Phthalate, dimethyl-: 1.85856e-10 kg; data quality (4,2,1,1,4)
- Zinc: 2.46793e-10 kg; data quality (5,1,1,1,4)
- toluene: 7.18073e-6 kg; data quality (4,2,1,1,5)
- Polychlorinated biphenyls: 3.93802e-15 kg; data quality (3,1,1,1,4)
- SULFURYL FLUORIDE: 3.61703e-9 kg; data quality (4,1,1,1,4)
- 2,4-dinitrophenol: 2.22586e-10 kg; data quality (5,1,1,1,4)
- QUINOLINE: 1.75483e-11 kg; data quality (3,2,1,1,4)
- Ethylene glycol: 7.63212e-10 kg; data quality (5,1,1,1,4)
- 1,2,4-trimethylbenzene: 4.14267e-10 kg; data quality (5,1,1,1,4)
- ethylene glycol: 2.99763e-7 kg; data quality (4,2,1,1,4)
- cyanide: 3.32549e-10 kg; data quality (3,2,1,1,5)
- Methane, monochloro-, R-40: 4.63722e-13 kg; data quality (3,1,1,1,4)
- o-Xylene: 1.12083e-7 kg; data quality (3,2,1,1,4)
- Triethyl amine: 5.7316e-11 kg; data quality (5,1,1,1,4)
- 1,1-DICHLOROETHYLENE: 3.10617e-13 kg; data quality (3,2,1,1,4)
- toluene: 1.34681e-9 kg; data quality (5,1,1,1,5)
- acetaldehyde: 3.74605e-7 kg; data quality (3,2,1,4,1)
- fluorene: 5.92929e-10 kg; data quality (3,2,1,4,1)
- 3,3'-DICHLOROBENZIDINE DIHYDROCHLORIDE: 4.52646e-14 kg; data quality (5,1,1,1,4)
- Dimethoxy methane: 1.99488e-10 kg; data quality (2,2,1,1,4)
- anthracene: 6.23304e-11 kg; data quality (3,2,1,3,2)
- diisocyanates: 4.28099e-11 kg; data quality (4,1,1,1,4)
- AZIRIDINE: 8.08186e-12 kg; data quality (4,2,1,1,4)
- Nitrilotriacetic acid: 1.90126e-12 kg; data quality (5,1,1,1,4)
- styrene: 8.22467e-8 kg; data quality (4,2,1,1,4)
- toluene, 2,4-dinitro-: 4.03996e-10 kg; data quality (5,2,1,1,4)
- NITROGLYCERIN: 2.03917e-9 kg; data quality (5,1,1,1,4)
- propylene oxide: 2.57176e-9 kg; data quality (3,2,1,1,4)
- Dinitrogen monoxide: 8.19965e-7 kg; data quality (4,2,1,4,1)
- acrylic acid: 1.1207e-8 kg; data quality (4,2,1,1,4)
- 3-methylcholanthrene: 6.08401e-15 kg; data quality (2,2,1,1,5)
- M-CRESOL: 3.82107e-12 kg; data quality (3,1,1,1,4)
- Bis(2-chloroethyl)ether: 9.27443e-14 kg; data quality (2,1,1,1,4)
- 2,6-Dinitrotoluene: 1.48391e-10 kg; data quality (5,1,1,1,4)
- benzyl chloride: 1.66069e-10 kg; data quality (2,2,1,1,4)
- Permethrin: 1.53028e-11 kg; data quality (2,1,1,1,4)
- ETHYLENETHIOUREA: 1.21495e-11 kg; data quality (2,1,1,1,4)
- benzene, chloro-: 5.0173e-10 kg; data quality (4,2,1,1,5)
- Ethane, 1,1,1-trifluoro-, HFC-143a: 3.48103e-9 kg; data quality (4,2,1,4,1)
- Chromium VI: 1.4756e-10 kg; data quality (3,2,1,1,4)
- hexane: 4.41361e-6 kg; data quality (3,2,1,1,4)
- bromoform: 1.41221e-12 kg; data quality (3,2,1,1,4)
- ethene, tetrachloro-: 2.98618e-9 kg; data quality (3,2,1,1,4)
- Phthalate, dimethyl-: 4.95823e-11 kg; data quality (4,1,1,1,4)
- propanal: 7.26009e-8 kg; data quality (3,2,1,4,1)
- Phenol: 3.21266e-10 kg; data quality (3,1,1,1,4)
- aniline: 5.58482e-10 kg; data quality (4,2,1,1,4)
- 2-nitropropane: 9.18155e-13 kg; data quality (5,2,1,1,4)
- phthalic anhydride: 8.89626e-9 kg; data quality (2,2,1,1,4)
- dicyclopentadiene: 7.18078e-12 kg; data quality (4,1,1,1,4)
- NITRATE: 5.76452e-8 kg; data quality (5,1,1,1,5)
- [1,1'-BIPHENYL]-4,4'-DIAMINE, 3,3'-DIMETHOXY-, DIHYDROCHLORIDE: 5.47055e-13 kg; data quality (5,1,1,1,4)
- ALUMINUM OXIDE: 1.32066e-10 kg; data quality (5,1,1,1,4)
- HCFC-225ca: 5.10094e-12 kg; data quality (5,1,1,1,4)
- Indeno(1,2,3-cd)pyrene: 5.73196e-12 kg; data quality (3,2,1,4,1)
- biphenyl: 5.0729e-11 kg; data quality (4,2,1,1,4)
- selenium: 1.51057e-10 kg; data quality (2,2,1,1,4)
- maleic anhydride: 1.47098e-8 kg; data quality (2,2,1,1,4)
- HYDROCHLORIC ACID: 5.03045e-10 kg; data quality (2,1,1,1,4)
- Hydrazine: 8.81792e-11 kg; data quality (4,2,1,1,5)
- vinyl acetate: 3.06735e-9 kg; data quality (4,2,1,1,4)
- phenol: 6.29791e-8 kg; data quality (4,2,1,1,4)
- THIOUREA: 2.32695e-14 kg; data quality (3,1,1,1,4)
- butadiene: 3.81226e-8 kg; data quality (3,2,1,4,1)
- AMMONIA: 4.92843e-10 kg; data quality (3,1,1,1,4)

## Inventory method
Input-output

## Modelling constants
The reference unit of all processes is 1 USD2013 of the good or service. The technosphere inputs are based on the US BEA detailed input-output tables for 2007. The IO tables are combined to develop a commodity-by-commodity model based on the the industry-technology assumption (see Suh et al., 2010), which assumes all commodities produced by a given industry have the same input structure, but that multiple industries can produce the same commodity. Thus, model technosphere flows represent commodity outputs (and not industry outputs) from other processes in the model. There are no by-products included in these processes. All commodity production is based on US-conditions, despite in reality that some goods and services are produced overseas, as USEEIO v1.1 is a single-region IO model.

## Completeness
The input-output approach assures that all purchased inputs associated with the sectors making these commodities as reported in the US census for 2007 are included. The direct resources extracted including minerals, energy sources, water and land occupied are included. Emissions to air include all critieria air pollutants, greenhouse gases, and hazardous and toxic air pollutants as defined by US EPA. Releases to water include toxics, total nitrogen and total phosphorus, and water discharges. Releases to soil or groundwater include toxics and agriculutural pesticides. Some metal releases to air, water and soil are not included because they could not be speciated. Solid hazardous and non-hazardous wastes generated are not included as an elementary flows although purchases of waste services are included.

## Data treatment
Greenhouse gases are primarily from the US Greenhouse Gas Emission Inventory (USEPA 2016a). Biogenic C uptake is not included (change from version 1.0), as biogenic C emission are not included. Toxic releases to air, water and soil (except pesticides) are from the 2013 Toxic Release Inventory (USEPA 2015a). Criteria air pollutants and hazardous air pollutants are from the 2011 National Emissions Inventory (USEPA 2015b). All estimates are normalized by industry based on sector output in the data year, then converted to 2013 USD using relative sector-specific CPIs (if data year is not 2013). Energy use represent raw renewables or fossil fuel energies and is based on EIA data for 2014. See Table 1 in Yang, Ingwersen et al. 2017 and Supporting Information 1, and the v1.1 data update notes (Ingwersen et al. 2017) for all details on environmental data sources used.Land occupation associated with manufacturing buildings was estimated based on the building floorspace data provided by the U.S. Energy Information Administration in the 2010 Manufacturing Energy Consumption Survey (EIA 2013). Portions of total renewable energy (EIA 2016) based on EIA-923 reports for 2014 (EIA 2017) are included. Nitrogen and Phosphorus releases are modeled in total N and total P equivalents as estimated by the Discharge Monitoring Report Nutrient Loading tool (USEPA 2016b). Self-supplied withdrawals were assigned to industrial sectors based on water use statistics for Canadian industries by NAICS 3-digit sector scaled to US production levels based on gross domestic product by industry (BEA 2015; Statistics Canada 2010), and further disaggregated to the manufacturing sectors based on compensation of employees as provided by the 2007 IO tables (BEA 2015). Water withdrawals associated with public supply were allocated to sectors based on their use of water, sewage, and other services in USD based on the IO tables (BEA 2015). Portions of total renewable energy (EIA 2016) by type are assigned to sectors (hydro, wind, solar, or) based on EIA-923 reports for 2014 (EIA 2017).

## Data collection
2015-2016

## Sampling procedure
US federal government sources, including surveys and US EPA emissions databases are used as the primary sources. From these sources, data for US reporting establishments/facilities are aggregated by the NAICS sector as defined in the BEA detailed 2007 input-output tables. When level of sector aggregation differs, or when direct emissions are not reported but modeled, additional sources are used to make allocations and estimates.

## Review details
In regard to quality assurance and peer-review, each dataset created went through Quality Assurance as defined in a quality assurance project plans at US EPA, CSRA or ERG. The model was assembled with the IO model builder model (USEPA 2016c). Validation functions were used to check that all the model components were properly assembled and harmonized. Bayou Demeke and Santosh Ghimire provided internal peer review of the model methodology and the manuscript underwent standard EPA management review. An editor and two anonymous reviewers at the Journal of Cleaner Production reviewed the model. In regard to data quality evaluation, data quality assessment was performed at the flow and process levels according to the updated US EPA data quality assessment guidelines as defined in US EPA (2016b).

## Intended application
The primary application is for use in the US Environmentally-Extended Input-Ouput model, USEEIO, version 1.1. This model is being used by the US EPA for supporting tools that prioritize goods and services based on potential environmental impacts, resource use or emissions for large regions, including the US and US states, and as a strealined tool for organizations as a starting point to consider sustainable materials management. Model results are designed to provide meso/macro-level decision support.

## Project
USEEIO v1.1 was developed by the US EPA with CSRA and ERG with Wesley W. Ingwersen and David E. Meyer as research leads. Yi Yang was the technical lead on the work for CSRA (contract EP-C-15-012); Troy Hawkins was lead for ERG (contract EP-C-12-021).

## Sources
- USDA 2009a
- Statistics Canada 2010
- USDA 2006
- BEA 2015
- USEPA 2016c
- USEPA 2015b
- Maupin et al. 2014
- USDA 2016
- Torcellini et al. 2003
- Ingwersen et al. 2017
- USDA 2009b
- EIA 2013
- Nickerson et al. 2011
- Goebes et al. 2003
- USGS 2016
- EIA 2017
- Kim et el. 2013
- Edelen and Ingwersen 2017
- Blackhurst et al. 2010
- Lovelace 2009
- USEPA 2016a
- BLM 2008
- Ingwersen et al. DRAFT
- USEPA 2016b
- EIA 2016
- USDA 2014
- Macknick et al. 2011
- EIA 2015
- USEPA 2015a
- Yienger et al. 1995
- USGS 2015
