# Federal government enterprises

Dataset: openLCA process, unit process
Category: Government
Geography: United States
Time period: 2017-01-01 to 2017-12-31
Data quality: US EPA - Process Pedigree Matrix (1;1)
Exchange data quality scheme: US EPA - Flow Pedigree Matrix
Generated by: US EPA with CSRA and ERG
Owner: US EPA
Published in: Yang, Ingwersen et al. 2017
restrictionsDescription: This model shold be appropriately cited (see Yang, Ingwersen et al. 2017 source or Publication field) when used. Any changes or derivations of this model by the user should be documented. The model itself and any results from use of this model shall not be construed to consitute US EPA opinion or policy.
copyright: false

## General comment
BEA Code & Name is 'S00102:Other federal government enterprises'.

## Technology
The process describes the average US production of this good or service within this NAICS-based grouping defined in the BEA 2007 detailed input-output tables (BEA 2015). Distribution, wholesale and retailing of this good or service, use, and final disposal are not included. Creation of a product system with this process will enable modeling of all upstream (supply-chain) activities.

## Geography
Data represent the 50 US states

## Time period
2017 was the year in which this version of USEEIO was released and is the target date for the model

## Reference product
- Federal government enterprises: 1 USD

## Inputs from technosphere
All rows: data quality (1,3,1,1,1)
- Specialized design: 0.00991561 USD
- Packaged meat (except poultry); at manufacturer: 0.00485232 USD
- Sports: 0.000316456 USD
- Other computer related services, including facilities management: 0.00274262 USD
- Sugar, candy, and chocolate; at manufacturer: 0.000105485 USD
- Wireless telecommunications: 0.00168776 USD
- Satellite, telecommunications resellers, and all other telecommunications: 0.00274262 USD
- Full-service restaurants: 0.000843882 USD
- Couriers and messengers: 0.000421941 USD
- Air transport: 0.00548523 USD
- Passenger ground transport: 0.00105485 USD
- Wholesale trade: 0.0085443 USD
- Flours and malts; at manufacturer: 0.00137131 USD
- Drinking water and wastewater treatment; at consumer: 0.0120253 USD
- Securities and commodities brokerage and exchanges: 0.000421941 USD
- Architectural, engineering, and related services: 0.032384 USD
- Lessors of nonfinancial intangible assets: 0.00105485 USD
- Cutlery and handtools; at manufacturer: 0.000632911 USD
- Data processing and hosting: 0.0394515 USD
- Radio and television: 0.000105485 USD
- Other real estate: 0.00242616 USD
- Other plastic products; at manufacturer: 0.00105485 USD
- Cookies, crackers, pastas, and tortillas; at manufacturer: 0.000316456 USD
- Sound recording: 0.00759494 USD
- Books, newspapers, magazines, and other print media; at manufacturer: 0.000421941 USD
- Books; at publisher: 0.000105485 USD
- Flavored drink concentrates; at manufacturer: 0.000316456 USD
- Electronic equipment repair and maintenance: 0.00843882 USD
- Buildings and dwellings services: 0.00369198 USD
- Ball and roller bearings; at manufacturer: 0.000527426 USD
- Seasonings and dressings; at manufacturer: 0.000843882 USD
- Monetary authorities and depository credit intermediation: 0.00305907 USD
- Advertising and public relations: 0.0107595 USD
- Lids, jars, bottle caps, other metal closures and crowns; at manufacturer: 0.00021097 USD
- Independent artists, writers, and performers: 0.000105485 USD
- Clothing; at manufacturer: 0.00126582 USD
- Directory, mailing list, and other publishers; at publisher: 0.0364979 USD
- Dry, condensed, and evaporated dairy; at manufacturer: 0.000105485 USD
- Railroad rolling stock; at manufacturer: 0.000105485 USD
- Insurance agencies and brokerages: 0.120781 USD
- Vehicle rental and leasing: 0.00527426 USD
- Gasoline, fuels, and by-products of petroleum refining; at manufacturer: 0.000421941 USD
- Distilleries and spirits; at manufacturer: 0.000105485 USD
- Veneer, plywood, and engineered wood; at manufacturer: 0.00021097 USD
- All other foods; at manufacturer: 0.00021097 USD
- Other support services: 0.00158228 USD
- Commercial equipment rental: 0.00390295 USD
- Civic, social, professional, and similar organizations: 0.00464135 USD
- Employment services: 0.00147679 USD
- Seafood; at manufacturer: 0.000632911 USD
- Other textiles; at manufacturer: 0.000105485 USD
- Office furniture and custom architectural woodwork and millwork; at manufacturer: 0.00200422 USD
- Business support: 0.00116034 USD
- Other basic organic chemicals; at manufacturer: 0.000105485 USD
- Electricity; at consumer: 0.0167722 USD
- Fluid milk and butter; at manufacturer: 0.000421941 USD
- Nondepository credit intermediation and related activities: 0.00316456 USD
- Fruit and vegetable preservation; at manufacturer: 0.00305907 USD
- Coffee and tea; at manufacturer: 0.000421941 USD
- Rail transport: 0.00021097 USD
- Cheese; at manufacturer: 0.00189873 USD
- Air purification and ventilation equipment; at manufacturer: 0.00263713 USD
- News syndicates, libraries, archives, Internet publishing and all other information services: 0.000316456 USD
- Insurance carriers: 0.00126582 USD
- Unrefined oil and gas; at extraction site: 0.00432489 USD
- Fresh vegetables, melons, and potatoes; at farm: 0.000105485 USD
- Breweries and beer; at manufacturer: 0.00168776 USD
- Telecommunications: 0.0278481 USD
- Soft drinks, bottled water, and ice; at manufacturer: 0.000421941 USD
- Golf courses, marinas, ski resorts, fitness and other rec centers and industries: 0.000316456 USD
- Limited-service restaurants: 0.00147679 USD
- Snack foods; at manufacturer: 0.000105485 USD
- Investigation and security: 0.000632911 USD
- Hotels and campgrounds: 0.00432489 USD
- Noncomparable imports: 0.0827004 USD
- Transmission and power train parts; at manufacturer: 0.00137131 USD
- Water transport (boats, ships, ferries): 0.00021097 USD
- All other food and drinking places: 0.000843882 USD
- Packaged poultry; at manufacturer: 0.00105485 USD
- Accounting, tax preparation, bookkeeping, and payroll: 0.00675105 USD
- Wild-caught fish and game; at place of capture: 0.000421941 USD
- Cardboard; at manufacturer: 0.000843882 USD
- Bread and other baked goods; at manufacturer: 0.000738397 USD
- Truck transport: 0.00232068 USD
- Ice cream and frozen desserts; at manufacturer: 0.000843882 USD
- Frozen food; at manufacturer: 0.0021097 USD
- Natural gas; at consumer: 0.0123418 USD
- Other retail: 0.000105485 USD

## Inputs from nature
- Water, fresh: 0.0045246, 0.00261447 m3 (2 entries, compartments not in this file); data quality (1,2,1,4,2)
- Occupation, urban, discontinuously built: 8.8996e-5 m2*a; data quality (4,2,1,1,1)

## Emissions to nature
- benzene: 7.76198e-14 kg; data quality (3,1,1,1,5)
- toluene-2,4-diisocyante: 1.44369e-12 kg; data quality (3,2,1,1,5)
- Benzo(a)anthracene: 8.74505e-15 kg; data quality (2,2,1,1,5)
- 1,4-BENZOQUINONE: 5.96092e-16 kg; data quality (3,2,1,1,5)
- beryllium: 5.12293e-12 kg; data quality (2,2,1,1,5)
- butadiene: 1.41831e-9 kg; data quality (3,2,1,3,2)
- nitric acid: 3.88398e-8, 1.36175e-13 kg (2 entries, compartments not in this file); data quality (3,1,1,1,5)
- benzo(a)pyrene: 8.15467e-13 kg; data quality (2,2,1,2,4)
- toluene, 2,4-dinitro-: 2.18038e-14 kg; data quality (5,2,1,1,5)
- benzene, ethyl-: 8.30918e-9 kg; data quality (4,2,1,2,4)
- ethylene glycol: 4.02362e-9 kg; data quality (5,2,1,1,5)
- Propoxur: 2.65976e-14 kg; data quality (5,2,1,1,5)
- ethyl acrylate: 3.06488e-10 kg; data quality (4,2,1,1,5)
- Dinitrotoluene, technical grade (2,4 (77%)- and 2,6 (19%)-): 1.27502e-8, 1.36175e-13 kg (2 entries, compartments not in this file); data quality (5,1,1,1,5)
- biphenyl: 4.94932e-11 kg; data quality (4,2,1,1,5)
- dibenzofuran: 3.73532e-12 kg; data quality (4,2,1,1,5)
- carbon disulfide: 2.92725e-11 kg; data quality (4,2,1,1,5)
- BUTYL ISOCYANATE: 1.31437e-10 kg; data quality (4,2,1,1,5)
- Ethene, chloro-: 5.74146e-10 kg; data quality (3,2,1,1,5)
- methanol: 1.12234e-9 kg; data quality (4,2,1,1,5)
- Benzo(g,h,i)perylene: 1.21382e-11 kg; data quality (3,2,1,1,5)
- 2,4,5-trichlorophenol: 2.65976e-14 kg; data quality (2,2,1,1,5)
- Aluminum: 3.60864e-11 kg; data quality (4,1,1,1,5)
- benzene: 1.30848e-8 kg; data quality (3,2,1,2,3)
- Triethyl amine: 5.64108e-12 kg; data quality (4,2,1,1,5)
- vinyl acetate: 6.4645e-12 kg; data quality (4,2,1,1,5)
- bromoform: 2.124e-12 kg; data quality (3,2,1,1,5)
- t-butyl methyl ether: 3.98185e-9 kg; data quality (3,2,1,1,5)
- ethylene glycol: 4.42569e-11 kg; data quality (5,1,1,1,5)
- propanal: 3.90927e-10 kg; data quality (3,2,1,4,1)
- trichloroethylene: 3.32429e-9 kg; data quality (4,2,1,1,5)
- Phthalate, dibutyl-: 4.67571e-9 kg; data quality (4,1,1,1,5)
- 2-NITROPROPANE: 6.80876e-13 kg; data quality (5,1,1,1,5)
- toluene: 4.46151e-8 kg; data quality (4,2,1,2,4)
- 1,2,4-trichlorobenzene: 1.80489e-12 kg; data quality (4,2,1,1,5)
- styrene: 9.77521e-10 kg; data quality (4,2,1,1,5)
- NITRIC ACID: 1.01205e-10 kg; data quality (3,1,1,1,5)
- Methane: 3.15555e-6 kg; data quality (4,2,1,4,1)
- 2-METHOXYETHANOL: 6.17996e-14 kg; data quality (4,2,1,1,5)
- pentachlorophenol: 1.65822e-16 kg; data quality (3,2,1,1,5)
- benz[a]anthracene: 5.05719e-11 kg; data quality (2,2,1,1,5)
- 2-Acetylaminofluorene: 2.65976e-12 kg; data quality (5,2,1,1,5)
- chromium: 2.12771e-12, 1.74863e-11, 2.05829e-9 kg (3 entries, compartments not in this file); data quality (4,1,1,1,5)
- Sulfuric acid: 2.06339e-8 kg; data quality (2,1,1,1,5)
- methane, dichloro-, hcc-30: 3.0375e-8 kg; data quality (4,2,1,1,5)
- benzyl chloride: 3.77521e-11 kg; data quality (2,2,1,1,5)
- Indeno(1,2,3-cd)pyrene: 2.53547e-13 kg; data quality (3,2,1,4,1)
- 2-ethoxyethyl acetate: 5.20687e-11 kg; data quality (5,2,1,1,5)
- hexachlorobenzene: 6.49403e-12 kg; data quality (3,2,1,1,5)
- acrylic acid: 1.10654e-13 kg; data quality (4,2,1,1,5)
- 3,3'-dimethylbenzidine: 3.16829e-14 kg; data quality (1,2,1,1,5)
- Diethylene glycol butyl ether: 5.30026e-10 kg; data quality (4,2,1,1,5)
- acenaphthylene: 1.14162e-11 kg; data quality (3,2,1,4,2)
- manganese: 8.33944e-10 kg; data quality (3,2,1,1,5)
- fluoranthene: 1.92923e-11 kg; data quality (2,2,1,1,4)
- chloroform: 5.82343e-10 kg; data quality (4,2,1,1,5)
- butanol: 1.09798e-8 kg; data quality (5,1,1,1,5)
- 1,1,1-trichloroethane: 2.73381e-10 kg; data quality (4,2,1,1,5)
- Hydrocarbons, aromatic: 7.07406e-10 kg; data quality (4,2,1,1,5)
- nitrogen oxides: 4.42056e-6 kg; data quality (2,2,1,1,5)
- ALLYL CHLORIDE: 2.06996e-16 kg; data quality (3,2,1,1,5)
- Ethylene glycol: 4.59605e-9 kg; data quality (5,1,1,1,5)
- Hydrazine, methyl-: 8.33536e-12 kg; data quality (2,2,1,1,5)
- Dinitrogen monoxide: 6.65747e-8 kg; data quality (4,2,1,4,1)
- hydrogen fluoride: 3.808e-9 kg; data quality (2,2,1,1,5)
- manganese: 2.66244e-11, 1.65126e-9 kg (2 entries, compartments not in this file); data quality (4,1,1,1,5)
- anthracene: 2.5399e-12 kg; data quality (3,2,1,3,2)
- o-Xylene: 2.58198e-10 kg; data quality (3,2,1,2,3)
- aniline: 3.51088e-15 kg; data quality (4,2,1,1,5)
- carbon monoxide: 6.56313e-6 kg; data quality (3,2,1,1,3)
- mercury: 2.0204e-11 kg; data quality (2,2,1,1,5)
- 2,2,4-trimethylpentane: 4.11636e-9 kg; data quality (3,2,1,4,2)
- benzene, chloro-: 2.59532e-11 kg; data quality (4,2,1,1,5)
- ETHYLENETHIOUREA: 4.25562e-14 kg; data quality (5,2,1,1,5)
- Urethane: 1.55535e-14 kg; data quality (5,2,1,1,5)
- methyl isobutyl ketone: 7.37477e-9 kg; data quality (4,2,1,1,5)
- bis(2-chloroethyl)ether: 3.56408e-17 kg; data quality (3,2,1,1,5)
- cadmium: 3.41828e-11 kg; data quality (3,2,1,1,5)
- 4-nitrophenol: 1.87015e-14 kg; data quality (2,2,1,1,5)
- phthalate, dioctyl-: 7.55555e-11 kg; data quality (3,2,1,1,5)
- cyanide: 1.27393e-9 kg; data quality (2,2,1,1,5)
- ethene, tetrachloro-: 3.09733e-9 kg; data quality (3,2,1,1,5)
- 1,2,4-trimethylbenzene: 1.03765e-10 kg; data quality (5,1,1,1,5)
- ethane, 1,2-dichloro-: 2.73668e-10 kg; data quality (3,2,1,1,5)
- Benzo(k)fluoranthene: 2.90608e-13 kg; data quality (3,2,1,4,1)
- carbon tetrachloride: 1.64629e-10 kg; data quality (4,2,1,1,5)
- 7-OXABICYCLO[2,2,1]HEPTANE-2,3-DICARBOXYLIC ACID, DIPOTASSIUM SALT: 2.18085e-9 kg; data quality (5,1,1,1,5)
- 1-METHYLNAPTHALENE: 4.06781e-14 kg; data quality (2,2,1,1,5)
- acrylonitrile: 1.46e-10 kg; data quality (4,2,1,1,5)
- Triethylene glycol: 1.91237e-14 kg; data quality (5,2,1,1,5)
- ethylbenzene: 9.55135e-10 kg; data quality (4,1,1,1,5)
- NITROGLYCERIN: 5.03892e-9, 7.87855e-9, 1.91601e-8 kg (3 entries, compartments not in this file); data quality (5,1,1,1,5)
- acetophenone: 8.20946e-13 kg; data quality (4,2,1,1,5)
- dimethyl formamide: 6.51218e-10 kg; data quality (4,2,1,1,5)
- Water, fresh: 0.00604474 m3; data quality (1,2,1,4,2)
- particulates, < 2.5 um: 9.7219e-7 kg; data quality (3,2,1,1,5)
- 1,1-DICHLOROETHYLENE: 7.72245e-12 kg; data quality (3,2,1,1,5)
- Hydrazine: 5.38336e-12 kg; data quality (4,2,1,1,5)
- Propane, 1,2-dichloro-: 8.73026e-12 kg; data quality (4,2,1,1,5)
- acetamide: 2.65976e-14 kg; data quality (5,2,1,1,5)
- PHOSPHORUS: 1.51591e-9 kg; data quality (2,2,1,1,5)
- phenol: 6.15469e-9 kg; data quality (4,2,1,1,5)
- chlorine: 5.57838e-9 kg; data quality (4,2,1,1,5)
- ammonia: 3.47185e-10 kg; data quality (3,1,1,1,5)
- Nitrogen: 8.32771e-5 kg; data quality (3,2,1,1,5)
- lead: 2.37629e-7, 1.91993e-11 kg (2 entries, compartments not in this file); data quality (3,1,1,1,5)
- ethane, 1,1,2-trichloro-: 1.70159e-12 kg; data quality (4,2,1,1,5)
- pyrene: 4.64431e-12 kg; data quality (3,2,1,3,2)
- 1,4-dichlorobenzene: 5.9182e-11 kg; data quality (2,2,1,1,5)
- Phosphorus: 1.34813e-10, 2.76952e-5 kg (2 entries, compartments not in this file); data quality (4,1,1,1,5)
- naphthalene: 1.2787e-9 kg; data quality (3,2,1,2,4)
- VOC, volatile organic compounds: 1.52735e-6 kg; data quality (3,2,1,1,5)
- cyclohexane: 1.36175e-13 kg; data quality (4,1,1,1,5)
- Toluene, 2,4-dinitro-: 2.7235e-13 kg; data quality (5,1,1,1,5)
- phenol: 1.6341e-12 kg; data quality (3,1,1,1,5)
- fluorene: 8.90727e-12 kg; data quality (3,2,1,3,3)
- arsenic: 8.41393e-11 kg; data quality (3,2,1,1,5)
- Ethylene glycol monoethyl ether: 1.98732e-11 kg; data quality (4,2,1,1,5)
- lead: 5.11149e-9 kg; data quality (3,2,1,1,5)
- formic acid: 4.72528e-11 kg; data quality (3,1,1,1,5)
- carbonyl sulfide: 1.06589e-11 kg; data quality (4,2,1,1,5)
- 2-(2-BUTOXYETHOXY) ETHYL ACETATE: 5.86753e-11 kg; data quality (5,2,1,1,5)
- ammonia: 4.55681e-8 kg; data quality (3,2,1,1,5)
- nickel: 5.80106e-14, 3.09513e-9 kg (2 entries, compartments not in this file); data quality (4,1,1,1,5)
- 1,4-dioxane: 2.21937e-12 kg; data quality (4,2,1,1,5)
- Hexachlorocyclopentadiene: 5.23724e-13 kg; data quality (3,2,1,1,5)
- diethanolamine: 6.09096e-11 kg; data quality (3,2,1,1,5)
- 2-nitropropane: 6.28502e-18 kg; data quality (5,2,1,1,5)
- Xylene: 4.02166e-8 kg; data quality (4,2,1,2,4)
- Chromium, ion: 3.2686e-10 kg; data quality (2,2,1,1,5)
- PYRENE, 1-NITRO-: 1.91297e-15 kg; data quality (2,2,1,1,5)
- copper: 5.89944e-7, 2.73896e-9, 2.77604e-10 kg (3 entries, compartments not in this file); data quality (4,1,1,1,5)
- particulates, < 10 um: 9.37533e-7 kg; data quality (3,2,1,1,5)
- Propene, 1,3-dichloro-: 1.07813e-11 kg; data quality (3,2,1,1,5)
- 1-Methyl-2-pyrrolidinone: 1.40763e-9, 1.05808e-10 kg (2 entries, compartments not in this file); data quality (5,1,1,1,5)
- acenaphthene: 4.00341e-12 kg; data quality (3,2,1,3,3)
- 2,4-D: 1.65085e-10 kg; data quality (3,2,1,1,5)
- hexachloroethane: 1.32988e-13 kg; data quality (4,2,1,1,5)
- 1,1,2,2-tetrachloroethane: 5.83872e-11 kg; data quality (3,2,1,1,5)
- Dibenz(a,h)anthracene: 8.13986e-15 kg; data quality (2,2,1,2,4)
- m-xylene: 4.58501e-10 kg; data quality (3,2,1,3,2)
- methane, monochloro-, r-40: 4.46572e-11 kg; data quality (3,2,1,1,5)
- hydrogen chloride: 4.78528e-8 kg; data quality (2,2,1,1,5)
- Benzo(b)fluoranthene: 4.08231e-13 kg; data quality (3,2,1,3,2)
- hydroquinone: 4.13901e-11 kg; data quality (3,2,1,1,5)
- 3-methylcholanthrene: 1.11591e-15 kg; data quality (2,2,1,1,5)
- barium: 3.4135e-13 kg; data quality (4,1,1,1,5)
- Dimethylcarbamyl chloride: 2.06996e-16 kg; data quality (5,2,1,1,5)
- Chrysene, 5-methyl-: 9.70507e-16 kg; data quality (2,2,1,1,5)
- Xylene: 5.03848e-13 kg; data quality (4,1,1,1,5)
- Chrysene: 1.23205e-11 kg; data quality (2,2,1,1,5)
- polychlorinated biphenyls: 2.92697e-17 kg; data quality (3,2,1,1,5)
- propylene oxide: 9.81565e-12 kg; data quality (3,2,1,1,5)
- nickel: 7.42283e-10 kg; data quality (3,2,1,1,5)
- selenium: 8.61208e-11 kg; data quality (2,2,1,1,5)
- methane, bromo-, halon 1001: 2.20451e-10 kg; data quality (3,2,1,1,5)
- ethane, 1,2-dibromo-: 1.42559e-12 kg; data quality (2,2,1,1,5)
- monochloroethane: 1.58431e-10 kg; data quality (3,2,1,1,5)
- 1,2-BUTYLENE OXIDE: 1.56846e-11 kg; data quality (4,2,1,1,5)
- para-xylene: 7.41644e-11 kg; data quality (4,2,1,1,5)
- isophorone: 9.1592e-11 kg; data quality (2,2,1,1,5)
- Asbestos: 3.29282e-13 kg; data quality (5,2,1,1,5)
- methylene diphenyl diisocyanate: 8.56706e-10 kg; data quality (4,2,1,1,5)
- Propane sultone: 2.65976e-14 kg; data quality (5,2,1,1,5)
- NITROUS ACID: 1.36175e-13 kg; data quality (5,1,1,1,5)
- formaldehyde: 1.04713e-8 kg; data quality (2,2,1,2,4)
- cumene: 2.32542e-10 kg; data quality (4,2,1,1,5)
- epichlorohydrin: 5.05985e-12 kg; data quality (3,2,1,1,5)
- acrolein: 1.08924e-9 kg; data quality (2,2,1,1,5)
- 2,4-dinitrophenol: 2.15773e-14 kg; data quality (5,2,1,1,5)
- hexachloro-1,3-butadiene: 2.38162e-12 kg; data quality (4,2,1,1,5)
- Cresol: 1.83221e-11 kg; data quality (4,2,1,1,5)
- benzidine: 5.31952e-12 kg; data quality (2,2,1,1,5)
- sulfur dioxide: 2.94912e-6 kg; data quality (2,2,1,1,5)
- Nitrobenzene: 2.75716e-13 kg; data quality (4,2,1,1,5)
- ethylene oxide: 1.9895e-12 kg; data quality (3,2,1,1,5)
- 2-methylnaphthalene: 2.2494e-12 kg; data quality (2,2,1,1,5)
- Phthalate, dibutyl-: 2.76925e-11 kg; data quality (4,2,1,1,5)
- Propene: 6.80876e-12 kg; data quality (3,1,1,1,5)
- chlorine: 1.96092e-11 kg; data quality (2,1,1,1,5)
- acetaldehyde: 3.93275e-9 kg; data quality (3,2,1,2,3)
- Chromium VI: 1.59548e-10 kg; data quality (3,2,1,1,5)
- Naphthalene: 1.61037e-10 kg; data quality (4,1,1,1,5)
- Cobalt: 3.8894e-10 kg; data quality (3,2,1,1,5)
- Carbon dioxide: 0.0351357 kg; data quality (4,2,1,4,1)
- o-cresol: 1.94564e-14 kg; data quality (4,2,1,1,5)
- antimony: 1.22924e-10 kg; data quality (3,2,1,1,5)
- hydrogen sulfide: 1.27748e-10 kg; data quality (3,2,1,1,5)
- CHLORONAPHTHALENE: 1.65103e-18 kg; data quality (1,2,1,1,5)
- p-phenylenediamine: 2.65976e-12 kg; data quality (5,2,1,1,5)
- phenanthrene: 4.381e-11 kg; data quality (3,2,1,2,4)
- methyl methacrylate: 3.45173e-12 kg; data quality (4,2,1,1,5)
- 2-chloro-1-phenylethanone: 3.77523e-13 kg; data quality (2,2,1,1,5)
- hexane: 1.62429e-8 kg; data quality (3,2,1,1,4)
- Phthalate, dimethyl-: 8.81928e-12 kg; data quality (4,2,1,1,5)
- Dimethyl sulfate: 4.1408e-12 kg; data quality (2,2,1,1,5)
- acetonitrile: 3.51531e-11 kg; data quality (3,2,1,1,5)

## Inventory method
Input-output

## Modelling constants
The reference unit of all processes is 1 USD2013 of the good or service. The technosphere inputs are based on the US BEA detailed input-output tables for 2007. The IO tables are combined to develop a commodity-by-commodity model based on the the industry-technology assumption (see Suh et al., 2010), which assumes all commodities produced by a given industry have the same input structure, but that multiple industries can produce the same commodity. Thus, model technosphere flows represent commodity outputs (and not industry outputs) from other processes in the model. There are no by-products included in these processes. All commodity production is based on US-conditions, despite in reality that some goods and services are produced overseas, as USEEIO v1.1 is a single-region IO model.

## Completeness
The input-output approach assures that all purchased inputs associated with the sectors making these commodities as reported in the US census for 2007 are included. The direct resources extracted including minerals, energy sources, water and land occupied are included. Emissions to air include all critieria air pollutants, greenhouse gases, and hazardous and toxic air pollutants as defined by US EPA. Releases to water include toxics, total nitrogen and total phosphorus, and water discharges. Releases to soil or groundwater include toxics and agriculutural pesticides. Some metal releases to air, water and soil are not included because they could not be speciated. Solid hazardous and non-hazardous wastes generated are not included as an elementary flows although purchases of waste services are included.

## Data treatment
Greenhouse gases are primarily from the US Greenhouse Gas Emission Inventory (USEPA 2016a). Biogenic C uptake is not included (change from version 1.0), as biogenic C emission are not included. Toxic releases to air, water and soil (except pesticides) are from the 2013 Toxic Release Inventory (USEPA 2015a). Criteria air pollutants and hazardous air pollutants are from the 2011 National Emissions Inventory (USEPA 2015b). All estimates are normalized by industry based on sector output in the data year, then converted to 2013 USD using relative sector-specific CPIs (if data year is not 2013). Energy use represent raw renewables or fossil fuel energies and is based on EIA data for 2014. See Table 1 in Yang, Ingwersen et al. 2017 and Supporting Information 1, and the v1.1 data update notes (Ingwersen et al. 2017) for all details on environmental data sources used.Land occupation for commercial buildings was estimated based on the building floorspace data provided by the U.S. Energy Information Administration 2012 Commercial Building Energy Consumption Survey (CBECS) (EIA 2015). Total commercial public supply water use is reported by USGS (Maupin et al. 2014). Water use is allocated across commercial sectors based on their use of water, sewage, and other services in USD based on the 2007 Benchmark Use Table before redefinitions (BEA 2015).

## Data collection
2015-2016

## Sampling procedure
US federal government sources, including surveys and US EPA emissions databases are used as the primary sources. From these sources, data for US reporting establishments/facilities are aggregated by the NAICS sector as defined in the BEA detailed 2007 input-output tables. When level of sector aggregation differs, or when direct emissions are not reported but modeled, additional sources are used to make allocations and estimates.

## Review details
In regard to quality assurance and peer-review, each dataset created went through Quality Assurance as defined in a quality assurance project plans at US EPA, CSRA or ERG. The model was assembled with the IO model builder model (USEPA 2016c). Validation functions were used to check that all the model components were properly assembled and harmonized. Bayou Demeke and Santosh Ghimire provided internal peer review of the model methodology and the manuscript underwent standard EPA management review. An editor and two anonymous reviewers at the Journal of Cleaner Production reviewed the model. In regard to data quality evaluation, data quality assessment was performed at the flow and process levels according to the updated US EPA data quality assessment guidelines as defined in US EPA (2016b).

## Intended application
The primary application is for use in the US Environmentally-Extended Input-Ouput model, USEEIO, version 1.1. This model is being used by the US EPA for supporting tools that prioritize goods and services based on potential environmental impacts, resource use or emissions for large regions, including the US and US states, and as a strealined tool for organizations as a starting point to consider sustainable materials management. Model results are designed to provide meso/macro-level decision support.

## Project
USEEIO v1.1 was developed by the US EPA with CSRA and ERG with Wesley W. Ingwersen and David E. Meyer as research leads. Yi Yang was the technical lead on the work for CSRA (contract EP-C-15-012); Troy Hawkins was lead for ERG (contract EP-C-12-021).
