# Commercial machinery repair

Dataset: openLCA process, unit process
Category: 8113: Commercial and Industrial Machinery and Equipment (except Automotive and Electronic) Repair and Maintenance
Geography: United States
Time period: 2017-01-01 to 2017-12-31
Data quality: US EPA - Process Pedigree Matrix (1;1)
Exchange data quality scheme: US EPA - Flow Pedigree Matrix
Generated by: US EPA with CSRA and ERG
Owner: US EPA
Published in: Yang, Ingwersen et al. 2017
restrictionsDescription: This model shold be appropriately cited (see Yang, Ingwersen et al. 2017 source or Publication field) when used. Any changes or derivations of this model by the user should be documented. The model itself and any results from use of this model shall not be construed to consitute US EPA opinion or policy.
copyright: false

## General comment
BEA Code & Name is '811300:Commercial and industrial machinery and equipment repair and maintenance'. Description of the primary industry producing this good or service, adapted from the Census Bureau NAICS 2007 descriptions: This industry comprises establishments primarily engaged in the repair and maintenance of commercial and industrial machinery and equipment. Establishments in this industry either sharpen/install commercial and industrial machinery blades and saws or provide welding (e.g., automotive, general) repair services; or repair agricultural and other heavy and industrial machinery and equipment (e.g., forklifts and other materials handling equipment, machine tools, commercial refrigeration equipment, construction equipment, and mining machinery).

## Technology
The process describes the average US production of this good or service within this NAICS-based grouping defined in the BEA 2007 detailed input-output tables (BEA 2015). Distribution, wholesale and retailing of this good or service, use, and final disposal are not included. Creation of a product system with this process will enable modeling of all upstream (supply-chain) activities.

## Geography
Data represent the 50 US states

## Time period
2017 was the year in which this version of USEEIO was released and is the target date for the model

## Reference product
- Commercial machinery repair: 1 USD

## Inputs from technosphere
All rows: data quality (1,3,1,1,1)
- Vending, commercial laundry, and other commercial and service industry machinery; at manufacturer: 0.00118807 USD
- Business support: 0.000264097 USD
- Machine shops; at manufacturer: 0.00143331 USD
- Wholesale trade: 0.0122232 USD
- Air purification and ventilation equipment; at manufacturer: 0.00033945 USD
- Insurance agencies and brokerages: 9.43352e-5 USD
- Vehicle rental and leasing: 0.00167884 USD
- Automatic controls for HVAC and refrigeration equipment; at manufacturer: 0.000848836 USD
- Couriers and messengers: 0.000584963 USD
- Metal pipe fittings, ball and roller bearings, industrial patterns, metal bath fixtures, other misc. fabricated metals; at manufacturer: 9.4329e-5 USD
- Other computer related services, including facilities management: 0.000641594 USD
- External hard drives, CDs, other storage media; at manufacturer: 3.77353e-5 USD
- Vehicle metal stamping; at manufacturer: 3.11456e-8 USD
- Plastic bottles; at manufacturer: 0.000113162 USD
- Specialized design: 5.65812e-5 USD
- Independent artists, writers, and performers: 0.000132027 USD
- Air conditioning, refrigeration, and warm air heating equipment; at manufacturer: 0.00369625 USD
- Movies and film: 3.77229e-5 USD
- Cast iron and steel; at manufacturer: 3.77166e-5 USD
- Other engine equipment; at manufacturer: 0.00795853 USD
- Commercial machinery repair: 0.00122661 USD
- Golf courses, marinas, ski resorts, fitness and other rec centers and industries: 9.43165e-5 USD
- Metal windows, doors, and architectural products; at manufacturer: 3.11456e-8 USD
- Rubber tires; at manufacturer: 0.00181041 USD
- Gaskets, seals, musical instruments, fasteners, brooms, brushes, mop and other misc. goods; at manufacturer: 0.000735481 USD
- Vehicle seating and interior trim (upholstery); at manufacturer: 1.24583e-8 USD
- State and local government enterprises: 0.000339531 USD
- Other primary nonferrous metals; at manufacturer: 7.54333e-5 USD
- Watches, clocks, and other measuring and controlling devices; at manufacturer: 6.22913e-9 USD
- Springs and wires; at manufacturer: 5.65874e-5 USD
- Farm machinery and equipment; at manufacturer: 9.42916e-5 USD
- Electricity; at consumer: 0.00120749 USD
- Transmission and power train parts; at manufacturer: 1.68186e-7 USD
- Wooden windows, door, and flooring; at manufacturer: 6.22913e-9 USD
- Abrasive products; at manufacturer: 0.00118807 USD
- General merchandise stores: 0.000150898 USD
- Nondepository credit intermediation and related activities: 0.00284784 USD
- Plastic pipe, fittings, and sausage casings; at manufacturer: 9.4304e-5 USD
- Architectural, engineering, and related services: 0.000471483 USD
- Office administration: 0.000584845 USD
- Petrochemicals; at manufacturer: 0.000188583 USD
- Sand, gravel, clay, phosphate, other nonmetallic minerals; at mine: 6.22913e-9 USD
- Aluminum; at manufacturer: 0.00011315 USD
- Primary copper; at manufacturer: 0.000169725 USD
- Relay and industrial controls; at manufacturer: 0.0010561 USD
- Other rubber products; at manufacturer: 0.00103723 USD
- Dry-cleaning and laundry: 0.000190994 USD
- Computer storage device readers; at manufacturer: 6.22913e-8 USD
- Lessors of nonfinancial intangible assets: 7.54644e-5 USD
- Wiring devices; at manufacturer: 0.000188789 USD
- Wireless telecommunications: 0.000150954 USD
- Other transportation equipment; at manufacturer: 6.22913e-9 USD
- Vehicle electrical and electronic equipment; at manufacturer: 0.000339493 USD
- Passenger ground transport: 0.000207491 USD
- Consumer goods and general rental centers: 0.000188633 USD
- Cardboard containers; at manufacturer: 0.000301777 USD
- Advertising and public relations: 0.00158571 USD
- Waste management and remediation: 0.0003395 USD
- Management consulting: 0.000490871 USD
- Gasoline, fuels, and by-products of petroleum refining; at manufacturer: 0.00116962 USD
- Plastic bags, films, and sheets; at manufacturer: 0.000226331 USD
- Other retail: 0.00115053 USD
- Semiconductors; at manufacturer: 4.36592e-5 USD
- Monetary authorities and depository credit intermediation: 0.00656466 USD
- Ball and roller bearings; at manufacturer: 0.00167856 USD
- Other plastic products; at manufacturer: 0.00132069 USD
- Switchgear and switchboards; at manufacturer: 0.000282887 USD
- Polystyrene foam products; at manufacturer: 5.65812e-5 USD
- Magazines and journals; at publisher: 0.000132027 USD
- Sports: 3.77291e-5 USD
- Motors and generators; at manufacturer: 0.00284797 USD
- Civic, social, professional, and similar organizations: 0.000622561 USD
- Secondary steel products; at manufacturer: 1.88583e-5 USD
- Water transport (boats, ships, ferries): 9.42978e-5 USD
- Lids, jars, bottle caps, other metal closures and crowns; at manufacturer: 0.000396392 USD
- Laminated plastic plates and shapes; at manufacturer: 0.00128237 USD
- Books, newspapers, magazines, and other print media; at manufacturer: 0.000245239 USD
- Other support services: 1.88583e-5 USD
- Stationery; at manufacturer: 1.88645e-5 USD
- Pipeline transport: 1.88583e-5 USD
- Newspapers; at publisher: 1.88645e-5 USD
- Communication and energy wire and cable; at manufacturer: 1.90576e-5 USD
- Promoters and agents: 5.65812e-5 USD
- Nonresidential building repair and maintanence: 0.000452799 USD
- Limited-service restaurants: 0.00079213 USD
- Accounting, tax preparation, bookkeeping, and payroll: 0.00867557 USD
- other miscellaneous electrical equipment and components; at manufacturer: 0.000132183 USD
- Light gauge metal cans, boxes, and containers; at manufacturer: 1.88583e-5 USD
- Hotels and campgrounds: 0.000490447 USD
- Other vehicle parts; at manufacturer: 0.000226456 USD
- Metal coatings, engravings, and heat treatments; at manufacturer: 0.00247057 USD
- Glass and glass products; at manufacturer: 3.77291e-5 USD
- Internet publishing and broadcasting: 0.000245258 USD
- Synthetic dyes and pigments; at manufacturer: 0.000282875 USD
- All other food and drinking places: 9.4304e-5 USD
- Urethane and other foam products; at manufacturer: 3.77229e-5 USD
- Buildings and dwellings services: 0.00139626 USD
- Computer terminals and other computer peripheral equipment; at manufacturer: 1.89455e-5 USD
- Nonferrous metal casts; at manufacturer: 0.0002263 USD
- Employment services: 0.00234073 USD
- Cardboard; at manufacturer: 0.000301752 USD
- All other forging, stamping, and sintering; at manufacturer: 0.000528033 USD
- Electronic equipment repair and maintenance: 0.00116965 USD
- Insurance carriers: 0.00418752 USD
- Company and enterprise management: 0.0113023 USD
- Postal service: 0.000566067 USD
- Electronic capacitors, resistors, coils, transformers, connectors and other components (except semiconductors and printed circuit assemblies); at manufacturer: 0.00026738 USD
- Other concrete products; at manufacturer: 1.24583e-8 USD
- Unrefined oil and gas; at extraction site: 7.54644e-5 USD
- Truck transport: 0.00188636 USD
- Marketing research and all other miscellaneous professional, scientific, and technical services: 0.000622536 USD
- Industrial process variable instruments; at manufacturer: 2.49165e-8 USD
- Coal; at mine: 1.88645e-5 USD
- Ophthalmic goods; at manufacturer: 1.88583e-5 USD
- Scenic and sightseeing transportation and support activities for transportation: 0.000415138 USD
- Vehicle engines and engine parts; at manufacturer: 6.85204e-8 USD
- Material handling equipment; at manufacturer: 1.88583e-5 USD
- Valve and fittings (except for plumbing); at manufacturer: 0.00311163 USD
- Rubber and plastic belts and hoses; at manufacturer: 0.000490316 USD
- News syndicates, libraries, archives, Internet publishing and all other information services: 0.00015096 USD
- Pumps and pumping equipment; at manufacturer: 0.000867483 USD
- Household goods repair: 0.000339668 USD
- Veneer, plywood, and engineered wood; at manufacturer: 7.5452e-5 USD
- Facilities support: 0.000226412 USD
- Environmental and other technical consulting services: 0.000113281 USD
- Hydraulic pumps, motors, cylinders and actuators; at manufacturer: 0.000377166 USD
- Securities and commodities brokerage and exchanges: 0.000886478 USD
- Copper, nickel, lead, and zinc; at mine: 0.000245295 USD
- Satellite, telecommunications resellers, and all other telecommunications: 0.000471695 USD
- Paper bags and coated paper; at manufacturer: 0.00016975 USD
- Natural gas; at consumer: 0.000490528 USD
- Paints and coatings; at manufacturer: 0.00439403 USD
- Rail transport: 0.000169737 USD
- Computer systems design: 0.000735923 USD
- Photography and photocopying equipment; at manufacturer: 1.86874e-8 USD
- Investigation and security: 0.00020751 USD
- Other basic inorganic chemicals; at manufacturer: 0.000188583 USD
- Telecommunications: 0.0041322 USD
- Legal services: 0.00107623 USD
- Audio and video equipment; at manufacturer: 4.36039e-8 USD
- Vehicle repair: 0.000622742 USD
- Software: 0.000226343 USD
- Warehousing: 0.000377353 USD
- Secondary copper products; at manufacturer: 6.22913e-9 USD
- Wireless communications; at manufacturer: 2.70967e-6 USD
- Welding and Soldering Equipment, Scales and Balances, and other general purpose machinery; at manufacturer: 0.00411111 USD
- Chemicals (except basic chemicals, agrichemicals, polymers, paints, pharmaceuticals,soaps, cleaning compounds); at manufacturer: 0.00035832 USD
- Other petroleum and coal products; at manufacturer: 0.000150891 USD
- Speed changers, industrial high-speed drives, and gears; at manufacturer: 0.0142193 USD
- Directory, mailing list, and other publishers; at publisher: 6.22913e-9 USD
- Data processing and hosting: 9.46466e-5 USD
- Paper; at manufacturer: 0.000150891 USD
- Air transport: 0.000962055 USD
- Drinking water and wastewater treatment; at consumer: 0.000132027 USD
- Noncomparable imports: 0.000377235 USD
- Clothing; at manufacturer: 0.000886341 USD
- Other secondary nonferrous metal products; at manufacturer: 0.000528039 USD
- Commercial equipment rental: 0.000792261 USD
- Cutlery and handtools; at manufacturer: 0.00107498 USD
- Full-service restaurants: 0.00103737 USD
- Food and beverage stores: 7.54457e-5 USD
- Primary iron, steel, and ferroalloy products; at manufacturer: 0.00101843 USD
- Cutting and machine tool accessory, rolling mill, and other metalworking machines; at manufacturer: 0.000433741 USD
- Primary batteries; at manufacturer: 1.88583e-5 USD
- Other basic organic chemicals; at manufacturer: 0.001867 USD
- Investment advice, portfolio management, and other financial advising services: 0.000188645 USD
- Metal hinges, keys, lock, and other hardware; at manufacturer: 0.000132021 USD
- Motor vehicle steering, suspension components (except spring), and brake systems; at manufacturer: 1.37041e-7 USD
- Other real estate: 0.0159444 USD
- Screws, nuts, and bolts; at manufacturer: 0.00192361 USD
- Compressed Gases; at manufacturer: 0.000754333 USD
- Vehicles and parts sales: 3.11456e-8 USD
- Finished and coated fabric; at manufacturer: 1.88583e-5 USD
- Performances: 1.88583e-5 USD
- Printed circuit and electronic assembly; at manufacturer: 5.84292e-6 USD
- Storage batteries; at manufacturer: 2.49165e-8 USD

## Inputs from nature
- Water, fresh: 0.000143572, 8.29611e-5 m3 (2 entries, compartments not in this file); data quality (1,2,1,4,2)
- Occupation, urban, discontinuously built: 0.00100067 m2*a; data quality (4,2,1,1,1)

## Emissions to nature
- benz[a]anthracene: 2.11798e-12 kg; data quality (3,2,1,4,1)
- methane, dichloro-, hcc-30: 2.28493e-8 kg; data quality (3,2,1,1,5)
- benzo(a)pyrene: 1.98433e-12 kg; data quality (3,2,1,4,1)
- lead: 5.33787e-10 kg; data quality (3,2,1,1,5)
- Propane, 1,1,1,3,3,3-hexafluoro-, HCFC-236fa: 1.37041e-8 kg; data quality (4,2,1,4,1)
- trichloroethylene: 1.56045e-8 kg; data quality (4,2,1,1,5)
- ethene, tetrachloro-: 6.39735e-9 kg; data quality (3,2,1,1,5)
- phthalate, dioctyl-: 1.67371e-11 kg; data quality (3,2,1,1,5)
- Hydrocarbons, aromatic: 5.24767e-10 kg; data quality (3,2,1,4,1)
- phenol: 6.00042e-11 kg; data quality (4,2,1,1,5)
- methyl isobutyl ketone: 1.45643e-5 kg; data quality (3,2,1,1,5)
- Indeno(1,2,3-cd)pyrene: 1.73115e-12 kg; data quality (3,2,1,4,1)
- Chromium, ion: 4.92684e-12 kg; data quality (3,2,1,3,3)
- 3-methylcholanthrene: 7.47268e-16 kg; data quality (2,2,1,1,5)
- naphthalene: 1.7883e-8 kg; data quality (3,2,1,1,5)
- methylene diphenyl diisocyanate: 9.62462e-11 kg; data quality (4,2,1,1,5)
- beryllium: 7.48364e-14 kg; data quality (2,2,1,1,5)
- Dinitrogen monoxide: 1.08552e-8 kg; data quality (4,2,1,4,1)
- cumene: 4.00382e-9 kg; data quality (3,2,1,1,5)
- mercury: 3.26471e-13 kg; data quality (2,2,1,2,4)
- ethane, 1,2-dichloro-: 1.14036e-12 kg; data quality (3,2,1,1,5)
- selenium: 3.58e-13 kg; data quality (2,2,1,1,5)
- Ethylene glycol monoethyl ether: 1.00032e-9 kg; data quality (3,2,1,1,5)
- formaldehyde: 3.56929e-8 kg; data quality (3,2,1,3,2)
- isophorone: 1.74253e-8 kg; data quality (3,2,1,1,5)
- copper: 2.55372e-11, 7.66115e-11, 7.66115e-11 kg (3 entries, compartments not in this file); data quality (4,1,1,1,5)
- acetophenone: 1.97387e-9 kg; data quality (3,2,1,1,5)
- Triethyl amine: 1.72015e-7 kg; data quality (3,2,1,1,5)
- Cobalt: 1.07536e-13 kg; data quality (3,2,1,1,5)
- propanal: 4.18508e-9 kg; data quality (3,2,1,3,2)
- Diethylene glycol butyl ether: 1.07879e-9 kg; data quality (3,2,1,1,5)
- Ethene, chloro-: 7.25896e-13 kg; data quality (3,2,1,1,5)
- styrene: 9.78194e-10 kg; data quality (3,2,1,3,2)
- Nitrogen: 6.94554e-9 kg; data quality (3,2,1,1,5)
- benzene: 4.79756e-8 kg; data quality (3,2,1,4,1)
- nickel: 1.27686e-11, 7.66115e-11 kg (2 entries, compartments not in this file); data quality (4,1,1,1,5)
- m-xylene: 4.704e-6 kg; data quality (3,2,1,1,5)
- Chrysene: 2.08784e-12 kg; data quality (3,2,1,4,1)
- toluene: 4.42515e-5 kg; data quality (3,2,1,1,5)
- hydrogen chloride: 1.43915e-11 kg; data quality (2,2,1,1,5)
- Benzo(k)fluoranthene: 2.0981e-12 kg; data quality (3,2,1,4,1)
- pyrene: 2.42067e-11 kg; data quality (3,2,1,4,1)
- acetaldehyde: 1.22355e-8 kg; data quality (3,2,1,4,1)
- phenanthrene: 6.35423e-11 kg; data quality (3,2,1,4,1)
- manganese: 7.6943e-9 kg; data quality (3,2,1,1,5)
- 1,1,1-trichloroethane: 2.25407e-7 kg; data quality (3,2,1,1,5)
- lead: 1.91529e-11 kg; data quality (3,1,1,1,5)
- para-xylene: 2.09776e-6 kg; data quality (3,2,1,1,5)
- anthracene: 1.43679e-11 kg; data quality (3,2,1,4,1)
- nitrogen oxides: 2.33231e-6 kg; data quality (3,2,1,1,3)
- Carbon dioxide: 0.00415482 kg; data quality (4,2,1,4,1)
- ethane, 1,2-dibromo-: 2.1518e-12 kg; data quality (2,2,1,1,5)
- particulates, < 2.5 um: 9.45021e-7 kg; data quality (3,2,1,1,5)
- Benzo(a)anthracene: 6.64238e-15 kg; data quality (2,2,1,1,5)
- acenaphthylene: 7.22021e-11 kg; data quality (3,2,1,4,1)
- 2-methylnaphthalene: 9.19639e-14 kg; data quality (2,2,1,1,5)
- benzene, ethyl-: 2.32152e-6 kg; data quality (3,2,1,1,5)
- 2,2,4-trimethylpentane: 2.68923e-8 kg; data quality (3,2,1,4,1)
- butadiene: 7.7838e-9 kg; data quality (3,2,1,4,1)
- Ethane, pentafluoro-, HFC-125: 1.18561e-6 kg; data quality (4,2,1,4,1)
- Xylene: 4.75618e-7 kg; data quality (3,2,1,1,4)
- nitric acid: 7.04514e-13 kg; data quality (3,1,1,1,5)
- Benzo(b)fluoranthene: 2.20911e-12 kg; data quality (3,2,1,4,1)
- Phthalate, dibutyl-: 1.29803e-8 kg; data quality (3,2,1,1,5)
- Methane, difluoro-, HFC-32: 6.90444e-7 kg; data quality (4,2,1,4,1)
- BUTYL ISOCYANATE: 3.23021e-11 kg; data quality (4,2,1,1,5)
- arsenic: 4.78643e-12 kg; data quality (3,2,1,4,2)
- Benzo(g,h,i)perylene: 5.64957e-12 kg; data quality (3,2,1,4,1)
- chromium: 7.66115e-11, 8.52941e-11 kg (2 entries, compartments not in this file); data quality (4,1,1,1,5)
- hexane: 8.65027e-5 kg; data quality (3,2,1,1,5)
- Water, fresh: 0.000191809 m3; data quality (1,2,1,4,2)
- carbon tetrachloride: 1.79483e-12 kg; data quality (4,2,1,1,5)
- o-Xylene: 2.07013e-6 kg; data quality (3,2,1,1,5)
- 1,1,2,2-tetrachloroethane: 3.22495e-12 kg; data quality (3,2,1,1,5)
- ethylene glycol: 6.4216e-7 kg; data quality (3,2,1,1,5)
- particulates, < 10 um: 6.16973e-7 kg; data quality (3,2,1,1,5)
- Ethane, 1,1,1,2-tetrafluoro-, HFC-134a: 4.46872e-6 kg; data quality (4,2,1,4,1)
- sulfur dioxide: 8.17378e-8 kg; data quality (2,2,1,1,5)
- Ethane, 1,1,1-trifluoro-, HFC-143a: 5.07273e-7 kg; data quality (4,2,1,4,1)
- acenaphthene: 1.87513e-11 kg; data quality (3,2,1,4,1)
- Methane: 3.76495e-7 kg; data quality (4,2,1,4,1)
- acrolein: 9.77493e-10 kg; data quality (3,2,1,4,1)
- ammonia: 8.83865e-9 kg; data quality (3,2,1,2,3)
- VOC, volatile organic compounds: 0.000371477 kg; data quality (3,2,1,1,5)
- fluoranthene: 1.93314e-11 kg; data quality (3,2,1,4,1)
- cadmium: 1.47095e-12 kg; data quality (3,2,1,1,5)
- fluorene: 3.47342e-11 kg; data quality (3,2,1,4,1)
- Chromium VI: 9.68837e-13 kg; data quality (3,2,1,5,1)
- tertiary-Butyl Acetate: 9.14104e-6 kg; data quality (3,2,1,1,5)
- nickel: 2.0561e-11 kg; data quality (3,2,1,3,3)
- Dibenz(a,h)anthracene: 1.40984e-14 kg; data quality (3,2,1,4,1)
- methanol: 2.55604e-7 kg; data quality (3,2,1,1,5)
- Phosphorus: 1.47961e-10 kg; data quality (2,1,1,1,5)
- carbon monoxide: 2.88622e-5 kg; data quality (3,2,1,1,1)

## Inventory method
Input-output

## Modelling constants
The reference unit of all processes is 1 USD2013 of the good or service. The technosphere inputs are based on the US BEA detailed input-output tables for 2007. The IO tables are combined to develop a commodity-by-commodity model based on the the industry-technology assumption (see Suh et al., 2010), which assumes all commodities produced by a given industry have the same input structure, but that multiple industries can produce the same commodity. Thus, model technosphere flows represent commodity outputs (and not industry outputs) from other processes in the model. There are no by-products included in these processes. All commodity production is based on US-conditions, despite in reality that some goods and services are produced overseas, as USEEIO v1.1 is a single-region IO model.

## Completeness
The input-output approach assures that all purchased inputs associated with the sectors making these commodities as reported in the US census for 2007 are included. The direct resources extracted including minerals, energy sources, water and land occupied are included. Emissions to air include all critieria air pollutants, greenhouse gases, and hazardous and toxic air pollutants as defined by US EPA. Releases to water include toxics, total nitrogen and total phosphorus, and water discharges. Releases to soil or groundwater include toxics and agriculutural pesticides. Some metal releases to air, water and soil are not included because they could not be speciated. Solid hazardous and non-hazardous wastes generated are not included as an elementary flows although purchases of waste services are included.

## Data treatment
Greenhouse gases are primarily from the US Greenhouse Gas Emission Inventory (USEPA 2016a). Biogenic C uptake is not included (change from version 1.0), as biogenic C emission are not included. Toxic releases to air, water and soil (except pesticides) are from the 2013 Toxic Release Inventory (USEPA 2015a). Criteria air pollutants and hazardous air pollutants are from the 2011 National Emissions Inventory (USEPA 2015b). All estimates are normalized by industry based on sector output in the data year, then converted to 2013 USD using relative sector-specific CPIs (if data year is not 2013). Energy use represent raw renewables or fossil fuel energies and is based on EIA data for 2014. See Table 1 in Yang, Ingwersen et al. 2017 and Supporting Information 1, and the v1.1 data update notes (Ingwersen et al. 2017) for all details on environmental data sources used.Land occupation for commercial buildings was estimated based on the building floorspace data provided by the U.S. Energy Information Administration 2012 Commercial Building Energy Consumption Survey (CBECS) (EIA 2015). Total commercial public supply water use is reported by USGS (Maupin et al. 2014). Water use is allocated across commercial sectors based on their use of water, sewage, and other services in USD based on the 2007 Benchmark Use Table before redefinitions (BEA 2015).

## Data collection
2015-2016

## Sampling procedure
US federal government sources, including surveys and US EPA emissions databases are used as the primary sources. From these sources, data for US reporting establishments/facilities are aggregated by the NAICS sector as defined in the BEA detailed 2007 input-output tables. When level of sector aggregation differs, or when direct emissions are not reported but modeled, additional sources are used to make allocations and estimates.

## Review details
In regard to quality assurance and peer-review, each dataset created went through Quality Assurance as defined in a quality assurance project plans at US EPA, CSRA or ERG. The model was assembled with the IO model builder model (USEPA 2016c). Validation functions were used to check that all the model components were properly assembled and harmonized. Bayou Demeke and Santosh Ghimire provided internal peer review of the model methodology and the manuscript underwent standard EPA management review. An editor and two anonymous reviewers at the Journal of Cleaner Production reviewed the model. In regard to data quality evaluation, data quality assessment was performed at the flow and process levels according to the updated US EPA data quality assessment guidelines as defined in US EPA (2016b).

## Intended application
The primary application is for use in the US Environmentally-Extended Input-Ouput model, USEEIO, version 1.1. This model is being used by the US EPA for supporting tools that prioritize goods and services based on potential environmental impacts, resource use or emissions for large regions, including the US and US states, and as a strealined tool for organizations as a starting point to consider sustainable materials management. Model results are designed to provide meso/macro-level decision support.

## Project
USEEIO v1.1 was developed by the US EPA with CSRA and ERG with Wesley W. Ingwersen and David E. Meyer as research leads. Yi Yang was the technical lead on the work for CSRA (contract EP-C-15-012); Troy Hawkins was lead for ERG (contract EP-C-12-021).

## Sources
- Ingwersen et al. DRAFT
- USDA 2014
- USEPA 2015b
- USEPA 2016a
- USGS 2015
- Lovelace 2009
- USGS 2016
- Maupin et al. 2014
- Yienger et al. 1995
- USDA 2006
- BLM 2008
- Edelen and Ingwersen 2017
- USDA 2009a
- USEPA 2015a
- EIA 2013
- Torcellini et al. 2003
- Kim et el. 2013
- BEA 2015
- Blackhurst et al. 2010
- USDA 2016
- USDA 2009b
- Ingwersen et al. 2017
- USEPA 2016c
- EIA 2016
- Goebes et al. 2003
- USEPA 2016b
- Macknick et al. 2011
- EIA 2017
- Statistics Canada 2010
- EIA 2015
- Nickerson et al. 2011
