# Couriers and messengers

Dataset: openLCA process, unit process
Category: 48-49: Transportation and Warehousing
Geography: United States
Time period: 2017-01-01 to 2017-12-31
Data quality: US EPA - Process Pedigree Matrix (1;1)
Exchange data quality scheme: US EPA - Flow Pedigree Matrix
Generated by: US EPA with CSRA and ERG
Owner: US EPA
Published in: Yang, Ingwersen et al. 2017
restrictionsDescription: This model shold be appropriately cited (see Yang, Ingwersen et al. 2017 source or Publication field) when used. Any changes or derivations of this model by the user should be documented. The model itself and any results from use of this model shall not be construed to consitute US EPA opinion or policy.
copyright: false

## General comment
BEA Code & Name is '492000:Couriers and messengers'. Description of the primary industry producing this good or service, adapted from the Census Bureau NAICS 2007 descriptions: Industries in the Couriers and Messengers subsector provide intercity and/or local delivery of parcels and documents (including express delivery services) without operating under a universal service obligation. These articles can be described as those that may be handled by one person without using special equipment. This allows the collection, pick-up, and delivery operations to be done with limited labor costs and minimal equipment. Sorting and transportation activities, where necessary, are generally mechanized. The restriction to small parcels partly distinguishes these establishments from those in the transportation industries. The complete network of courier services establishments also distinguishes these transportation services from local messenger and delivery establishments in this subsector. This includes the establishments that perform intercity transportation as well as establishments that, under contract to them, perform local pick-up and delivery. Messengers, which usually deliver within a metropolitan or single urban area, may use bicycle, foot, small truck, or van.

## Technology
The process describes the average US production of this good or service within this NAICS-based grouping defined in the BEA 2007 detailed input-output tables (BEA 2015). Distribution, wholesale and retailing of this good or service, use, and final disposal are not included. Creation of a product system with this process will enable modeling of all upstream (supply-chain) activities.

## Geography
Data represent the 50 US states

## Time period
2017 was the year in which this version of USEEIO was released and is the target date for the model

## Reference product
- Couriers and messengers: 1 USD

## Inputs from technosphere
All rows: data quality (1,3,1,1,1)
- All other food and drinking places: 0.00130425 USD
- Motors and generators; at manufacturer: 0.000433538 USD
- Machine shops; at manufacturer: 0.000382155 USD
- Noncomparable imports: 0.00162293 USD
- Accounting, tax preparation, bookkeeping, and payroll: 0.00171243 USD
- Movies and film: 3.94948e-8 USD
- Paper bags and coated paper; at manufacturer: 0.00158617 USD
- Natural gas; at consumer: 1.4845e-5 USD
- Cutlery and handtools; at manufacturer: 2.95063e-5 USD
- Books; at publisher: 1.19602e-5 USD
- Waste management and remediation: 0.000147632 USD
- Drinking water and wastewater treatment; at consumer: 2.53818e-5 USD
- Magazines and journals; at publisher: 0.000239717 USD
- Chemicals (except basic chemicals, agrichemicals, polymers, paints, pharmaceuticals,soaps, cleaning compounds); at manufacturer: 4.02277e-5 USD
- Other vehicle parts; at manufacturer: 0.000469459 USD
- Pet care, photofinishing, parking and other sundry services: 1.18484e-7 USD
- Company and enterprise management: 0.0087915 USD
- Metal coatings, engravings, and heat treatments; at manufacturer: 2.39851e-5 USD
- Satellite, telecommunications resellers, and all other telecommunications: 0.000290457 USD
- Unrefined oil and gas; at extraction site: 8.03563e-9 USD
- Investigation and security: 0.00136873 USD
- Screws, nuts, and bolts; at manufacturer: 0.00243593 USD
- Scenic and sightseeing transportation and support activities for transportation: 0.0676047 USD
- Pipeline transport: 0.000582789 USD
- Legal services: 0.00319908 USD
- Environmental and other technical consulting services: 0.000622704 USD
- Wireless communications; at manufacturer: 2.37022e-6 USD
- Dry-cleaning and laundry: 0.000205839 USD
- Glass and glass products; at manufacturer: 0.000405542 USD
- Warehousing: 0.0105662 USD
- Other plastic products; at manufacturer: 0.0199795 USD
- Other nonmetallic mineral products; at manufacturer: 1.22434e-6 USD
- Springs and wires; at manufacturer: 0.000502496 USD
- Food and beverage stores: 2.25174e-6 USD
- Carbon and graphite products; at manufacturer: 1.92855e-8 USD
- Vehicles and parts sales: 0.00138271 USD
- Paper; at manufacturer: 0.000143168 USD
- Limited-service restaurants: 0.000257372 USD
- Paints and coatings; at manufacturer: 0.000252783 USD
- Relay and industrial controls; at manufacturer: 0.000143486 USD
- Commercial equipment rental: 0.00350811 USD
- Lessors of nonfinancial intangible assets: 6.02295e-5 USD
- Rubber and plastic belts and hoses; at manufacturer: 1.49998e-8 USD
- Directory, mailing list, and other publishers; at publisher: 1.21577e-5 USD
- Other transportation equipment; at manufacturer: 2.41388e-5 USD
- Plastic bags, films, and sheets; at manufacturer: 0.00237281 USD
- Light bulbs; at manufacturer: 1.19207e-5 USD
- Truck transport: 0.00668362 USD
- Wireless telecommunications: 0.00141129 USD
- Rail transport: 0.000412985 USD
- Other real estate: 0.0178529 USD
- Management consulting: 0.00269421 USD
- Computer systems design: 0.000586891 USD
- State and local government enterprises: 2.55002e-5 USD
- Material handling equipment; at manufacturer: 0.000370213 USD
- Urethane and other foam products; at manufacturer: 0.00017885 USD
- Light gauge metal cans, boxes, and containers; at manufacturer: 0.000166929 USD
- Communication and energy wire and cable; at manufacturer: 3.6236e-5 USD
- Computer terminals and other computer peripheral equipment; at manufacturer: 4.97795e-6 USD
- Storage batteries; at manufacturer: 0.000108155 USD
- Employment services: 0.0159771 USD
- Nonresidential building repair and maintanence: 0.000759777 USD
- Fluid meters and counting devices; at manufacturer: 1.21182e-5 USD
- Other basic organic chemicals; at manufacturer: 0.000193062 USD
- Cutting and machine tool accessory, rolling mill, and other metalworking machines; at manufacturer: 1.57979e-7 USD
- Electricity; at consumer: 0.00251585 USD
- Other computer related services, including facilities management: 0.000741621 USD
- Water transport (boats, ships, ferries): 0.000146527 USD
- Aircraft; at manufacturer: 0.00147817 USD
- Wholesale trade: 0.0386996 USD
- Household goods repair: 0.000827347 USD
- Advertising and public relations: 0.00399058 USD
- Gasoline, fuels, and by-products of petroleum refining; at manufacturer: 0.0942838 USD
- Transmission and power train parts; at manufacturer: 0.00119529 USD
- Electronic equipment repair and maintenance: 0.00134199 USD
- Software: 5.96841e-5 USD
- Welding and Soldering Equipment, Scales and Balances, and other general purpose machinery; at manufacturer: 1.57979e-7 USD
- Rubber tires; at manufacturer: 0.00518715 USD
- Insurance agencies and brokerages: 0.000143626 USD
- Civic, social, professional, and similar organizations: 0.00052243 USD
- Other retail: 0.00432152 USD
- Electronic capacitors, resistors, coils, transformers, connectors and other components (except semiconductors and printed circuit assemblies); at manufacturer: 1.18484e-7 USD
- Postal service: 0.0263503 USD
- Vehicle rental and leasing: 0.00190793 USD
- Passenger ground transport: 3.94948e-8 USD
- Communications equipment; at manufacturer: 3.55453e-7 USD
- Compressed Gases; at manufacturer: 1.57979e-7 USD
- Couriers and messengers: 0.0378946 USD
- Securities and commodities brokerage and exchanges: 0.00107601 USD
- Full-service restaurants: 0.000244936 USD
- Used and secondhand goods: 0.00733442 USD
- Other petroleum and coal products; at manufacturer: 1.95894e-5 USD
- Ball and roller bearings; at manufacturer: 3.80353e-8 USD
- Buildings and dwellings services: 0.00124001 USD
- Cardboard containers; at manufacturer: 0.00805094 USD
- Other textiles; at manufacturer: 0.000429659 USD
- Vehicle repair: 2.10902e-5 USD
- Other aircraft parts; at manufacturer: 0.00175234 USD
- Veneer, plywood, and engineered wood; at manufacturer: 0.000815387 USD
- Other basic inorganic chemicals; at manufacturer: 5.92421e-7 USD
- Books, newspapers, magazines, and other print media; at manufacturer: 0.000990436 USD
- General merchandise stores: 6.71876e-5 USD
- Hotels and campgrounds: 0.000572338 USD
- Architectural, engineering, and related services: 0.000175264 USD
- Insurance carriers: 0.0198104 USD
- Telecommunications: 0.00251165 USD
- Motor vehicle steering, suspension components (except spring), and brake systems; at manufacturer: 0.00453463 USD
- Cardboard; at manufacturer: 0.00164909 USD
- Specialized design: 0.00021734 USD
- Nondepository credit intermediation and related activities: 0.000882869 USD
- Vending, commercial laundry, and other commercial and service industry machinery; at manufacturer: 1.20392e-5 USD
- Consumer goods and general rental centers: 0.0105346 USD
- Soap and cleaning compounds; at manufacturer: 1.19997e-5 USD
- Investment advice, portfolio management, and other financial advising services: 0.000220825 USD
- Other engine equipment; at manufacturer: 6.77625e-6 USD
- Valve and fittings (except for plumbing); at manufacturer: 0.000759465 USD
- Travel arrangement and reservation: 2.53871e-7 USD
- Marketing research and all other miscellaneous professional, scientific, and technical services: 0.000677506 USD
- Metal pipe fittings, ball and roller bearings, industrial patterns, metal bath fixtures, other misc. fabricated metals; at manufacturer: 0.000227902 USD
- Commercial machinery repair: 0.000465263 USD
- Independent artists, writers, and performers: 7.35401e-5 USD
- Golf courses, marinas, ski resorts, fitness and other rec centers and industries: 3.94948e-8 USD
- Metal hinges, keys, lock, and other hardware; at manufacturer: 0.000228034 USD
- Air conditioning, refrigeration, and warm air heating equipment; at manufacturer: 6.71411e-7 USD
- Polystyrene foam products; at manufacturer: 0.000131167 USD
- Audio and video equipment; at manufacturer: 3.94948e-8 USD
- Business support: 0.00138552 USD
- Other support services: 0.000659476 USD
- Newspapers; at publisher: 3.94948e-8 USD
- Semiconductors; at manufacturer: 1.07142e-9 USD
- Promoters and agents: 2.44338e-5 USD
- Vehicle seating and interior trim (upholstery); at manufacturer: 2.01759e-7 USD
- Office administration: 0.000378018 USD
- Monetary authorities and depository credit intermediation: 0.00599516 USD
- Aircraft engines and parts; at manufacturer: 1.19207e-5 USD
- News syndicates, libraries, archives, Internet publishing and all other information services: 2.76463e-7 USD
- Facilities support: 0.00186837 USD
- Vehicle electrical and electronic equipment; at manufacturer: 0.000409877 USD
- Data processing and hosting: 0.000143853 USD
- Gaskets, seals, musical instruments, fasteners, brooms, brushes, mop and other misc. goods; at manufacturer: 0.00113275 USD
- Air transport: 0.00403169 USD
- Vehicle engines and engine parts; at manufacturer: 0.00111414 USD

## Inputs from nature
- Water, fresh: 8.11876e-6, 1.40503e-5 m3 (2 entries, compartments not in this file); data quality (1,2,1,4,2)
- Occupation, traffic area, road network: 0.00153183 m2*a; data quality (2,3,1,1,1)
- Occupation, urban, discontinuously built: 0.000717778 m2*a; data quality (4,2,1,1,1)
- Energy, solar: 1.49628e-6 MJ; data quality (3,1,1,1,1)

## Emissions to nature
- BUTYL ISOCYANATE: 1.11806e-11 kg; data quality (4,2,1,1,5)
- Water, fresh: 1.87709e-5 m3; data quality (1,2,1,4,2)
- fluorene: 5.27597e-9 kg; data quality (3,2,1,4,1)
- Benzo(k)fluoranthene: 1.51882e-10 kg; data quality (3,2,1,4,1)
- nitrogen oxides: 0.000104897 kg; data quality (3,2,1,1,1)
- methanol: 7.11159e-9 kg; data quality (3,2,1,1,5)
- ethane, 1,2-dichloro-: 5.822e-13 kg; data quality (3,2,1,1,5)
- acenaphthylene: 5.89018e-9 kg; data quality (3,2,1,4,1)
- methyl isobutyl ketone: 7.45492e-10 kg; data quality (4,2,1,1,5)
- N,N-DIMETHYLANILINE: 2.91367e-11 kg; data quality (5,2,1,1,5)
- 4-aminobiphenyl: 5.29556e-12 kg; data quality (5,2,1,1,5)
- phenol: 3.43429e-11 kg; data quality (4,2,1,1,5)
- Methane: 1.42387e-7 kg; data quality (4,2,1,4,1)
- methyl methacrylate: 4.00169e-11 kg; data quality (4,2,1,1,5)
- para-xylene: 4.68947e-13 kg; data quality (3,2,1,1,5)
- fluoranthene: 4.95943e-9 kg; data quality (3,2,1,4,1)
- 3-methylcholanthrene: 3.8383e-16 kg; data quality (2,2,1,1,5)
- Benzo(b)fluoranthene: 2.38717e-10 kg; data quality (3,2,1,4,1)
- hydrogen fluoride: 2.85734e-12 kg; data quality (2,2,1,1,5)
- Ethylene glycol monoethyl ether: 8.03299e-10 kg; data quality (3,2,1,1,5)
- cadmium: 2.15316e-11 kg; data quality (3,2,1,1,5)
- particulates, < 2.5 um: 4.44435e-6 kg; data quality (3,2,1,1,1)
- QUINOLINE: 1.43903e-15 kg; data quality (3,2,1,1,5)
- o-Xylene: 5.63221e-13 kg; data quality (3,2,1,1,5)
- methane, dichloro-, hcc-30: 1.55573e-8 kg; data quality (3,2,1,1,5)
- selenium: 1.21015e-13 kg; data quality (2,2,1,1,5)
- manganese: 5.97762e-11 kg; data quality (3,2,1,4,1)
- Hydrocarbons, aromatic: 4.51088e-12 kg; data quality (4,2,1,1,5)
- Carbon dioxide: 0.0220026 kg; data quality (4,2,1,4,1)
- Nitrogen: 1.49893e-7 kg; data quality (2,2,1,1,5)
- benz[a]anthracene: 1.33574e-9 kg; data quality (3,2,1,4,1)
- acrylic acid: 2.48304e-11 kg; data quality (4,2,1,1,5)
- benzene: 4.34732e-7 kg; data quality (3,2,1,1,1)
- ethylene glycol: 4.75918e-13 kg; data quality (5,2,1,1,5)
- acrolein: 5.84051e-8 kg; data quality (3,2,1,4,1)
- hydroquinone: 1.46781e-13 kg; data quality (3,2,1,1,5)
- ethene, tetrachloro-: 4.52599e-9 kg; data quality (3,2,1,1,5)
- Benzo(a)anthracene: 3.35853e-15 kg; data quality (2,2,1,1,5)
- styrene: 1.83804e-8 kg; data quality (3,2,1,4,1)
- methylene diphenyl diisocyanate: 4.21888e-16 kg; data quality (4,2,1,1,5)
- hydrogen chloride: 9.26304e-12 kg; data quality (2,2,1,1,5)
- nickel: 9.91611e-11 kg; data quality (3,2,1,4,2)
- Dinitrogen monoxide: 1.31397e-7 kg; data quality (4,2,1,4,1)
- 1,2-BUTYLENE OXIDE: 3.49418e-13 kg; data quality (4,2,1,1,5)
- anthracene: 2.52701e-9 kg; data quality (3,2,1,4,1)
- Phthalate, dibutyl-: 9.08968e-11 kg; data quality (4,2,1,1,5)
- t-butyl methyl ether: 2.59744e-11 kg; data quality (3,2,1,1,5)
- acetaldehyde: 4.08068e-7 kg; data quality (3,2,1,1,1)
- 1,1,1-trichloroethane: 4.66759e-8 kg; data quality (3,2,1,1,5)
- Chrysene: 8.22489e-10 kg; data quality (3,2,1,4,1)
- Methane, difluoro-, HFC-32: 2.91651e-8 kg; data quality (4,2,1,4,1)
- ammonia: 6.87836e-7 kg; data quality (3,2,1,4,1)
- 2-methylnaphthalene: 1.7967e-13 kg; data quality (2,2,1,1,5)
- Cresol: 4.8411e-11 kg; data quality (4,2,1,1,5)
- propylene oxide: 2.25595e-12 kg; data quality (3,2,1,1,5)
- Propane, 1,1,1,3,3,3-hexafluoro-, HCFC-236fa: 5.78877e-10 kg; data quality (4,2,1,4,1)
- Phosphorus: 1.69504e-7 kg; data quality (2,1,1,1,5)
- AZIRIDINE: 1.33084e-11 kg; data quality (5,2,1,1,5)
- Ethane, 1,1,1,2-tetrafluoro-, HFC-134a: 1.88763e-7 kg; data quality (4,2,1,4,1)
- 2-nitropropane: 4.0007e-12 kg; data quality (5,2,1,1,5)
- arsenic: 4.35645e-11 kg; data quality (3,2,1,4,1)
- Ethane, 1,1,1-trifluoro-, HFC-143a: 2.14278e-8 kg; data quality (4,2,1,4,1)
- Chromium VI: 2.05662e-11 kg; data quality (3,2,1,1,4)
- ethyl acrylate: 5.28199e-11 kg; data quality (4,2,1,1,5)
- benzo(a)pyrene: 5.14866e-10 kg; data quality (3,2,1,4,1)
- vinyl acetate: 5.98625e-11 kg; data quality (4,2,1,1,5)
- ethane, 1,1,2-trichloro-: 2.34562e-10 kg; data quality (4,2,1,1,5)
- mercury: 3.06676e-12 kg; data quality (3,2,1,4,1)
- 1,1-DICHLOROETHYLENE: 2.00152e-13 kg; data quality (3,2,1,1,5)
- Xylene: 8.80021e-7 kg; data quality (3,2,1,4,1)
- hexane: 2.68264e-7 kg; data quality (3,2,1,4,1)
- butadiene: 7.63143e-8 kg; data quality (3,2,1,1,1)
- 2,2,4-trimethylpentane: 2.65087e-7 kg; data quality (3,2,1,4,1)
- Triethyl amine: 2.9009e-12 kg; data quality (4,2,1,1,5)
- Benzo(g,h,i)perylene: 4.93194e-10 kg; data quality (3,2,1,4,1)
- carbon monoxide: 0.000183217 kg; data quality (3,2,1,1,1)
- ethane, 1,2-dibromo-: 1.33762e-14 kg; data quality (2,2,1,1,5)
- acenaphthene: 2.59313e-9 kg; data quality (3,2,1,4,1)
- particulates, < 10 um: 1.90758e-6 kg; data quality (3,2,1,4,1)
- pyrene: 6.32614e-9 kg; data quality (3,2,1,4,1)
- 1,1,2,2-tetrachloroethane: 2.24751e-17 kg; data quality (3,2,1,1,5)
- Cobalt: 6.77956e-13 kg; data quality (3,2,1,1,5)
- phenanthrene: 1.00139e-8 kg; data quality (3,2,1,4,1)
- VOC, volatile organic compounds: 1.72693e-5 kg; data quality (3,2,1,1,2)
- PHOSPHORUS: 1.39951e-12 kg; data quality (2,2,1,1,5)
- epichlorohydrin: 6.13987e-15 kg; data quality (3,2,1,1,5)
- Dibenz(a,h)anthracene: 1.77557e-11 kg; data quality (3,2,1,4,1)
- sulfur dioxide: 2.91218e-7 kg; data quality (3,2,1,3,2)
- Indeno(1,2,3-cd)pyrene: 2.01876e-10 kg; data quality (3,2,1,4,1)
- antimony: 1.77108e-12 kg; data quality (3,2,1,1,5)
- m-xylene: 7.01692e-9 kg; data quality (3,2,1,1,5)
- Chromium, ion: 1.27538e-11 kg; data quality (2,2,1,1,5)
- beryllium: 1.0492e-14 kg; data quality (2,2,1,1,5)
- lead: 3.73878e-12 kg; data quality (3,2,1,1,5)
- BIS (2-ETHOXY ETHYL) ETHER: 1.15464e-10 kg; data quality (5,2,1,1,5)
- 1,4-dichlorobenzene: 2.6128e-13 kg; data quality (2,2,1,1,5)
- benzene, ethyl-: 2.48445e-7 kg; data quality (3,2,1,4,1)
- cumene: 1.86461e-10 kg; data quality (4,2,1,1,5)
- biphenyl: 1.38445e-10 kg; data quality (4,2,1,1,5)
- toluene: 1.21307e-6 kg; data quality (3,2,1,4,1)
- formaldehyde: 7.89646e-7 kg; data quality (3,2,1,1,1)
- diethanolamine: 1.5436e-12 kg; data quality (3,2,1,1,5)
- Ethane, pentafluoro-, HFC-125: 5.00815e-8 kg; data quality (4,2,1,4,1)
- trichloroethylene: 3.15943e-8 kg; data quality (3,2,1,1,5)
- naphthalene: 9.22496e-8 kg; data quality (3,2,1,4,1)
- propanal: 4.20886e-8 kg; data quality (3,2,1,4,1)
- carbon tetrachloride: 9.54558e-15 kg; data quality (4,2,1,1,5)

## Inventory method
Input-output

## Modelling constants
The reference unit of all processes is 1 USD2013 of the good or service. The technosphere inputs are based on the US BEA detailed input-output tables for 2007. The IO tables are combined to develop a commodity-by-commodity model based on the the industry-technology assumption (see Suh et al., 2010), which assumes all commodities produced by a given industry have the same input structure, but that multiple industries can produce the same commodity. Thus, model technosphere flows represent commodity outputs (and not industry outputs) from other processes in the model. There are no by-products included in these processes. All commodity production is based on US-conditions, despite in reality that some goods and services are produced overseas, as USEEIO v1.1 is a single-region IO model.

## Completeness
The input-output approach assures that all purchased inputs associated with the sectors making these commodities as reported in the US census for 2007 are included. The direct resources extracted including minerals, energy sources, water and land occupied are included. Emissions to air include all critieria air pollutants, greenhouse gases, and hazardous and toxic air pollutants as defined by US EPA. Releases to water include toxics, total nitrogen and total phosphorus, and water discharges. Releases to soil or groundwater include toxics and agriculutural pesticides. Some metal releases to air, water and soil are not included because they could not be speciated. Solid hazardous and non-hazardous wastes generated are not included as an elementary flows although purchases of waste services are included.

## Data treatment
Greenhouse gases are primarily from the US Greenhouse Gas Emission Inventory (USEPA 2016a). Biogenic C uptake is not included (change from version 1.0), as biogenic C emission are not included. Toxic releases to air, water and soil (except pesticides) are from the 2013 Toxic Release Inventory (USEPA 2015a). Criteria air pollutants and hazardous air pollutants are from the 2011 National Emissions Inventory (USEPA 2015b). All estimates are normalized by industry based on sector output in the data year, then converted to 2013 USD using relative sector-specific CPIs (if data year is not 2013). Energy use represent raw renewables or fossil fuel energies and is based on EIA data for 2014. See Table 1 in Yang, Ingwersen et al. 2017 and Supporting Information 1, and the v1.1 data update notes (Ingwersen et al. 2017) for all details on environmental data sources used.Total transportation land use is reported in the USGA Major Uses of Land for 2007 (Nickerson et al. 2011). Land use for roads was allocated to relevant transportation sectors based on the shares of Federal Highway Administration fees. Transportation land use for airports and railroads were each assumed 5% of the total use of urban land.

## Data collection
2015-2016

## Sampling procedure
US federal government sources, including surveys and US EPA emissions databases are used as the primary sources. From these sources, data for US reporting establishments/facilities are aggregated by the NAICS sector as defined in the BEA detailed 2007 input-output tables. When level of sector aggregation differs, or when direct emissions are not reported but modeled, additional sources are used to make allocations and estimates.

## Review details
In regard to quality assurance and peer-review, each dataset created went through Quality Assurance as defined in a quality assurance project plans at US EPA, CSRA or ERG. The model was assembled with the IO model builder model (USEPA 2016c). Validation functions were used to check that all the model components were properly assembled and harmonized. Bayou Demeke and Santosh Ghimire provided internal peer review of the model methodology and the manuscript underwent standard EPA management review. An editor and two anonymous reviewers at the Journal of Cleaner Production reviewed the model. In regard to data quality evaluation, data quality assessment was performed at the flow and process levels according to the updated US EPA data quality assessment guidelines as defined in US EPA (2016b).

## Intended application
The primary application is for use in the US Environmentally-Extended Input-Ouput model, USEEIO, version 1.1. This model is being used by the US EPA for supporting tools that prioritize goods and services based on potential environmental impacts, resource use or emissions for large regions, including the US and US states, and as a strealined tool for organizations as a starting point to consider sustainable materials management. Model results are designed to provide meso/macro-level decision support.

## Project
USEEIO v1.1 was developed by the US EPA with CSRA and ERG with Wesley W. Ingwersen and David E. Meyer as research leads. Yi Yang was the technical lead on the work for CSRA (contract EP-C-15-012); Troy Hawkins was lead for ERG (contract EP-C-12-021).

## Sources
- Goebes et al. 2003
- Edelen and Ingwersen 2017
- Torcellini et al. 2003
- Maupin et al. 2014
- USDA 2014
- Macknick et al. 2011
- Blackhurst et al. 2010
- USDA 2009a
- Statistics Canada 2010
- USEPA 2015b
- Ingwersen et al. 2017
- USGS 2016
- Nickerson et al. 2011
- EIA 2013
- USEPA 2016c
- BLM 2008
- EIA 2015
- USDA 2006
- Ingwersen et al. DRAFT
- Yienger et al. 1995
- USDA 2016
- USEPA 2016a
- USDA 2009b
- USEPA 2016b
- EIA 2017
- EIA 2016
- Kim et el. 2013
- BEA 2015
- USEPA 2015a
- Lovelace 2009
- USGS 2015
