# Fabric; at manufacturer

Dataset: openLCA process, unit process
Category: 3132: Fabric Mills
Geography: United States
Time period: 2017-01-01 to 2017-12-31
Data quality: US EPA - Process Pedigree Matrix (1;1)
Exchange data quality scheme: US EPA - Flow Pedigree Matrix
Generated by: US EPA with CSRA and ERG
Owner: US EPA
Published in: Yang, Ingwersen et al. 2017
restrictionsDescription: This model shold be appropriately cited (see Yang, Ingwersen et al. 2017 source or Publication field) when used. Any changes or derivations of this model by the user should be documented. The model itself and any results from use of this model shall not be construed to consitute US EPA opinion or policy.
copyright: false

## General comment
BEA Code & Name is '313200:Fabric mills'. Description of the primary industry producing this good or service, adapted from the Census Bureau NAICS 2007 descriptions: This industry group comprises (1) Broadwoven Fabric Mills, (2) Narrow Fabric Mills and Schiffli Machine Embroidery, (3) Nonwoven Fabric Mills, and (4) Knit Fabric Mills.

## Technology
The process describes the average US production of this good or service within this NAICS-based grouping defined in the BEA 2007 detailed input-output tables (BEA 2015). Distribution, wholesale and retailing of this good or service, use, and final disposal are not included. Creation of a product system with this process will enable modeling of all upstream (supply-chain) activities.

## Geography
Data represent the 50 US states

## Time period
2017 was the year in which this version of USEEIO was released and is the target date for the model

## Reference product
- Fabric; at manufacturer: 1 USD

## Inputs from technosphere
All rows: data quality (1,3,1,1,1)
- Insurance agencies and brokerages: 0.00122539 USD
- Glass and glass products; at manufacturer: 0.0104551 USD
- Insurance carriers: 0.00360882 USD
- Fertilizers; at manufacturer: 5.74264e-5 USD
- Semiconductors; at manufacturer: 0.00294023 USD
- Civic, social, professional, and similar organizations: 0.000411496 USD
- Lumber and treated lumber; at manufacturer: 0.00014913 USD
- Commercial machinery repair: 0.00210354 USD
- Seafood; at manufacturer: 1.49211e-7 USD
- Magazines and journals; at publisher: 1.85332e-6 USD
- Full-service restaurants: 0.000829128 USD
- Audio and video equipment; at manufacturer: 1.50336e-7 USD
- Springs and wires; at manufacturer: 9.89303e-6 USD
- Promoters and agents: 5.94274e-5 USD
- Monetary authorities and depository credit intermediation: 0.004539 USD
- Hotels and campgrounds: 0.000597513 USD
- Other basic organic chemicals; at manufacturer: 0.00566359 USD
- Metal hinges, keys, lock, and other hardware; at manufacturer: 6.84345e-6 USD
- Clothing; at manufacturer: 0.0007833 USD
- Relay and industrial controls; at manufacturer: 0.000493295 USD
- Flours and malts; at manufacturer: 1.92781e-6 USD
- Wireless communications; at manufacturer: 2.47797e-8 USD
- Accounting, tax preparation, bookkeeping, and payroll: 0.00218697 USD
- Rubber and plastic belts and hoses; at manufacturer: 3.14433e-5 USD
- Timber and raw forest products; at forest: 0.000244765 USD
- Wood kitchen cabinets and countertops; at manufacturer: 2.23941e-6 USD
- Fruit and vegetable preservation; at manufacturer: 5.7894e-7 USD
- Data processing and hosting: 0.00207895 USD
- Other secondary nonferrous metal products; at manufacturer: 1.38622e-5 USD
- Sugar, candy, and chocolate; at manufacturer: 3.22297e-7 USD
- Laminated plastic plates and shapes; at manufacturer: 0.000759427 USD
- Air transport: 0.00194361 USD
- Unrefined oil and gas; at extraction site: 6.10334e-5 USD
- Nonferrous metal casts; at manufacturer: 5.85261e-6 USD
- General merchandise stores: 4.09406e-6 USD
- Investigation and security: 0.00135081 USD
- Scenic and sightseeing transportation and support activities for transportation: 6.30618e-6 USD
- Plastics and rubber industry machinery; at manufacturer: 1.45502e-6 USD
- Veneer, plywood, and engineered wood; at manufacturer: 4.87281e-5 USD
- Fresh vegetables, melons, and potatoes; at farm: 4.11823e-6 USD
- All other food and drinking places: 5.87095e-5 USD
- Scientific research and development: 5.99959e-5 USD
- Communications equipment; at manufacturer: 4.01634e-8 USD
- Rubber tires; at manufacturer: 2.65909e-7 USD
- Vehicle electrical and electronic equipment; at manufacturer: 9.41681e-7 USD
- Compressed Gases; at manufacturer: 7.87531e-6 USD
- Nonresidential building repair and maintanence: 0.00286493 USD
- Wireless telecommunications: 0.000649561 USD
- Other plastic products; at manufacturer: 0.000398722 USD
- Power boilers and heat exchangers; at manufacturer: 2.63996e-6 USD
- Fiber, yarn, and thread; at manufacturer: 0.0433672 USD
- Legal services: 0.00201817 USD
- Ground or treated minerals and earth; at manufacturer: 2.73751e-5 USD
- Synthetic rubber and artificial and synthetic fibers; at manufacturer: 0.141655 USD
- Wiring devices; at manufacturer: 2.55807e-6 USD
- Noncomparable imports: 0.00176685 USD
- Computer systems design: 0.000890172 USD
- Machine shops; at manufacturer: 0.00180723 USD
- Polystyrene foam products; at manufacturer: 6.15028e-7 USD
- Heating equipment other than warm air furnaces; at manufacturer: 5.98774e-9 USD
- Electricity; at consumer: 0.0164585 USD
- Secondary copper products; at manufacturer: 7.74107e-6 USD
- Fresh wheat, corn, rice, and other grains; at farm: 6.01919e-6 USD
- Colleges, universities, junior colleges, and professional schools: 4.22819e-7 USD
- Soap and cleaning compounds; at manufacturer: 0.0109095 USD
- Books; at publisher: 9.39598e-8 USD
- Specialty transformers; at manufacturer: 3.02714e-7 USD
- Curtains and linens; at manufacturer: 2.13244e-6 USD
- Greenhouse crops, mushrooms, nurseries, and flowers; at farm: 3.20994e-5 USD
- Facilities support: 0.000937444 USD
- Corn products; at manufacturer: 4.71512e-5 USD
- Motors and generators; at manufacturer: 4.75725e-6 USD
- Air purification and ventilation equipment; at manufacturer: 9.93634e-7 USD
- Fluid milk and butter; at manufacturer: 8.35584e-8 USD
- Machinery for the paper, textile, food or other industries (except semiconductor machinery); at manufacturer: 0.000187868 USD
- Waste management and remediation: 0.0027216 USD
- Asphalt pavement; at manufacturer: 4.07166e-7 USD
- Metal plumbing drains, faucets, valves, and other fittings; at manufacturer: 1.11372e-6 USD
- Air and gas compressors; at manufacturer: 7.04372e-7 USD
- Light gauge metal cans, boxes, and containers; at manufacturer: 4.11504e-6 USD
- Petrochemicals; at manufacturer: 0.000467647 USD
- External hard drives, CDs, other storage media; at manufacturer: 2.81879e-8 USD
- Other vehicle parts; at manufacturer: 0.000710393 USD
- Vending, commercial laundry, and other commercial and service industry machinery; at manufacturer: 5.68525e-7 USD
- Home furniture - Cabinets and non-wood, nonupholstered; at manufacturer: 6.38116e-6 USD
- Lids, jars, bottle caps, other metal closures and crowns; at manufacturer: 5.16617e-5 USD
- Vegetable oils and by-products; at manufacturer: 0.000119224 USD
- Plastics; at manufacturer: 0.0508349 USD
- Valve and fittings (except for plumbing); at manufacturer: 2.67125e-5 USD
- Environmental and other technical consulting services: 0.000178154 USD
- Other concrete products; at manufacturer: 2.32923e-6 USD
- Metal coatings, engravings, and heat treatments; at manufacturer: 0.00302534 USD
- Cast iron and steel; at manufacturer: 2.97796e-6 USD
- Ink and ink cartridges; at manufacturer: 3.26502e-5 USD
- Concrete pipe, bricks, and blocks; at manufacturer: 1.59274e-6 USD
- Material handling equipment; at manufacturer: 0.000125329 USD
- Leather; at manufacturer: 8.42078e-5 USD
- Switchgear and switchboards; at manufacturer: 1.36305e-6 USD
- Buildings and dwellings services: 0.0040368 USD
- Golf courses, marinas, ski resorts, fitness and other rec centers and industries: 0.000119273 USD
- Other educational services: 4.69799e-8 USD
- Metal pipe fittings, ball and roller bearings, industrial patterns, metal bath fixtures, other misc. fabricated metals; at manufacturer: 0.0013008 USD
- Air conditioning, refrigeration, and warm air heating equipment; at manufacturer: 2.10602e-6 USD
- Wholesale trade: 0.0377435 USD
- Other basic inorganic chemicals; at manufacturer: 0.00412703 USD
- Dental equipment and supplies; at manufacturer: 3.74587e-8 USD
- Gasoline, fuels, and by-products of petroleum refining; at manufacturer: 0.00357202 USD
- Small electrical appliances; at manufacturer: 4.90994e-7 USD
- Industrial molds; at manufacturer: 1.67657e-7 USD
- Securities and commodities brokerage and exchanges: 0.000628412 USD
- Wooden windows, door, and flooring; at manufacturer: 2.69445e-6 USD
- Fabric; at manufacturer: 0.0325287 USD
- Screws, nuts, and bolts; at manufacturer: 0.000679344 USD
- Other retail: 2.4852e-5 USD
- Dental laboratories; at manufacturer: 1.87293e-7 USD
- Industrial process variable instruments; at manufacturer: 3.51912e-6 USD
- Other rubber products; at manufacturer: 0.00109696 USD
- Aluminum products; at manufacturer: 2.93782e-5 USD
- Copper, nickel, lead, and zinc; at mine: 1.87293e-7 USD
- Iron, gold, silver, and other metal ores; at mine: 4.72937e-5 USD
- Warehousing: 0.0027104 USD
- Metal windows, doors, and architectural products; at manufacturer: 8.99806e-6 USD
- Other textiles; at manufacturer: 9.62413e-5 USD
- Paper; at manufacturer: 0.00651657 USD
- Adhesives; at manufacturer: 0.00910678 USD
- Surgical appliance and supplies; at manufacturer: 1.51448e-5 USD
- Other real estate: 0.000783469 USD
- Nondepository credit intermediation and related activities: 0.00334231 USD
- Computer storage device readers; at manufacturer: 3.75839e-8 USD
- Clay and ceramic products; at manufacturer: 8.08344e-7 USD
- Stationery; at manufacturer: 7.15258e-6 USD
- Primary copper; at manufacturer: 2.29555e-8 USD
- Communication and energy wire and cable; at manufacturer: 1.3659e-6 USD
- Electronic capacitors, resistors, coils, transformers, connectors and other components (except semiconductors and printed circuit assemblies); at manufacturer: 0.000186338 USD
- Light bulbs; at manufacturer: 1.30334e-7 USD
- Investment advice, portfolio management, and other financial advising services: 0.000351351 USD
- Plastic bottles; at manufacturer: 2.78198e-6 USD
- Independent artists, writers, and performers: 0.0002938 USD
- Metal cutting and forming machine tools; at manufacturer: 5.38896e-8 USD
- Primary iron, steel, and ferroalloy products; at manufacturer: 0.000146235 USD
- Aluminum; at manufacturer: 6.46831e-5 USD
- Light fixtures; at manufacturer: 6.4974e-7 USD
- Lime and gypsum products; at manufacturer: 1.30214e-5 USD
- Management consulting: 0.000770881 USD
- Cardboard containers; at manufacturer: 0.00592431 USD
- Commercial equipment rental: 0.000529038 USD
- Drinking water and wastewater treatment; at consumer: 0.00100787 USD
- Wild-caught fish and game; at place of capture: 2.3277e-7 USD
- Ready-mix concrete; at manufacturer: 5.38896e-8 USD
- Business support: 0.00258713 USD
- Plywood and veneer; at manufacturer: 1.80921e-5 USD
- Sports: 5.82313e-5 USD
- Paper bags and coated paper; at manufacturer: 0.000204415 USD
- Architectural, engineering, and related services: 0.00815044 USD
- Animal farms and aquaculture ponds (except cattle and poultry): 0.0120665 USD
- Vehicle seating and interior trim (upholstery); at manufacturer: 9.39598e-9 USD
- Hydraulic pumps, motors, cylinders and actuators; at manufacturer: 3.01611e-6 USD
- Vehicles and parts sales: 0.000175807 USD
- Lessors of nonfinancial intangible assets: 0.00329359 USD
- Frozen food; at manufacturer: 6.5086e-6 USD
- Cement; at manufacturer: 4.07166e-7 USD
- Truck transport: 0.0148698 USD
- Special tools, dies, jigs, and fixtures; at manufacturer: 1.79632e-8 USD
- Electronic equipment repair and maintenance: 0.00070323 USD
- Secondary steel products; at manufacturer: 4.71808e-5 USD
- Refined vegetable, olive, and seed oils; at manufacturer: 9.54953e-7 USD
- Custom metal rolls; at manufacturer: 8.81391e-6 USD
- Carpets and rugs; at manufacturer: 1.44521e-6 USD
- Natural gas; at consumer: 0.0132736 USD
- Consumer goods and general rental centers: 5.99359e-5 USD
- Finished and coated fabric; at manufacturer: 0.0505503 USD
- Jewelry and silverware; at manufacturer: 3.17146e-5 USD
- Electromedical appartuses; at manufacturer: 4.5325e-6 USD
- Welding and Soldering Equipment, Scales and Balances, and other general purpose machinery; at manufacturer: 6.4088e-6 USD
- Pipeline transport: 0.000120081 USD
- Abrasive products; at manufacturer: 0.000260264 USD
- Food and beverage stores: 8.84361e-7 USD
- Postal service: 0.00029076 USD
- Books, newspapers, magazines, and other print media; at manufacturer: 2.85519e-5 USD
- Poultry farms: 6.20719e-7 USD
- Marketing research and all other miscellaneous professional, scientific, and technical services: 0.00438383 USD
- Coal; at mine: 0.00241314 USD
- Analytical laboratory instruments; at manufacturer: 3.20272e-6 USD
- Motor vehicle steering, suspension components (except spring), and brake systems; at manufacturer: 5.12331e-7 USD
- Other computer related services, including facilities management: 0.000355656 USD
- Wood pulp; at manufacturer: 0.000428312 USD
- Plastic pipe, fittings, and sausage casings; at manufacturer: 3.39156e-5 USD
- Performances: 3.51581e-7 USD
- Travel arrangement and reservation: 2.37384e-7 USD
- Tobacco, cotton, sugarcane, peanuts, sugar beets, herbs and spices, and other crops; at farm: 0.0257197 USD
- Printed circuit and electronic assembly; at manufacturer: 0.000977448 USD
- Optical instruments and lenses; at manufacturer: 6.34924e-6 USD
- Custom computer programming: 5.6188e-8 USD
- Paints and coatings; at manufacturer: 4.87738e-5 USD
- Dry-cleaning and laundry: 0.000353068 USD
- Ophthalmic goods; at manufacturer: 1.28135e-7 USD
- Cutting and machine tool accessory, rolling mill, and other metalworking machines; at manufacturer: 1.03361e-5 USD
- Software: 5.96855e-5 USD
- Printing support; at manufacturer: 1.95248e-5 USD
- Used and secondhand goods: 1.81352e-7 USD
- Couriers and messengers: 7.04698e-7 USD
- Gaskets, seals, musical instruments, fasteners, brooms, brushes, mop and other misc. goods; at manufacturer: 0.0010474 USD
- All other forging, stamping, and sintering; at manufacturer: 5.09866e-6 USD
- Cheese; at manufacturer: 4.2764e-6 USD
- All other converted paper products; at manufacturer: 6.02226e-5 USD
- Advertising and public relations: 0.0057472 USD
- Synthetic dyes and pigments; at manufacturer: 0.00794292 USD
- Rail transport: 0.00247227 USD
- Other primary nonferrous metals; at manufacturer: 4.87522e-6 USD
- Office supplies (not paper); at manufacturer: 8.10929e-8 USD
- Urethane and other foam products; at manufacturer: 2.60922e-6 USD
- Household goods repair: 0.000350211 USD
- Vehicle rental and leasing: 0.000710265 USD
- Cardboard; at manufacturer: 0.000669703 USD
- Cutlery and handtools; at manufacturer: 8.87001e-6 USD
- Passenger ground transport: 0.000297457 USD
- Water transport (boats, ships, ferries): 0.00036487 USD
- Other support services: 0.00162735 USD
- Packaged meat (except poultry); at manufacturer: 3.25787e-6 USD
- Limited-service restaurants: 0.00142046 USD
- Company and enterprise management: 0.0630528 USD
- Metal structural products; at manufacturer: 5.08038e-6 USD
- Telecommunications: 0.00218161 USD
- Vehicle repair: 0.00105301 USD
- Packaged poultry; at manufacturer: 2.56644e-6 USD
- Surgical and medical instruments; at manufacturer: 1.24363e-5 USD
- Chemicals (except basic chemicals, agrichemicals, polymers, paints, pharmaceuticals,soaps, cleaning compounds); at manufacturer: 0.000455166 USD
- Sanitary paper (tissues, napkins, diapers, etc.); at manufacturer: 1.49488e-7 USD
- other miscellaneous electrical equipment and components; at manufacturer: 4.04429e-8 USD
- Other nonmetallic mineral products; at manufacturer: 2.78198e-6 USD
- Fresh fruits and tree nuts; at farm: 1.90991e-6 USD
- Office administration: 0.000117569 USD
- Satellite, telecommunications resellers, and all other telecommunications: 0.000118724 USD
- State and local government enterprises: 0.00106567 USD
- Other petroleum and coal products; at manufacturer: 0.000305294 USD
- Transmission and power train parts; at manufacturer: 1.63849e-6 USD
- Ball and roller bearings; at manufacturer: 3.60147e-6 USD
- Watches, clocks, and other measuring and controlling devices; at manufacturer: 1.81352e-7 USD
- Computer terminals and other computer peripheral equipment; at manufacturer: 0.000115285 USD
- Plastic bags, films, and sheets; at manufacturer: 0.00103667 USD
- Specialized design: 0.000969065 USD
- Vehicle engines and engine parts; at manufacturer: 5.24601e-7 USD
- Employment services: 0.00181613 USD
- Sand, gravel, clay, phosphate, other nonmetallic minerals; at mine: 4.10188e-5 USD

## Inputs from nature
- Energy, biomass: 0.133254 MJ; data quality (3,1,1,1,1)
- Water, fresh: 0.00044512, 0.000928273 m3 (2 entries, compartments not in this file); data quality (1,2,1,4,2)
- Occupation, industrial area: 0.00171292 m2*a; data quality (4,2,1,1,1)
- Occupation, industrial area, built up: 0.000570973 m2*a; data quality (4,2,1,1,1)
- Energy, solar: 3.76733e-6 MJ; data quality (3,1,1,1,1)
- Occupation, urban, discontinuously built: 0.000157932 m2*a; data quality (4,2,1,1,1)
- Energy, hydraulic potential: 0.000306551 MJ; data quality (3,1,1,1,1)
- Water, saline: 2.19144e-5 m3; data quality (4,2,1,4,2)
- Energy, wind: 4.05233e-6 MJ; data quality (3,1,1,1,1)

## Emissions to nature
- acetophenone: 1.39388e-8 kg; data quality (4,2,1,1,4)
- Nitrogen: 3.00841e-6 kg; data quality (3,2,1,1,4)
- PHOSPHORUS: 1.62009e-9 kg; data quality (2,2,1,1,1)
- Water, fresh: 0.00113521 m3; data quality (1,2,1,4,2)
- Dimethoxy methane: 3.46051e-12 kg; data quality (2,2,1,1,1)
- Xylene: 1.02176e-7 kg; data quality (4,2,1,2,4)
- chromium: 5.76847e-11, 1.31033e-13, 3.75498e-11 kg (3 entries, compartments not in this file); data quality (4,1,1,1,5)
- methane, dichloro-, hcc-30: 1.37983e-7 kg; data quality (4,2,1,1,5)
- Triethylene glycol: 9.33959e-12 kg; data quality (5,2,1,1,5)
- Aluminum: 5.87383e-10 kg; data quality (4,1,1,1,5)
- ACRYLAMIDE: 9.34008e-8 kg; data quality (4,2,1,1,5)
- Cobalt: 1.73573e-10 kg; data quality (3,2,1,1,3)
- monochloroethane: 1.8294e-11 kg; data quality (3,2,1,1,2)
- isophorone: 2.34964e-10 kg; data quality (2,2,1,1,4)
- Chromium VI: 3.96717e-10 kg; data quality (3,2,1,1,3)
- styrene: 4.70977e-6 kg; data quality (4,2,1,1,5)
- Cresol: 3.96414e-13, 1.67106e-12 kg (2 entries, compartments not in this file); data quality (2,1,1,1,2)
- ethane, 1,2-dichloro-: 5.29656e-10 kg; data quality (3,2,1,1,2)
- nitric acid: 6.20404e-10 kg; data quality (3,1,1,1,5)
- Phenol: 1.30942e-11 kg; data quality (3,1,1,1,2)
- Thiophanat-methyl: 4.28633e-12 kg; data quality (4,1,1,1,5)
- carbon monoxide: 7.3601e-5 kg; data quality (3,2,1,1,3)
- Triethyl amine: 9.30815e-9 kg; data quality (4,2,1,1,5)
- Water, saline: 1.1104e-5 m3; data quality (4,2,1,4,2)
- 2-(2-BUTOXYETHOXY) ETHYL ACETATE: 3.66042e-15 kg; data quality (5,2,1,1,5)
- propanal: 1.51909e-8 kg; data quality (3,2,1,2,1)
- dimethyl formamide: 2.52492e-8 kg; data quality (4,2,1,1,5)
- pyrene: 2.78468e-11 kg; data quality (2,2,1,2,1)
- 1,4-dioxane: 1.24701e-8 kg; data quality (4,2,1,1,5)
- 2,4/2,6-toluenediisocyanate (mixture): 1.87053e-12 kg; data quality (3,1,1,1,5)
- ethyl acrylate: 7.86241e-8 kg; data quality (4,2,1,1,5)
- ethane, 1,1,2-trichloro-: 7.02237e-10 kg; data quality (4,2,1,1,1)
- Propanal: 4.32612e-11 kg; data quality (2,1,1,1,2)
- 2-PHENYLPHENOL, SODIUM SALT: 5.58902e-15 kg; data quality (2,1,1,1,3)
- pentachlorophenol: 4.643e-12 kg; data quality (3,2,1,1,1)
- nitric acid: 1.25322e-14 kg; data quality (3,1,1,1,4)
- Benzo(k)fluoranthene: 7.48166e-13 kg; data quality (3,2,1,4,2)
- lead: 7.46063e-11, 5.49851e-11 kg (2 entries, compartments not in this file); data quality (3,1,1,1,2)
- Ethylene glycol monoethyl ether: 2.70801e-9 kg; data quality (5,1,1,1,2)
- methyl isobutyl ketone: 1.87632e-7 kg; data quality (3,2,1,1,5)
- 3-methylcholanthrene: 8.30781e-15 kg; data quality (2,2,1,1,3)
- benzene, ethyl-: 6.03713e-8 kg; data quality (4,2,1,2,4)
- 1,4-dichlorobenzene: 2.72511e-11 kg; data quality (2,2,1,1,5)
- Methyl iodide: 1.52396e-10 kg; data quality (4,2,1,1,1)
- Benzo(a)anthracene: 1.51661e-14 kg; data quality (2,2,1,1,3)
- naphthalene: 9.56459e-9 kg; data quality (3,2,1,2,3)
- Formaldehyde: 2.21661e-11 kg; data quality (2,1,1,1,2)
- benzene, chloro-: 9.12655e-10 kg; data quality (4,2,1,1,2)
- Methane: 5.97345e-5 kg; data quality (4,2,1,4,1)
- formic acid: 8.63279e-9 kg; data quality (3,1,1,1,5)
- mercury: 4.82271e-14, 2.52789e-14 kg (2 entries, compartments not in this file); data quality (3,1,1,1,2)
- formaldehyde: 6.29904e-7 kg; data quality (2,2,1,1,5)
- 2-methylnaphthalene: 1.12159e-10 kg; data quality (2,2,1,1,1)
- Carbaryl: 1.01093e-11 kg; data quality (5,1,1,1,5)
- hydrogen fluoride: 3.59449e-8 kg; data quality (2,2,1,1,2)
- particulates, < 10 um: 4.07475e-6 kg; data quality (3,2,1,1,5)
- 4,4'-METHYLENEBIS(2-CHLOROANALINE): 1.19918e-13 kg; data quality (5,2,1,1,5)
- Dibenz(a,h)anthracene: 1.45781e-13 kg; data quality (2,2,1,1,5)
- copper: 2.58515e-12, 6.85935e-13, 3.15813e-10 kg (3 entries, compartments not in this file); data quality (4,1,1,1,5)
- ammonia: 4.75367e-8 kg; data quality (3,1,1,1,2)
- Hydrocarbons, aromatic: 5.41036e-9 kg; data quality (3,2,1,2,2)
- Propane, 1,2-dichloro-: 3.34074e-10 kg; data quality (4,2,1,1,2)
- Polychlorinated biphenyls: 1.52571e-14, 2.41896e-12 kg (2 entries, compartments not in this file); data quality (3,1,1,1,2)
- bromoform: 6.96449e-12 kg; data quality (3,2,1,1,3)
- Benzo(g,h,i)perylene: 2.91361e-13, 1.70323e-12 kg (2 entries, compartments not in this file); data quality (2,1,1,1,2)
- methylene diphenyl diisocyanate: 1.36909e-10 kg; data quality (4,2,1,1,5)
- carbon tetrachloride: 2.10892e-9 kg; data quality (4,2,1,1,2)
- cumene: 7.27794e-9 kg; data quality (4,2,1,1,1)
- Vinyl acetate: 1.69565e-10 kg; data quality (4,1,1,1,5)
- VOC, volatile organic compounds: 5.10273e-5 kg; data quality (3,2,1,1,5)
- Ethene, chloro-: 6.15016e-10 kg; data quality (3,2,1,1,4)
- formaldehyde: 3.9378e-9 kg; data quality (2,1,1,1,2)
- 1-METHYLNAPTHALENE: 5.11793e-14 kg; data quality (2,2,1,1,3)
- 2,4,5,2',5'-PENTACHLOROBIPHENYL: 2.15261e-15 kg; data quality (2,2,1,1,1)
- nitrogen oxides: 6.53859e-5 kg; data quality (2,2,1,1,4)
- 2-chloro-1-phenylethanone: 2.18304e-12 kg; data quality (2,2,1,1,2)
- ethene, tetrachloro-: 1.16354e-8 kg; data quality (3,2,1,1,4)
- cyclohexane: 7.30047e-9 kg; data quality (4,1,1,1,5)
- cadmium: 2.5082e-10 kg; data quality (3,2,1,1,4)
- Phthalate, dimethyl-: 1.62201e-9 kg; data quality (4,2,1,1,5)
- Dinitrogen monoxide: 1.56926e-7 kg; data quality (4,2,1,4,1)
- benzo(a)pyrene: 9.1856e-11 kg; data quality (2,2,1,1,5)
- arsenic: 1.05974e-9 kg; data quality (3,2,1,1,4)
- selenium: 4.46556e-10 kg; data quality (2,2,1,1,3)
- butanol: 4.12675e-9 kg; data quality (5,1,1,1,3)
- DMTT (DAZOMET): 1.51094e-11, 2.55925e-12 kg (2 entries, compartments not in this file); data quality (4,1,1,1,2)
- catechol: 2.51256e-13 kg; data quality (5,2,1,1,1)
- trichloroethylene: 1.38091e-8 kg; data quality (4,2,1,1,4)
- naphthalene: 1.99671e-10 kg; data quality (4,1,1,1,5)
- methyl methacrylate: 1.11979e-8 kg; data quality (4,2,1,1,5)
- antimony: 3.85626e-9 kg; data quality (3,2,1,1,5)
- Acetaldehyde: 4.50639e-12 kg; data quality (3,1,1,1,2)
- Cumene hydroperoxide: 1.65876e-11 kg; data quality (2,1,1,1,5)
- Ethane, pentafluoro-, HFC-125: 5.6422e-10 kg; data quality (4,2,1,4,1)
- hydrogen chloride: 6.44929e-7 kg; data quality (2,2,1,1,2)
- CHLORONAPHTHALENE: 3.14737e-15 kg; data quality (1,2,1,1,1)
- acetaldehyde: 5.13189e-9 kg; data quality (3,1,1,1,2)
- BENZ(A)ACRIDINE: 7.85647e-20 kg; data quality (2,2,1,1,3)
- oxadiazon: 1.01093e-11 kg; data quality (3,1,1,1,5)
- barium: 4.23675e-14 kg; data quality (4,1,1,1,5)
- Butanol: 2.91853e-11 kg; data quality (5,1,1,1,2)
- Phthalate, dibutyl-: 4.12241e-9 kg; data quality (4,2,1,1,5)
- Cresol, o-: 5.58902e-15 kg; data quality (2,1,1,1,3)
- acenaphthylene: 6.90557e-10 kg; data quality (3,2,1,1,1)
- NITROUS ACID: 1.39369e-10 kg; data quality (5,1,1,1,5)
- 2,2-BIS(4-HYDROXY-3,5-DIBROMOPHENYL)PROPANE: 1.53797e-10 kg; data quality (5,1,1,1,5)
- Methane, monochloro-, R-40: 4.944e-14, 2.46082e-13 kg (2 entries, compartments not in this file); data quality (3,1,1,1,2)
- ethane, 1,2-dibromo-: 9.70237e-11 kg; data quality (2,2,1,1,1)
- N,N-DIMETHYLANILINE: 9.88712e-11 kg; data quality (5,2,1,1,5)
- diethanolamine: 8.4439e-9 kg; data quality (3,2,1,1,5)
- Titanium: 3.52919e-13 kg; data quality (5,2,1,1,4)
- ethylene glycol: 2.09744e-7 kg; data quality (5,2,1,1,5)
- cyanide: 1.01501e-9 kg; data quality (3,2,1,1,4)
- carbon disulfide: 2.42699e-8 kg; data quality (4,2,1,1,4)
- 2,4,6-trichlorophenol: 2.05107e-13 kg; data quality (2,2,1,1,1)
- ETHYLENETHIOUREA: 7.76962e-13 kg; data quality (5,2,1,1,3)
- NITRIC ACID: 3.43195e-14 kg; data quality (3,1,1,1,5)
- fluoranthene: 8.29033e-11 kg; data quality (2,2,1,1,1)
- 2,4-dinitrophenol: 3.41522e-12 kg; data quality (5,2,1,1,1)
- PERACETIC ACID: 9.62769e-12 kg; data quality (4,1,1,1,5)
- acrylic acid: 1.38611e-8 kg; data quality (4,2,1,1,5)
- BENEFIN: 1.01093e-11 kg; data quality (5,1,1,1,5)
- butadiene: 2.77527e-9 kg; data quality (3,2,1,4,1)
- Benzo(b)fluoranthene: 1.13194e-12 kg; data quality (3,2,1,3,3)
- Propene: 1.01287e-12 kg; data quality (3,1,1,1,2)
- Diethylene glycol butyl ether: 5.70972e-10 kg; data quality (4,2,1,1,5)
- Decabromodiphenyl oxide: 6.76075e-13 kg; data quality (4,1,1,1,5)
- phenol: 1.31211e-10 kg; data quality (3,1,1,1,2)
- 2,4,5-trichlorophenol: 4.30358e-12 kg; data quality (2,2,1,1,1)
- chloroform: 1.90928e-8 kg; data quality (4,2,1,1,2)
- aniline: 5.64569e-12 kg; data quality (4,2,1,1,4)
- chlorine: 1.0275e-8 kg; data quality (4,2,1,1,2)
- Sulfuric acid: 1.25041e-7 kg; data quality (2,1,1,1,2)
- hexane: 1.37973e-6 kg; data quality (3,2,1,1,5)
- methanol: 4.10468e-6 kg; data quality (4,2,1,1,3)
- HYDROGEN SULFIDE: 2.36309e-9, 7.29099e-10 kg (2 entries, compartments not in this file); data quality (3,1,1,1,2)
- tertiary-Butyl Acetate: 1.05784e-7 kg; data quality (3,2,1,1,5)
- 2,4-dimethylphenol: 5.39637e-12 kg; data quality (4,1,1,1,4)
- Xylene: 1.79196e-14 kg; data quality (4,1,1,1,4)
- Hydrazine: 3.26839e-12 kg; data quality (4,2,1,1,5)
- anthracene: 9.44319e-12 kg; data quality (3,2,1,2,1)
- trifluralin: 9.85542e-10 kg; data quality (5,2,1,1,5)
- fluorene: 4.49429e-11 kg; data quality (3,2,1,4,1)
- propylene oxide: 2.87143e-11 kg; data quality (3,2,1,1,3)
- p-cresol: 5.2572e-15 kg; data quality (3,2,1,1,5)
- dibenzofuran: 1.24402e-11 kg; data quality (4,2,1,1,4)
- PCB-1: 1.08922e-16 kg; data quality (2,2,1,1,1)
- 2-(2-ETHOXYETHOXY) ETHYL ACETATE: 9.82054e-14 kg; data quality (5,2,1,1,5)
- acetonitrile: 4.28863e-11 kg; data quality (3,2,1,1,5)
- toluene-2,4-diisocyante: 7.84567e-12 kg; data quality (3,2,1,1,5)
- acetaldehyde: 3.79822e-7 kg; data quality (3,2,1,1,4)
- Sodium formate: 1.03611e-12 kg; data quality (3,1,1,1,5)
- hexachloroethane: 5.96667e-9 kg; data quality (4,2,1,1,1)
- Methane, difluoro-, HFC-32: 3.28575e-10 kg; data quality (4,2,1,4,1)
- m-cresol: 5.2084e-11 kg; data quality (4,2,1,1,1)
- beryllium: 1.24731e-10 kg; data quality (2,2,1,1,3)
- CATECHOL: 1.2375e-10, 6.26043e-13 kg (2 entries, compartments not in this file); data quality (2,1,1,1,2)
- methanol: 1.69523e-9, 7.09468e-8 kg (2 entries, compartments not in this file); data quality (3,1,1,1,2)
- 1,2,4-trimethylbenzene: 3.35319e-9 kg; data quality (5,1,1,1,5)
- benzyl chloride: 8.26507e-10 kg; data quality (2,2,1,1,1)
- Pendimethalin: 1.37082e-11 kg; data quality (5,1,1,1,5)
- 1-Methyl-2-pyrrolidinone: 2.51848e-8 kg; data quality (5,1,1,1,5)
- Cyclohexanol: 7.06817e-13 kg; data quality (4,1,1,1,4)
- 1,2-BUTYLENE OXIDE: 1.07954e-11 kg; data quality (4,2,1,1,5)
- ethylene glycol: 3.48428e-10 kg; data quality (5,1,1,1,2)
- diisocyanates: 1.10649e-9 kg; data quality (4,1,1,1,5)
- acrolein: 1.64238e-8 kg; data quality (2,2,1,1,1)
- Aluminum: 5.60413e-9 kg; data quality (4,1,1,1,2)
- nickel: 6.32165e-12, 8.53973e-14 kg (2 entries, compartments not in this file); data quality (4,1,1,1,5)
- Ethylene glycol monoethyl ether: 7.2005e-10 kg; data quality (5,1,1,1,4)
- o-cresol: 8.51865e-10 kg; data quality (4,2,1,1,1)
- manganese: 6.26046e-9 kg; data quality (3,2,1,1,3)
- polychlorinated biphenyls: 1.81438e-15 kg; data quality (3,2,1,1,1)
- Chromium, ion: 1.6315e-9 kg; data quality (2,2,1,1,4)
- 4,4'-isopropylidenediphenol: 8.5856e-13 kg; data quality (4,1,1,1,5)
- TERT-BUTYL ALCOHOL: 1.7249e-9, 1.04623e-11 kg (2 entries, compartments not in this file); data quality (4,1,1,1,5)
- phthalic anhydride: 2.36558e-11 kg; data quality (2,2,1,1,5)
- ozone: 5.17297e-10 kg; data quality (4,1,1,1,5)
- Ethane, 1,1,1,2-tetrafluoro-, HFC-134a: 2.12662e-9 kg; data quality (4,2,1,4,1)
- CHLORINE: 2.7069e-13 kg; data quality (2,1,1,1,2)
- styrene: 5.70438e-12 kg; data quality (3,1,1,1,5)
- epichlorohydrin: 2.42845e-11 kg; data quality (3,2,1,1,1)
- 2-ethoxyethyl acetate: 3.49472e-11 kg; data quality (5,2,1,1,5)
- carbonyl sulfide: 6.56676e-9 kg; data quality (4,2,1,1,4)
- CARBAMODITHIOIC ACID, DIMETHYL-, POTASSIUM SALT: 3.18686e-12 kg; data quality (2,1,1,1,3)
- o-Xylene: 2.78315e-8 kg; data quality (3,2,1,1,5)
- phthalate, dioctyl-: 1.13655e-8 kg; data quality (3,2,1,1,5)
- vinyl acetate: 2.03876e-7 kg; data quality (4,2,1,1,5)
- chlorine: 4.14154e-10 kg; data quality (3,1,1,1,4)
- DNOC: 2.2561e-12 kg; data quality (2,2,1,1,1)
- 1,1-DICHLOROETHYLENE: 1.25667e-12 kg; data quality (3,2,1,1,1)
- particulates, < 2.5 um: 1.07815e-5 kg; data quality (3,2,1,1,4)
- methane, bromo-, halon 1001: 1.10898e-9 kg; data quality (3,2,1,1,4)
- Formic acid: 1.33694e-8 kg; data quality (3,1,1,1,2)
- Phosphorus: 1.01146e-6 kg; data quality (2,1,1,1,5)
- hexachlorobenzene: 1.80804e-12 kg; data quality (3,2,1,1,4)
- manganese: 1.14909e-12 kg; data quality (4,1,1,1,4)
- BUTYL ACRYLATE: 5.07234e-12 kg; data quality (4,1,1,1,5)
- sulfur dioxide: 2.48035e-5 kg; data quality (2,2,1,1,3)
- 1,2,4-trichlorobenzene: 4.70149e-9 kg; data quality (4,2,1,1,1)
- toluene: 3.48356e-12 kg; data quality (5,1,1,1,2)
- 1,1,2,2-tetrachloroethane: 7.96291e-12 kg; data quality (3,2,1,1,1)
- Indeno(1,2,3-cd)pyrene: 5.7095e-13 kg; data quality (3,2,1,3,2)
- 2-nitropropane: 1.26318e-13 kg; data quality (3,2,1,1,5)
- Hexachlorocyclopentadiene: 1.15921e-9 kg; data quality (3,2,1,1,1)
- 2,2,4-trimethylpentane: 5.85027e-9 kg; data quality (3,2,1,4,1)
- t-butyl methyl ether: 3.74115e-9 kg; data quality (3,2,1,1,5)
- acrylonitrile: 1.98621e-9 kg; data quality (4,2,1,1,5)
- Hydrazine, methyl-: 3.88109e-11 kg; data quality (2,2,1,1,3)
- maleic anhydride: 5.77737e-11 kg; data quality (2,2,1,1,5)
- toluene, 2,4-dinitro-: 1.05781e-12 kg; data quality (5,2,1,1,1)
- methane, monochloro-, r-40: 1.60215e-8 kg; data quality (3,2,1,1,1)
- benzene: 6.57886e-8 kg; data quality (3,2,1,2,3)
- lead: 1.47742e-9 kg; data quality (3,2,1,1,3)
- dicyclopentadiene: 1.34027e-11 kg; data quality (4,1,1,1,5)
- AZIRIDINE: 3.28418e-15 kg; data quality (5,2,1,1,5)
- PCB-15: 1.30678e-16 kg; data quality (2,2,1,1,1)
- antimony: 2.02186e-13 kg; data quality (2,1,1,1,5)
- phenol: 5.64933e-8 kg; data quality (4,2,1,1,3)
- Dimethyl sulfate: 3.17611e-11 kg; data quality (3,2,1,1,2)
- ethylene oxide: 4.82939e-9 kg; data quality (3,2,1,1,5)
- para-xylene: 2.46894e-8 kg; data quality (3,2,1,1,5)
- ammonia: 8.09706e-7 kg; data quality (3,2,1,1,3)
- CHLOROPRENE: 3.13823e-11 kg; data quality (2,2,1,1,4)
- barium: 5.61067e-12 kg; data quality (4,1,1,1,2)
- Ethylene glycol: 4.92164e-14 kg; data quality (5,1,1,1,2)
- Propene, 1,3-dichloro-: 4.27864e-15 kg; data quality (3,2,1,1,5)
- Ethanol, 2-butoxy-: 3.2567e-14 kg; data quality (5,2,1,1,5)
- hydroquinone: 1.22716e-11 kg; data quality (3,2,1,1,5)
- phenanthrene: 2.57889e-10 kg; data quality (3,2,1,2,1)
- 2-METHOXYETHANOL: 4.45569e-11 kg; data quality (4,2,1,1,2)
- CARBAZOLE: 1.07955e-12 kg; data quality (2,2,1,1,1)
- Styrene: 1.33366e-12 kg; data quality (3,1,1,1,5)
- nickel: 2.16214e-9 kg; data quality (3,2,1,1,4)
- Carbon dioxide: 0.0634879 kg; data quality (4,2,1,4,1)
- 2-PHENOXYETHANOL: 2.14781e-12 kg; data quality (5,2,1,1,5)
- Ethane, 1,1,1-trifluoro-, HFC-143a: 2.41406e-10 kg; data quality (4,2,1,4,1)
- biphenyl: 8.99618e-9 kg; data quality (4,2,1,1,1)
- Chrysene: 5.57074e-12 kg; data quality (2,2,1,2,2)
- o-toluidine: 2.85117e-22 kg; data quality (4,2,1,1,5)
- hydrogen sulfide: 5.23146e-8 kg; data quality (3,2,1,1,1)
- 2,3,4'-TRICHLOROBIPHENYL: 1.28711e-15 kg; data quality (2,2,1,1,1)
- ethylbenzene: 1.05155e-9 kg; data quality (4,1,1,1,5)
- m-xylene: 5.91082e-8 kg; data quality (3,2,1,1,5)
- manganese: 4.9854e-11 kg; data quality (4,1,1,1,3)
- Chrysene, 5-methyl-: 1.09374e-15 kg; data quality (2,2,1,1,1)
- Propane, 1,1,1,3,3,3-hexafluoro-, HCFC-236fa: 6.52166e-12 kg; data quality (4,2,1,4,1)
- Benzo(g,h,i)perylene: 2.07902e-11 kg; data quality (3,2,1,1,2)
- benz[a]anthracene: 7.12338e-12 kg; data quality (2,2,1,1,4)
- Zinc: 1.93325e-9 kg; data quality (5,1,1,1,4)
- 4,4'-METHYLENEDIANILINE: 7.54424e-10 kg; data quality (4,2,1,1,5)
- toluene: 1.03301e-6 kg; data quality (3,2,1,1,5)
- acenaphthene: 8.96549e-11 kg; data quality (3,2,1,2,1)
- Cresol: 2.37306e-8 kg; data quality (4,2,1,1,1)
- 1,1,1-trichloroethane: 2.65571e-9 kg; data quality (4,2,1,1,3)
- AMMONIA: 4.5093e-10 kg; data quality (3,1,1,1,3)
- silver: 1.32046e-13 kg; data quality (4,1,1,1,5)
- cobalt: 3.28568e-14 kg; data quality (4,1,1,1,5)
- mercury: 1.04952e-10 kg; data quality (2,2,1,1,3)
- 4-nitrophenol: 6.89749e-13 kg; data quality (2,2,1,1,2)
- BUTYL ISOCYANATE: 4.60729e-11 kg; data quality (5,2,1,1,5)

## Inventory method
Input-output

## Modelling constants
The reference unit of all processes is 1 USD2013 of the good or service. The technosphere inputs are based on the US BEA detailed input-output tables for 2007. The IO tables are combined to develop a commodity-by-commodity model based on the the industry-technology assumption (see Suh et al., 2010), which assumes all commodities produced by a given industry have the same input structure, but that multiple industries can produce the same commodity. Thus, model technosphere flows represent commodity outputs (and not industry outputs) from other processes in the model. There are no by-products included in these processes. All commodity production is based on US-conditions, despite in reality that some goods and services are produced overseas, as USEEIO v1.1 is a single-region IO model.

## Completeness
The input-output approach assures that all purchased inputs associated with the sectors making these commodities as reported in the US census for 2007 are included. The direct resources extracted including minerals, energy sources, water and land occupied are included. Emissions to air include all critieria air pollutants, greenhouse gases, and hazardous and toxic air pollutants as defined by US EPA. Releases to water include toxics, total nitrogen and total phosphorus, and water discharges. Releases to soil or groundwater include toxics and agriculutural pesticides. Some metal releases to air, water and soil are not included because they could not be speciated. Solid hazardous and non-hazardous wastes generated are not included as an elementary flows although purchases of waste services are included.

## Data treatment
Greenhouse gases are primarily from the US Greenhouse Gas Emission Inventory (USEPA 2016a). Biogenic C uptake is not included (change from version 1.0), as biogenic C emission are not included. Toxic releases to air, water and soil (except pesticides) are from the 2013 Toxic Release Inventory (USEPA 2015a). Criteria air pollutants and hazardous air pollutants are from the 2011 National Emissions Inventory (USEPA 2015b). All estimates are normalized by industry based on sector output in the data year, then converted to 2013 USD using relative sector-specific CPIs (if data year is not 2013). Energy use represent raw renewables or fossil fuel energies and is based on EIA data for 2014. See Table 1 in Yang, Ingwersen et al. 2017 and Supporting Information 1, and the v1.1 data update notes (Ingwersen et al. 2017) for all details on environmental data sources used.Land occupation associated with manufacturing buildings was estimated based on the building floorspace data provided by the U.S. Energy Information Administration in the 2010 Manufacturing Energy Consumption Survey (EIA 2013). Portions of total renewable energy (EIA 2016) based on EIA-923 reports for 2014 (EIA 2017) are included. Nitrogen and Phosphorus releases are modeled in total N and total P equivalents as estimated by the Discharge Monitoring Report Nutrient Loading tool (USEPA 2016b). Self-supplied withdrawals were assigned to industrial sectors based on water use statistics for Canadian industries by NAICS 3-digit sector scaled to US production levels based on gross domestic product by industry (BEA 2015; Statistics Canada 2010), and further disaggregated to the manufacturing sectors based on compensation of employees as provided by the 2007 IO tables (BEA 2015). Water withdrawals associated with public supply were allocated to sectors based on their use of water, sewage, and other services in USD based on the IO tables (BEA 2015). Portions of total renewable energy (EIA 2016) by type are assigned to sectors (hydro, wind, solar, or) based on EIA-923 reports for 2014 (EIA 2017).

## Data collection
2015-2016

## Sampling procedure
US federal government sources, including surveys and US EPA emissions databases are used as the primary sources. From these sources, data for US reporting establishments/facilities are aggregated by the NAICS sector as defined in the BEA detailed 2007 input-output tables. When level of sector aggregation differs, or when direct emissions are not reported but modeled, additional sources are used to make allocations and estimates.

## Review details
In regard to quality assurance and peer-review, each dataset created went through Quality Assurance as defined in a quality assurance project plans at US EPA, CSRA or ERG. The model was assembled with the IO model builder model (USEPA 2016c). Validation functions were used to check that all the model components were properly assembled and harmonized. Bayou Demeke and Santosh Ghimire provided internal peer review of the model methodology and the manuscript underwent standard EPA management review. An editor and two anonymous reviewers at the Journal of Cleaner Production reviewed the model. In regard to data quality evaluation, data quality assessment was performed at the flow and process levels according to the updated US EPA data quality assessment guidelines as defined in US EPA (2016b).

## Intended application
The primary application is for use in the US Environmentally-Extended Input-Ouput model, USEEIO, version 1.1. This model is being used by the US EPA for supporting tools that prioritize goods and services based on potential environmental impacts, resource use or emissions for large regions, including the US and US states, and as a strealined tool for organizations as a starting point to consider sustainable materials management. Model results are designed to provide meso/macro-level decision support.

## Project
USEEIO v1.1 was developed by the US EPA with CSRA and ERG with Wesley W. Ingwersen and David E. Meyer as research leads. Yi Yang was the technical lead on the work for CSRA (contract EP-C-15-012); Troy Hawkins was lead for ERG (contract EP-C-12-021).

## Sources
- Nickerson et al. 2011
- Kim et el. 2013
- EIA 2017
- USDA 2009a
- Ingwersen et al. 2017
- BLM 2008
- EIA 2016
- EIA 2013
- Edelen and Ingwersen 2017
- Lovelace 2009
- USDA 2009b
- Macknick et al. 2011
- Yienger et al. 1995
- Blackhurst et al. 2010
- USEPA 2016c
- USGS 2016
- Statistics Canada 2010
- EIA 2015
- USEPA 2016b
- Ingwersen et al. DRAFT
- USDA 2016
- USGS 2015
- BEA 2015
- Torcellini et al. 2003
- USEPA 2016a
- USEPA 2015a
- USEPA 2015b
- Maupin et al. 2014
- Goebes et al. 2003
- USDA 2014
- USDA 2006
