# Dimensional stone; at mine

Dataset: openLCA process, unit process
Category: 2123: Nonmetallic Mineral Mining and Quarrying
Geography: United States
Time period: 2017-01-01 to 2017-12-31
Data quality: US EPA - Process Pedigree Matrix (1;1)
Exchange data quality scheme: US EPA - Flow Pedigree Matrix
Generated by: US EPA with CSRA and ERG
Owner: US EPA
Published in: Yang, Ingwersen et al. 2017
restrictionsDescription: This model shold be appropriately cited (see Yang, Ingwersen et al. 2017 source or Publication field) when used. Any changes or derivations of this model by the user should be documented. The model itself and any results from use of this model shall not be construed to consitute US EPA opinion or policy.
copyright: false

## General comment
BEA Code & Name is '212310:Stone mining and quarrying'. Description of the primary industry producing this good or service, adapted from the Census Bureau NAICS 2007 descriptions: This industry comprises (1) establishments primarily engaged in developing the mine site, mining or quarrying dimension stone (i.e., rough blocks and/or slabs of stone), or mining and quarrying crushed and broken stone and/or (2) preparation plants primarily engaged in beneficiating stone (e.g., crushing, grinding, washing, screening, pulverizing, and sizing).

## Technology
The process describes the average US production of this good or service within this NAICS-based grouping defined in the BEA 2007 detailed input-output tables (BEA 2015). Distribution, wholesale and retailing of this good or service, use, and final disposal are not included. Creation of a product system with this process will enable modeling of all upstream (supply-chain) activities.

## Geography
Data represent the 50 US states

## Time period
2017 was the year in which this version of USEEIO was released and is the target date for the model

## Reference product
- Dimensional stone; at mine: 1 USD

## Inputs from technosphere
All rows: data quality (1,3,1,1,1)
- Cutlery and handtools; at manufacturer: 0.000190428 USD
- Accounting, tax preparation, bookkeeping, and payroll: 0.00474674 USD
- Clothing; at manufacturer: 2.26391e-8 USD
- Ready-mix concrete; at manufacturer: 4.90417e-5 USD
- Rubber tires; at manufacturer: 0.0021292 USD
- Motor vehicle steering, suspension components (except spring), and brake systems; at manufacturer: 0.000785758 USD
- Synthetic rubber and artificial and synthetic fibers; at manufacturer: 3.33834e-5 USD
- Welding and Soldering Equipment, Scales and Balances, and other general purpose machinery; at manufacturer: 8.22998e-7 USD
- Other engine equipment; at manufacturer: 3.79232e-6 USD
- Plastics; at manufacturer: 4.02041e-6 USD
- Employment services: 0.00017437 USD
- Wholesale trade: 0.0336101 USD
- Finished and coated fabric; at manufacturer: 4.26672e-6 USD
- All other forging, stamping, and sintering; at manufacturer: 3.52955e-7 USD
- Compressed Gases; at manufacturer: 1.06426e-5 USD
- Watches, clocks, and other measuring and controlling devices; at manufacturer: 2.08089e-5 USD
- Legal services: 0.00590321 USD
- Transmission and power train parts; at manufacturer: 0.0012385 USD
- Pipeline transport: 0.000535215 USD
- Screws, nuts, and bolts; at manufacturer: 0.000355879 USD
- Corn products; at manufacturer: 4.41194e-5 USD
- Air transport: 0.000801166 USD
- Securities and commodities brokerage and exchanges: 0.000754354 USD
- Air and gas compressors; at manufacturer: 2.29427e-8 USD
- Heating equipment other than warm air furnaces; at manufacturer: 1.2325e-5 USD
- Rail transport: 0.00212672 USD
- Full-service restaurants: 0.000227481 USD
- Investigation and security: 0.000478903 USD
- Dry-cleaning and laundry: 1.21865e-6 USD
- Food and beverage stores: 1.76478e-6 USD
- Carbon and graphite products; at manufacturer: 1.1377e-5 USD
- Metal windows, doors, and architectural products; at manufacturer: 3.65132e-6 USD
- Books, newspapers, magazines, and other print media; at manufacturer: 1.13999e-5 USD
- Other vehicle parts; at manufacturer: 0.000889768 USD
- Commercial equipment rental: 0.0225701 USD
- General merchandise stores: 2.55991e-6 USD
- Plastic pipe, fittings, and sausage casings; at manufacturer: 3.72761e-5 USD
- Metal structural products; at manufacturer: 5.34921e-6 USD
- Cardboard containers; at manufacturer: 0.000373178 USD
- Light gauge metal cans, boxes, and containers; at manufacturer: 2.49267e-6 USD
- Construction machinery; at manufacturer: 0.0110913 USD
- Facilities support: 1.40283e-5 USD
- Veneer, plywood, and engineered wood; at manufacturer: 0.000201964 USD
- Pumps and pumping equipment; at manufacturer: 1.16355e-6 USD
- Valve and fittings (except for plumbing); at manufacturer: 5.8367e-5 USD
- Relay and industrial controls; at manufacturer: 1.73579e-5 USD
- Paints and coatings; at manufacturer: 4.35796e-6 USD
- Primary copper; at manufacturer: 3.03386e-5 USD
- Speed changers, industrial high-speed drives, and gears; at manufacturer: 2.27539e-5 USD
- Office administration: 0.000198307 USD
- Other real estate: 0.000493896 USD
- All other food and drinking places: 4.19645e-6 USD
- Passenger ground transport: 0.000148147 USD
- Custom metal rolls; at manufacturer: 2.24127e-6 USD
- Metal coatings, engravings, and heat treatments; at manufacturer: 0.000903772 USD
- Dimensional stone; at mine: 0.0365097 USD
- Other secondary nonferrous metal products; at manufacturer: 4.07504e-7 USD
- Other petroleum and coal products; at manufacturer: 0.000467163 USD
- Cardboard; at manufacturer: 0.000476211 USD
- Performances: 5.01953e-7 USD
- Nondepository credit intermediation and related activities: 0.00211592 USD
- Mining and oil/gas field machinery; at manufacturer: 0.00692499 USD
- Chemicals (except basic chemicals, agrichemicals, polymers, paints, pharmaceuticals,soaps, cleaning compounds); at manufacturer: 0.0101437 USD
- Other rubber products; at manufacturer: 0.00142453 USD
- Architectural, engineering, and related services: 0.0360012 USD
- Data processing and hosting: 0.000231311 USD
- Communications equipment; at manufacturer: 2.35281e-7 USD
- Cement; at manufacturer: 0.001614 USD
- Investment advice, portfolio management, and other financial advising services: 0.0137868 USD
- Limited-service restaurants: 0.000390383 USD
- Waste management and remediation: 0.0018615 USD
- Cut stone and stone products; at manufacturer: 0.000206531 USD
- Golf courses, marinas, ski resorts, fitness and other rec centers and industries: 7.33674e-5 USD
- Semiconductors; at manufacturer: 4.63172e-5 USD
- Unrefined oil and gas; at extraction site: 0.000233583 USD
- Postal service: 1.1302e-6 USD
- Paper; at manufacturer: 9.38908e-8 USD
- State and local government enterprises: 1.76964e-5 USD
- Adhesives; at manufacturer: 2.0419e-6 USD
- Coal; at mine: 0.00128853 USD
- Lumber and treated lumber; at manufacturer: 1.2531e-6 USD
- Other basic organic chemicals; at manufacturer: 0.000891846 USD
- Other textiles; at manufacturer: 0.000246692 USD
- Industrial process variable instruments; at manufacturer: 1.59178e-5 USD
- Clay and ceramic products; at manufacturer: 0.000100672 USD
- Truck transport: 0.00674784 USD
- Noncomparable imports: 0.000115681 USD
- Company and enterprise management: 0.0298286 USD
- Other support activities for mining: 0.0185676 USD
- Fertilizers; at manufacturer: 3.99203e-6 USD
- Marketing research and all other miscellaneous professional, scientific, and technical services: 0.000766907 USD
- Copper, nickel, lead, and zinc; at mine: 1.21596e-6 USD
- Ground or treated minerals and earth; at manufacturer: 0.000208654 USD
- Warehousing: 0.00845224 USD
- Scenic and sightseeing transportation and support activities for transportation: 0.00753575 USD
- Travel arrangement and reservation: 0.00142239 USD
- Other nonmetallic mineral products; at manufacturer: 0.000106968 USD
- Nonresidential building repair and maintanence: 0.0269908 USD
- Vehicles and parts sales: 0.000143271 USD
- Material handling equipment; at manufacturer: 0.00736579 USD
- Plastic bags, films, and sheets; at manufacturer: 5.14594e-6 USD
- Civic, social, professional, and similar organizations: 0.000531237 USD
- Storage batteries; at manufacturer: 5.22863e-5 USD
- Vehicle electrical and electronic equipment; at manufacturer: 0.00020199 USD
- Natural gas; at consumer: 0.00588247 USD
- Business support: 0.00122007 USD
- Glass and glass products; at manufacturer: 4.42251e-5 USD
- Aluminum; at manufacturer: 6.63656e-6 USD
- Independent artists, writers, and performers: 6.86515e-6 USD
- Fabric; at manufacturer: 2.27539e-5 USD
- Other concrete products; at manufacturer: 9.54915e-6 USD
- Synthetic dyes and pigments; at manufacturer: 3.88649e-5 USD
- Lime and gypsum products; at manufacturer: 8.24937e-6 USD
- Primary iron, steel, and ferroalloy products; at manufacturer: 0.00433469 USD
- Satellite, telecommunications resellers, and all other telecommunications: 0.000198772 USD
- Vegetable oils and by-products; at manufacturer: 1.1377e-5 USD
- Electronic equipment repair and maintenance: 0.000471754 USD
- Sand, gravel, clay, phosphate, other nonmetallic minerals; at mine: 0.00264067 USD
- Insurance carriers: 0.004392 USD
- Gasoline, fuels, and by-products of petroleum refining; at manufacturer: 0.0882192 USD
- Rubber and plastic belts and hoses; at manufacturer: 0.00141648 USD
- Sports: 3.06377e-6 USD
- Tobacco, cotton, sugarcane, peanuts, sugar beets, herbs and spices, and other crops; at farm: 0.000196711 USD
- Other support services: 0.000544151 USD
- Other basic inorganic chemicals; at manufacturer: 0.000401859 USD
- Magazines and journals; at publisher: 9.52281e-7 USD
- Software: 3.03805e-7 USD
- Gaskets, seals, musical instruments, fasteners, brooms, brushes, mop and other misc. goods; at manufacturer: 0.000203921 USD
- Metal hinges, keys, lock, and other hardware; at manufacturer: 0.000259089 USD
- Electricity; at consumer: 0.020154 USD
- Commercial machinery repair: 7.02106e-5 USD
- Computer systems design: 0.000283355 USD
- Specialized design: 0.000425727 USD
- Drinking water and wastewater treatment; at consumer: 0.000469685 USD
- Telecommunications: 0.00312229 USD
- Shelving and lockers; at manufacturer: 4.52782e-8 USD
- Iron, gold, silver, and other metal ores; at mine: 1.28754e-5 USD
- Buildings and dwellings services: 0.0035661 USD
- Insurance agencies and brokerages: 0.000550403 USD
- Printed circuit and electronic assembly; at manufacturer: 2.17622e-5 USD
- Cutting and machine tool accessory, rolling mill, and other metalworking machines; at manufacturer: 0.000935772 USD
- Machinery for the paper, textile, food or other industries (except semiconductor machinery); at manufacturer: 8.58057e-6 USD
- Mineral wool; at manufacturer: 5.70158e-5 USD
- Power boilers and heat exchangers; at manufacturer: 2.06484e-7 USD
- Management consulting: 0.000604623 USD
- Wireless telecommunications: 0.000805778 USD
- Monetary authorities and depository credit intermediation: 0.0076623 USD
- Wireless communications; at manufacturer: 1.41896e-8 USD
- Springs and wires; at manufacturer: 2.05821e-6 USD
- Consumer goods and general rental centers: 6.37708e-6 USD
- Environmental and other technical consulting services: 0.000198023 USD
- Vehicle engines and engine parts; at manufacturer: 0.00039661 USD
- External hard drives, CDs, other storage media; at manufacturer: 5.68848e-6 USD
- Asphalt pavement; at manufacturer: 7.21534e-5 USD
- Mechanical power transmission equipment; at manufacturer: 4.93002e-5 USD
- Computer terminals and other computer peripheral equipment; at manufacturer: 0.000200342 USD
- Secondary steel products; at manufacturer: 0.000664468 USD
- Other plastic products; at manufacturer: 0.000953536 USD
- Light fixtures; at manufacturer: 0.000214762 USD
- Water transport (boats, ships, ferries): 0.00163485 USD
- Other computer related services, including facilities management: 0.000141128 USD
- Paper bags and coated paper; at manufacturer: 0.000340123 USD
- Promoters and agents: 2.00989e-6 USD
- News syndicates, libraries, archives, Internet publishing and all other information services: 4.25688e-8 USD
- Petrochemicals; at manufacturer: 1.38351e-5 USD
- Electronic capacitors, resistors, coils, transformers, connectors and other components (except semiconductors and printed circuit assemblies); at manufacturer: 8.34222e-6 USD
- Advertising and public relations: 0.0014092 USD
- Household goods repair: 0.000142711 USD
- Vehicle rental and leasing: 0.00103599 USD
- Stationery; at manufacturer: 4.58854e-8 USD
- Vehicle repair: 0.000295332 USD
- Scientific research and development: 3.46733e-6 USD
- Wooden windows, door, and flooring; at manufacturer: 2.18094e-5 USD
- Heavy gauge metal tanks; at manufacturer: 2.29427e-7 USD
- Lessors of nonfinancial intangible assets: 0.00439756 USD
- Soap and cleaning compounds; at manufacturer: 6.25091e-5 USD
- Hotels and campgrounds: 0.000362751 USD
- Aluminum products; at manufacturer: 4.75421e-7 USD
- Metal pipe fittings, ball and roller bearings, industrial patterns, metal bath fixtures, other misc. fabricated metals; at manufacturer: 0.000383143 USD
- Abrasive products; at manufacturer: 3.71812e-5 USD
- Other retail: 2.61878e-6 USD
- Surgical appliance and supplies; at manufacturer: 3.6132e-6 USD
- Air conditioning, refrigeration, and warm air heating equipment; at manufacturer: 1.019e-5 USD
- Machine shops; at manufacturer: 0.000345024 USD

## Inputs from nature
- Zeolites: 1.94193e-5 kg; data quality (1,1,1,1,1)
- Occupation, mineral extraction site: 0.00281659 m2*a; data quality (1,3,1,1,1)
- Diatomite: 0.000272961 kg; data quality (1,1,1,1,1)
- Sodium chloride: 0.0137238 kg; data quality (1,1,1,1,1)
- Occupation, industrial area: 2.19267e-5 m2*a; data quality (4,2,1,1,1)
- Vermiculite: 3.02954e-5 kg; data quality (1,1,1,1,1)
- Sodium carbonate: 0.00354456 kg; data quality (1,1,1,1,1)
- Sand and gravel: 51.794 kg; data quality (1,1,1,1,1)
- Boron: 0.00118354 kg; data quality (1,1,1,1,1)
- Kyanite: 3.33249e-5 kg; data quality (1,1,1,1,1)
- Occupation, urban, discontinuously built: 0.000124891 m2*a; data quality (4,2,1,1,1)
- Water, saline: 0.0705447 m3; data quality (4,2,1,4,2)
- Phosphate ore: 0.00766473 kg; data quality (1,1,1,1,1)
- Clay, unspecified: 0.00449493 kg; data quality (1,1,1,1,1)
- Lithium: 2.6357e-7 kg; data quality (1,1,1,1,1)
- Pumice: 8.42211e-5 kg; data quality (1,1,1,1,1)
- Gypsum: 0.00333249 kg; data quality (1,1,1,1,1)
- Talc: 0.000184802 kg; data quality (1,1,1,1,1)
- Feldspar: 0.000160565 kg; data quality (1,1,1,1,1)
- Water, fresh: 0.025831, 0.026533 m3 (2 entries, compartments not in this file); data quality (4,2,1,4,2)
- Mica: 1.39359e-5 kg; data quality (1,1,1,1,1)
- Fluorspar: 3.45367e-5 kg; data quality (1,1,1,1,1)
- Occupation, industrial area, built up: 7.30889e-6 m2*a; data quality (4,2,1,1,1)
- Garnet: 9.75511e-6 kg; data quality (1,1,1,1,1)
- Stone: 63.9747 kg; data quality (1,1,1,1,1)
- Limestone: 0.996038 kg; data quality (1,1,1,1,1)
- Clay, bentonite: 0.00145418 kg; data quality (1,1,1,1,1)
- Kaolin: 0.00191164 kg; data quality (1,1,1,1,1)
- Barite: 0.000200858 kg; data quality (1,1,1,1,1)
- Peat: 0.000141782 kg; data quality (1,1,1,1,1)
- Potassium: 0.000213772 kg; data quality (1,1,1,1,1)
- Perlite: 0.000136632 kg; data quality (1,1,1,1,1)

## Emissions to nature
- 1,4-BENZOQUINONE: 9.31495e-9 kg; data quality (3,2,1,1,2)
- benzal chloride: 3.38702e-15 kg; data quality (5,1,1,1,3)
- Bis(2-chloroethyl)ether: 1.27013e-15 kg; data quality (2,1,1,1,3)
- hexane: 2.62655e-7 kg; data quality (3,2,1,1,3)
- Ethane, 1,2-dichloro-: 1.00764e-13, 2.2025e-12 kg (2 entries, compartments not in this file); data quality (4,1,1,1,3)
- phthalic anhydride: 3.19789e-11 kg; data quality (2,2,1,1,4)
- 2,2-BIS(4-HYDROXY-3,5-DIBROMOPHENYL)PROPANE: 4.24225e-11 kg; data quality (5,1,1,1,3)
- ETHENE: 2.90738e-9 kg; data quality (3,1,1,1,4)
- silver: 3.60633e-11 kg; data quality (4,1,1,1,3)
- cyclohexane: 1.86937e-11 kg; data quality (4,1,1,1,3)
- Water, saline: 0.0619318 m3; data quality (4,2,1,1,2)
- Ethane, 2,2-dichloro-1,1,1-trifluoro-, HCFC-123: 7.6208e-11 kg; data quality (4,1,1,1,3)
- 2-Mercaptobenzothiazole: 6.77405e-16 kg; data quality (3,1,1,1,3)
- fluorene: 1.38936e-9 kg; data quality (2,2,1,2,2)
- Ethene, trichloro-: 5.84262e-13 kg; data quality (5,1,1,1,3)
- biphenyl: 1.62744e-10 kg; data quality (4,2,1,1,2)
- 2,6-XYLIDINE: 3.79315e-12 kg; data quality (5,1,1,1,3)
- 1,1,1,2-Tetrachloroethane: 7.87483e-12 kg; data quality (3,1,1,1,3)
- ethylene oxide: 1.46333e-13 kg; data quality (3,2,1,1,4)
- 2,2,4-trimethylpentane: 1.67302e-7 kg; data quality (3,2,1,1,3)
- DIETHANOLAMINE: 3.48074e-9, 5.87225e-11 kg (2 entries, compartments not in this file); data quality (4,1,1,1,3)
- cumene: 3.75828e-9 kg; data quality (4,2,1,1,2)
- ethylene glycol: 4.06256e-12 kg; data quality (5,1,1,1,3)
- chloroform: 8.59521e-10 kg; data quality (4,2,1,1,4)
- chromium: 6.90945e-13, 9.09901e-12 kg (2 entries, compartments not in this file); data quality (4,1,1,1,3)
- manganese: 1.17277e-12 kg; data quality (4,1,1,1,4)
- p-cresol: 3.90444e-10 kg; data quality (4,2,1,1,3)
- Methane: 3.46597e-5 kg; data quality (4,2,1,4,1)
- Propene, 1,3-dichloro-: 1.13143e-11 kg; data quality (3,2,1,1,3)
- methane, dichloro-, hcc-30: 4.33241e-8 kg; data quality (4,2,1,1,2)
- 1-Methyl-2-pyrrolidinone: 1.81248e-11 kg; data quality (5,1,1,1,3)
- 1,2-dinitrobenzene: 8.46756e-15 kg; data quality (5,1,1,1,3)
- naphthalene: 2.80276e-12 kg; data quality (4,1,1,1,3)
- Methane, monochloro-, R-40: 8.46756e-14 kg; data quality (3,1,1,1,3)
- ammonia: 5.04694e-6 kg; data quality (3,2,1,1,3)
- trichloroethylene: 1.40169e-9 kg; data quality (4,2,1,1,4)
- 2,4,6-trichlorophenol: 2.33904e-16 kg; data quality (2,2,1,1,4)
- Benzo(g,h,i)perylene: 9.20957e-14, 7.78239e-14 kg (2 entries, compartments not in this file); data quality (2,1,1,1,3)
- vanadium: 3.86833e-10 kg; data quality (5,1,1,1,3)
- epichlorohydrin: 2.40073e-11 kg; data quality (3,2,1,1,4)
- Ethane, 1,1,1-trifluoro-, HFC-143a: 8.92905e-10 kg; data quality (4,2,1,4,1)
- mercury: 1.14362e-9 kg; data quality (2,2,1,1,3)
- Asbestos: 2.61725e-11 kg; data quality (5,2,1,1,1)
- NITROMETHANE: 4.0729e-12 kg; data quality (5,1,1,1,3)
- propylene oxide: 2.66807e-11 kg; data quality (3,2,1,1,4)
- Propane, 1,2-dichloro-: 9.36281e-10 kg; data quality (4,2,1,1,3)
- benzene, chloro-: 5.80372e-10 kg; data quality (4,2,1,1,3)
- hydrogen sulfide: 1.41639e-8 kg; data quality (3,1,1,1,4)
- Indeno(1,2,3-cd)pyrene: 5.78086e-12 kg; data quality (2,2,1,1,3)
- carbon tetrachloride: 4.21523e-10 kg; data quality (4,2,1,1,4)
- Ethane, 1,1,2-trichloro-: 2.71893e-13 kg; data quality (4,1,1,1,3)
- maleic anhydride: 4.19708e-12 kg; data quality (2,2,1,1,3)
- 1,4-dichlorobenzene: 6.01203e-11 kg; data quality (2,2,1,1,3)
- BUTYL ISOCYANATE: 5.96369e-14 kg; data quality (4,2,1,1,4)
- ALPHA-NAPHTHYLAMINE: 1.61411e-13 kg; data quality (3,1,1,1,3)
- naphthalene: 4.12417e-8 kg; data quality (3,2,1,1,1)
- 1,1-DICHLOROETHYLENE: 6.77405e-14 kg; data quality (4,1,1,1,3)
- methyl isobutyl ketone: 1.05575e-8 kg; data quality (4,2,1,1,2)
- Dimethyl sulfate: 4.96529e-12 kg; data quality (2,2,1,1,3)
- Phthalate, dimethyl-: 3.85604e-11 kg; data quality (4,2,1,1,5)
- QUINOLINE: 2.56025e-10 kg; data quality (3,2,1,1,3)
- 2-METHOXYETHANOL: 1.65446e-12 kg; data quality (5,1,1,1,3)
- nitric acid: 4.23378e-14, 1.19284e-9 kg (2 entries, compartments not in this file); data quality (3,1,1,1,3)
- 2,4-D, ISOOCTYL ESTER: 8.46756e-14 kg; data quality (5,1,1,1,3)
- selenium: 9.31134e-10 kg; data quality (2,2,1,1,3)
- ALLYL ALCOHOL: 2.00088e-11 kg; data quality (4,1,1,1,3)
- Zinc: 1.42903e-10 kg; data quality (5,1,1,1,4)
- m-cresol: 6.45103e-10 kg; data quality (4,2,1,1,3)
- HCFC-142b: 2.79429e-12, 1.03982e-9 kg (2 entries, compartments not in this file); data quality (2,1,1,1,3)
- 2,6-Dinitrotoluene: 4.03527e-14 kg; data quality (5,1,1,1,3)
- 2-Chloro-1,1,1-trifluoroethane: 3.72573e-13, 1.86286e-10 kg (2 entries, compartments not in this file); data quality (2,1,1,1,3)
- catechol: 3.55372e-12 kg; data quality (5,2,1,1,4)
- Methane, dichloro-, HCC-30: 3.72573e-13 kg; data quality (5,1,1,1,3)
- Titanium: 1.99202e-10 kg; data quality (5,2,1,1,3)
- aniline: 3.83365e-10 kg; data quality (4,2,1,1,3)
- pyrene: 7.44015e-10 kg; data quality (2,2,1,1,3)
- Methyl acrylate: 7.70736e-12 kg; data quality (3,1,1,1,3)
- M-DINITROBENZENE: 8.46756e-15 kg; data quality (5,1,1,1,3)
- methanol: 4.23378e-14 kg; data quality (3,1,1,1,3)
- Chloroacetic acid: 2.05712e-12 kg; data quality (3,2,1,1,4)
- nickel: 1.0609e-7 kg; data quality (3,2,1,1,3)
- Benzo(g,h,i)perylene: 5.9516e-11 kg; data quality (3,2,1,1,2)
- nickel: 1.07356e-11 kg; data quality (4,1,1,1,3)
- MOLYBDENUM(VI): 8.46756e-14, 1.68055e-10, 1.05734e-11 kg (3 entries, compartments not in this file); data quality (3,1,1,1,3)
- Methane, dibromo-: 2.4301e-11 kg; data quality (5,1,1,1,3)
- Ethane, 1,1-dichloro-1-fluoro-, HCFC-141b: 8.07805e-11, 1.52416e-12 kg (2 entries, compartments not in this file); data quality (2,1,1,1,3)
- particulates, < 10 um: 0.00308105 kg; data quality (3,2,1,1,3)
- beryllium: 7.13668e-11 kg; data quality (2,2,1,1,3)
- DICHLOROBENZENE: 5.39939e-13 kg; data quality (4,1,1,1,3)
- Cobalt: 9.85985e-10 kg; data quality (3,2,1,1,3)
- sulfur dioxide: 8.26366e-5 kg; data quality (2,2,1,1,3)
- 2-methylnaphthalene: 3.79836e-9 kg; data quality (2,2,1,1,2)
- Benzo(b)fluoranthene: 1.31389e-10 kg; data quality (2,2,1,1,3)
- Ethylene glycol: 1.27817e-10 kg; data quality (5,1,1,1,3)
- para-xylene: 9.28853e-11 kg; data quality (3,2,1,4,1)
- Dibenz(a,h)anthracene: 1.12693e-11 kg; data quality (2,2,1,1,3)
- methane, monochloro-, r-40: 1.71015e-9 kg; data quality (3,2,1,1,4)
- Hydrazine: 1.24968e-11 kg; data quality (4,2,1,1,4)
- Methyl iodide: 8.76631e-12 kg; data quality (4,2,1,1,5)
- HYDROCHLORIC ACID: 2.80168e-8 kg; data quality (2,1,1,1,4)
- Metaldehyde (tetramer): 8.46756e-16 kg; data quality (3,1,1,1,3)
- 2,4/2,6-toluenediisocyanate (mixture): 4.23378e-15 kg; data quality (3,1,1,1,3)
- chlorine: 8.124e-9 kg; data quality (4,2,1,1,4)
- Hydrocarbons, aromatic: 6.15495e-9 kg; data quality (4,2,1,2,1)
- ALUMINUM OXIDE: 3.7528e-12 kg; data quality (5,1,1,1,3)
- Hexachlorocyclopentadiene: 4.23378e-15 kg; data quality (5,1,1,1,3)
- HCFC-132b: 1.35481e-13, 2.08048e-10 kg (2 entries, compartments not in this file); data quality (2,1,1,1,3)
- propanal: 6.51913e-8 kg; data quality (3,2,1,4,1)
- benz[a]anthracene: 7.49456e-11 kg; data quality (2,2,1,1,3)
- methyl methacrylate: 5.38142e-9 kg; data quality (4,2,1,1,3)
- carbonyl sulfide: 3.77638e-8 kg; data quality (4,2,1,1,5)
- Diuron: 8.46756e-14 kg; data quality (2,1,1,1,3)
- lead: 4.15729e-12 kg; data quality (3,1,1,1,3)
- 1,2-DICHLOROETHYLENE: 4.23378e-14, 3.41243e-11 kg (2 entries, compartments not in this file); data quality (5,1,1,1,3)
- methanol: 8.43294e-8 kg; data quality (4,2,1,1,3)
- Benzene, chloro-: 4.23378e-14 kg; data quality (3,1,1,1,3)
- 1,1,2,2-tetrachloroethane: 6.74651e-11 kg; data quality (3,2,1,1,3)
- acrylic acid: 2.77688e-11 kg; data quality (4,2,1,1,3)
- t-butyl methyl ether: 1.26577e-9 kg; data quality (3,2,1,1,3)
- methane, chlorodifluoro-, hcfc-22: 8.85622e-10 kg; data quality (4,1,1,1,3)
- NITRIC ACID: 8.46756e-14 kg; data quality (3,1,1,1,3)
- phenanthrene: 1.52416e-14 kg; data quality (3,1,1,1,3)
- ozone: 1.89673e-12 kg; data quality (4,1,1,1,3)
- Sodium formate: 3.58432e-11 kg; data quality (3,1,1,1,3)
- 2,4-dinitrophenol: 4.83969e-14 kg; data quality (5,2,1,1,3)
- fluorine: 1.48352e-11 kg; data quality (4,1,1,1,3)
- Methane, difluoro-, HFC-32: 1.21532e-9 kg; data quality (4,2,1,4,1)
- lead: 7.65316e-9 kg; data quality (3,2,1,1,3)
- toluene: 7.43151e-7 kg; data quality (3,2,1,1,3)
- Anthracene: 1.52416e-14 kg; data quality (4,1,1,1,3)
- Zinc: 7.29905e-11 kg; data quality (5,1,1,1,3)
- 1,1-DICHLOROETHYLENE: 1.76623e-10 kg; data quality (3,2,1,1,4)
- Chrysene, 5-methyl-: 9.48005e-17 kg; data quality (2,2,1,1,4)
- Aluminum: 1.46205e-9 kg; data quality (4,1,1,1,3)
- ethyl acrylate: 8.76752e-9 kg; data quality (4,2,1,1,3)
- 2-ethoxyethyl acetate: 3.63851e-13 kg; data quality (4,2,1,1,4)
- antimony: 3.67714e-10 kg; data quality (3,2,1,1,3)
- BENZOIC TRICHLORIDE (BENZOTRICHLORIDE): 5.19787e-14 kg; data quality (3,2,1,1,4)
- formic acid: 3.93994e-10 kg; data quality (3,1,1,1,3)
- ethane, 1,1,2-trichloro-: 1.23075e-10 kg; data quality (4,2,1,1,4)
- NITROGEN TRIFLUORIDE: 6.33046e-11 kg; data quality (3,1,1,1,3)
- carbon monoxide: 0.000263129 kg; data quality (2,2,1,1,3)
- HYDROFLUORIC ACID: 1.97714e-10 kg; data quality (3,1,1,1,3)
- Propane, 1,1,1,3,3,3-hexafluoro-, HCFC-236fa: 2.41221e-11 kg; data quality (4,2,1,4,1)
- acetophenone: 1.49219e-9 kg; data quality (4,2,1,1,3)
- PERACETIC ACID: 7.84943e-12 kg; data quality (4,1,1,1,3)
- Carbon dioxide: 0.406792 kg; data quality (4,2,1,4,1)
- VOC, volatile organic compounds: 3.99675e-5 kg; data quality (3,2,1,1,3)
- hydrogen fluoride: 1.85989e-8 kg; data quality (2,2,1,1,3)
- Phthalate, dibutyl-: 6.84835e-10 kg; data quality (4,2,1,1,3)
- pentachlorophenol: 8.07053e-14 kg; data quality (5,1,1,1,3)
- 2-nitropropane: 1.2428e-11 kg; data quality (5,2,1,1,3)
- ammonia: 1.64109e-9 kg; data quality (3,1,1,1,3)
- Chloropicrin: 6.63857e-12 kg; data quality (3,1,1,1,3)
- hydrogen chloride: 1.48953e-5 kg; data quality (2,2,1,1,3)
- ACRYLAMIDE: 4.06955e-12 kg; data quality (4,2,1,1,4)
- 1,2-BUTYLENE OXIDE: 3.42518e-11 kg; data quality (4,2,1,1,4)
- particulates, < 2.5 um: 0.000596003 kg; data quality (3,2,1,1,3)
- acrolein: 2.14555e-8 kg; data quality (3,2,1,4,1)
- cadmium: 4.8676e-10 kg; data quality (3,2,1,1,3)
- hydroquinone: 3.13899e-12 kg; data quality (3,2,1,1,3)
- Propene: 1.81109e-10 kg; data quality (3,1,1,1,5)
- 1,1,1-trichloroethane: 2.02895e-9 kg; data quality (4,2,1,1,2)
- acenaphthylene: 6.64506e-10 kg; data quality (3,2,1,3,2)
- mercury: 1.82274e-13 kg; data quality (3,1,1,1,3)
- formaldehyde: 1.12772e-6 kg; data quality (3,2,1,3,2)
- copper: 2.14711e-10 kg; data quality (4,1,1,1,3)
- AMMONIA: 1.65263e-9 kg; data quality (3,1,1,1,5)
- 1,4-dioxane: 1.08425e-11 kg; data quality (4,2,1,1,4)
- methylene diphenyl diisocyanate: 3.98367e-9 kg; data quality (4,2,1,1,5)
- styrene: 4.85479e-8 kg; data quality (4,2,1,1,4)
- PYRIDINE: 2.44537e-11 kg; data quality (4,1,1,1,3)
- polychlorinated biphenyls: 6.06249e-11 kg; data quality (3,2,1,1,1)
- TERT-BUTYL ALCOHOL: 1.01874e-10 kg; data quality (4,1,1,1,3)
- 3-methylcholanthrene: 4.43861e-15 kg; data quality (2,2,1,1,3)
- toluene: 4.23378e-14 kg; data quality (5,1,1,1,3)
- Triethyl amine: 2.7438e-10 kg; data quality (4,2,1,1,4)
- STYRENE OXIDE: 1.43255e-11 kg; data quality (5,2,1,1,3)
- Ethane, pentafluoro-, HFC-125: 2.08692e-9 kg; data quality (4,2,1,4,1)
- arsenic: 9.25638e-10 kg; data quality (3,2,1,2,3)
- Ethylene glycol monoethyl ether: 8.46756e-17, 6.39212e-10 kg (2 entries, compartments not in this file); data quality (5,1,1,1,3)
- Ethane, 1,1,1,2-tetrafluoro-, HFC-134a: 7.86585e-9 kg; data quality (4,2,1,4,1)
- Ethene, chloro-: 4.3486e-10 kg; data quality (3,2,1,1,4)
- benzene: 2.81734e-7 kg; data quality (3,2,1,2,2)
- acetonitrile: 2.11215e-9 kg; data quality (3,2,1,1,3)
- Benzo(k)fluoranthene: 5.71406e-12 kg; data quality (2,2,1,2,2)
- acetaldehyde: 3.51754e-7 kg; data quality (3,2,1,4,1)
- Vinyl acetate: 8.21279e-13 kg; data quality (4,1,1,1,4)
- m-xylene: 2.3777e-9 kg; data quality (3,2,1,4,1)
- 1,2-DICHLOROBENZENE: 1.02173e-10 kg; data quality (5,1,1,1,3)
- Pentachloroethane: 4.88578e-12 kg; data quality (2,1,1,1,3)
- benzene: 3.133e-13 kg; data quality (3,1,1,1,3)
- Benzo(a)anthracene: 9.61073e-14 kg; data quality (2,2,1,1,1)
- 1,2-dibromo-3-chloropropane: 5.51841e-15 kg; data quality (4,2,1,1,4)
- ethylene glycol: 1.2813e-8 kg; data quality (5,2,1,1,3)
- bis(2-chloroethyl)ether: 4.98156e-12 kg; data quality (3,2,1,1,3)
- toluene-2,4-diisocyante: 2.28975e-15 kg; data quality (3,2,1,1,4)
- ALLYL CHLORIDE: 8.77545e-12 kg; data quality (3,2,1,1,4)
- Carbon disulfide: 8.89094e-14 kg; data quality (4,1,1,1,3)
- CHLOROPRENE: 1.55825e-15 kg; data quality (2,2,1,1,4)
- vinyl acetate: 1.50587e-7 kg; data quality (4,2,1,1,3)
- Ethene, tetrachloro-: 4.82651e-13 kg; data quality (3,1,1,1,3)
- Dinitrogen monoxide: 1.39378e-5 kg; data quality (4,2,1,4,1)
- ethane, 1,2-dichloro-: 1.18942e-9 kg; data quality (3,2,1,1,4)
- Hexachlorocyclopentadiene: 2.78117e-12 kg; data quality (3,2,1,1,4)
- ALUMINUM PHOSPHIDE: 2.42116e-12 kg; data quality (5,1,1,1,3)
- 1,1-DICHLOROETHANE: 6.77405e-13 kg; data quality (4,1,1,1,3)
- hexachloroethane: 3.48954e-12 kg; data quality (4,2,1,1,4)
- SEC-BUTYL ALCOHOL: 5.68088e-12 kg; data quality (5,1,1,1,3)
- dibenzofuran: 1.52106e-9 kg; data quality (4,2,1,1,1)
- bromoform: 1.03432e-10 kg; data quality (3,2,1,1,4)
- Styrene: 1.96865e-12 kg; data quality (3,1,1,1,5)
- NITROUS ACID: 9.8243e-11 kg; data quality (5,1,1,1,3)
- BUTYL ACRYLATE: 7.86877e-12 kg; data quality (4,1,1,1,3)
- Xylene: 2.25535e-7 kg; data quality (4,2,1,2,2)
- hexachlorobenzene: 7.30562e-14 kg; data quality (3,2,1,1,4)
- butadiene: 6.043e-8 kg; data quality (2,2,1,2,1)
- 2-Propanol: 2.09834e-12 kg; data quality (2,1,1,1,3)
- 2,4-Diaminotoluene: 4.95036e-12 kg; data quality (2,2,1,1,4)
- 4,4'-isopropylidenediphenol: 1.08385e-12 kg; data quality (4,1,1,1,3)
- Methane, tetrachloro-, R-10: 1.69351e-14 kg; data quality (3,1,1,1,3)
- Chloroform: 4.06443e-13 kg; data quality (3,1,1,1,3)
- MCPA - SODIUM SALT: 4.23378e-14 kg; data quality (5,1,1,1,3)
- anthracene: 1.07775e-10 kg; data quality (3,2,1,1,2)
- diethanolamine: 1.51109e-10 kg; data quality (3,2,1,1,3)
- ethane, 1,2-dibromo-: 5.59804e-11 kg; data quality (2,2,1,1,3)
- Chromium, ion: 6.16159e-9 kg; data quality (2,2,1,1,3)
- Creosol: 8.23298e-12, 6.55813e-11 kg (2 entries, compartments not in this file); data quality (5,1,1,1,3)
- phenanthrene: 2.95319e-9 kg; data quality (3,2,1,2,2)
- o-Xylene: 1.0896e-9 kg; data quality (3,2,1,4,1)
- isophorone: 7.03418e-11 kg; data quality (2,2,1,1,3)
- DNOC: 4.83969e-14 kg; data quality (2,2,1,1,3)
- ethene, tetrachloro-: 1.15879e-9 kg; data quality (3,2,1,1,4)
- barium: 1.99261e-11 kg; data quality (4,1,1,1,3)
- 4-nitroaniline: 4.03527e-14 kg; data quality (5,1,1,1,3)
- o-toluidine: 3.80483e-10 kg; data quality (4,2,1,1,3)
- benzene, ethyl-: 1.04595e-7 kg; data quality (4,2,1,2,3)
- carbon disulfide: 7.30824e-9 kg; data quality (4,2,1,1,3)
- toluene, 2,4-dinitro-: 1.65135e-14 kg; data quality (5,2,1,1,3)
- acrylonitrile: 6.58967e-9 kg; data quality (4,2,1,1,3)
- Ethane, 2-chloro-1,1,1,2-tetrafluoro-, HCFC-124: 9.56834e-12 kg; data quality (4,1,1,1,3)
- Chrysene: 1.23276e-10 kg; data quality (2,2,1,1,2)
- 1,2,4-trimethylbenzene: 7.14544e-11 kg; data quality (5,1,1,1,4)
- Cyclohexanol: 3.79315e-12 kg; data quality (4,1,1,1,3)
- benzyl chloride: 9.37163e-11 kg; data quality (2,2,1,1,3)
- CFC-114: 4.80153e-10 kg; data quality (5,1,1,1,3)
- 1,4-dinitrobenzene: 8.46756e-15 kg; data quality (5,1,1,1,3)
- Chromium VI: 2.75658e-9 kg; data quality (3,2,1,1,3)
- Hydrazine, methyl-: 1.72722e-11 kg; data quality (2,2,1,1,3)
- acenaphthene: 8.92091e-10 kg; data quality (3,2,1,2,2)
- Ethane, 1,1,1-trichloro-, HCFC-140: 1.15243e-11 kg; data quality (3,1,1,1,3)
- Nitrobenzene: 8.80461e-10 kg; data quality (4,2,1,1,3)
- monochloroethane: 2.56424e-10 kg; data quality (3,2,1,1,4)
- IRON PENTACARBONYL: 2.38955e-10 kg; data quality (5,1,1,1,3)
- phthalate, dioctyl-: 5.72258e-10 kg; data quality (3,2,1,1,1)
- nitrogen oxides: 0.000413096 kg; data quality (2,2,1,1,3)
- Water, fresh: 0.0312316 m3; data quality (4,2,1,1,2)
- mercury: 1.60305e-9 kg; data quality (3,1,1,1,5)
- phosgene: 4.52439e-12 kg; data quality (5,2,1,1,4)
- benzo(a)pyrene: 1.02945e-11 kg; data quality (2,2,1,2,2)
- Benzene, 1,2,4-trimethyl-: 4.23378e-14 kg; data quality (5,1,1,1,3)
- ethylbenzene: 7.14488e-10 kg; data quality (4,1,1,1,5)
- Phosphorus: 2.63802e-6 kg; data quality (2,1,1,1,5)
- 2-chloro-1-phenylethanone: 7.33557e-13 kg; data quality (2,2,1,1,3)
- PHOSPHORUS: 3.04125e-9 kg; data quality (2,2,1,1,2)
- hexachloro-1,3-butadiene: 1.71931e-11 kg; data quality (4,2,1,1,3)
- manganese: 6.19267e-8 kg; data quality (3,2,1,1,3)
- methane, bromo-, halon 1001: 8.0997e-10 kg; data quality (3,2,1,1,4)
- bromine: 6.01603e-10 kg; data quality (5,1,1,1,3)
- Sulfuric acid: 6.44567e-8 kg; data quality (2,1,1,1,4)
- Cresol: 2.10858e-11 kg; data quality (4,2,1,1,3)
- p-phenylenediamine: 6.35026e-19 kg; data quality (5,2,1,1,4)
- lead: 9.36592e-7 kg; data quality (3,1,1,1,5)
- N,N-DIMETHYLANILINE: 2.41985e-13 kg; data quality (5,2,1,1,3)
- Nickel, ion: 2.80062e-12 kg; data quality (3,2,1,1,3)
- 4,4'-METHYLENEDIANILINE: 4.1583e-15 kg; data quality (4,2,1,1,4)
- phenol: 3.5353e-8 kg; data quality (4,2,1,1,1)
- fluoranthene: 3.70085e-10 kg; data quality (2,2,1,2,3)
- cyanide: 2.55898e-9 kg; data quality (2,2,1,1,4)
- chlorine: 2.14681e-10 kg; data quality (3,1,1,1,3)
- Nitrogen: 0.000187108 kg; data quality (4,2,1,1,5)
- butanol: 1.48527e-10 kg; data quality (5,1,1,1,3)
- Phosphine: 4.59668e-11 kg; data quality (4,2,1,1,4)
- 1,3-dichlorobenzene: 2.27707e-15 kg; data quality (2,1,1,1,3)
- 1,2,4-trichlorobenzene: 8.27148e-12 kg; data quality (4,2,1,1,4)
- DIPHENYLAMINE: 2.01763e-13 kg; data quality (1,1,1,1,3)
- Benzene, hexachloro-: 8.46756e-16 kg; data quality (4,1,1,1,3)
- Dimethylamine: 4.53566e-11 kg; data quality (3,1,1,1,3)
- N-Nitrosodipropylamine: 4.03527e-14 kg; data quality (5,1,1,1,3)
- diisocyanates: 1.46614e-16 kg; data quality (4,1,1,1,5)
- dimethyl formamide: 1.72952e-9 kg; data quality (4,2,1,1,3)
- 2,4-dimethylphenol: 8.47406e-15 kg; data quality (4,1,1,1,3)

## Inventory method
Input-output

## Modelling constants
The reference unit of all processes is 1 USD2013 of the good or service. The technosphere inputs are based on the US BEA detailed input-output tables for 2007. The IO tables are combined to develop a commodity-by-commodity model based on the the industry-technology assumption (see Suh et al., 2010), which assumes all commodities produced by a given industry have the same input structure, but that multiple industries can produce the same commodity. Thus, model technosphere flows represent commodity outputs (and not industry outputs) from other processes in the model. There are no by-products included in these processes. All commodity production is based on US-conditions, despite in reality that some goods and services are produced overseas, as USEEIO v1.1 is a single-region IO model.

## Completeness
The input-output approach assures that all purchased inputs associated with the sectors making these commodities as reported in the US census for 2007 are included. The direct resources extracted including minerals, energy sources, water and land occupied are included. Emissions to air include all critieria air pollutants, greenhouse gases, and hazardous and toxic air pollutants as defined by US EPA. Releases to water include toxics, total nitrogen and total phosphorus, and water discharges. Releases to soil or groundwater include toxics and agriculutural pesticides. Some metal releases to air, water and soil are not included because they could not be speciated. Solid hazardous and non-hazardous wastes generated are not included as an elementary flows although purchases of waste services are included.

## Data treatment
Greenhouse gases are primarily from the US Greenhouse Gas Emission Inventory (USEPA 2016a). Biogenic C uptake is not included (change from version 1.0), as biogenic C emission are not included. Toxic releases to air, water and soil (except pesticides) are from the 2013 Toxic Release Inventory (USEPA 2015a). Criteria air pollutants and hazardous air pollutants are from the 2011 National Emissions Inventory (USEPA 2015b). All estimates are normalized by industry based on sector output in the data year, then converted to 2013 USD using relative sector-specific CPIs (if data year is not 2013). Energy use represent raw renewables or fossil fuel energies and is based on EIA data for 2014. See Table 1 in Yang, Ingwersen et al. 2017 and Supporting Information 1, and the v1.1 data update notes (Ingwersen et al. 2017) for all details on environmental data sources used.Mineral use is based on the Mineral Commodity Survey (USDA 2016). Only minerals extracted or imported in raw form by these sectors for further processing are included. Total mining water use is from the USGS report Water Use in the US (Maupin et al. 2014) and allocated to the eight mining sectors with employment-based factors provided by Blackhurst and colleagues (Blackhurst et al. 2010) and 2007 employment levels by mining sector provided by the U.S. Bureau of Labor Statistics. Land use for mining, oil, and gas extraction activities was estimated based on the Bureau of Land Management (BLM) Public Land Statistics 2007 report (BLM 2008). In all cases except hard rock leases, the BLM data could be mapped to a sector in the EEIO model without allocation. Land for hard rock leases were allocated to relevant mining sectors based on shares of employee compensation from the 2007 Use tables (BEA 2015).

## Data collection
2015-2016

## Sampling procedure
US federal government sources, including surveys and US EPA emissions databases are used as the primary sources. From these sources, data for US reporting establishments/facilities are aggregated by the NAICS sector as defined in the BEA detailed 2007 input-output tables. When level of sector aggregation differs, or when direct emissions are not reported but modeled, additional sources are used to make allocations and estimates.

## Review details
In regard to quality assurance and peer-review, each dataset created went through Quality Assurance as defined in a quality assurance project plans at US EPA, CSRA or ERG. The model was assembled with the IO model builder model (USEPA 2016c). Validation functions were used to check that all the model components were properly assembled and harmonized. Bayou Demeke and Santosh Ghimire provided internal peer review of the model methodology and the manuscript underwent standard EPA management review. An editor and two anonymous reviewers at the Journal of Cleaner Production reviewed the model. In regard to data quality evaluation, data quality assessment was performed at the flow and process levels according to the updated US EPA data quality assessment guidelines as defined in US EPA (2016b).

## Intended application
The primary application is for use in the US Environmentally-Extended Input-Ouput model, USEEIO, version 1.1. This model is being used by the US EPA for supporting tools that prioritize goods and services based on potential environmental impacts, resource use or emissions for large regions, including the US and US states, and as a strealined tool for organizations as a starting point to consider sustainable materials management. Model results are designed to provide meso/macro-level decision support.

## Project
USEEIO v1.1 was developed by the US EPA with CSRA and ERG with Wesley W. Ingwersen and David E. Meyer as research leads. Yi Yang was the technical lead on the work for CSRA (contract EP-C-15-012); Troy Hawkins was lead for ERG (contract EP-C-12-021).

## Sources
- BLM 2008
- EIA 2015
- Lovelace 2009
- Ingwersen et al. 2017
- Macknick et al. 2011
- USEPA 2016c
- Statistics Canada 2010
- BEA 2015
- USDA 2016
- USEPA 2016b
- Goebes et al. 2003
- USGS 2015
- Yienger et al. 1995
- Nickerson et al. 2011
- Torcellini et al. 2003
- USGS 2016
- USEPA 2015a
- USEPA 2016a
- EIA 2013
- Maupin et al. 2014
- Kim et el. 2013
- USDA 2009a
- USDA 2009b
- USDA 2014
- EIA 2017
- Ingwersen et al. DRAFT
- EIA 2016
- Blackhurst et al. 2010
- USDA 2006
- USEPA 2015b
- Edelen and Ingwersen 2017
