# Wholesale trade

Dataset: openLCA process, unit process
Category: 42: Wholesale Trade
Geography: United States
Time period: 2017-01-01 to 2017-12-31
Data quality: US EPA - Process Pedigree Matrix (1;1)
Exchange data quality scheme: US EPA - Flow Pedigree Matrix
Generated by: US EPA with CSRA and ERG
Owner: US EPA
Published in: Yang, Ingwersen et al. 2017
restrictionsDescription: This model shold be appropriately cited (see Yang, Ingwersen et al. 2017 source or Publication field) when used. Any changes or derivations of this model by the user should be documented. The model itself and any results from use of this model shall not be construed to consitute US EPA opinion or policy.
copyright: false

## General comment
BEA Code & Name is '420000:Wholesale trade'. Description of the primary industry producing this good or service, adapted from the Census Bureau NAICS 2007 descriptions: The Wholesale Trade sector comprises establishments engaged in wholesaling merchandise, generally without transformation, and rendering services incidental to the sale of merchandise. The merchandise described in this sector includes the outputs of agriculture, mining, manufacturing, and certain information industries, such as publishing. The wholesaling process is an intermediate step in the distribution of merchandise. Wholesalers are organized to sell or arrange the purchase or sale of (a) goods for resale (i.e., goods sold to other wholesalers or retailers), (b) capital or durable nonconsumer goods, and (c) raw and intermediate materials and supplies used in production. Wholesalers sell merchandise to other businesses and normally operate from a warehouse or office. These warehouses and offices are characterized by having little or no display of merchandise. In addition, neither the design nor the location of the premises is intended to solicit walk-in traffic. Wholesalers do not normally use advertising directed to the general public. Customers are generally reached initially via telephone, in-person marketing, or by specialized advertising that may include Internet and other electronic means. Follow-up orders are either vendor-initiated or client-initiated, generally based on previous sales, and typically exhibit strong ties between sellers and buyers. In fact, transactions are often conducted between wholesalers and clients that have long-standing business relationships. This sector comprises two main types of wholesalers: merchant wholesalers that sell goods on their own account and business to business electronic markets, agents, and brokers that arrange sales and purchases for others generally for a commission or fee. (1) Establishments that sell goods on their own account are known as wholesale merchants, distributors, jobbers, drop shippers, and import/export merchants. Also included as wholesale merchants are sales offices and sales branches (but not retail stores) maintained by manufacturing, refining, or mining enterprises apart from their plants or mines for the purpose of marketing their products. Merchant wholesale establishments typically maintain their own warehouse, where they receive and handle goods for their customers. Goods are generally sold without transformation, but may include integral functions, such as sorting, packaging, labeling, and other marketing services. (2) Establishments arranging for the purchase or sale of goods owned by others or purchasing goods, generally on a commission basis are known as business to business electronic markets, agents and brokers, commission merchants, import/export agents and brokers, auction companies, and manufacturers' representatives. These establishments operate from offices and generally do not own or handle the goods they sell. Some wholesale establishments may be connected with a single manufacturer and promote and sell the particular manufacturers' products to a wide range of other wholesalers or retailers. Other wholesalers may be connected to a retail chain, or limited number of retail chains, and only provide a variety of products needed by that particular retail operation(s). These wholesalers may obtain the products from a wide range of manufacturers. Still other wholesalers may not take title to the goods, but act as agents and brokers for a commission. Although, in general, wholesaling normally denotes sales in large volumes, durable nonconsumer goods may be sold in single units. Sales of capital or durable nonconsumer goods used in the production of goods and services, such as farm machinery, medium and heavy duty trucks, and industrial machinery, are always included in wholesale trade.

## Technology
The process describes the average US production of this good or service within this NAICS-based grouping defined in the BEA 2007 detailed input-output tables (BEA 2015). Distribution, wholesale and retailing of this good or service, use, and final disposal are not included. Creation of a product system with this process will enable modeling of all upstream (supply-chain) activities.

## Geography
Data represent the 50 US states

## Time period
2017 was the year in which this version of USEEIO was released and is the target date for the model

## Reference product
- Wholesale trade: 1 USD

## Inputs from technosphere
All rows: data quality (1,3,1,1,1)
- Light fixtures; at manufacturer: 8.03894e-6 USD
- Plastic bags, films, and sheets; at manufacturer: 0.00111098 USD
- Metal pipe fittings, ball and roller bearings, industrial patterns, metal bath fixtures, other misc. fabricated metals; at manufacturer: 0.000175249 USD
- Coal; at mine: 1.36662e-5 USD
- Civic, social, professional, and similar organizations: 0.000355321 USD
- Natural gas; at consumer: 0.000552275 USD
- Fabricated pipe and pipe fittings; at manufacturer: 8.03894e-7 USD
- Shelving and lockers; at manufacturer: 0.000329597 USD
- Specialized design: 0.00144219 USD
- Environmental and other technical consulting services: 0.00106918 USD
- Signs; at manufacturer: 2.41168e-5 USD
- Fertilizers; at manufacturer: 0.000126211 USD
- Vehicles and parts sales: 1.60779e-6 USD
- Pet care, photofinishing, parking and other sundry services: 0.00126774 USD
- Metal hinges, keys, lock, and other hardware; at manufacturer: 3.13519e-5 USD
- Dry, condensed, and evaporated dairy; at manufacturer: 7.47621e-5 USD
- Office machinery; at manufacturer: 2.41168e-6 USD
- Consumer goods and general rental centers: 0.000450985 USD
- Screws, nuts, and bolts; at manufacturer: 3.21558e-6 USD
- Primary iron, steel, and ferroalloy products; at manufacturer: 6.43115e-5 USD
- Magazines and journals; at publisher: 0.000198562 USD
- Gasoline, fuels, and by-products of petroleum refining; at manufacturer: 0.00420597 USD
- Couriers and messengers: 0.01238 USD
- Rail transport: 0.00010933 USD
- All other converted paper products; at manufacturer: 4.18025e-5 USD
- Packaged meat (except poultry); at manufacturer: 8.84283e-6 USD
- Business support: 0.00661605 USD
- Pesticides; at manufacturer: 1.60779e-5 USD
- Drinking water and wastewater treatment; at consumer: 0.000323969 USD
- Securities and commodities brokerage and exchanges: 0.00124282 USD
- Springs and wires; at manufacturer: 6.43115e-5 USD
- Pharmaceutical products (pills, powders, solutions, etc.); at manufacturer: 4.90375e-5 USD
- Performances: 4.74297e-5 USD
- Soap and cleaning compounds; at manufacturer: 0.000220267 USD
- Transmission and power train parts; at manufacturer: 0.000576392 USD
- Vehicle engines and engine parts; at manufacturer: 0.000302264 USD
- General merchandise stores: 3.61752e-5 USD
- Polystyrene foam products; at manufacturer: 0.000652762 USD
- Secondary steel products; at manufacturer: 3.7783e-5 USD
- Specialty transformers; at manufacturer: 2.41168e-5 USD
- Frozen food; at manufacturer: 1.76857e-5 USD
- Material handling equipment; at manufacturer: 0.000145505 USD
- State and local government enterprises: 0.000401947 USD
- Newspapers; at publisher: 1.36662e-5 USD
- Finished and coated fabric; at manufacturer: 7.47621e-5 USD
- Secondary copper products; at manufacturer: 6.51154e-5 USD
- Valve and fittings (except for plumbing); at manufacturer: 1.44701e-5 USD
- Other vehicle parts; at manufacturer: 0.00065437 USD
- Vehicle repair: 0.00231602 USD
- Air conditioning, refrigeration, and warm air heating equipment; at manufacturer: 0.000149524 USD
- Other rubber products; at manufacturer: 1.36662e-5 USD
- Ball and roller bearings; at manufacturer: 8.03894e-7 USD
- Lime and gypsum products; at manufacturer: 8.03894e-7 USD
- Heavy gauge metal tanks; at manufacturer: 8.03894e-7 USD
- Golf courses, marinas, ski resorts, fitness and other rec centers and industries: 0.000313519 USD
- Greenhouse crops, mushrooms, nurseries, and flowers; at farm: 1.5274e-5 USD
- Other educational services: 0.0001238 USD
- Light gauge metal cans, boxes, and containers; at manufacturer: 2.89402e-5 USD
- Dolls, toys, and games; at manufacturer: 5.62726e-6 USD
- Rubber tires; at manufacturer: 0.000137466 USD
- Investigation and security: 0.00235621 USD
- Colleges, universities, junior colleges, and professional schools: 0.000247599 USD
- Gaskets, seals, musical instruments, fasteners, brooms, brushes, mop and other misc. goods; at manufacturer: 0.000413202 USD
- Passenger ground transport: 0.000241972 USD
- Marketing research and all other miscellaneous professional, scientific, and technical services: 0.00111259 USD
- Office supplies (not paper); at manufacturer: 1.44701e-5 USD
- Light bulbs; at manufacturer: 8.68206e-5 USD
- Nondepository credit intermediation and related activities: 0.00874476 USD
- Iron, gold, silver, and other metal ores; at mine: 2.41168e-6 USD
- Legal services: 0.00559349 USD
- Metal windows, doors, and architectural products; at manufacturer: 2.73324e-5 USD
- Audio and video equipment; at manufacturer: 4.01947e-6 USD
- Sports: 9.8879e-5 USD
- Postal service: 0.00884685 USD
- Refined vegetable, olive, and seed oils; at manufacturer: 1.60779e-6 USD
- Computer terminals and other computer peripheral equipment; at manufacturer: 8.03894e-7 USD
- Vending, commercial laundry, and other commercial and service industry machinery; at manufacturer: 1.12545e-5 USD
- Independent artists, writers, and performers: 0.00044375 USD
- Veneer, plywood, and engineered wood; at manufacturer: 0.0011568 USD
- Computer systems design: 0.00132321 USD
- Photographers: 0.000135054 USD
- Limited-service restaurants: 0.0012179 USD
- Insurance agencies and brokerages: 0.000144701 USD
- Other animal food; at manufacturer: 0.00021062 USD
- Lessors of nonfinancial intangible assets: 0.00415694 USD
- Packaged poultry; at manufacturer: 5.62726e-5 USD
- Plastic pipe, fittings, and sausage casings; at manufacturer: 5.06453e-5 USD
- Cutting and machine tool accessory, rolling mill, and other metalworking machines; at manufacturer: 4.82336e-6 USD
- Wireless communications; at manufacturer: 0.000509669 USD
- Wireless telecommunications: 0.002312 USD
- Abrasive products; at manufacturer: 8.84283e-6 USD
- Distilleries and spirits; at manufacturer: 1.12545e-5 USD
- Directory, mailing list, and other publishers; at publisher: 5.62726e-5 USD
- Compressed Gases; at manufacturer: 8.03894e-6 USD
- Wooden windows, door, and flooring; at manufacturer: 1.84896e-5 USD
- Pumps and pumping equipment; at manufacturer: 1.68818e-5 USD
- Insurance carriers: 0.0130898 USD
- Farm machinery and equipment; at manufacturer: 1.68818e-5 USD
- Fabric; at manufacturer: 8.03894e-7 USD
- Storage batteries; at manufacturer: 5.06453e-5 USD
- Other concrete products; at manufacturer: 0.000112545 USD
- Other plastic products; at manufacturer: 0.00205475 USD
- Commercial equipment rental: 0.00190844 USD
- Laminated plastic plates and shapes; at manufacturer: 8.44089e-5 USD
- Noncomparable imports: 0.00256603 USD
- Internet publishing and broadcasting: 2.41168e-6 USD
- Urethane and other foam products; at manufacturer: 0.000469474 USD
- Relay and industrial controls; at manufacturer: 9.8879e-5 USD
- Hotels and campgrounds: 0.000558706 USD
- Vegetable oils and by-products; at manufacturer: 0.00010933 USD
- Waste management and remediation: 0.00119619 USD
- Welding and Soldering Equipment, Scales and Balances, and other general purpose machinery; at manufacturer: 4.01947e-6 USD
- Adhesives; at manufacturer: 3.69791e-5 USD
- Scenic and sightseeing transportation and support activities for transportation: 0.00883962 USD
- Office administration: 0.000985574 USD
- other miscellaneous electrical equipment and components; at manufacturer: 1.12545e-5 USD
- Warehousing: 0.0101789 USD
- Ink and ink cartridges; at manufacturer: 5.62726e-5 USD
- Architectural, engineering, and related services: 0.0021681 USD
- Chemicals (except basic chemicals, agrichemicals, polymers, paints, pharmaceuticals,soaps, cleaning compounds); at manufacturer: 0.000157563 USD
- Vehicle electrical and electronic equipment; at manufacturer: 0.000370595 USD
- Truck transport: 0.00276138 USD
- Plastics and rubber industry machinery; at manufacturer: 1.04506e-5 USD
- Advertising and public relations: 0.0291267 USD
- Speed changers, industrial high-speed drives, and gears; at manufacturer: 2.97441e-5 USD
- Sporting and athletic goods; at manufacturer: 2.41168e-6 USD
- Computer storage device readers; at manufacturer: 8.03894e-7 USD
- Electronic equipment repair and maintenance: 0.0021271 USD
- Semiconductors; at manufacturer: 0.000997633 USD
- Paper; at manufacturer: 0.000204993 USD
- Satellite, telecommunications resellers, and all other telecommunications: 0.000659193 USD
- Paints and coatings; at manufacturer: 1.28623e-5 USD
- Books, newspapers, magazines, and other print media; at manufacturer: 0.00378232 USD
- Data processing and hosting: 0.00160538 USD
- News syndicates, libraries, archives, Internet publishing and all other information services: 4.98414e-5 USD
- Facilities support: 0.00038185 USD
- Household goods repair: 0.00127739 USD
- Other petroleum and coal products; at manufacturer: 0.000176053 USD
- Surgical appliance and supplies; at manufacturer: 8.03894e-7 USD
- Plywood and veneer; at manufacturer: 1.5274e-5 USD
- Other engine equipment; at manufacturer: 2.41168e-5 USD
- Paper bags and coated paper; at manufacturer: 0.00105953 USD
- Promoters and agents: 0.00010933 USD
- Other textiles; at manufacturer: 0.000525747 USD
- Metal coatings, engravings, and heat treatments; at manufacturer: 1.20584e-5 USD
- Other primary nonferrous metals; at manufacturer: 9.64673e-6 USD
- Industrial process variable instruments; at manufacturer: 4.82336e-6 USD
- Dry-cleaning and laundry: 0.000257246 USD
- Monetary authorities and depository credit intermediation: 0.00415854 USD
- Jewelry and silverware; at manufacturer: 1.44701e-5 USD
- Commercial machinery repair: 0.00426948 USD
- Communication and energy wire and cable; at manufacturer: 1.92935e-5 USD
- Company and enterprise management: 0.0359678 USD
- Air purification and ventilation equipment; at manufacturer: 2.57246e-5 USD
- Construction machinery; at manufacturer: 1.20584e-5 USD
- Sanitary paper (tissues, napkins, diapers, etc.); at manufacturer: 1.60779e-6 USD
- Management consulting: 0.00736126 USD
- Other basic inorganic chemicals; at manufacturer: 4.42142e-5 USD
- Accounting, tax preparation, bookkeeping, and payroll: 0.00533303 USD
- Leather; at manufacturer: 6.43115e-6 USD
- Wholesale trade: 0.0218265 USD
- Pipeline transport: 2.97441e-5 USD
- Water transport (boats, ships, ferries): 2.57246e-5 USD
- Other basic organic chemicals; at manufacturer: 0.00016319 USD
- Stationery; at manufacturer: 3.21558e-5 USD
- Wiring devices; at manufacturer: 4.01947e-6 USD
- Electronic capacitors, resistors, coils, transformers, connectors and other components (except semiconductors and printed circuit assemblies); at manufacturer: 0.000122192 USD
- Food and beverage stores: 9.64673e-6 USD
- Primary copper; at manufacturer: 1.68818e-5 USD
- Lumber and treated lumber; at manufacturer: 3.37636e-5 USD
- Books; at publisher: 7.23505e-6 USD
- Vaccines and other biological medical products; at manufacturer: 2.41168e-6 USD
- Machine shops; at manufacturer: 6.27037e-5 USD
- Buildings and dwellings services: 0.00326542 USD
- Motor vehicle steering, suspension components (except spring), and brake systems; at manufacturer: 0.000264481 USD
- Air transport: 0.00234576 USD
- Cardboard containers; at manufacturer: 0.000838462 USD
- Nonresidential building repair and maintanence: 0.00120825 USD
- Machinery for the paper, textile, food or other industries (except semiconductor machinery); at manufacturer: 0.000144701 USD
- All other food and drinking places: 0.000260462 USD
- Travel arrangement and reservation: 0.000192935 USD
- Employment services: 0.00507659 USD
- Blood sugar, pregnancy, and other diagnostic test kits; at manufacturer: 6.43115e-6 USD
- Wood kitchen cabinets and countertops; at manufacturer: 1.12545e-5 USD
- Glass and glass products; at manufacturer: 2.33129e-5 USD
- Primary batteries; at manufacturer: 6.43115e-6 USD
- Rubber and plastic belts and hoses; at manufacturer: 2.41168e-6 USD
- Vehicle rental and leasing: 0.00418909 USD
- Fluid meters and counting devices; at manufacturer: 2.2509e-5 USD
- Cardboard; at manufacturer: 0.000508061 USD
- Aluminum products; at manufacturer: 4.82336e-6 USD
- External hard drives, CDs, other storage media; at manufacturer: 4.90375e-5 USD
- Other retail: 0.000241972 USD
- Custom metal rolls; at manufacturer: 8.03894e-7 USD
- Metal structural products; at manufacturer: 0.000278951 USD
- Lawn and garden equipment; at manufacturer: 8.03894e-7 USD
- Lids, jars, bottle caps, other metal closures and crowns; at manufacturer: 7.63699e-5 USD
- Railroad rolling stock; at manufacturer: 2.41168e-6 USD
- Other real estate: 0.0340288 USD
- Other secondary nonferrous metal products; at manufacturer: 8.44089e-5 USD
- Telecommunications: 0.00458059 USD
- Plastic bottles; at manufacturer: 3.61752e-5 USD
- Electricity; at consumer: 0.00463123 USD
- Printed circuit and electronic assembly; at manufacturer: 0.000223483 USD
- Cast iron and steel; at manufacturer: 2.00974e-5 USD
- Full-service restaurants: 0.00104587 USD
- Investment advice, portfolio management, and other financial advising services: 0.000300656 USD
- Unrefined oil and gas; at extraction site: 8.60167e-5 USD
- Clothing; at manufacturer: 0.000632665 USD
- Seasonings and dressings; at manufacturer: 9.64673e-6 USD
- Ready-mix concrete; at manufacturer: 8.03894e-7 USD
- Movies and film: 3.13519e-5 USD
- Software: 0.000262873 USD
- Watches, clocks, and other measuring and controlling devices; at manufacturer: 4.09986e-5 USD
- Other support services: 0.00347121 USD
- Cutlery and handtools; at manufacturer: 0.000131035 USD
- Other computer related services, including facilities management: 0.00170184 USD

## Inputs from nature
- Water, fresh: 0.000189483, 0.00010949 m3 (2 entries, compartments not in this file); data quality (1,2,1,4,2)
- Energy, solar: 0.000234576 MJ; data quality (3,1,1,1,1)
- Occupation, urban, discontinuously built: 0.0001895 m2*a; data quality (4,2,1,1,1)

## Emissions to nature
- carbon disulfide: 3.28078e-10 kg; data quality (4,2,1,1,5)
- Benzene, 1,2,4-trimethyl-: 1.81156e-10 kg; data quality (5,1,1,1,5)
- Benzo(a)anthracene: 2.49689e-15 kg; data quality (2,2,1,1,5)
- chlorine: 2.45182e-9 kg; data quality (4,2,1,1,5)
- cyanide: 2.05041e-8 kg; data quality (3,2,1,1,5)
- naphthalene: 1.24951e-10 kg; data quality (4,1,1,1,5)
- acenaphthene: 4.16199e-11 kg; data quality (3,2,1,4,1)
- Hydrocarbons, aromatic: 1.83854e-9 kg; data quality (3,2,1,3,3)
- 4,4'-isopropylidenediphenol: 9.0313e-13 kg; data quality (4,1,1,1,5)
- phenol: 7.47326e-9 kg; data quality (4,2,1,1,5)
- methylene diphenyl diisocyanate: 6.12686e-13 kg; data quality (4,2,1,1,5)
- acetaldehyde: 2.46813e-8 kg; data quality (3,2,1,4,1)
- Methyl acrylate: 1.05064e-10 kg; data quality (3,1,1,1,5)
- Water, fresh: 0.000253145 m3; data quality (1,2,1,4,2)
- benzene, ethyl-: 1.17555e-7 kg; data quality (3,2,1,2,4)
- carbon tetrachloride: 5.55401e-12 kg; data quality (4,2,1,1,5)
- benz[a]anthracene: 4.75847e-12 kg; data quality (3,2,1,4,2)
- Phthalate, dibutyl-: 6.39818e-11 kg; data quality (4,2,1,1,5)
- Hexane: 8.98464e-9, 7.17411e-11 kg (2 entries, compartments not in this file); data quality (4,1,1,1,5)
- toluene-2,4-diisocyante: 1.02355e-12 kg; data quality (2,1,1,1,5)
- nickel: 2.64099e-10 kg; data quality (3,2,1,1,5)
- Propane, 1,1,1,3,3,3-hexafluoro-, HCFC-236fa: 7.8748e-10 kg; data quality (4,2,1,4,1)
- particulates, < 10 um: 2.45354e-6 kg; data quality (3,2,1,1,5)
- Benzene, ethyl-: 1.67442e-10, 2.73835e-9 kg (2 entries, compartments not in this file); data quality (4,1,1,1,5)
- Diethylene glycol butyl ether: 2.24611e-13 kg; data quality (4,2,1,1,5)
- Ethylene glycol monoethyl ether: 3.41814e-16 kg; data quality (4,2,1,1,5)
- 2,2,4-trimethylpentane: 7.44178e-7 kg; data quality (3,2,1,1,5)
- ethane, 1,2-dibromo-: 1.60075e-12 kg; data quality (2,2,1,1,5)
- pyrene: 5.25682e-11 kg; data quality (3,2,1,4,1)
- benzene: 5.61619e-7 kg; data quality (3,2,1,2,4)
- 3-methylcholanthrene: 5.46774e-16 kg; data quality (2,2,1,1,5)
- trifluralin: 3.22466e-20 kg; data quality (5,2,1,1,5)
- nitrogen oxides: 4.99116e-6 kg; data quality (3,2,1,1,3)
- 1,1,2,2-tetrachloroethane: 2.73253e-12 kg; data quality (3,2,1,1,5)
- acrolein: 2.38874e-9 kg; data quality (3,2,1,3,2)
- butanol: 1.12447e-9 kg; data quality (5,1,1,1,5)
- p-cresol: 1.50522e-12 kg; data quality (3,1,1,1,5)
- acenaphthylene: 1.4331e-10 kg; data quality (3,2,1,4,1)
- AMMONIA: 3.48307e-9 kg; data quality (3,1,1,1,5)
- N,N-DIMETHYLANILINE: 7.83593e-11 kg; data quality (5,2,1,1,5)
- 2,4/2,6-toluenediisocyanate (mixture): 7.69473e-11 kg; data quality (3,1,1,1,5)
- formic acid: 6.18036e-10 kg; data quality (3,1,1,1,5)
- lead: 9.0313e-15, 1.18611e-17 kg (2 entries, compartments not in this file); data quality (3,1,1,1,5)
- nitric acid: 2.19073e-8 kg; data quality (3,1,1,1,5)
- m-cresol: 3.48263e-13 kg; data quality (4,2,1,1,5)
- styrene: 1.97861e-8 kg; data quality (4,2,1,1,5)
- Ethane, 1,1,1,2-tetrafluoro-, HFC-134a: 2.56786e-7 kg; data quality (4,2,1,4,1)
- hydrogen chloride: 1.22111e-8 kg; data quality (2,2,1,1,5)
- cyclohexane: 2.06819e-8, 3.51017e-12 kg (2 entries, compartments not in this file); data quality (4,1,1,1,5)
- 2,4-dinitrophenol: 5.40879e-15 kg; data quality (5,2,1,1,5)
- Methane, dichlorodifluoro-, CFC-12: 3.59446e-10 kg; data quality (4,1,1,1,5)
- HALON 1301: 9.81402e-11 kg; data quality (5,1,1,1,5)
- formaldehyde: 5.69204e-8 kg; data quality (3,2,1,4,1)
- ethane, 1,2-dichloro-: 5.03035e-11 kg; data quality (3,2,1,1,5)
- methyl isobutyl ketone: 2.9944e-9 kg; data quality (4,2,1,1,5)
- Ethene, chloro-: 5.00056e-11 kg; data quality (3,2,1,1,5)
- Chromium, ion: 5.50369e-11 kg; data quality (2,2,1,1,5)
- propylene oxide: 2.52781e-14 kg; data quality (3,2,1,1,5)
- 1,2,4-trimethylbenzene: 4.78274e-9, 2.07144e-8 kg (2 entries, compartments not in this file); data quality (5,1,1,1,5)
- 2-METHOXYETHANOL: 6.44932e-15 kg; data quality (4,2,1,1,5)
- t-Butyl methyl ether: 2.20063e-13 kg; data quality (4,1,1,1,5)
- aniline: 1.50522e-10 kg; data quality (3,1,1,1,5)
- naphthalene: 1.50901e-8 kg; data quality (3,2,1,2,4)
- Benzo(g,h,i)perylene: 1.49641e-11 kg; data quality (3,2,1,3,2)
- cumene: 1.40617e-8 kg; data quality (3,2,1,1,5)
- Pendimethalin: 1.50522e-13 kg; data quality (5,1,1,1,5)
- Ethane, 2,2-dichloro-1,1,1-trifluoro-, HCFC-123: 1.75538e-9 kg; data quality (4,1,1,1,5)
- Carbon dioxide: 0.00317703 kg; data quality (4,2,1,4,1)
- NITRIC ACID: 3.01043e-13 kg; data quality (3,1,1,1,5)
- benzene: 1.24519e-10, 2.02964e-9 kg (2 entries, compartments not in this file); data quality (3,1,1,1,5)
- polychlorinated biphenyls: 1.39706e-12 kg; data quality (3,2,1,1,5)
- methane, bromo-, halon 1001: 7.07111e-9 kg; data quality (3,2,1,1,5)
- methane, dichloro-, hcc-30: 2.1243e-8 kg; data quality (4,2,1,1,5)
- Benzo(g,h,i)perylene: 1.80626e-13, 6.51268e-13 kg (2 entries, compartments not in this file); data quality (2,1,1,1,5)
- hexane: 1.83383e-6 kg; data quality (3,2,1,1,5)
- Cyclohexane: 8.7423e-12 kg; data quality (4,1,1,1,5)
- 1,1-DICHLOROETHYLENE: 1.27471e-11 kg; data quality (3,2,1,1,5)
- isoprene: 4.66617e-9 kg; data quality (3,1,1,1,5)
- Nitrogen: 1.17584e-7 kg; data quality (3,2,1,1,5)
- trichloroethylene: 2.55217e-9 kg; data quality (4,2,1,1,5)
- Cresol, o-: 6.02087e-16 kg; data quality (2,1,1,1,5)
- diethanolamine: 1.03421e-9 kg; data quality (3,2,1,1,5)
- benzo(a)pyrene: 4.01716e-12 kg; data quality (3,2,1,4,1)
- fluoranthene: 2.04962e-10 kg; data quality (2,2,1,2,4)
- selenium: 7.27979e-12 kg; data quality (2,2,1,1,5)
- Phosphorus: 1.22245e-7 kg; data quality (2,1,1,1,5)
- arsenic: 2.42525e-11 kg; data quality (3,2,1,2,4)
- Triethyl amine: 5.1541e-10 kg; data quality (4,2,1,1,5)
- BUTYL ISOCYANATE: 5.44871e-13 kg; data quality (4,2,1,1,5)
- CHLORONAPHTHALENE: 3.2205e-17 kg; data quality (1,2,1,1,5)
- toluene: 5.58057e-10, 1.1682e-8 kg (2 entries, compartments not in this file); data quality (5,1,1,1,5)
- NITROUS ACID: 2.06254e-10 kg; data quality (5,1,1,1,5)
- anthracene: 2.99047e-11 kg; data quality (3,2,1,4,1)
- 1,4-BENZOQUINONE: 1.27955e-10 kg; data quality (3,2,1,1,5)
- dimethyl formamide: 3.01043e-12 kg; data quality (4,1,1,1,5)
- 1,4-dichlorobenzene: 1.17275e-10 kg; data quality (2,2,1,1,5)
- carbon monoxide: 5.7977e-5 kg; data quality (3,2,1,1,1)
- Benzo(k)fluoranthene: 4.19132e-12 kg; data quality (3,2,1,4,1)
- BUTYL ACRYLATE: 3.01043e-12 kg; data quality (4,1,1,1,5)
- benzene, chloro-: 1.09859e-12 kg; data quality (4,2,1,1,5)
- t-butyl methyl ether: 9.09569e-8 kg; data quality (3,2,1,1,5)
- Methane, dichloro-, HCC-30: 7.52609e-11 kg; data quality (5,1,1,1,5)
- 1,2,4-trichlorobenzene: 2.12634e-11 kg; data quality (4,2,1,1,5)
- propanal: 5.31012e-9 kg; data quality (3,2,1,4,1)
- TRANS-1,3-DICHLOROPROPENE: 1.50522e-11 kg; data quality (5,1,1,1,5)
- methane, chlorodifluoro-, hcfc-22: 2.29659e-8 kg; data quality (4,1,1,1,5)
- cumene: 2.7696e-12 kg; data quality (3,1,1,1,5)
- Cresol: 5.56669e-12 kg; data quality (4,2,1,1,5)
- chloroform: 5.78762e-10 kg; data quality (4,2,1,1,5)
- particulates, < 2.5 um: 1.54992e-6 kg; data quality (3,2,1,1,4)
- Dimethylamine: 1.65574e-10 kg; data quality (3,1,1,1,5)
- Benzo(b)fluoranthene: 4.30748e-12 kg; data quality (3,2,1,4,1)
- hydrogen sulfide: 5.40149e-9 kg; data quality (3,2,1,1,5)
- para-xylene: 7.87708e-9 kg; data quality (4,2,1,1,5)
- Methane: 2.96296e-7 kg; data quality (4,2,1,4,1)
- Dinitrogen monoxide: 1.19506e-8 kg; data quality (4,2,1,4,1)
- Phosphine: 1.85337e-10 kg; data quality (4,2,1,1,5)
- TERT-BUTYL ALCOHOL: 6.07205e-11 kg; data quality (4,1,1,1,5)
- Indeno(1,2,3-cd)pyrene: 3.46017e-12 kg; data quality (3,2,1,4,1)
- o-Xylene: 2.04254e-9 kg; data quality (3,2,1,4,1)
- 1-Methyl-2-pyrrolidinone: 1.0392e-11 kg; data quality (5,1,1,1,5)
- Ethane, 2-chloro-1,1,1,2-tetrafluoro-, HCFC-124: 7.78498e-10 kg; data quality (4,1,1,1,5)
- Chromium VI: 1.04536e-11 kg; data quality (3,2,1,2,4)
- 1,2-BUTYLENE OXIDE: 1.85762e-11 kg; data quality (4,2,1,1,5)
- ethane, 1,1,2-trichloro-: 1.28972e-13 kg; data quality (4,2,1,1,5)
- lead: 9.44288e-11 kg; data quality (3,2,1,1,5)
- PHOSPHORUS: 9.29073e-12 kg; data quality (2,2,1,1,5)
- VOC, volatile organic compounds: 0.000105924 kg; data quality (3,2,1,1,5)
- Methane, difluoro-, HFC-32: 3.9675e-8 kg; data quality (4,2,1,4,1)
- Sulfuric acid: 6.2617e-11 kg; data quality (2,1,1,1,5)
- vinyl acetate: 1.94125e-11 kg; data quality (4,2,1,1,5)
- beryllium: 1.65166e-12 kg; data quality (2,2,1,1,5)
- antimony: 5.62602e-10 kg; data quality (3,2,1,1,5)
- HCFC-142b: 5.71983e-11 kg; data quality (2,1,1,1,5)
- ammonia: 2.40835e-11 kg; data quality (3,1,1,1,5)
- acrylic acid: 5.80439e-12 kg; data quality (4,2,1,1,5)
- barium: 1.18611e-12 kg; data quality (4,1,1,1,5)
- Butadiene: 3.61252e-12 kg; data quality (3,1,1,1,5)
- methanol: 8.36299e-10 kg; data quality (3,1,1,1,5)
- ethylbenzene: 2.16378e-8 kg; data quality (4,1,1,1,5)
- o-cresol: 2.03686e-12 kg; data quality (2,1,1,1,5)
- m-xylene: 6.58487e-9 kg; data quality (3,2,1,3,2)
- PYRIDINE: 4.21461e-12 kg; data quality (4,1,1,1,5)
- styrene: 7.52609e-11 kg; data quality (3,1,1,1,5)
- PERACETIC ACID: 1.50522e-12 kg; data quality (4,1,1,1,5)
- ETHENE: 5.80517e-8 kg; data quality (3,1,1,1,5)
- SEC-BUTYL ALCOHOL: 1.77616e-12 kg; data quality (5,1,1,1,5)
- Butanol: 7.52609e-11 kg; data quality (5,1,1,1,5)
- ethyl acrylate: 4.83699e-12 kg; data quality (4,2,1,1,5)
- dimethyl formamide: 2.96833e-10 kg; data quality (4,2,1,1,5)
- diisocyanates: 9.43169e-11 kg; data quality (4,1,1,1,5)
- HALON 1211: 7.04442e-11 kg; data quality (5,1,1,1,5)
- Styrene: 6.02087e-14 kg; data quality (3,1,1,1,5)
- mercury: 6.06463e-11 kg; data quality (2,2,1,1,5)
- QUINOLINE: 3.13308e-14 kg; data quality (3,2,1,1,5)
- copper: 7.73682e-13 kg; data quality (4,1,1,1,5)
- methyl methacrylate: 1.43143e-9 kg; data quality (4,2,1,1,5)
- Chloropicrin: 5.08161e-12 kg; data quality (3,1,1,1,5)
- propargyl alcohol: 1.07683e-11 kg; data quality (4,1,1,1,5)
- 2-methylnaphthalene: 5.43857e-12 kg; data quality (2,2,1,1,5)
- ethylene glycol: 2.32212e-9 kg; data quality (5,2,1,1,5)
- phthalic anhydride: 7.30257e-11 kg; data quality (2,2,1,1,5)
- Metam-sodium: 4.75649e-10 kg; data quality (5,1,1,1,5)
- methane, monochloro-, r-40: 2.31703e-10 kg; data quality (3,2,1,1,5)
- acetonitrile: 5.70195e-10 kg; data quality (3,2,1,1,5)
- monochloroethane: 2.29501e-10 kg; data quality (3,2,1,1,5)
- Propene: 2.02869e-8 kg; data quality (3,1,1,1,5)
- Ethylene glycol monoethyl ether: 3.31148e-12 kg; data quality (5,1,1,1,5)
- Dibenz(a,h)anthracene: 3.0518e-14 kg; data quality (3,2,1,4,1)
- Xylene: 4.58295e-10, 1.35915e-8 kg (2 entries, compartments not in this file); data quality (4,1,1,1,5)
- ethene, tetrachloro-: 3.65837e-9 kg; data quality (3,2,1,1,5)
- Dichlorvos: 4.11467e-11 kg; data quality (3,2,1,1,5)
- Ethane, 1,1,1-trifluoro-, HFC-143a: 2.91494e-8 kg; data quality (4,2,1,4,1)
- sulfur dioxide: 4.48045e-7 kg; data quality (2,2,1,1,5)
- Methane, trichlorofluoro-, CFC-11: 2.51191e-9 kg; data quality (2,1,1,1,5)
- phthalate, dioctyl-: 1.39075e-9 kg; data quality (3,2,1,1,5)
- fluorene: 7.953e-11 kg; data quality (3,2,1,4,2)
- Cumene: 1.14397e-14 kg; data quality (3,1,1,1,5)
- Cobalt: 3.85759e-11 kg; data quality (3,2,1,1,5)
- ethylene oxide: 4.93102e-10 kg; data quality (3,2,1,1,5)
- pentachlorophenol: 1.53249e-15 kg; data quality (3,2,1,1,5)
- Propane, 1,2-dichloro-: 1.10149e-12 kg; data quality (4,2,1,1,5)
- Ethane, 1,1,2-trichloro-1,2,2-trifluoro-, CFC-113: 8.12817e-12 kg; data quality (4,1,1,1,5)
- Propene, 1,3-dichloro-: 2.50359e-10 kg; data quality (3,2,1,1,5)
- benzyl chloride: 1.00416e-13 kg; data quality (2,2,1,1,5)
- biphenyl: 8.13656e-11 kg; data quality (4,2,1,1,5)
- 4-nitrophenol: 3.30537e-15 kg; data quality (2,2,1,1,5)
- Xylene: 7.34676e-7 kg; data quality (3,2,1,1,4)
- epichlorohydrin: 1.28986e-12 kg; data quality (3,2,1,1,5)
- acetophenone: 9.61563e-17 kg; data quality (4,2,1,1,5)
- hydrogen fluoride: 1.24317e-9 kg; data quality (2,2,1,1,5)
- methanol: 1.11135e-7 kg; data quality (4,2,1,1,5)
- Ethane, pentafluoro-, HFC-125: 6.81287e-8 kg; data quality (4,2,1,4,1)
- 1,1,1-trichloroethane: 1.13158e-11 kg; data quality (4,2,1,1,5)
- cadmium: 1.34776e-11 kg; data quality (3,2,1,1,5)
- manganese: 9.30854e-11 kg; data quality (3,2,1,1,5)
- ammonia: 9.13221e-8 kg; data quality (3,2,1,1,5)
- toluene: 1.54046e-6 kg; data quality (3,2,1,1,5)
- Dimethoxy methane: 5.61091e-13 kg; data quality (2,2,1,1,5)
- Ethylene glycol: 1.92668e-10 kg; data quality (5,1,1,1,5)
- Chrysene: 6.12379e-12 kg; data quality (3,2,1,3,2)
- CFC-114: 1.11988e-10 kg; data quality (5,1,1,1,5)
- butadiene: 2.89608e-8 kg; data quality (3,2,1,3,3)
- phenanthrene: 1.42214e-10 kg; data quality (3,2,1,4,2)
- chromium: 2.52937e-10 kg; data quality (4,1,1,1,5)
- Naphthalene: 9.63339e-12 kg; data quality (4,1,1,1,5)

## Inventory method
Input-output

## Modelling constants
The reference unit of all processes is 1 USD2013 of the good or service. The technosphere inputs are based on the US BEA detailed input-output tables for 2007. The IO tables are combined to develop a commodity-by-commodity model based on the the industry-technology assumption (see Suh et al., 2010), which assumes all commodities produced by a given industry have the same input structure, but that multiple industries can produce the same commodity. Thus, model technosphere flows represent commodity outputs (and not industry outputs) from other processes in the model. There are no by-products included in these processes. All commodity production is based on US-conditions, despite in reality that some goods and services are produced overseas, as USEEIO v1.1 is a single-region IO model.

## Completeness
The input-output approach assures that all purchased inputs associated with the sectors making these commodities as reported in the US census for 2007 are included. The direct resources extracted including minerals, energy sources, water and land occupied are included. Emissions to air include all critieria air pollutants, greenhouse gases, and hazardous and toxic air pollutants as defined by US EPA. Releases to water include toxics, total nitrogen and total phosphorus, and water discharges. Releases to soil or groundwater include toxics and agriculutural pesticides. Some metal releases to air, water and soil are not included because they could not be speciated. Solid hazardous and non-hazardous wastes generated are not included as an elementary flows although purchases of waste services are included.

## Data treatment
Greenhouse gases are primarily from the US Greenhouse Gas Emission Inventory (USEPA 2016a). Biogenic C uptake is not included (change from version 1.0), as biogenic C emission are not included. Toxic releases to air, water and soil (except pesticides) are from the 2013 Toxic Release Inventory (USEPA 2015a). Criteria air pollutants and hazardous air pollutants are from the 2011 National Emissions Inventory (USEPA 2015b). All estimates are normalized by industry based on sector output in the data year, then converted to 2013 USD using relative sector-specific CPIs (if data year is not 2013). Energy use represent raw renewables or fossil fuel energies and is based on EIA data for 2014. See Table 1 in Yang, Ingwersen et al. 2017 and Supporting Information 1, and the v1.1 data update notes (Ingwersen et al. 2017) for all details on environmental data sources used.Land occupation associated with manufacturing buildings was estimated based on the building floorspace data provided by the U.S. Energy Information Administration in the 2010 Manufacturing Energy Consumption Survey (EIA 2013). Portions of total renewable energy (EIA 2016) based on EIA-923 reports for 2014 (EIA 2017) are included. Nitrogen and Phosphorus releases are modeled in total N and total P equivalents as estimated by the Discharge Monitoring Report Nutrient Loading tool (USEPA 2016b). Self-supplied withdrawals were assigned to industrial sectors based on water use statistics for Canadian industries by NAICS 3-digit sector scaled to US production levels based on gross domestic product by industry (BEA 2015; Statistics Canada 2010), and further disaggregated to the manufacturing sectors based on compensation of employees as provided by the 2007 IO tables (BEA 2015). Water withdrawals associated with public supply were allocated to sectors based on their use of water, sewage, and other services in USD based on the IO tables (BEA 2015). Portions of total renewable energy (EIA 2016) by type are assigned to sectors (hydro, wind, solar, or) based on EIA-923 reports for 2014 (EIA 2017).

## Data collection
2015-2016

## Sampling procedure
US federal government sources, including surveys and US EPA emissions databases are used as the primary sources. From these sources, data for US reporting establishments/facilities are aggregated by the NAICS sector as defined in the BEA detailed 2007 input-output tables. When level of sector aggregation differs, or when direct emissions are not reported but modeled, additional sources are used to make allocations and estimates.

## Review details
In regard to quality assurance and peer-review, each dataset created went through Quality Assurance as defined in a quality assurance project plans at US EPA, CSRA or ERG. The model was assembled with the IO model builder model (USEPA 2016c). Validation functions were used to check that all the model components were properly assembled and harmonized. Bayou Demeke and Santosh Ghimire provided internal peer review of the model methodology and the manuscript underwent standard EPA management review. An editor and two anonymous reviewers at the Journal of Cleaner Production reviewed the model. In regard to data quality evaluation, data quality assessment was performed at the flow and process levels according to the updated US EPA data quality assessment guidelines as defined in US EPA (2016b).

## Intended application
The primary application is for use in the US Environmentally-Extended Input-Ouput model, USEEIO, version 1.1. This model is being used by the US EPA for supporting tools that prioritize goods and services based on potential environmental impacts, resource use or emissions for large regions, including the US and US states, and as a strealined tool for organizations as a starting point to consider sustainable materials management. Model results are designed to provide meso/macro-level decision support.

## Project
USEEIO v1.1 was developed by the US EPA with CSRA and ERG with Wesley W. Ingwersen and David E. Meyer as research leads. Yi Yang was the technical lead on the work for CSRA (contract EP-C-15-012); Troy Hawkins was lead for ERG (contract EP-C-12-021).

## Sources
- USDA 2006
- Torcellini et al. 2003
- USEPA 2016a
- USEPA 2016c
- Lovelace 2009
- EIA 2013
- Ingwersen et al. 2017
- Statistics Canada 2010
- EIA 2015
- USEPA 2015a
- EIA 2017
- BEA 2015
- Kim et el. 2013
- BLM 2008
- EIA 2016
- USGS 2015
- USGS 2016
- USEPA 2015b
- Nickerson et al. 2011
- Blackhurst et al. 2010
- USDA 2009b
- USDA 2016
- USDA 2014
- Edelen and Ingwersen 2017
- Goebes et al. 2003
- Ingwersen et al. DRAFT
- Macknick et al. 2011
- Maupin et al. 2014
- Yienger et al. 1995
- USEPA 2016b
- USDA 2009a
