# Dental laboratories; at manufacturer

Dataset: openLCA process, unit process
Category: 3391: Medical Equipment and Supplies Manufacturing
Geography: United States
Time period: 2017-01-01 to 2017-12-31
Data quality: US EPA - Process Pedigree Matrix (1;1)
Exchange data quality scheme: US EPA - Flow Pedigree Matrix
Generated by: US EPA with CSRA and ERG
Owner: US EPA
Published in: Yang, Ingwersen et al. 2017
restrictionsDescription: This model shold be appropriately cited (see Yang, Ingwersen et al. 2017 source or Publication field) when used. Any changes or derivations of this model by the user should be documented. The model itself and any results from use of this model shall not be construed to consitute US EPA opinion or policy.
copyright: false

## General comment
BEA Code & Name is '339116:Dental laboratories'. Description of the primary industry producing this good or service, adapted from the Census Bureau NAICS 2007 descriptions: This U.S. industry comprises establishments primarily engaged in manufacturing dentures, crowns, bridges, and orthodontic appliances customized for individual application.

## Technology
The process describes the average US production of this good or service within this NAICS-based grouping defined in the BEA 2007 detailed input-output tables (BEA 2015). Distribution, wholesale and retailing of this good or service, use, and final disposal are not included. Creation of a product system with this process will enable modeling of all upstream (supply-chain) activities.

## Geography
Data represent the 50 US states

## Time period
2017 was the year in which this version of USEEIO was released and is the target date for the model

## Reference product
- Dental laboratories; at manufacturer: 1 USD

## Inputs from technosphere
All rows: data quality (1,3,1,1,1)
- Wireless telecommunications: 0.00131292 USD
- Air transport: 0.00197166 USD
- Surgical and medical instruments; at manufacturer: 0.00021828 USD
- Satellite, telecommunications resellers, and all other telecommunications: 0.000218929 USD
- Nonferrous metal casts; at manufacturer: 0.00022931 USD
- Office administration: 0.000220226 USD
- Semiconductors; at manufacturer: 0.000877012 USD
- Commercial equipment rental: 0.000874417 USD
- Material handling equipment; at manufacturer: 6.48854e-7 USD
- Electricity; at consumer: 0.00349896 USD
- Machine shops; at manufacturer: 0.00242184 USD
- Iron, gold, silver, and other metal ores; at mine: 1.94656e-6 USD
- Company and enterprise management: 0.0858904 USD
- Employment services: 0.003714 USD
- Passenger ground transport: 0.000437857 USD
- Cardboard; at manufacturer: 3.89313e-6 USD
- Plastic bags, films, and sheets; at manufacturer: 5.19083e-6 USD
- Light gauge metal cans, boxes, and containers; at manufacturer: 0.000441102 USD
- Marketing research and all other miscellaneous professional, scientific, and technical services: 0.00416094 USD
- Computer terminals and other computer peripheral equipment; at manufacturer: 0.000218929 USD
- Insurance agencies and brokerages: 0.00109399 USD
- Independent artists, writers, and performers: 0.000218929 USD
- Specialized design: 0.00349442 USD
- Cutting and machine tool accessory, rolling mill, and other metalworking machines; at manufacturer: 6.48854e-7 USD
- Business support: 0.00480605 USD
- Laminated plastic plates and shapes; at manufacturer: 0.000222822 USD
- State and local government enterprises: 0.000437208 USD
- Other retail: 7.1374e-6 USD
- Environmental and other technical consulting services: 0.000222173 USD
- Rail transport: 0.000440453 USD
- Nondepository credit intermediation and related activities: 0.00262714 USD
- Other basic organic chemicals; at manufacturer: 0.00290512 USD
- Vehicle rental and leasing: 0.0015299 USD
- Dry-cleaning and laundry: 0.000231257 USD
- Valve and fittings (except for plumbing); at manufacturer: 5.19083e-6 USD
- Nonresidential building repair and maintanence: 0.00196776 USD
- Lids, jars, bottle caps, other metal closures and crowns; at manufacturer: 0.000658084 USD
- Household goods repair: 0.000218929 USD
- Truck transport: 0.00438701 USD
- Other petroleum and coal products; at manufacturer: 7.1374e-6 USD
- Other primary nonferrous metals; at manufacturer: 0.0590142 USD
- Noncomparable imports: 1.03817e-5 USD
- Ball and roller bearings; at manufacturer: 0.000658732 USD
- Drinking water and wastewater treatment; at consumer: 0.000437857 USD
- Other plastic products; at manufacturer: 0.00309615 USD
- Commercial machinery repair: 0.00131163 USD
- Dental laboratories; at manufacturer: 0.000222173 USD
- Insurance carriers: 0.00350091 USD
- Buildings and dwellings services: 0.00284348 USD
- Urethane and other foam products; at manufacturer: 0.00021828 USD
- Chemicals (except basic chemicals, agrichemicals, polymers, paints, pharmaceuticals,soaps, cleaning compounds); at manufacturer: 0.00044175 USD
- Legal services: 0.00264207 USD
- Surgical appliance and supplies; at manufacturer: 1.62214e-5 USD
- Gasoline, fuels, and by-products of petroleum refining; at manufacturer: 0.000437857 USD
- Natural gas; at consumer: 0.00131292 USD
- Waste management and remediation: 0.00109464 USD
- Cardboard containers; at manufacturer: 0.00134147 USD
- Facilities support: 0.00174624 USD
- Other computer related services, including facilities management: 0.000656137 USD
- Monetary authorities and depository credit intermediation: 0.00503925 USD
- Relay and industrial controls; at manufacturer: 6.48854e-7 USD
- Electronic capacitors, resistors, coils, transformers, connectors and other components (except semiconductors and printed circuit assemblies); at manufacturer: 6.48854e-7 USD
- Other basic inorganic chemicals; at manufacturer: 0.00131811 USD
- Other real estate: 0.000437857 USD
- Screws, nuts, and bolts; at manufacturer: 0.0013285 USD
- Metal pipe fittings, ball and roller bearings, industrial patterns, metal bath fixtures, other misc. fabricated metals; at manufacturer: 0.000659381 USD
- Golf courses, marinas, ski resorts, fitness and other rec centers and industries: 0.000218929 USD
- Petrochemicals; at manufacturer: 0.000220226 USD
- Wholesale trade: 0.0428769 USD
- Consumer goods and general rental centers: 0.00021828 USD
- Synthetic rubber and artificial and synthetic fibers; at manufacturer: 0.000221524 USD
- Computer systems design: 0.00175078 USD
- Electronic equipment repair and maintenance: 0.00131163 USD
- Software: 0.000218929 USD
- Dental equipment and supplies; at manufacturer: 0.0958365 USD
- Telecommunications: 0.00481319 USD
- Other support services: 0.00283893 USD
- Printed circuit and electronic assembly; at manufacturer: 2.59542e-6 USD
- Water transport (boats, ships, ferries): 6.48854e-7 USD
- Metal coatings, engravings, and heat treatments; at manufacturer: 0.00197944 USD
- Architectural, engineering, and related services: 0.00462735 USD
- Cutlery and handtools; at manufacturer: 0.000658084 USD
- Data processing and hosting: 0.00590458 USD
- Full-service restaurants: 0.000876363 USD
- Primary iron, steel, and ferroalloy products; at manufacturer: 0.00439155 USD
- Investment advice, portfolio management, and other financial advising services: 0.000218929 USD
- Food and beverage stores: 6.48854e-7 USD
- General merchandise stores: 6.48854e-7 USD
- Civic, social, professional, and similar organizations: 0.000437857 USD
- Lessors of nonfinancial intangible assets: 0.0096374 USD
- Limited-service restaurants: 0.00153315 USD
- Metal structural products; at manufacturer: 0.000223471 USD
- Management consulting: 0.00088934 USD
- Advertising and public relations: 0.0225386 USD
- Warehousing: 0.00917878 USD
- Investigation and security: 0.00262065 USD
- Adhesives; at manufacturer: 0.000221524 USD
- Compressed Gases; at manufacturer: 0.000220875 USD
- Synthetic dyes and pigments; at manufacturer: 0.000221524 USD
- Securities and commodities brokerage and exchanges: 0.0096374 USD
- All other forging, stamping, and sintering; at manufacturer: 0.000218929 USD
- Accounting, tax preparation, bookkeeping, and payroll: 0.00569214 USD
- Hotels and campgrounds: 0.000876363 USD
- Springs and wires; at manufacturer: 6.48854e-7 USD
- Vehicle repair: 0.000656137 USD
- Lime and gypsum products; at manufacturer: 1.23282e-5 USD
- Custom metal rolls; at manufacturer: 0.000439804 USD

## Inputs from nature
- Occupation, urban, discontinuously built: 0.000288795 m2*a; data quality (4,2,1,1,1)
- Occupation, industrial area: 0.00094739 m2*a; data quality (4,2,1,1,1)
- Occupation, industrial area, built up: 0.000315797 m2*a; data quality (4,2,1,1,1)
- Water, fresh: 0.000182648 m3; data quality (2,2,1,4,2)
- Water, saline: 2.13735e-5 m3; data quality (4,2,1,4,2)
- Water, fresh: 0.000469414 m3; data quality (3,2,1,4,2)

## Emissions to nature
- phenanthrene: 1.00646e-11 kg; data quality (3,2,1,4,1)
- phenol: 9.48353e-13 kg; data quality (4,2,1,1,5)
- sulfur dioxide: 5.05346e-9 kg; data quality (2,2,1,2,3)
- benzene: 3.6741e-9 kg; data quality (3,2,1,2,3)
- Benzo(k)fluoranthene: 5.78912e-14 kg; data quality (3,2,1,4,1)
- formaldehyde: 5.69099e-9 kg; data quality (3,2,1,4,1)
- o-Xylene: 1.1421e-10 kg; data quality (3,2,1,4,1)
- Ethane, 1,1,1-trifluoro-, HFC-143a: 2.77211e-9 kg; data quality (4,2,1,4,1)
- mercury: 1.92886e-10 kg; data quality (3,2,1,1,5)
- ammonia: 3.40618e-9 kg; data quality (3,2,1,3,2)
- ethylene oxide: 2.8524e-8 kg; data quality (3,2,1,1,5)
- antimony: 1.1872e-11 kg; data quality (3,2,1,1,5)
- manganese: 8.18766e-11 kg; data quality (3,2,1,1,5)
- benzene, ethyl-: 1.51191e-9 kg; data quality (4,2,1,2,4)
- 3-methylcholanthrene: 5.00799e-20 kg; data quality (2,2,1,1,5)
- Xylene: 9.56162e-9 kg; data quality (4,2,1,1,4)
- carbon monoxide: 4.10145e-6 kg; data quality (3,2,1,1,1)
- VOC, volatile organic compounds: 3.69362e-6 kg; data quality (3,2,1,1,5)
- ethylene glycol: 2.09683e-9 kg; data quality (5,2,1,1,5)
- 1,1,1-trichloroethane: 2.99798e-11 kg; data quality (3,2,1,1,5)
- Chrysene: 2.09429e-13 kg; data quality (2,2,1,2,3)
- styrene: 1.5299e-7 kg; data quality (4,2,1,1,5)
- acrolein: 1.6363e-10 kg; data quality (3,2,1,4,1)
- Ethane, 1,1,1,2-tetrafluoro-, HFC-134a: 2.44203e-8 kg; data quality (4,2,1,4,1)
- Ethane, pentafluoro-, HFC-125: 6.47904e-9 kg; data quality (4,2,1,4,1)
- methane, dichloro-, hcc-30: 6.7948e-11 kg; data quality (4,2,1,1,5)
- propanal: 5.08694e-10 kg; data quality (3,2,1,4,1)
- benz[a]anthracene: 6.79141e-14 kg; data quality (3,2,1,4,1)
- Benzo(b)fluoranthene: 6.28439e-14 kg; data quality (3,2,1,4,1)
- particulates, < 2.5 um: 2.07026e-7 kg; data quality (3,2,1,2,4)
- Phthalate, dibutyl-: 4.97886e-10 kg; data quality (4,2,1,1,5)
- selenium: 4.86341e-14 kg; data quality (2,2,1,1,5)
- ACRYLAMIDE: 1.64053e-12 kg; data quality (4,2,1,1,5)
- cadmium: 1.00679e-12 kg; data quality (3,2,1,1,5)
- anthracene: 3.35085e-13 kg; data quality (3,2,1,4,1)
- ethane, 1,2-dibromo-: 1.92418e-16 kg; data quality (2,2,1,1,5)
- ethane, 1,2-dichloro-: 1.02768e-16 kg; data quality (3,2,1,1,5)
- hydrogen chloride: 2.83064e-11 kg; data quality (2,2,1,1,5)
- methanol: 5.2583e-8 kg; data quality (4,2,1,1,5)
- pyrene: 5.77721e-13 kg; data quality (3,2,1,4,1)
- lead: 3.94783e-12 kg; data quality (3,2,1,1,5)
- para-xylene: 1.17233e-11 kg; data quality (3,2,1,4,1)
- Propane, 1,1,1,3,3,3-hexafluoro-, HCFC-236fa: 7.48893e-11 kg; data quality (4,2,1,4,1)
- 2-methylnaphthalene: 1.61639e-14 kg; data quality (2,2,1,1,5)
- Nitrogen: 5.42483e-9 kg; data quality (2,2,1,1,5)
- Hydrocarbons, aromatic: 1.55111e-10 kg; data quality (3,2,1,4,1)
- Cobalt: 6.85196e-10 kg; data quality (3,2,1,1,5)
- Dibenz(a,h)anthracene: 3.71462e-16 kg; data quality (2,2,1,2,4)
- m-xylene: 2.92666e-10 kg; data quality (3,2,1,4,1)
- phthalic anhydride: 2.76638e-8 kg; data quality (2,2,1,1,5)
- chromium: 4.64213e-13 kg; data quality (4,1,1,1,5)
- carbon tetrachloride: 1.61806e-16 kg; data quality (4,2,1,1,5)
- Phosphorus: 9.99119e-10 kg; data quality (2,1,1,1,5)
- acenaphthene: 3.77201e-12 kg; data quality (3,2,1,4,1)
- chlorine: 1.89671e-11 kg; data quality (4,2,1,1,5)
- Ethylene glycol monoethyl ether: 5.21098e-13 kg; data quality (3,2,1,1,5)
- toluene: 1.2268e-8 kg; data quality (4,2,1,2,4)
- Dinitrogen monoxide: 8.06885e-9 kg; data quality (4,2,1,4,1)
- Ethene, chloro-: 6.55969e-17 kg; data quality (3,2,1,1,5)
- cyanide: 6.7481e-9 kg; data quality (3,2,1,1,5)
- methyl isobutyl ketone: 1.81011e-9 kg; data quality (4,2,1,1,5)
- cumene: 1.68363e-10 kg; data quality (4,2,1,1,5)
- naphthalene: 9.7099e-11 kg; data quality (3,2,1,4,1)
- acenaphthylene: 4.48332e-12 kg; data quality (3,2,1,4,1)
- benzo(a)pyrene: 5.11529e-14 kg; data quality (3,2,1,4,1)
- Benzo(a)anthracene: 4.45176e-19 kg; data quality (2,2,1,1,5)
- methyl methacrylate: 2.87511e-9 kg; data quality (4,2,1,1,5)
- 2,2,4-trimethylpentane: 5.34805e-10 kg; data quality (3,2,1,4,1)
- Diethylene glycol butyl ether: 1.10548e-9 kg; data quality (4,2,1,1,5)
- arsenic: 1.76799e-12 kg; data quality (3,2,1,4,2)
- ethene, tetrachloro-: 2.93594e-12 kg; data quality (3,2,1,1,5)
- Chromium VI: 2.12138e-10 kg; data quality (3,2,1,1,5)
- Indeno(1,2,3-cd)pyrene: 3.36684e-14 kg; data quality (3,2,1,4,1)
- particulates, < 10 um: 3.80784e-8 kg; data quality (3,2,1,1,5)
- nickel: 4.28181e-10 kg; data quality (3,2,1,1,5)
- Carbon dioxide: 0.00333831 kg; data quality (4,2,1,4,1)
- Chromium, ion: 4.12679e-10 kg; data quality (2,2,1,1,5)
- acetaldehyde: 2.57561e-9 kg; data quality (3,2,1,4,1)
- butadiene: 2.60951e-10 kg; data quality (3,2,1,4,1)
- Water, saline: 1.08299e-5 m3; data quality (4,2,1,4,2)
- Benzo(g,h,i)perylene: 1.07148e-13 kg; data quality (3,2,1,4,1)
- beryllium: 2.47569e-15 kg; data quality (2,2,1,1,5)
- nitrogen oxides: 1.15758e-6 kg; data quality (3,2,1,1,2)
- hexane: 1.39014e-9 kg; data quality (3,2,1,2,4)
- fluoranthene: 1.16428e-12 kg; data quality (3,2,1,3,2)
- Water, fresh: 0.000550019 m3; data quality (2,2,1,4,2)
- fluorene: 4.07237e-12 kg; data quality (3,2,1,4,1)
- trichloroethylene: 5.81919e-9 kg; data quality (4,2,1,1,5)
- Methane: 6.86112e-8 kg; data quality (4,2,1,4,1)
- Methane, difluoro-, HFC-32: 3.77309e-9 kg; data quality (4,2,1,4,1)

## Inventory method
Input-output

## Modelling constants
The reference unit of all processes is 1 USD2013 of the good or service. The technosphere inputs are based on the US BEA detailed input-output tables for 2007. The IO tables are combined to develop a commodity-by-commodity model based on the the industry-technology assumption (see Suh et al., 2010), which assumes all commodities produced by a given industry have the same input structure, but that multiple industries can produce the same commodity. Thus, model technosphere flows represent commodity outputs (and not industry outputs) from other processes in the model. There are no by-products included in these processes. All commodity production is based on US-conditions, despite in reality that some goods and services are produced overseas, as USEEIO v1.1 is a single-region IO model.

## Completeness
The input-output approach assures that all purchased inputs associated with the sectors making these commodities as reported in the US census for 2007 are included. The direct resources extracted including minerals, energy sources, water and land occupied are included. Emissions to air include all critieria air pollutants, greenhouse gases, and hazardous and toxic air pollutants as defined by US EPA. Releases to water include toxics, total nitrogen and total phosphorus, and water discharges. Releases to soil or groundwater include toxics and agriculutural pesticides. Some metal releases to air, water and soil are not included because they could not be speciated. Solid hazardous and non-hazardous wastes generated are not included as an elementary flows although purchases of waste services are included.

## Data treatment
Greenhouse gases are primarily from the US Greenhouse Gas Emission Inventory (USEPA 2016a). Biogenic C uptake is not included (change from version 1.0), as biogenic C emission are not included. Toxic releases to air, water and soil (except pesticides) are from the 2013 Toxic Release Inventory (USEPA 2015a). Criteria air pollutants and hazardous air pollutants are from the 2011 National Emissions Inventory (USEPA 2015b). All estimates are normalized by industry based on sector output in the data year, then converted to 2013 USD using relative sector-specific CPIs (if data year is not 2013). Energy use represent raw renewables or fossil fuel energies and is based on EIA data for 2014. See Table 1 in Yang, Ingwersen et al. 2017 and Supporting Information 1, and the v1.1 data update notes (Ingwersen et al. 2017) for all details on environmental data sources used.Land occupation associated with manufacturing buildings was estimated based on the building floorspace data provided by the U.S. Energy Information Administration in the 2010 Manufacturing Energy Consumption Survey (EIA 2013). Portions of total renewable energy (EIA 2016) based on EIA-923 reports for 2014 (EIA 2017) are included. Nitrogen and Phosphorus releases are modeled in total N and total P equivalents as estimated by the Discharge Monitoring Report Nutrient Loading tool (USEPA 2016b). Self-supplied withdrawals were assigned to industrial sectors based on water use statistics for Canadian industries by NAICS 3-digit sector scaled to US production levels based on gross domestic product by industry (BEA 2015; Statistics Canada 2010), and further disaggregated to the manufacturing sectors based on compensation of employees as provided by the 2007 IO tables (BEA 2015). Water withdrawals associated with public supply were allocated to sectors based on their use of water, sewage, and other services in USD based on the IO tables (BEA 2015). Portions of total renewable energy (EIA 2016) by type are assigned to sectors (hydro, wind, solar, or) based on EIA-923 reports for 2014 (EIA 2017).

## Data collection
2015-2016

## Sampling procedure
US federal government sources, including surveys and US EPA emissions databases are used as the primary sources. From these sources, data for US reporting establishments/facilities are aggregated by the NAICS sector as defined in the BEA detailed 2007 input-output tables. When level of sector aggregation differs, or when direct emissions are not reported but modeled, additional sources are used to make allocations and estimates.

## Review details
In regard to quality assurance and peer-review, each dataset created went through Quality Assurance as defined in a quality assurance project plans at US EPA, CSRA or ERG. The model was assembled with the IO model builder model (USEPA 2016c). Validation functions were used to check that all the model components were properly assembled and harmonized. Bayou Demeke and Santosh Ghimire provided internal peer review of the model methodology and the manuscript underwent standard EPA management review. An editor and two anonymous reviewers at the Journal of Cleaner Production reviewed the model. In regard to data quality evaluation, data quality assessment was performed at the flow and process levels according to the updated US EPA data quality assessment guidelines as defined in US EPA (2016b).

## Intended application
The primary application is for use in the US Environmentally-Extended Input-Ouput model, USEEIO, version 1.1. This model is being used by the US EPA for supporting tools that prioritize goods and services based on potential environmental impacts, resource use or emissions for large regions, including the US and US states, and as a strealined tool for organizations as a starting point to consider sustainable materials management. Model results are designed to provide meso/macro-level decision support.

## Project
USEEIO v1.1 was developed by the US EPA with CSRA and ERG with Wesley W. Ingwersen and David E. Meyer as research leads. Yi Yang was the technical lead on the work for CSRA (contract EP-C-15-012); Troy Hawkins was lead for ERG (contract EP-C-12-021).

## Sources
- USDA 2014
- USDA 2009b
- EIA 2015
- USDA 2016
- USEPA 2016b
- Edelen and Ingwersen 2017
- USEPA 2016a
- Yienger et al. 1995
- Blackhurst et al. 2010
- USGS 2015
- EIA 2017
- USEPA 2015a
- Lovelace 2009
- Nickerson et al. 2011
- Maupin et al. 2014
- EIA 2013
- BLM 2008
- USEPA 2015b
- EIA 2016
- Statistics Canada 2010
- Goebes et al. 2003
- Macknick et al. 2011
- USDA 2006
- USEPA 2016c
- Torcellini et al. 2003
- Ingwersen et al. DRAFT
- USDA 2009a
- USGS 2016
- BEA 2015
- Ingwersen et al. 2017
- Kim et el. 2013
