# Gambling establishments (except casino hotels)

Dataset: openLCA process, unit process
Category: 7132: Gambling Industries
Geography: United States
Time period: 2017-01-01 to 2017-12-31
Data quality: US EPA - Process Pedigree Matrix (1;1)
Exchange data quality scheme: US EPA - Flow Pedigree Matrix
Generated by: US EPA with CSRA and ERG
Owner: US EPA
Published in: Yang, Ingwersen et al. 2017
restrictionsDescription: This model shold be appropriately cited (see Yang, Ingwersen et al. 2017 source or Publication field) when used. Any changes or derivations of this model by the user should be documented. The model itself and any results from use of this model shall not be construed to consitute US EPA opinion or policy.
copyright: false

## General comment
BEA Code & Name is '713200:Gambling industries (except casino hotels)'. Description of the primary industry producing this good or service, adapted from the Census Bureau NAICS 2007 descriptions: This industry group comprises establishments (except casino hotels) primarily engaged in operating gambling facilities, such as casinos, bingo halls, and video gaming terminals, or in the provision of gambling services, such as lotteries and off-track betting. Casino hotels are classified in Industry 72112, Casino Hotels.

## Technology
The process describes the average US production of this good or service within this NAICS-based grouping defined in the BEA 2007 detailed input-output tables (BEA 2015). Distribution, wholesale and retailing of this good or service, use, and final disposal are not included. Creation of a product system with this process will enable modeling of all upstream (supply-chain) activities.

## Geography
Data represent the 50 US states

## Time period
2017 was the year in which this version of USEEIO was released and is the target date for the model

## Reference product
- Gambling establishments (except casino hotels): 1 USD

## Inputs from technosphere
All rows: data quality (1,3,1,1,1)
- Business support: 0.000153483 USD
- Lime and gypsum products; at manufacturer: 3.63384e-7 USD
- Other computer related services, including facilities management: 0.0021996 USD
- Other plastic products; at manufacturer: 0.000385433 USD
- Wireless communications; at manufacturer: 0.000221203 USD
- Polystyrene foam products; at manufacturer: 7.26768e-8 USD
- Performances: 0.00166616 USD
- Securities and commodities brokerage and exchanges: 0.00123439 USD
- Storage batteries; at manufacturer: 3.19778e-7 USD
- Cutlery and handtools; at manufacturer: 4.91196e-5 USD
- Chemicals (except basic chemicals, agrichemicals, polymers, paints, pharmaceuticals,soaps, cleaning compounds); at manufacturer: 0.000546988 USD
- Specialty transformers; at manufacturer: 2.90707e-8 USD
- Small electrical appliances; at manufacturer: 1.45354e-8 USD
- Insurance carriers: 0.00554469 USD
- Ready-mix concrete; at manufacturer: 8.1398e-7 USD
- Scenic and sightseeing transportation and support activities for transportation: 0.000863436 USD
- Facilities support: 0.000116752 USD
- Greenhouse crops, mushrooms, nurseries, and flowers; at farm: 0.00016295 USD
- Machine shops; at manufacturer: 2.34551e-5 USD
- Transmission and power train parts; at manufacturer: 0.000116433 USD
- Secondary steel products; at manufacturer: 4.36061e-8 USD
- Communication and energy wire and cable; at manufacturer: 3.48849e-7 USD
- Paper; at manufacturer: 2.35714e-5 USD
- Other textiles; at manufacturer: 0.000316375 USD
- Abrasive products; at manufacturer: 5.81415e-8 USD
- Cardboard; at manufacturer: 0.0005355 USD
- Adhesives; at manufacturer: 5.81415e-8 USD
- Drinking water and wastewater treatment; at consumer: 0.000466704 USD
- Machinery for the paper, textile, food or other industries (except semiconductor machinery); at manufacturer: 1.45354e-8 USD
- Asphalt pavement; at manufacturer: 1.45354e-7 USD
- Sanitary paper (tissues, napkins, diapers, etc.); at manufacturer: 2.90707e-8 USD
- Screws, nuts, and bolts; at manufacturer: 2.90707e-8 USD
- Clay and ceramic products; at manufacturer: 3.7792e-7 USD
- Vehicles and parts sales: 5.81415e-8 USD
- Computer systems design: 0.00202529 USD
- Electricity; at consumer: 0.00124997 USD
- Warehousing: 0.000117203 USD
- Soft drinks, bottled water, and ice; at manufacturer: 0.000291467 USD
- Other secondary nonferrous metal products; at manufacturer: 1.17784e-5 USD
- Environmental and other technical consulting services: 8.28516e-7 USD
- Wood kitchen cabinets and countertops; at manufacturer: 6.54091e-7 USD
- Vehicle electrical and electronic equipment; at manufacturer: 6.99003e-5 USD
- Fertilizers; at manufacturer: 5.84271e-5 USD
- Flours and malts; at manufacturer: 8.72122e-8 USD
- Vehicle rental and leasing: 0.000249949 USD
- Primary iron, steel, and ferroalloy products; at manufacturer: 5.01953e-5 USD
- Electronic equipment repair and maintenance: 0.00145822 USD
- Hydraulic pumps, motors, cylinders and actuators; at manufacturer: 1.45354e-7 USD
- Gasoline, fuels, and by-products of petroleum refining; at manufacturer: 0.00263903 USD
- Postal service: 6.03021e-5 USD
- Other retail: 2.57663e-5 USD
- Food and beverage stores: 1.45354e-8 USD
- Clothing; at manufacturer: 8.72122e-8 USD
- State and local government enterprises: 1.51168e-6 USD
- General merchandise stores: 7.26768e-8 USD
- Paints and coatings; at manufacturer: 4.8451e-5 USD
- Cheese; at manufacturer: 2.36005e-5 USD
- Cement; at manufacturer: 8.72122e-8 USD
- Management consulting: 0.00128306 USD
- Veneer, plywood, and engineered wood; at manufacturer: 2.35133e-5 USD
- Unrefined oil and gas; at extraction site: 5.81415e-7 USD
- Couriers and messengers: 8.1398e-7 USD
- Frozen food; at manufacturer: 2.35569e-5 USD
- Marketing research and all other miscellaneous professional, scientific, and technical services: 0.00204914 USD
- Wineries and wine; at manufacturer: 0.000116578 USD
- Plastic bags, films, and sheets; at manufacturer: 2.33389e-5 USD
- Commercial machinery repair: 0.00087645 USD
- Lessors of nonfinancial intangible assets: 0.00275976 USD
- Insurance agencies and brokerages: 0.000282014 USD
- Snack foods; at manufacturer: 5.82672e-5 USD
- Other basic organic chemicals; at manufacturer: 5.8209e-5 USD
- Books, newspapers, magazines, and other print media; at manufacturer: 0.00127049 USD
- Tobacco, cotton, sugarcane, peanuts, sugar beets, herbs and spices, and other crops; at farm: 2.1803e-7 USD
- Sound recording: 7.26768e-8 USD
- Nonferrous metal casts; at manufacturer: 5.81415e-8 USD
- Curtains and linens; at manufacturer: 3.19778e-7 USD
- Investment advice, portfolio management, and other financial advising services: 4.71719e-5 USD
- Vehicle seating and interior trim (upholstery); at manufacturer: 1.45354e-8 USD
- Other support services: 0.000361687 USD
- Ophthalmic goods; at manufacturer: 2.90707e-8 USD
- Finished and coated fabric; at manufacturer: 0.000353847 USD
- Packaged poultry; at manufacturer: 7.04672e-5 USD
- Metal windows, doors, and architectural products; at manufacturer: 1.439e-6 USD
- Ammunition, arms, ordnance, and related accessories; at manufacturer: 8.72122e-8 USD
- Cutting and machine tool accessory, rolling mill, and other metalworking machines; at manufacturer: 1.30818e-7 USD
- Dry-cleaning and laundry: 0.000572972 USD
- Wiring devices; at manufacturer: 2.47101e-7 USD
- Coal; at mine: 1.16283e-7 USD
- Fluid milk and butter; at manufacturer: 2.34551e-5 USD
- Fresh vegetables, melons, and potatoes; at farm: 3.49429e-5 USD
- Architectural, engineering, and related services: 0.00202014 USD
- Water transport (boats, ships, ferries): 1.18802e-5 USD
- Accounting, tax preparation, bookkeeping, and payroll: 0.00591631 USD
- Plastics; at manufacturer: 1.45354e-8 USD
- Copper, nickel, lead, and zinc; at mine: 6.10485e-6 USD
- Gaskets, seals, musical instruments, fasteners, brooms, brushes, mop and other misc. goods; at manufacturer: 0.000139859 USD
- Distilleries and spirits; at manufacturer: 5.97643e-5 USD
- Fruit and vegetable preservation; at manufacturer: 5.86742e-5 USD
- Metal structural products; at manufacturer: 6.97698e-7 USD
- Independent artists, writers, and performers: 0.00342029 USD
- Legal services: 0.0546099 USD
- Stationery; at manufacturer: 7.26768e-8 USD
- Consumer goods and general rental centers: 6.10485e-7 USD
- Communications equipment; at manufacturer: 4.66341e-5 USD
- Light gauge metal cans, boxes, and containers; at manufacturer: 1.45354e-8 USD
- Secondary copper products; at manufacturer: 7.26768e-8 USD
- Concrete pipe, bricks, and blocks; at manufacturer: 1.8896e-7 USD
- Employment services: 0.000353092 USD
- Lids, jars, bottle caps, other metal closures and crowns; at manufacturer: 3.19778e-7 USD
- Other real estate: 0.00917321 USD
- Jewelry and silverware; at manufacturer: 4.36061e-8 USD
- Directory, mailing list, and other publishers; at publisher: 1.16283e-7 USD
- Vehicle repair: 0.000223064 USD
- Travel arrangement and reservation: 1.24616e-5 USD
- Other petroleum and coal products; at manufacturer: 5.84707e-5 USD
- News syndicates, libraries, archives, Internet publishing and all other information services: 9.30938e-5 USD
- Nonresidential building repair and maintanence: 3.09603e-6 USD
- Limited-service restaurants: 0.000105948 USD
- Flavored drink concentrates; at manufacturer: 2.90707e-7 USD
- Air conditioning, refrigeration, and warm air heating equipment; at manufacturer: 0.000233229 USD
- Sugar, candy, and chocolate; at manufacturer: 7.00456e-5 USD
- Software: 0.00012808 USD
- Satellite, telecommunications resellers, and all other telecommunications: 0.000163314 USD
- Computer storage device readers; at manufacturer: 2.32662e-5 USD
- Used and secondhand goods: 0.00100244 USD
- Material handling equipment; at manufacturer: 7.26768e-8 USD
- Data processing and hosting: 0.000316085 USD
- Specialized design: 0.00014076 USD
- Fabric; at manufacturer: 4.66486e-5 USD
- Commercial equipment rental: 0.000188789 USD
- Office administration: 8.24491e-5 USD
- Movies and film: 7.0191e-5 USD
- External hard drives, CDs, other storage media; at manufacturer: 1.30818e-7 USD
- Leather; at manufacturer: 8.72122e-8 USD
- Other concrete products; at manufacturer: 1.22145e-5 USD
- Laminated plastic plates and shapes; at manufacturer: 2.90707e-8 USD
- Waste management and remediation: 0.00208663 USD
- Plywood and veneer; at manufacturer: 9.59334e-7 USD
- Vehicle engines and engine parts; at manufacturer: 2.32807e-5 USD
- Promoters and agents: 7.12233e-7 USD
- Monetary authorities and depository credit intermediation: 0.00506307 USD
- Truck transport: 0.000865195 USD
- All other foods; at manufacturer: 2.6493e-5 USD
- Heating equipment other than warm air furnaces; at manufacturer: 2.90707e-8 USD
- Lumber and treated lumber; at manufacturer: 5.86887e-5 USD
- Wild-caught fish and game; at place of capture: 0.000187627 USD
- Internet publishing and broadcasting: 0.000640285 USD
- Shelving and lockers; at manufacturer: 2.90707e-6 USD
- Coffee and tea; at manufacturer: 7.03654e-5 USD
- Wholesale trade: 0.0024907 USD
- Light bulbs; at manufacturer: 2.90707e-8 USD
- Bread and other baked goods; at manufacturer: 0.000466021 USD
- Household goods repair: 0.000152567 USD
- Rail transport: 4.68812e-5 USD
- Advertising and public relations: 0.0155932 USD
- Air transport: 0.00365461 USD
- Computer terminals and other computer peripheral equipment; at manufacturer: 0.000651889 USD
- Carpets and rugs; at manufacturer: 1.45354e-8 USD
- Packaged meat (except poultry); at manufacturer: 0.000559958 USD
- Ice cream and frozen desserts; at manufacturer: 2.61637e-7 USD
- Urethane and other foam products; at manufacturer: 1.30818e-7 USD
- Buildings and dwellings services: 0.00834829 USD
- Plastic bottles; at manufacturer: 1.45354e-8 USD
- Dolls, toys, and games; at manufacturer: 0.000164142 USD
- Animal farms and aquaculture ponds (except cattle and poultry): 1.54075e-6 USD
- Corn products; at manufacturer: 7.26768e-8 USD
- Magazines and journals; at publisher: 0.000279587 USD
- Motors and generators; at manufacturer: 8.72122e-8 USD
- Noncomparable imports: 0.000803759 USD
- Motor vehicle steering, suspension components (except spring), and brake systems; at manufacturer: 4.65614e-5 USD
- Natural gas; at consumer: 0.000957765 USD
- Mattresses, blinds and shades; at manufacturer: 5.81415e-8 USD
- Wireless telecommunications: 0.000304205 USD
- Springs and wires; at manufacturer: 7.26768e-8 USD
- Other educational services: 2.34019e-6 USD
- Pesticides; at manufacturer: 0.000256335 USD
- Seasonings and dressings; at manufacturer: 0.000197995 USD
- Hotels and campgrounds: 0.000547903 USD
- Investigation and security: 0.000350432 USD
- Other vehicle parts; at manufacturer: 4.66486e-5 USD
- Glass and glass products; at manufacturer: 1.01748e-7 USD
- Full-service restaurants: 0.000420201 USD
- Telecommunications: 0.00193599 USD
- Metal plumbing drains, faucets, valves, and other fittings; at manufacturer: 2.47101e-7 USD
- Valve and fittings (except for plumbing); at manufacturer: 1.01748e-7 USD
- Passenger ground transport: 0.000221508 USD
- Civic, social, professional, and similar organizations: 3.34313e-7 USD
- Office supplies (not paper); at manufacturer: 8.72122e-8 USD
- Fabricated pipe and pipe fittings; at manufacturer: 3.19778e-7 USD
- Plastic pipe, fittings, and sausage casings; at manufacturer: 3.48849e-7 USD
- Seafood; at manufacturer: 0.000199013 USD
- Custom metal rolls; at manufacturer: 2.1803e-7 USD
- Ambulances: 1.45354e-8 USD
- Pipeline transport: 1.17058e-5 USD
- Dry, condensed, and evaporated dairy; at manufacturer: 2.33534e-5 USD
- Light fixtures; at manufacturer: 0.000488895 USD
- Company and enterprise management: 0.00285355 USD
- Rubber tires; at manufacturer: 3.49283e-5 USD
- All other food and drinking places: 0.000698291 USD
- Other engine equipment; at manufacturer: 1.45354e-8 USD
- Switchgear and switchboards; at manufacturer: 1.45354e-7 USD
- Metal hinges, keys, lock, and other hardware; at manufacturer: 1.19383e-5 USD
- Sports: 5.82672e-5 USD
- Paper bags and coated paper; at manufacturer: 7.01183e-5 USD
- Breweries and beer; at manufacturer: 0.00119064 USD
- Sporting and athletic goods; at manufacturer: 0.000269073 USD
- Nondepository credit intermediation and related activities: 0.0186361 USD
- Golf courses, marinas, ski resorts, fitness and other rec centers and industries: 0.000139844 USD
- Other transportation equipment; at manufacturer: 2.1803e-7 USD
- Soap and cleaning compounds; at manufacturer: 2.36296e-5 USD
- Wooden windows, door, and flooring; at manufacturer: 3.54661e-5 USD
- Metal pipe fittings, ball and roller bearings, industrial patterns, metal bath fixtures, other misc. fabricated metals; at manufacturer: 1.33337e-5 USD
- Pet care, photofinishing, parking and other sundry services: 0.00157334 USD
- Cardboard containers; at manufacturer: 0.000139975 USD
- Cookies, crackers, pastas, and tortillas; at manufacturer: 9.3181e-5 USD

## Inputs from nature
- Occupation, urban, discontinuously built: 0.000225097 m2*a; data quality (4,2,1,1,1)
- Energy, solar: 6.59105e-7 MJ; data quality (3,1,1,1,1)
- Water, fresh: 0.000331851, 0.00056025 m3 (2 entries, compartments not in this file); data quality (1,2,1,4,2)
- Energy, wind: 0.00040556 MJ; data quality (3,1,1,1,1)

## Emissions to nature
- Benzo(b)fluoranthene: 1.42534e-9 kg; data quality (3,2,1,4,1)
- styrene: 2.23755e-6 kg; data quality (3,2,1,4,1)
- butadiene: 3.38408e-6 kg; data quality (3,2,1,4,1)
- particulates, < 2.5 um: 5.90867e-5 kg; data quality (3,2,1,4,1)
- Carbon dioxide: 0.00930586 kg; data quality (4,2,1,4,1)
- Water, fresh: 0.000734767 m3; data quality (1,2,1,4,2)
- m-xylene: 1.17293e-6 kg; data quality (3,2,1,4,1)
- Chromium VI: 2.07144e-10 kg; data quality (3,2,1,5,1)
- Chrysene: 1.64117e-9 kg; data quality (3,2,1,4,1)
- Propane, 1,1,1,3,3,3-hexafluoro-, HCFC-236fa: 1.00725e-9 kg; data quality (4,2,1,4,1)
- hydrogen chloride: 9.98099e-14 kg; data quality (2,2,1,1,5)
- ethane, 1,2-dichloro-: 2.72216e-15 kg; data quality (3,2,1,1,5)
- 2-methylnaphthalene: 2.55958e-16 kg; data quality (2,2,1,1,5)
- ethane, 1,2-dibromo-: 1.7034e-15 kg; data quality (2,2,1,1,5)
- arsenic: 2.60837e-9 kg; data quality (3,2,1,5,1)
- Ethane, 1,1,1-trifluoro-, HFC-143a: 3.72843e-8 kg; data quality (4,2,1,4,1)
- beryllium: 3.5056e-18 kg; data quality (2,2,1,1,5)
- manganese: 2.51924e-10 kg; data quality (3,2,1,5,1)
- Nitrogen: 1.02026e-8 kg; data quality (2,2,1,1,5)
- nickel: 8.84987e-10 kg; data quality (3,2,1,5,1)
- Hydrocarbons, aromatic: 1.21602e-7 kg; data quality (3,2,1,4,1)
- phenanthrene: 2.26293e-8 kg; data quality (3,2,1,4,1)
- Benzo(g,h,i)perylene: 7.88664e-9 kg; data quality (3,2,1,4,1)
- benzene, ethyl-: 2.94781e-5 kg; data quality (3,2,1,4,1)
- naphthalene: 4.13124e-7 kg; data quality (3,2,1,4,1)
- VOC, volatile organic compounds: 0.00163437 kg; data quality (3,2,1,1,1)
- benzo(a)pyrene: 2.11214e-9 kg; data quality (3,2,1,4,1)
- pyrene: 2.37351e-8 kg; data quality (3,2,1,4,1)
- formaldehyde: 1.12079e-5 kg; data quality (3,2,1,4,1)
- acenaphthylene: 2.09948e-8 kg; data quality (3,2,1,4,1)
- Propene, 1,3-dichloro-: 2.02952e-16 kg; data quality (3,2,1,1,5)
- acenaphthene: 3.11145e-9 kg; data quality (3,2,1,4,1)
- benzene, chloro-: 3.29065e-16 kg; data quality (4,2,1,1,5)
- Dinitrogen monoxide: 2.52322e-8 kg; data quality (4,2,1,4,1)
- Phosphorus: 1.21923e-6 kg; data quality (4,1,1,1,5)
- selenium: 1.03392e-13 kg; data quality (2,2,1,1,5)
- fluoranthene: 1.94128e-8 kg; data quality (3,2,1,4,1)
- carbon tetrachloride: 1.36086e-15 kg; data quality (4,2,1,1,5)
- Indeno(1,2,3-cd)pyrene: 2.38583e-9 kg; data quality (3,2,1,4,1)
- ethylene glycol: 1.7696e-12 kg; data quality (5,2,1,1,5)
- monochloroethane: 1.43744e-17 kg; data quality (3,2,1,1,5)
- phenol: 1.54203e-13 kg; data quality (4,2,1,1,5)
- acetaldehyde: 5.16714e-6 kg; data quality (3,2,1,4,1)
- mercury: 9.29786e-12 kg; data quality (3,2,1,5,1)
- carbon monoxide: 0.00620296 kg; data quality (3,2,1,1,1)
- Propane, 1,2-dichloro-: 2.06793e-16 kg; data quality (4,2,1,1,5)
- toluene: 0.000256611 kg; data quality (3,2,1,4,1)
- nitrogen oxides: 7.15879e-5 kg; data quality (3,2,1,1,1)
- chloroform: 2.19097e-16 kg; data quality (4,2,1,1,5)
- ammonia: 5.78074e-7 kg; data quality (3,2,1,4,1)
- methane, dichloro-, hcc-30: 2.65158e-15 kg; data quality (4,2,1,1,5)
- Benzo(a)anthracene: 2.41237e-19 kg; data quality (2,2,1,1,5)
- fluorene: 2.0222e-8 kg; data quality (3,2,1,4,1)
- 3-methylcholanthrene: 2.71392e-20 kg; data quality (2,2,1,1,5)
- ethane, 1,1,2-trichloro-: 2.44455e-16 kg; data quality (4,2,1,1,5)
- hexane: 2.25681e-5 kg; data quality (3,2,1,4,1)
- anthracene: 7.36031e-9 kg; data quality (3,2,1,4,1)
- BUTYL ISOCYANATE: 1.12266e-13 kg; data quality (4,2,1,1,5)
- sulfur dioxide: 7.08547e-7 kg; data quality (3,2,1,4,1)
- Methane, difluoro-, HFC-32: 5.07472e-8 kg; data quality (4,2,1,4,1)
- Dibenz(a,h)anthracene: 5.90149e-11 kg; data quality (3,2,1,4,1)
- particulates, < 10 um: 5.17886e-6 kg; data quality (3,2,1,4,1)
- propanal: 1.04537e-6 kg; data quality (3,2,1,4,1)
- lead: 1.05283e-15 kg; data quality (3,2,1,1,5)
- Ethane, 1,1,1,2-tetrafluoro-, HFC-134a: 3.28448e-7 kg; data quality (4,2,1,4,1)
- 2,2,4-trimethylpentane: 9.71314e-5 kg; data quality (3,2,1,4,1)
- benzene: 3.17189e-5 kg; data quality (3,2,1,4,1)
- biphenyl: 1.6298e-15 kg; data quality (4,2,1,1,5)
- ethene, tetrachloro-: 1.90648e-17 kg; data quality (3,2,1,1,5)
- benz[a]anthracene: 2.40743e-9 kg; data quality (3,2,1,4,1)
- Cobalt: 2.9149e-16 kg; data quality (3,2,1,1,5)
- o-Xylene: 4.08983e-7 kg; data quality (3,2,1,4,1)
- 1,1,2,2-tetrachloroethane: 3.07505e-16 kg; data quality (3,2,1,1,5)
- Benzo(k)fluoranthene: 1.30724e-9 kg; data quality (3,2,1,4,1)
- cadmium: 3.0013e-15 kg; data quality (3,2,1,1,5)
- Methane: 8.512e-7 kg; data quality (4,2,1,4,1)
- 1,1,1-trichloroethane: 1.05489e-12 kg; data quality (4,2,1,1,5)
- Xylene: 0.00012497 kg; data quality (3,2,1,4,1)
- Ethane, pentafluoro-, HFC-125: 8.71417e-8 kg; data quality (4,2,1,4,1)
- acrolein: 8.5199e-7 kg; data quality (3,2,1,4,1)
- Chromium, ion: 4.92749e-10 kg; data quality (3,2,1,5,1)
- methanol: 2.74338e-14 kg; data quality (4,2,1,1,5)
- chlorine: 5.98021e-16 kg; data quality (4,2,1,1,5)
- t-butyl methyl ether: 2.31897e-14 kg; data quality (3,2,1,1,5)
- Ethene, chloro-: 5.49763e-16 kg; data quality (3,2,1,1,5)

## Inventory method
Input-output

## Modelling constants
The reference unit of all processes is 1 USD2013 of the good or service. The technosphere inputs are based on the US BEA detailed input-output tables for 2007. The IO tables are combined to develop a commodity-by-commodity model based on the the industry-technology assumption (see Suh et al., 2010), which assumes all commodities produced by a given industry have the same input structure, but that multiple industries can produce the same commodity. Thus, model technosphere flows represent commodity outputs (and not industry outputs) from other processes in the model. There are no by-products included in these processes. All commodity production is based on US-conditions, despite in reality that some goods and services are produced overseas, as USEEIO v1.1 is a single-region IO model.

## Completeness
The input-output approach assures that all purchased inputs associated with the sectors making these commodities as reported in the US census for 2007 are included. The direct resources extracted including minerals, energy sources, water and land occupied are included. Emissions to air include all critieria air pollutants, greenhouse gases, and hazardous and toxic air pollutants as defined by US EPA. Releases to water include toxics, total nitrogen and total phosphorus, and water discharges. Releases to soil or groundwater include toxics and agriculutural pesticides. Some metal releases to air, water and soil are not included because they could not be speciated. Solid hazardous and non-hazardous wastes generated are not included as an elementary flows although purchases of waste services are included.

## Data treatment
Greenhouse gases are primarily from the US Greenhouse Gas Emission Inventory (USEPA 2016a). Biogenic C uptake is not included (change from version 1.0), as biogenic C emission are not included. Toxic releases to air, water and soil (except pesticides) are from the 2013 Toxic Release Inventory (USEPA 2015a). Criteria air pollutants and hazardous air pollutants are from the 2011 National Emissions Inventory (USEPA 2015b). All estimates are normalized by industry based on sector output in the data year, then converted to 2013 USD using relative sector-specific CPIs (if data year is not 2013). Energy use represent raw renewables or fossil fuel energies and is based on EIA data for 2014. See Table 1 in Yang, Ingwersen et al. 2017 and Supporting Information 1, and the v1.1 data update notes (Ingwersen et al. 2017) for all details on environmental data sources used.Land occupation for commercial buildings was estimated based on the building floorspace data provided by the U.S. Energy Information Administration 2012 Commercial Building Energy Consumption Survey (CBECS) (EIA 2015). Total commercial public supply water use is reported by USGS (Maupin et al. 2014). Water use is allocated across commercial sectors based on their use of water, sewage, and other services in USD based on the 2007 Benchmark Use Table before redefinitions (BEA 2015).

## Data collection
2015-2016

## Sampling procedure
US federal government sources, including surveys and US EPA emissions databases are used as the primary sources. From these sources, data for US reporting establishments/facilities are aggregated by the NAICS sector as defined in the BEA detailed 2007 input-output tables. When level of sector aggregation differs, or when direct emissions are not reported but modeled, additional sources are used to make allocations and estimates.

## Review details
In regard to quality assurance and peer-review, each dataset created went through Quality Assurance as defined in a quality assurance project plans at US EPA, CSRA or ERG. The model was assembled with the IO model builder model (USEPA 2016c). Validation functions were used to check that all the model components were properly assembled and harmonized. Bayou Demeke and Santosh Ghimire provided internal peer review of the model methodology and the manuscript underwent standard EPA management review. An editor and two anonymous reviewers at the Journal of Cleaner Production reviewed the model. In regard to data quality evaluation, data quality assessment was performed at the flow and process levels according to the updated US EPA data quality assessment guidelines as defined in US EPA (2016b).

## Intended application
The primary application is for use in the US Environmentally-Extended Input-Ouput model, USEEIO, version 1.1. This model is being used by the US EPA for supporting tools that prioritize goods and services based on potential environmental impacts, resource use or emissions for large regions, including the US and US states, and as a strealined tool for organizations as a starting point to consider sustainable materials management. Model results are designed to provide meso/macro-level decision support.

## Project
USEEIO v1.1 was developed by the US EPA with CSRA and ERG with Wesley W. Ingwersen and David E. Meyer as research leads. Yi Yang was the technical lead on the work for CSRA (contract EP-C-15-012); Troy Hawkins was lead for ERG (contract EP-C-12-021).

## Sources
- BEA 2015
- Ingwersen et al. 2017
- Edelen and Ingwersen 2017
- USDA 2009b
- Lovelace 2009
- USGS 2016
- Kim et el. 2013
- BLM 2008
- USEPA 2015b
- EIA 2017
- Statistics Canada 2010
- EIA 2015
- Blackhurst et al. 2010
- USDA 2014
- USEPA 2015a
- USDA 2009a
- EIA 2016
- EIA 2013
- Nickerson et al. 2011
- USEPA 2016a
- USEPA 2016b
- Maupin et al. 2014
- USEPA 2016c
- Torcellini et al. 2003
- Ingwersen et al. DRAFT
- Yienger et al. 1995
- Goebes et al. 2003
- Macknick et al. 2011
- USDA 2016
- USGS 2015
- USDA 2006
