# Aluminum products; at manufacturer

Dataset: openLCA process, unit process
Category: 3313: Alumina and Aluminum Production and Processing
Geography: United States
Time period: 2017-01-01 to 2017-12-31
Data quality: US EPA - Process Pedigree Matrix (1;1)
Exchange data quality scheme: US EPA - Flow Pedigree Matrix
Generated by: US EPA with CSRA and ERG
Owner: US EPA
Published in: Yang, Ingwersen et al. 2017
restrictionsDescription: This model shold be appropriately cited (see Yang, Ingwersen et al. 2017 source or Publication field) when used. Any changes or derivations of this model by the user should be documented. The model itself and any results from use of this model shall not be construed to consitute US EPA opinion or policy.
copyright: false

## General comment
BEA Code & Name is '33131B:Aluminum product manufacturing from purchased aluminum'. Description of the primary industry producing this good or service, adapted from the Census Bureau NAICS 2007 descriptions: This industry comprises establishments primarily engaged in one or more of the following: (1) flat rolling or continuous casting sheet, plate, foil and welded tube from purchased aluminum; (2) recovering aluminum from scrap and flat rolling or continuous casting sheet, plate, foil, and welded tube in integrated mills; (3) extruding aluminum bar, pipe, and tube blooms or extruding or drawing tube from purchased aluminum; (4) recovering aluminum from scrap and extruding bar, pipe, and tube blooms or drawing tube in integrated mills; (5) rolling, drawing, or extruding shapes (except flat rolled sheet, plate, foil, and welded tube; extruded rod, bar, pipe, and tube blooms; and drawn or extruded tube) from purchased aluminum; and/or (6) recovering aluminum from scrap and rolling, drawing or extruding shapes (except flat rolled sheet, plate, foil, and welded tube; extruded rod, bar, pipe, and tube blooms; and drawn or extruded tube) in integrated mills. Related NAICS codes are: 331315, 331316, 331319

## Technology
The process describes the average US production of this good or service within this NAICS-based grouping defined in the BEA 2007 detailed input-output tables (BEA 2015). Distribution, wholesale and retailing of this good or service, use, and final disposal are not included. Creation of a product system with this process will enable modeling of all upstream (supply-chain) activities.

## Geography
Data represent the 50 US states

## Time period
2017 was the year in which this version of USEEIO was released and is the target date for the model

## Reference product
- Aluminum products; at manufacturer: 1 USD

## Inputs from technosphere
All rows: data quality (1,3,1,1,1)
- Polystyrene foam products; at manufacturer: 1.57585e-7 USD
- Plastic pipe, fittings, and sausage casings; at manufacturer: 0.00144149 USD
- Cast iron and steel; at manufacturer: 1.26562e-5 USD
- Electronic equipment repair and maintenance: 0.000398048 USD
- Commercial machinery repair: 0.00174303 USD
- Other concrete products; at manufacturer: 5.38207e-6 USD
- Marketing research and all other miscellaneous professional, scientific, and technical services: 0.00475521 USD
- Wireless telecommunications: 0.000396582 USD
- Unrefined oil and gas; at extraction site: 8.92963e-5 USD
- Other petroleum and coal products; at manufacturer: 0.000650066 USD
- Compressed Gases; at manufacturer: 5.03732e-5 USD
- Ink and ink cartridges; at manufacturer: 2.34732e-5 USD
- Glass and glass products; at manufacturer: 0.000361379 USD
- General merchandise stores: 5.25669e-7 USD
- Wiring devices; at manufacturer: 3.4228e-5 USD
- Commercial equipment rental: 0.000627782 USD
- Limited-service restaurants: 0.00154642 USD
- Securities and commodities brokerage and exchanges: 0.0138928 USD
- Paper bags and coated paper; at manufacturer: 0.000464401 USD
- Satellite, telecommunications resellers, and all other telecommunications: 4.11048e-5 USD
- Other real estate: 0.00048792 USD
- Optical instruments and lenses; at manufacturer: 5.43625e-8 USD
- Business support: 0.00118627 USD
- Nonferrous metal casts; at manufacturer: 1.74774e-5 USD
- Air transport: 0.00167695 USD
- Aluminum; at manufacturer: 0.358356 USD
- Metal structural products; at manufacturer: 3.37671e-5 USD
- Ready-mix concrete; at manufacturer: 3.77364e-8 USD
- Other rubber products; at manufacturer: 2.92229e-6 USD
- Cutlery and handtools; at manufacturer: 0.00012371 USD
- Vending, commercial laundry, and other commercial and service industry machinery; at manufacturer: 4.11781e-5 USD
- Cardboard; at manufacturer: 0.00108224 USD
- Vehicle engines and engine parts; at manufacturer: 3.8404e-5 USD
- Springs and wires; at manufacturer: 3.82318e-6 USD
- Metal pipe fittings, ball and roller bearings, industrial patterns, metal bath fixtures, other misc. fabricated metals; at manufacturer: 0.00141324 USD
- Ground or treated minerals and earth; at manufacturer: 5.38804e-6 USD
- Relay and industrial controls; at manufacturer: 0.00124747 USD
- Machine shops; at manufacturer: 0.0282717 USD
- Dry-cleaning and laundry: 4.04303e-5 USD
- Other basic organic chemicals; at manufacturer: 0.0024885 USD
- Travel arrangement and reservation: 5.45081e-8 USD
- Scenic and sightseeing transportation and support activities for transportation: 0.000154398 USD
- Other nonmetallic mineral products; at manufacturer: 4.67436e-7 USD
- Special tools, dies, jigs, and fixtures; at manufacturer: 2.24144e-6 USD
- Vehicles and parts sales: 0.000277535 USD
- Fabricated pipe and pipe fittings; at manufacturer: 3.41106e-5 USD
- Asphalt pavement; at manufacturer: 2.8512e-7 USD
- Advertising and public relations: 0.00116172 USD
- Waste management and remediation: 0.000960347 USD
- Metal windows, doors, and architectural products; at manufacturer: 3.30959e-5 USD
- Material handling equipment; at manufacturer: 0.000157602 USD
- Promoters and agents: 7.64894e-5 USD
- Paints and coatings; at manufacturer: 6.28674e-5 USD
- Sports: 7.69284e-5 USD
- Audio and video equipment; at manufacturer: 5.84956e-5 USD
- Light fixtures; at manufacturer: 2.95756e-6 USD
- Wood pulp; at manufacturer: 9.4987e-6 USD
- Synthetic dyes and pigments; at manufacturer: 1.6038e-5 USD
- Light gauge metal cans, boxes, and containers; at manufacturer: 6.51915e-6 USD
- Paper; at manufacturer: 8.65434e-5 USD
- Industrial molds; at manufacturer: 1.17402e-7 USD
- Sand, gravel, clay, phosphate, other nonmetallic minerals; at mine: 3.51394e-7 USD
- Environmental and other technical consulting services: 0.000157478 USD
- Other basic inorganic chemicals; at manufacturer: 0.000187786 USD
- Fiber, yarn, and thread; at manufacturer: 2.91075e-6 USD
- Aluminum products; at manufacturer: 0.0970027 USD
- Nonresidential building repair and maintanence: 0.00241413 USD
- Industrial process variable instruments; at manufacturer: 6.15426e-6 USD
- Office administration: 8.01699e-5 USD
- Petrochemicals; at manufacturer: 4.91403e-6 USD
- Electronic capacitors, resistors, coils, transformers, connectors and other components (except semiconductors and printed circuit assemblies); at manufacturer: 0.000694303 USD
- All other converted paper products; at manufacturer: 4.74973e-8 USD
- Machinery for the paper, textile, food or other industries (except semiconductor machinery); at manufacturer: 4.046e-6 USD
- Wood kitchen cabinets and countertops; at manufacturer: 6.51515e-6 USD
- Full-service restaurants: 0.00100394 USD
- Finished and coated fabric; at manufacturer: 2.90686e-5 USD
- Small electrical appliances; at manufacturer: 3.43821e-7 USD
- Data processing and hosting: 0.0015699 USD
- Urethane and other foam products; at manufacturer: 4.55936e-7 USD
- Adhesives; at manufacturer: 3.95104e-5 USD
- Custom metal rolls; at manufacturer: 0.000171238 USD
- Welding and Soldering Equipment, Scales and Balances, and other general purpose machinery; at manufacturer: 0.000229394 USD
- Wireless communications; at manufacturer: 3.16565e-6 USD
- Consumer goods and general rental centers: 0.000117448 USD
- Abrasive products; at manufacturer: 0.000458771 USD
- Cutting and machine tool accessory, rolling mill, and other metalworking machines; at manufacturer: 0.000480602 USD
- Other computer related services, including facilities management: 0.000308998 USD
- Investment advice, portfolio management, and other financial advising services: 0.000308787 USD
- Plastics; at manufacturer: 0.000476165 USD
- Laminated plastic plates and shapes; at manufacturer: 1.53977e-5 USD
- Wooden windows, door, and flooring; at manufacturer: 9.32902e-6 USD
- Carbon and graphite products; at manufacturer: 0.000325028 USD
- Signs; at manufacturer: 9.12362e-5 USD
- Ball and roller bearings; at manufacturer: 5.29801e-6 USD
- Hotels and campgrounds: 0.000777345 USD
- Legal services: 0.00122411 USD
- Other retail: 4.05454e-5 USD
- Metal plumbing drains, faucets, valves, and other fittings; at manufacturer: 3.82419e-6 USD
- Specialized design: 0.000435875 USD
- Rail transport: 0.00545055 USD
- Warehousing: 0.000852524 USD
- Motors and generators; at manufacturer: 1.25534e-5 USD
- Air and gas compressors; at manufacturer: 4.19293e-7 USD
- Insurance agencies and brokerages: 0.000481084 USD
- Semiconductors; at manufacturer: 0.0101278 USD
- Gaskets, seals, musical instruments, fasteners, brooms, brushes, mop and other misc. goods; at manufacturer: 2.28022e-6 USD
- Shelving and lockers; at manufacturer: 1.5591e-5 USD
- Veneer, plywood, and engineered wood; at manufacturer: 0.000134339 USD
- Plastic bags, films, and sheets; at manufacturer: 0.00252157 USD
- Scientific research and development: 7.70575e-5 USD
- Other plastic products; at manufacturer: 0.00036366 USD
- Electricity; at consumer: 0.00847829 USD
- Lime and gypsum products; at manufacturer: 9.92415e-7 USD
- Fabric; at manufacturer: 1.9527e-5 USD
- Metal cutting and forming machine tools; at manufacturer: 3.77364e-8 USD
- Air conditioning, refrigeration, and warm air heating equipment; at manufacturer: 1.03092e-5 USD
- Books, newspapers, magazines, and other print media; at manufacturer: 4.84287e-7 USD
- All other forging, stamping, and sintering; at manufacturer: 2.1767e-5 USD
- Buildings and dwellings services: 0.00342442 USD
- Screws, nuts, and bolts; at manufacturer: 0.00107949 USD
- Office supplies (not paper); at manufacturer: 3.97117e-5 USD
- Motor vehicle steering, suspension components (except spring), and brake systems; at manufacturer: 7.83832e-5 USD
- Specialty transformers; at manufacturer: 4.28429e-5 USD
- Drinking water and wastewater treatment; at consumer: 0.000246648 USD
- Home furniture - Cabinets and non-wood, nonupholstered; at manufacturer: 1.52846e-5 USD
- Lessors of nonfinancial intangible assets: 0.00337295 USD
- Household goods repair: 0.000317304 USD
- Vehicle electrical and electronic equipment; at manufacturer: 1.62506e-6 USD
- Switchgear and switchboards; at manufacturer: 4.58555e-6 USD
- Coal; at mine: 0.00653047 USD
- Surgical appliance and supplies; at manufacturer: 7.61098e-5 USD
- Metal hinges, keys, lock, and other hardware; at manufacturer: 0.000122956 USD
- Lumber and treated lumber; at manufacturer: 4.35722e-5 USD
- Postal service: 0.00149141 USD
- other miscellaneous electrical equipment and components; at manufacturer: 1.95429e-6 USD
- Mineral wool; at manufacturer: 7.47898e-6 USD
- Other textiles; at manufacturer: 4.46052e-6 USD
- Signal testing instruments; at manufacturer: 5.70807e-6 USD
- Architectural, engineering, and related services: 0.00317586 USD
- Vehicle rental and leasing: 0.00113707 USD
- Cement; at manufacturer: 1.86163e-6 USD
- Plastics and rubber industry machinery; at manufacturer: 1.01888e-6 USD
- Passenger ground transport: 0.0003502 USD
- Soap and cleaning compounds; at manufacturer: 1.2485e-5 USD
- All other food and drinking places: 7.72339e-5 USD
- Accounting, tax preparation, bookkeeping, and payroll: 0.00137965 USD
- Gasoline, fuels, and by-products of petroleum refining; at manufacturer: 0.00324372 USD
- Other support services: 0.000519805 USD
- Valve and fittings (except for plumbing); at manufacturer: 3.02062e-5 USD
- Golf courses, marinas, ski resorts, fitness and other rec centers and industries: 0.000117075 USD
- Communications equipment; at manufacturer: 8.38587e-9 USD
- Performances: 3.63262e-7 USD
- Management consulting: 0.000594849 USD
- Facilities support: 0.000282614 USD
- Cardboard containers; at manufacturer: 0.00633012 USD
- Employment services: 0.000640717 USD
- Primary iron, steel, and ferroalloy products; at manufacturer: 0.00927848 USD
- Food and beverage stores: 7.45006e-8 USD
- Other primary nonferrous metals; at manufacturer: 0.0217497 USD
- Concrete pipe, bricks, and blocks; at manufacturer: 7.36701e-6 USD
- Communication and energy wire and cable; at manufacturer: 0.00085133 USD
- Sanitary paper (tissues, napkins, diapers, etc.); at manufacturer: 4.19293e-9 USD
- Nondepository credit intermediation and related activities: 0.00221983 USD
- Semiconductor machinery; at manufacturer: 2.66376e-6 USD
- Vegetable oils and by-products; at manufacturer: 1.25788e-8 USD
- Copper, nickel, lead, and zinc; at mine: 0.00015726 USD
- Insurance carriers: 0.00159655 USD
- Wholesale trade: 0.0731954 USD
- Other secondary nonferrous metal products; at manufacturer: 0.00387727 USD
- Light bulbs; at manufacturer: 6.47698e-7 USD
- Software: 3.94247e-5 USD
- Company and enterprise management: 0.0132904 USD
- Civic, social, professional, and similar organizations: 0.000423277 USD
- Synthetic rubber and artificial and synthetic fibers; at manufacturer: 1.42476e-5 USD
- Iron, gold, silver, and other metal ores; at mine: 0.000811721 USD
- Plywood and veneer; at manufacturer: 3.77376e-5 USD
- Water transport (boats, ships, ferries): 0.000644634 USD
- Lids, jars, bottle caps, other metal closures and crowns; at manufacturer: 1.74337e-5 USD
- Metal coatings, engravings, and heat treatments; at manufacturer: 0.00951426 USD
- Custom computer programming: 4.94432e-6 USD
- Chemicals (except basic chemicals, agrichemicals, polymers, paints, pharmaceuticals,soaps, cleaning compounds); at manufacturer: 0.000842385 USD
- Vehicle repair: 0.000909682 USD
- Noncomparable imports: 0.00130082 USD
- Primary copper; at manufacturer: 0.00146654 USD
- Heating equipment other than warm air furnaces; at manufacturer: 4.19293e-9 USD
- Computer systems design: 0.000702264 USD
- Transmission and power train parts; at manufacturer: 0.000154412 USD
- Timber and raw forest products; at forest: 3.73949e-6 USD
- Monetary authorities and depository credit intermediation: 0.00327243 USD
- State and local government enterprises: 0.000286718 USD
- Fertilizers; at manufacturer: 1.78145e-6 USD
- Pipeline transport: 3.986e-5 USD
- Other vehicle parts; at manufacturer: 0.00261488 USD
- Truck transport: 0.0165396 USD
- Investigation and security: 0.000632002 USD
- Printed circuit and electronic assembly; at manufacturer: 0.0016571 USD
- Natural gas; at consumer: 0.0151745 USD
- Magazines and journals; at publisher: 2.12818e-6 USD
- Air purification and ventilation equipment; at manufacturer: 3.1447e-7 USD
- Independent artists, writers, and performers: 0.0002303 USD
- Secondary copper products; at manufacturer: 0.00898525 USD
- Secondary steel products; at manufacturer: 4.43293e-5 USD
- Telecommunications: 0.000967072 USD
- Clay and ceramic products; at manufacturer: 7.52062e-6 USD
- Computer terminals and other computer peripheral equipment; at manufacturer: 5.23731e-5 USD

## Inputs from nature
- Occupation, industrial area: 0.00102927 m2*a; data quality (4,2,1,1,1)
- Water, saline: 0.000920829 m3; data quality (4,2,1,4,2)
- Water, fresh: 0.00281686, 0.0114804 m3 (2 entries, compartments not in this file); data quality (4,2,1,4,2)
- Occupation, industrial area, built up: 0.000343091 m2*a; data quality (4,2,1,1,1)
- Energy, wind: 7.84011e-7 MJ; data quality (3,1,1,1,1)
- Occupation, urban, discontinuously built: 8.67436e-5 m2*a; data quality (4,2,1,1,1)

## Emissions to nature
- Ethene, chloro-: 8.05422e-9 kg; data quality (3,2,1,1,4)
- Phthalate, dioctyl-: 9.21739e-12 kg; data quality (4,1,1,1,5)
- styrene: 1.9497e-8 kg; data quality (4,2,1,1,5)
- methane, monochloro-, r-40: 6.8832e-11 kg; data quality (3,2,1,1,5)
- ethylene oxide: 2.68119e-12 kg; data quality (3,2,1,1,5)
- CHLORONAPHTHALENE: 2.72283e-19 kg; data quality (1,2,1,1,4)
- chlorine: 6.21175e-7 kg; data quality (4,2,1,1,4)
- copper: 2.27687e-9, 8.44946e-11, 4.64356e-8 kg (3 entries, compartments not in this file); data quality (4,1,1,1,4)
- Propane, perfluoro-: 5.97352e-10 kg; data quality (2,1,1,1,1)
- carbon disulfide: 2.27132e-8 kg; data quality (4,2,1,1,3)
- Hydrocarbons, aromatic: 3.21148e-7 kg; data quality (4,2,1,1,2)
- hydroquinone: 2.52954e-12 kg; data quality (3,2,1,1,5)
- methanol: 7.47356e-13 kg; data quality (3,1,1,1,5)
- Decabromodiphenyl oxide: 4.98237e-13, 2.49119e-14 kg (2 entries, compartments not in this file); data quality (4,1,1,1,5)
- hydrogen fluoride: 1.85089e-6 kg; data quality (2,2,1,1,3)
- diisocyanates: 2.14779e-10 kg; data quality (4,1,1,1,4)
- pyrene: 3.97468e-10 kg; data quality (2,2,1,1,2)
- manganese: 5.32493e-9 kg; data quality (4,1,1,1,4)
- Xylene: 3.60378e-6 kg; data quality (4,2,1,1,4)
- isophorone: 5.79038e-8 kg; data quality (2,2,1,1,4)
- Butane, perfluorocyclo-, PFC-318: 5.12099e-10 kg; data quality (2,1,1,1,1)
- chromium: 1.44986e-13 kg; data quality (4,1,1,1,5)
- aniline: 6.37179e-12 kg; data quality (4,2,1,1,4)
- 2-nitropropane: 8.84546e-14 kg; data quality (3,2,1,1,5)
- 1,2,4-trichlorobenzene: 1.32022e-15 kg; data quality (3,2,1,1,5)
- Acetophenone: 2.49119e-14 kg; data quality (4,1,1,1,5)
- 1,1,1-trichloroethane: 9.16892e-9 kg; data quality (3,2,1,1,4)
- Nitrogen: 4.73433e-6 kg; data quality (5,2,1,1,4)
- toluene: 8.30297e-11 kg; data quality (5,1,1,1,4)
- Cumene hydroperoxide: 1.16155e-11 kg; data quality (2,1,1,1,5)
- nickel: 2.53726e-13 kg; data quality (4,1,1,1,5)
- toluene: 1.93831e-6 kg; data quality (4,2,1,1,4)
- Xylene: 8.30297e-11 kg; data quality (4,1,1,1,4)
- benzene, ethyl-: 5.65787e-7 kg; data quality (4,2,1,1,4)
- formic acid: 1.18007e-12 kg; data quality (3,1,1,1,5)
- acrylic acid: 9.71252e-10 kg; data quality (4,2,1,1,4)
- Water, fresh: 0.0124886 m3; data quality (4,2,1,4,2)
- dibenzofuran: 7.81971e-11 kg; data quality (4,2,1,1,4)
- chloroform: 4.51327e-11 kg; data quality (4,2,1,1,4)
- acrolein: 2.01766e-9 kg; data quality (3,2,1,3,2)
- Cresol: 1.43323e-9 kg; data quality (4,2,1,1,4)
- Phthalate, dibutyl-: 4.7607e-9 kg; data quality (4,2,1,1,4)
- mercury: 4.72654e-11 kg; data quality (2,2,1,1,4)
- chromium: 2.84012e-9, 2.56226e-10 kg (2 entries, compartments not in this file); data quality (4,1,1,1,4)
- 3-methylcholanthrene: 2.55418e-14 kg; data quality (2,2,1,1,4)
- ammonia: 4.95219e-6 kg; data quality (3,2,1,1,4)
- Styrene: 9.33903e-13 kg; data quality (3,1,1,1,5)
- Phthalate, dimethyl-: 3.46726e-7 kg; data quality (4,2,1,1,4)
- 1,4-dichlorobenzene: 3.29805e-11 kg; data quality (2,2,1,1,4)
- acetophenone: 2.21249e-8 kg; data quality (4,2,1,1,4)
- phthalate, dioctyl-: 4.24051e-9 kg; data quality (3,2,1,1,4)
- benz[a]anthracene: 4.46916e-11 kg; data quality (2,2,1,1,2)
- QUINOLINE: 2.63659e-13 kg; data quality (3,2,1,1,4)
- 1,1-DICHLOROETHYLENE: 1.01577e-12 kg; data quality (3,2,1,1,4)
- ethane, 1,2-dichloro-: 1.53066e-11 kg; data quality (3,2,1,1,5)
- arsenic: 4.81416e-13 kg; data quality (2,1,1,1,3)
- 2-(2-BUTOXYETHOXY) ETHYL ACETATE: 2.43748e-13 kg; data quality (5,2,1,1,5)
- Benzo(k)fluoranthene: 2.59485e-11 kg; data quality (2,2,1,1,2)
- methyl isobutyl ketone: 1.35572e-7 kg; data quality (4,2,1,1,4)
- acenaphthene: 5.5113e-11 kg; data quality (3,2,1,3,1)
- sodium dimethyldithiocarbamate: 2.23884e-12, 1.85304e-9 kg (2 entries, compartments not in this file); data quality (5,1,1,1,5)
- NITRIC ACID: 3.33743e-12 kg; data quality (3,1,1,1,5)
- butadiene: 2.39385e-9 kg; data quality (3,2,1,4,1)
- acetonitrile: 3.72346e-13 kg; data quality (3,2,1,1,4)
- Ethylene glycol monoethyl ether: 4.01519e-10 kg; data quality (5,1,1,1,3)
- lead: 2.76159e-10 kg; data quality (3,1,1,1,4)
- methanol: 3.93299e-7 kg; data quality (4,2,1,1,4)
- Sulfur hexafluoride: 2.82241e-9 kg; data quality (3,2,1,3,1)
- vinyl acetate: 4.26587e-9 kg; data quality (4,2,1,1,4)
- cyclohexane: 1.07981e-11 kg; data quality (4,1,1,1,5)
- trichloroethylene: 2.26385e-8 kg; data quality (4,2,1,1,4)
- o-Xylene: 2.48117e-9 kg; data quality (3,2,1,3,3)
- silver: 1.42608e-11 kg; data quality (4,1,1,1,3)
- epichlorohydrin: 1.41512e-13 kg; data quality (3,2,1,1,4)
- 1-Methyl-2-pyrrolidinone: 7.02578e-12 kg; data quality (5,1,1,1,5)
- benzo(a)pyrene: 2.13249e-11 kg; data quality (2,2,1,1,2)
- 4,4'-METHYLENEDIANILINE: 9.17691e-13 kg; data quality (4,2,1,1,5)
- cobalt: 3.40946e-13 kg; data quality (4,1,1,1,3)
- Propane, 1,1,1,3,3,3-hexafluoro-, HCFC-236fa: 2.97942e-11 kg; data quality (4,2,1,4,1)
- Ethane, 1,1,1-trifluoro-, HFC-143a: 1.10286e-9 kg; data quality (4,2,1,4,1)
- PHOSPHORUS: 1.48051e-10 kg; data quality (2,2,1,1,2)
- Pentachloroethane: 4.44991e-14 kg; data quality (2,1,1,1,5)
- dicyclopentadiene: 9.38526e-12 kg; data quality (4,1,1,1,5)
- manganese: 1.77996e-14 kg; data quality (4,1,1,1,5)
- Ethane, pentafluoro-, HFC-125: 2.57764e-9 kg; data quality (4,2,1,4,1)
- BUTYL ISOCYANATE: 7.06293e-11 kg; data quality (4,2,1,1,4)
- cyanide: 6.1118e-9 kg; data quality (3,2,1,1,4)
- hexane: 5.42628e-7 kg; data quality (3,2,1,1,4)
- acrylonitrile: 1.42531e-11 kg; data quality (4,2,1,1,5)
- 1,2,4-trimethylbenzene: 1.17817e-6 kg; data quality (5,1,1,1,4)
- Nitrogen fluoride: 1.83998e-9 kg; data quality (2,1,1,1,1)
- ethane, 1,2-dibromo-: 8.05364e-14 kg; data quality (2,2,1,1,4)
- Aluminum: 1.87549e-6 kg; data quality (4,1,1,1,4)
- Ethane, hexafluoro-, HFC-116: 1.07202e-7 kg; data quality (2,1,1,1,1)
- Ethanol, 2-butoxy-: 2.43046e-11 kg; data quality (5,2,1,1,5)
- Nickel, ion: 1.74295e-12 kg; data quality (3,2,1,1,5)
- VOC, volatile organic compounds: 0.000410689 kg; data quality (3,2,1,1,4)
- 2-methylnaphthalene: 4.74219e-12 kg; data quality (2,2,1,1,4)
- Benzo(g,h,i)perylene: 9.71393e-13 kg; data quality (2,1,1,1,3)
- Ethylene glycol monoethyl ether: 1.86458e-6 kg; data quality (5,1,1,1,4)
- ozone: 7.8892e-9 kg; data quality (4,1,1,1,5)
- particulates, < 10 um: 9.47183e-6 kg; data quality (3,2,1,1,4)
- ethylene glycol: 1.15696e-9 kg; data quality (5,1,1,1,4)
- anthracene: 2.09207e-11 kg; data quality (3,2,1,1,2)
- N,N-DIMETHYLANILINE: 4.86569e-12 kg; data quality (5,2,1,1,5)
- ethane, 1,1,2-trichloro-: 5.79017e-14 kg; data quality (4,2,1,1,4)
- Aluminum: 3.10097e-8 kg; data quality (4,1,1,1,3)
- nickel: 7.99391e-12 kg; data quality (4,1,1,1,4)
- o-toluidine: 1.99655e-22 kg; data quality (4,2,1,1,5)
- Hydrazine: 5.14794e-15 kg; data quality (4,2,1,1,4)
- carbonyl sulfide: 3.84431e-6 kg; data quality (4,2,1,1,2)
- naphthalene: 2.25664e-7 kg; data quality (3,2,1,1,4)
- Indeno(1,2,3-cd)pyrene: 4.21856e-11 kg; data quality (2,2,1,1,2)
- Bromine: 4.95746e-11 kg; data quality (5,1,1,1,5)
- methylene diphenyl diisocyanate: 1.43514e-10 kg; data quality (4,2,1,1,5)
- methane, dichloro-, hcc-30: 9.07992e-9 kg; data quality (4,2,1,1,4)
- BUTYL ACRYLATE: 5.52213e-12 kg; data quality (4,1,1,1,5)
- 2,2,4-trimethylpentane: 5.23573e-9 kg; data quality (3,2,1,4,1)
- ACRYLAMIDE: 4.80033e-12 kg; data quality (4,2,1,1,4)
- sulfur dioxide: 6.14553e-5 kg; data quality (2,2,1,1,2)
- ammonia: 1.98296e-7 kg; data quality (3,1,1,1,4)
- 1,4-dioxane: 3.21651e-12 kg; data quality (4,2,1,1,5)
- nitrogen oxides: 7.8896e-5 kg; data quality (2,2,1,1,4)
- m-cresol: 3.7365e-10 kg; data quality (4,2,1,1,5)
- fluoranthene: 1.29606e-9 kg; data quality (2,2,1,1,2)
- Diethylene glycol butyl ether: 1.15177e-8 kg; data quality (4,2,1,1,4)
- lead: 8.25774e-14 kg; data quality (3,1,1,1,5)
- phenol: 3.8936e-12 kg; data quality (3,1,1,1,3)
- beryllium: 1.07057e-12 kg; data quality (5,1,1,1,3)
- o-cresol: 1.52939e-10 kg; data quality (4,2,1,1,5)
- t-butyl methyl ether: 3.25564e-12 kg; data quality (3,2,1,1,5)
- Benzo(b)fluoranthene: 1.08272e-10 kg; data quality (2,2,1,1,2)
- ethyl acrylate: 1.48751e-10 kg; data quality (4,2,1,1,4)
- 4-nitrophenol: 4.06509e-18 kg; data quality (2,2,1,1,4)
- Propene: 1.12306e-11 kg; data quality (3,1,1,1,5)
- 2,4-dinitrophenol: 6.65196e-18 kg; data quality (5,2,1,1,4)
- Carbon dioxide: 0.119302 kg; data quality (4,2,1,4,1)
- Methane, tetrafluoro-, R-14: 5.54883e-7 kg; data quality (2,1,1,1,1)
- Cobalt: 1.39981e-9 kg; data quality (3,2,1,1,4)
- selenium: 2.71087e-9 kg; data quality (2,2,1,1,4)
- Benzo(a)anthracene: 1.99879e-13 kg; data quality (2,2,1,1,4)
- 2-(2-ETHOXYETHOXY) ETHYL ACETATE: 1.08107e-14 kg; data quality (5,2,1,1,4)
- tertiary-Butyl Acetate: 6.83362e-9 kg; data quality (3,2,1,1,5)
- lead: 3.22712e-8 kg; data quality (3,2,1,1,4)
- 2-ethoxyethyl acetate: 1.13957e-10 kg; data quality (5,2,1,1,5)
- AMMONIA: 1.03082e-7 kg; data quality (3,1,1,1,4)
- phthalic anhydride: 4.75486e-12 kg; data quality (2,2,1,1,5)
- Chrysene: 2.0142e-10 kg; data quality (2,2,1,1,2)
- Methane: 2.08653e-6 kg; data quality (4,2,1,4,1)
- maleic anhydride: 1.8497e-12 kg; data quality (2,2,1,1,5)
- Titanium: 2.37513e-9 kg; data quality (5,2,1,1,4)
- toluene-2,4-diisocyante: 3.33974e-13 kg; data quality (3,2,1,1,5)
- phenol: 1.06101e-8 kg; data quality (4,2,1,1,4)
- acenaphthylene: 5.50218e-11 kg; data quality (3,2,1,3,1)
- diethanolamine: 2.48126e-10 kg; data quality (3,2,1,1,2)
- 1-Methyl-2-pyrrolidinone: 2.67617e-7 kg; data quality (5,1,1,1,4)
- Decabromodiphenyl oxide: 2.76522e-11 kg; data quality (4,1,1,1,4)
- particulates, < 2.5 um: 8.29419e-5 kg; data quality (3,2,1,1,4)
- Butanol: 4.85696e-10 kg; data quality (5,1,1,1,3)
- Phenol, 2,4-dimethyl-: 6.81892e-14 kg; data quality (4,1,1,1,3)
- 4,4'-METHYLENEBIS(2-CHLOROANALINE): 9.21406e-14 kg; data quality (5,2,1,1,5)
- 2,4-dimethylphenol: 3.60183e-8 kg; data quality (4,1,1,1,4)
- ethene, tetrachloro-: 6.83897e-8 kg; data quality (3,2,1,1,4)
- TERT-BUTYL ALCOHOL: 9.50546e-13 kg; data quality (4,1,1,1,5)
- nickel: 5.40222e-9 kg; data quality (3,2,1,1,3)
- cadmium: 1.70566e-9 kg; data quality (3,2,1,1,4)
- formaldehyde: 2.27074e-7 kg; data quality (2,2,1,2,3)
- benzene: 1.18531e-7 kg; data quality (3,2,1,1,4)
- propanal: 4.62559e-9 kg; data quality (3,2,1,4,1)
- Methane, trifluoro-, HFC-23: 7.12786e-10 kg; data quality (2,1,1,1,1)
- 2,2-BIS(4-HYDROXY-3,5-DIBROMOPHENYL)PROPANE: 7.93009e-14 kg; data quality (5,1,1,1,5)
- 4,4'-isopropylidenediphenol: 9.35215e-13 kg; data quality (4,1,1,1,5)
- carbon monoxide: 0.00048883 kg; data quality (2,2,1,1,2)
- catechol: 1.28043e-10 kg; data quality (5,2,1,1,4)
- carbon tetrachloride: 8.65886e-12 kg; data quality (4,2,1,1,4)
- manganese: 6.24283e-8 kg; data quality (3,2,1,1,4)
- Dinitrogen monoxide: 2.31915e-7 kg; data quality (4,2,1,4,1)
- styrene: 3.99451e-12 kg; data quality (3,1,1,1,5)
- mercury: 2.24933e-11 kg; data quality (3,1,1,1,3)
- Phosphorus: 3.75335e-6 kg; data quality (2,1,1,1,5)
- Chromium, ion: 5.75478e-9 kg; data quality (2,2,1,1,4)
- Sulfuric acid: 9.37179e-7 kg; data quality (2,1,1,1,3)
- Triethyl amine: 3.77603e-8 kg; data quality (4,2,1,1,4)
- Propene, 1,3-dichloro-: 4.79734e-14 kg; data quality (3,2,1,1,4)
- nitric acid: 8.30297e-11, 2.984e-7 kg (2 entries, compartments not in this file); data quality (3,1,1,1,4)
- Phosphine: 3.66201e-11 kg; data quality (4,2,1,1,4)
- CYANAMIDE: 1.38394e-12 kg; data quality (2,2,1,1,4)
- Benzo(g,h,i)perylene: 1.28895e-8 kg; data quality (3,2,1,1,3)
- Propane, 1,2-dichloro-: 5.04303e-14 kg; data quality (4,2,1,1,4)
- HYDROFLUORIC ACID: 1.19628e-13 kg; data quality (3,1,1,1,5)
- antimony: 9.30219e-10 kg; data quality (3,2,1,1,4)
- fluorine: 1.64951e-10 kg; data quality (4,1,1,1,5)
- acetaldehyde: 3.00289e-8 kg; data quality (3,2,1,3,2)
- ethylene glycol: 4.10192e-7 kg; data quality (5,2,1,1,4)
- Cyclohexanol: 4.68287e-9 kg; data quality (4,1,1,1,4)
- hydrogen chloride: 1.14297e-5 kg; data quality (2,2,1,1,4)
- CHLOROPRENE: 4.08554e-12 kg; data quality (2,2,1,1,4)
- 2,4/2,6-toluenediisocyanate (mixture): 4.54931e-13 kg; data quality (3,1,1,1,5)
- propylene oxide: 4.06267e-14 kg; data quality (3,2,1,1,5)
- SEC-BUTYL ALCOHOL: 1.01013e-10 kg; data quality (5,1,1,1,5)
- ethylbenzene: 4.17202e-7 kg; data quality (4,1,1,1,4)
- cumene: 3.6586e-8 kg; data quality (4,2,1,1,4)
- para-xylene: 1.59765e-9 kg; data quality (3,2,1,1,5)
- Ethane, 1,1,1,2-tetrafluoro-, HFC-134a: 1.18759e-8 kg; data quality (4,2,1,4,1)
- m-xylene: 5.82827e-9 kg; data quality (3,2,1,3,2)
- benzene, chloro-: 1.36818e-11 kg; data quality (4,2,1,1,4)
- Water, saline: 0.000466582 m3; data quality (4,2,1,4,2)
- 1,1,2,2-tetrachloroethane: 9.45783e-14 kg; data quality (3,2,1,1,4)
- Triethylene glycol: 4.94707e-11 kg; data quality (3,2,1,1,5)
- hydrogen sulfide: 2.22661e-10 kg; data quality (3,2,1,1,5)
- p-cresol: 2.82006e-10 kg; data quality (4,2,1,1,5)
- Dibenz(a,h)anthracene: 2.18031e-11 kg; data quality (2,2,1,1,2)
- monochloroethane: 6.66426e-18 kg; data quality (3,2,1,1,4)
- pentachlorophenol: 1.88473e-18 kg; data quality (3,2,1,1,4)
- 2-METHOXYETHANOL: 8.90535e-12 kg; data quality (4,2,1,1,4)
- Methane, difluoro-, HFC-32: 1.5011e-9 kg; data quality (4,2,1,4,1)
- methane, bromo-, halon 1001: 5.15786e-15 kg; data quality (3,2,1,1,4)
- beryllium: 1.64216e-10 kg; data quality (2,2,1,1,2)
- butanol: 2.08005e-7 kg; data quality (5,1,1,1,4)
- chlorine: 3.5466e-7 kg; data quality (4,1,1,1,4)
- dimethyl formamide: 8.18536e-14 kg; data quality (3,2,1,1,5)
- Zinc: 1.28096e-5 kg; data quality (5,1,1,1,4)
- Chromium VI: 4.92442e-8 kg; data quality (3,2,1,1,4)
- Dinitrotoluene, technical grade (2,4 (77%)- and 2,6 (19%)-): 4.45248e-9 kg; data quality (5,1,1,1,3)
- Methyl iodide: 5.88035e-8 kg; data quality (4,2,1,1,4)
- arsenic: 2.49389e-8 kg; data quality (3,2,1,1,4)
- ETHYLENETHIOUREA: 2.7386e-13 kg; data quality (5,2,1,1,5)
- biphenyl: 1.67745e-9 kg; data quality (4,2,1,1,4)
- phenanthrene: 2.86983e-8 kg; data quality (3,2,1,1,3)
- methyl methacrylate: 4.6725e-10 kg; data quality (4,2,1,1,5)
- fluorene: 1.28237e-10 kg; data quality (2,2,1,2,2)

## Inventory method
Input-output

## Modelling constants
The reference unit of all processes is 1 USD2013 of the good or service. The technosphere inputs are based on the US BEA detailed input-output tables for 2007. The IO tables are combined to develop a commodity-by-commodity model based on the the industry-technology assumption (see Suh et al., 2010), which assumes all commodities produced by a given industry have the same input structure, but that multiple industries can produce the same commodity. Thus, model technosphere flows represent commodity outputs (and not industry outputs) from other processes in the model. There are no by-products included in these processes. All commodity production is based on US-conditions, despite in reality that some goods and services are produced overseas, as USEEIO v1.1 is a single-region IO model.

## Completeness
The input-output approach assures that all purchased inputs associated with the sectors making these commodities as reported in the US census for 2007 are included. The direct resources extracted including minerals, energy sources, water and land occupied are included. Emissions to air include all critieria air pollutants, greenhouse gases, and hazardous and toxic air pollutants as defined by US EPA. Releases to water include toxics, total nitrogen and total phosphorus, and water discharges. Releases to soil or groundwater include toxics and agriculutural pesticides. Some metal releases to air, water and soil are not included because they could not be speciated. Solid hazardous and non-hazardous wastes generated are not included as an elementary flows although purchases of waste services are included.

## Data treatment
Greenhouse gases are primarily from the US Greenhouse Gas Emission Inventory (USEPA 2016a). Biogenic C uptake is not included (change from version 1.0), as biogenic C emission are not included. Toxic releases to air, water and soil (except pesticides) are from the 2013 Toxic Release Inventory (USEPA 2015a). Criteria air pollutants and hazardous air pollutants are from the 2011 National Emissions Inventory (USEPA 2015b). All estimates are normalized by industry based on sector output in the data year, then converted to 2013 USD using relative sector-specific CPIs (if data year is not 2013). Energy use represent raw renewables or fossil fuel energies and is based on EIA data for 2014. See Table 1 in Yang, Ingwersen et al. 2017 and Supporting Information 1, and the v1.1 data update notes (Ingwersen et al. 2017) for all details on environmental data sources used.Land occupation associated with manufacturing buildings was estimated based on the building floorspace data provided by the U.S. Energy Information Administration in the 2010 Manufacturing Energy Consumption Survey (EIA 2013). Portions of total renewable energy (EIA 2016) based on EIA-923 reports for 2014 (EIA 2017) are included. Nitrogen and Phosphorus releases are modeled in total N and total P equivalents as estimated by the Discharge Monitoring Report Nutrient Loading tool (USEPA 2016b). Self-supplied withdrawals were assigned to industrial sectors based on water use statistics for Canadian industries by NAICS 3-digit sector scaled to US production levels based on gross domestic product by industry (BEA 2015; Statistics Canada 2010), and further disaggregated to the manufacturing sectors based on compensation of employees as provided by the 2007 IO tables (BEA 2015). Water withdrawals associated with public supply were allocated to sectors based on their use of water, sewage, and other services in USD based on the IO tables (BEA 2015). Portions of total renewable energy (EIA 2016) by type are assigned to sectors (hydro, wind, solar, or) based on EIA-923 reports for 2014 (EIA 2017).

## Data collection
2015-2016

## Sampling procedure
US federal government sources, including surveys and US EPA emissions databases are used as the primary sources. From these sources, data for US reporting establishments/facilities are aggregated by the NAICS sector as defined in the BEA detailed 2007 input-output tables. When level of sector aggregation differs, or when direct emissions are not reported but modeled, additional sources are used to make allocations and estimates.

## Review details
In regard to quality assurance and peer-review, each dataset created went through Quality Assurance as defined in a quality assurance project plans at US EPA, CSRA or ERG. The model was assembled with the IO model builder model (USEPA 2016c). Validation functions were used to check that all the model components were properly assembled and harmonized. Bayou Demeke and Santosh Ghimire provided internal peer review of the model methodology and the manuscript underwent standard EPA management review. An editor and two anonymous reviewers at the Journal of Cleaner Production reviewed the model. In regard to data quality evaluation, data quality assessment was performed at the flow and process levels according to the updated US EPA data quality assessment guidelines as defined in US EPA (2016b).

## Intended application
The primary application is for use in the US Environmentally-Extended Input-Ouput model, USEEIO, version 1.1. This model is being used by the US EPA for supporting tools that prioritize goods and services based on potential environmental impacts, resource use or emissions for large regions, including the US and US states, and as a strealined tool for organizations as a starting point to consider sustainable materials management. Model results are designed to provide meso/macro-level decision support.

## Project
USEEIO v1.1 was developed by the US EPA with CSRA and ERG with Wesley W. Ingwersen and David E. Meyer as research leads. Yi Yang was the technical lead on the work for CSRA (contract EP-C-15-012); Troy Hawkins was lead for ERG (contract EP-C-12-021).

## Sources
- Ingwersen et al. DRAFT
- USDA 2009b
- EIA 2017
- Blackhurst et al. 2010
- USDA 2009a
- BLM 2008
- EIA 2015
- Torcellini et al. 2003
- Lovelace 2009
- Nickerson et al. 2011
- Macknick et al. 2011
- USDA 2016
- Goebes et al. 2003
- Maupin et al. 2014
- BEA 2015
- USGS 2015
- Yienger et al. 1995
- Ingwersen et al. 2017
- EIA 2016
- USEPA 2015b
- USEPA 2016a
- USEPA 2016b
- Edelen and Ingwersen 2017
- USEPA 2015a
- EIA 2013
- USDA 2006
- Kim et el. 2013
- USEPA 2016c
- USGS 2016
- Statistics Canada 2010
- USDA 2014
