# Household goods repair

Dataset: openLCA process, unit process
Category: 8114: Personal and Household Goods Repair and Maintenance
Geography: United States
Time period: 2017-01-01 to 2017-12-31
Data quality: US EPA - Process Pedigree Matrix (1;1)
Exchange data quality scheme: US EPA - Flow Pedigree Matrix
Generated by: US EPA with CSRA and ERG
Owner: US EPA
Published in: Yang, Ingwersen et al. 2017
restrictionsDescription: This model shold be appropriately cited (see Yang, Ingwersen et al. 2017 source or Publication field) when used. Any changes or derivations of this model by the user should be documented. The model itself and any results from use of this model shall not be construed to consitute US EPA opinion or policy.
copyright: false

## General comment
BEA Code & Name is '811400:Personal and household goods repair and maintenance'. Description of the primary industry producing this good or service, adapted from the Census Bureau NAICS 2007 descriptions: This industry group comprises (1) Home and Garden Equipment and Appliance Repair and Maintenance, (2) Reupholstery and Furniture Repair, (3) Footwear and Leather Goods Repair, and (4) Other Personal and Household Goods Repair and Maintenance.

## Technology
The process describes the average US production of this good or service within this NAICS-based grouping defined in the BEA 2007 detailed input-output tables (BEA 2015). Distribution, wholesale and retailing of this good or service, use, and final disposal are not included. Creation of a product system with this process will enable modeling of all upstream (supply-chain) activities.

## Geography
Data represent the 50 US states

## Time period
2017 was the year in which this version of USEEIO was released and is the target date for the model

## Reference product
- Household goods repair: 1 USD

## Inputs from technosphere
All rows: data quality (1,3,1,1,1)
- Golf courses, marinas, ski resorts, fitness and other rec centers and industries: 8.42149e-5 USD
- Business support: 0.000238369 USD
- Civic, social, professional, and similar organizations: 0.000247112 USD
- Ammunition, arms, ordnance, and related accessories; at manufacturer: 0.00416474 USD
- Clay and ceramic products; at manufacturer: 1.43143e-6 USD
- Scenic and sightseeing transportation and support activities for transportation: 0.000408625 USD
- Secondary copper products; at manufacturer: 7.53687e-5 USD
- Light gauge metal cans, boxes, and containers; at manufacturer: 3.06051e-5 USD
- External hard drives, CDs, other storage media; at manufacturer: 2.7239e-5 USD
- Home refrigerators and freezers; at manufacturer: 0.00329369 USD
- Adhesives; at manufacturer: 2.72898e-5 USD
- Photographers: 7.16092e-8 USD
- Electronic capacitors, resistors, coils, transformers, connectors and other components (except semiconductors and printed circuit assemblies); at manufacturer: 3.00834e-5 USD
- Leather; at manufacturer: 0.00155157 USD
- Marketing research and all other miscellaneous professional, scientific, and technical services: 0.00038402 USD
- Soap and cleaning compounds; at manufacturer: 0.000139119 USD
- Movies and film: 2.42547e-8 USD
- Heavy gauge metal tanks; at manufacturer: 6.63663e-6 USD
- Water transport (boats, ships, ferries): 5.51229e-5 USD
- Advertising and public relations: 0.00778794 USD
- State and local government enterprises: 0.000275553 USD
- News syndicates, libraries, archives, Internet publishing and all other information services: 2.72228e-5 USD
- Securities and commodities brokerage and exchanges: 0.000676876 USD
- Greenhouse crops, mushrooms, nurseries, and flowers; at farm: 6.57187e-7 USD
- Noncomparable imports: 0.000381269 USD
- Rail transport: 0.000249986 USD
- Other rubber products; at manufacturer: 0.00296949 USD
- Dry-cleaning and laundry: 0.000381356 USD
- Wholesale trade: 0.0123855 USD
- Vehicle rental and leasing: 0.00200092 USD
- Clothing; at manufacturer: 0.00122516 USD
- Specialized design: 4.59007e-5 USD
- Nondepository credit intermediation and related activities: 0.00207644 USD
- Springs and wires; at manufacturer: 0.000119209 USD
- Stationery; at manufacturer: 2.72321e-5 USD
- Buildings and dwellings services: 0.00176468 USD
- Fabric; at manufacturer: 0.000707734 USD
- Cardboard; at manufacturer: 0.000578266 USD
- Metal cutting and forming machine tools; at manufacturer: 1.09309e-5 USD
- Colleges, universities, junior colleges, and professional schools: 6.92992e-9 USD
- Other educational services: 1.36288e-7 USD
- Gaskets, seals, musical instruments, fasteners, brooms, brushes, mop and other misc. goods; at manufacturer: 0.00294106 USD
- Machinery for the paper, textile, food or other industries (except semiconductor machinery); at manufacturer: 2.72205e-5 USD
- Timber and raw forest products; at forest: 1.15499e-9 USD
- Vehicles and parts sales: 0.00013805 USD
- Investment advice, portfolio management, and other financial advising services: 0.000110353 USD
- Other concrete products; at manufacturer: 2.74361e-5 USD
- Warehousing: 0.000670544 USD
- Metal windows, doors, and architectural products; at manufacturer: 2.21899e-5 USD
- Communication and energy wire and cable; at manufacturer: 3.67223e-5 USD
- Vehicle electrical and electronic equipment; at manufacturer: 5.75183e-7 USD
- Other support services: 1.23142e-5 USD
- Fertilizers; at manufacturer: 2.70267e-7 USD
- Sports: 2.81603e-5 USD
- Turbines and turbine generator sets; at manufacturer: 1.50148e-8 USD
- Other vehicle parts; at manufacturer: 8.25979e-6 USD
- Wireless telecommunications: 0.00134242 USD
- Paints and coatings; at manufacturer: 0.000308567 USD
- Nonresidential building repair and maintanence: 0.000478273 USD
- Motor vehicle steering, suspension components (except spring), and brake systems; at manufacturer: 5.32065e-7 USD
- Cutlery and handtools; at manufacturer: 0.00180323 USD
- Metal structural products; at manufacturer: 0.000238419 USD
- Travel arrangement and reservation: 1.17464e-6 USD
- Industrial process furnaces and ovens; at manufacturer: 3.77377e-6 USD
- Lime and gypsum products; at manufacturer: 1.15499e-8 USD
- Industrial process variable instruments; at manufacturer: 3.49236e-5 USD
- Heating equipment other than warm air furnaces; at manufacturer: 7.62291e-8 USD
- Electricity; at consumer: 0.00209656 USD
- Mineral wool; at manufacturer: 4.15795e-8 USD
- Asphalt shingles; at manufacturer: 1.00484e-7 USD
- Air transport: 0.000865078 USD
- Legal services: 0.00115659 USD
- Company and enterprise management: 0.0118027 USD
- Other computer related services, including facilities management: 0.000601282 USD
- Pipeline transport: 1.6478e-7 USD
- Accounting, tax preparation, bookkeeping, and payroll: 0.00244146 USD
- Polystyrene foam products; at manufacturer: 2.72979e-5 USD
- Communications equipment; at manufacturer: 1.56695e-7 USD
- Gasoline, fuels, and by-products of petroleum refining; at manufacturer: 0.00115868 USD
- Abrasive products; at manufacturer: 0.00146013 USD
- Rubber and plastic belts and hoses; at manufacturer: 0.000111615 USD
- Office supplies (not paper); at manufacturer: 1.40525e-7 USD
- Shelving and lockers; at manufacturer: 0.0022593 USD
- Other transportation equipment; at manufacturer: 5.5055e-7 USD
- Ball and roller bearings; at manufacturer: 0.000438522 USD
- Travel trailer and campers; at manufacturer: 5.97128e-7 USD
- Magazines and journals; at publisher: 5.51587e-5 USD
- Metal pipe fittings, ball and roller bearings, industrial patterns, metal bath fixtures, other misc. fabricated metals; at manufacturer: 9.94575e-5 USD
- Machine shops; at manufacturer: 0.00371391 USD
- Light bulbs; at manufacturer: 2.70267e-7 USD
- Other textiles; at manufacturer: 0.000245125 USD
- Food and beverage stores: 0.000299461 USD
- Major home appliances (except ovens, stoves, refrigerators and laundry machines); at manufacturer: 0.000816616 USD
- Couriers and messengers: 0.000544504 USD
- Watches, clocks, and other measuring and controlling devices; at manufacturer: 0.000408308 USD
- Facilities support: 0.00022428 USD
- Computer terminals and other computer peripheral equipment; at manufacturer: 1.68707e-6 USD
- Other primary nonferrous metals; at manufacturer: 0.00283094 USD
- Architectural, engineering, and related services: 0.000167404 USD
- Wiring devices; at manufacturer: 6.92992e-9 USD
- Sanitary paper (tissues, napkins, diapers, etc.); at manufacturer: 3.34946e-8 USD
- Transmission and power train parts; at manufacturer: 7.36114e-7 USD
- Investigation and security: 0.000200866 USD
- Consumer goods and general rental centers: 0.000219533 USD
- Employment services: 0.00270895 USD
- Veneer, plywood, and engineered wood; at manufacturer: 8.1687e-5 USD
- Home cooking appliances; at manufacturer: 0.00658737 USD
- Electronic equipment repair and maintenance: 0.00120212 USD
- Plywood and veneer; at manufacturer: 0.000272205 USD
- Lids, jars, bottle caps, other metal closures and crowns; at manufacturer: 0.000794471 USD
- Books, newspapers, magazines, and other print media; at manufacturer: 0.000272306 USD
- Surgical appliance and supplies; at manufacturer: 1.3702e-6 USD
- Nonferrous metal casts; at manufacturer: 0.000229429 USD
- Primary copper; at manufacturer: 0.000112005 USD
- Screws, nuts, and bolts; at manufacturer: 0.00143745 USD
- Internet publishing and broadcasting: 0.000136257 USD
- Pumps and pumping equipment; at manufacturer: 5.58294e-5 USD
- Air purification and ventilation equipment; at manufacturer: 1.54768e-7 USD
- Aluminum products; at manufacturer: 5.84284e-5 USD
- Pet care, photofinishing, parking and other sundry services: 8.16628e-5 USD
- Software: 5.47845e-5 USD
- Other engine equipment; at manufacturer: 0.00310315 USD
- Paper; at manufacturer: 0.000136627 USD
- Aluminum; at manufacturer: 4.33968e-5 USD
- Vehicle engines and engine parts; at manufacturer: 3.95777e-7 USD
- Cast iron and steel; at manufacturer: 5.5719e-5 USD
- Other basic organic chemicals; at manufacturer: 0.00185321 USD
- Hotels and campgrounds: 0.000419263 USD
- Metal hinges, keys, lock, and other hardware; at manufacturer: 0.000119386 USD
- Performances: 2.79895e-7 USD
- Commercial equipment rental: 0.000959427 USD
- Plastic bags, films, and sheets; at manufacturer: 0.000445589 USD
- Mechanical power transmission equipment; at manufacturer: 1.3013e-7 USD
- Primary iron, steel, and ferroalloy products; at manufacturer: 0.00156024 USD
- Telecommunications: 0.00274439 USD
- Chemicals (except basic chemicals, agrichemicals, polymers, paints, pharmaceuticals,soaps, cleaning compounds); at manufacturer: 0.000410019 USD
- Material handling equipment; at manufacturer: 1.31632e-6 USD
- Urethane and other foam products; at manufacturer: 0.00280378 USD
- Scientific research and development: 3.9039e-7 USD
- Books; at publisher: 1.15499e-9 USD
- Audio and video equipment; at manufacturer: 1.81333e-7 USD
- Vending, commercial laundry, and other commercial and service industry machinery; at manufacturer: 6.09454e-7 USD
- Monetary authorities and depository credit intermediation: 0.00168711 USD
- Other secondary nonferrous metal products; at manufacturer: 0.000591541 USD
- Other petroleum and coal products; at manufacturer: 5.66236e-5 USD
- Synthetic dyes and pigments; at manufacturer: 0.000191064 USD
- Drinking water and wastewater treatment; at consumer: 0.000166237 USD
- Management consulting: 0.000602822 USD
- Custom computer programming: 1.83483e-5 USD
- Pickup trucks, vans, and SUVs; at manufacturer: 9.23989e-9 USD
- Environmental and other technical consulting services: 0.000136757 USD
- All other converted paper products; at manufacturer: 1.15499e-9 USD
- Waste management and remediation: 0.000444933 USD
- Directory, mailing list, and other publishers; at publisher: 3.46496e-9 USD
- Newspapers; at publisher: 4.61995e-9 USD
- Industrial molds; at manufacturer: 1.7047e-5 USD
- Other retail: 0.00805804 USD
- Custom metal rolls; at manufacturer: 4.81481e-6 USD
- Switchgear and switchboards; at manufacturer: 5.77493e-9 USD
- General merchandise stores: 0.000707985 USD
- Lawn and garden equipment; at manufacturer: 0.00737682 USD
- Sporting and athletic goods; at manufacturer: 1.15499e-9 USD
- Glass and glass products; at manufacturer: 8.73246e-5 USD
- Commercial machinery repair: 0.00118297 USD
- Natural gas; at consumer: 0.000506763 USD
- Unrefined oil and gas; at extraction site: 8.16628e-5 USD
- Rubber tires; at manufacturer: 0.000218189 USD
- Fluid meters and counting devices; at manufacturer: 6.92992e-9 USD
- Postal service: 0.000544508 USD
- Motorcycle, bicycle, and parts; at manufacturer: 0.00892834 USD
- Specialty transformers; at manufacturer: 6.23693e-8 USD
- Independent artists, writers, and performers: 0.00016445 USD
- Vehicle repair: 0.000605215 USD
- Metal coatings, engravings, and heat treatments; at manufacturer: 0.00312123 USD
- Lumber and treated lumber; at manufacturer: 0.000299464 USD
- Small electrical appliances; at manufacturer: 0.00187822 USD
- Copper, nickel, lead, and zinc; at mine: 1.20119e-7 USD
- Carbon and graphite products; at manufacturer: 2.65647e-8 USD
- Metal plumbing drains, faucets, valves, and other fittings; at manufacturer: 1.61698e-8 USD
- Relay and industrial controls; at manufacturer: 3.16355e-6 USD
- Insurance agencies and brokerages: 8.31277e-5 USD
- Light fixtures; at manufacturer: 1.52458e-7 USD
- Hydraulic pumps, motors, cylinders and actuators; at manufacturer: 1.8999e-5 USD
- All other food and drinking places: 2.824e-5 USD
- Computer storage device readers; at manufacturer: 3.00296e-8 USD
- Compressed Gases; at manufacturer: 0.000546109 USD
- Secondary steel products; at manufacturer: 2.39451e-5 USD
- Computer systems design: 0.000603969 USD
- Full-service restaurants: 0.000879567 USD
- Printed circuit and electronic assembly; at manufacturer: 1.002e-5 USD
- Tobacco, cotton, sugarcane, peanuts, sugar beets, herbs and spices, and other crops; at farm: 3.23396e-8 USD
- Office administration: 0.000437043 USD
- Passenger ground transport: 0.000168664 USD
- Power boilers and heat exchangers; at manufacturer: 8.19819e-6 USD
- Wooden windows, door, and flooring; at manufacturer: 5.44411e-5 USD
- Air conditioning, refrigeration, and warm air heating equipment; at manufacturer: 2.7999e-5 USD
- Cutting and machine tool accessory, rolling mill, and other metalworking machines; at manufacturer: 2.44748e-5 USD
- Plastic bottles; at manufacturer: 0.000108903 USD
- Special tools, dies, jigs, and fixtures; at manufacturer: 9.1091e-7 USD
- Ophthalmic goods; at manufacturer: 2.6026e-7 USD
- other miscellaneous electrical equipment and components; at manufacturer: 5.77493e-9 USD
- Limited-service restaurants: 0.000694957 USD
- Household goods repair: 0.000792392 USD
- Insurance carriers: 0.00558841 USD
- Welding and Soldering Equipment, Scales and Balances, and other general purpose machinery; at manufacturer: 0.000846449 USD
- Speed changers, industrial high-speed drives, and gears; at manufacturer: 0.000381178 USD
- Promoters and agents: 5.47175e-5 USD
- Vehicle bodies; at manufacturer: 5.77493e-9 USD
- Ink and ink cartridges; at manufacturer: 3.12312e-6 USD
- Coal; at mine: 2.73507e-5 USD
- Cardboard containers; at manufacturer: 0.000775502 USD
- All other forging, stamping, and sintering; at manufacturer: 8.51518e-5 USD
- Semiconductors; at manufacturer: 2.39439e-5 USD
- Finished and coated fabric; at manufacturer: 0.00114326 USD
- Other plastic products; at manufacturer: 0.00150131 USD
- Storage batteries; at manufacturer: 1.27048e-8 USD
- Paper bags and coated paper; at manufacturer: 0.00019175 USD
- Wireless communications; at manufacturer: 1.80178e-7 USD
- Lessors of nonfinancial intangible assets: 8.65693e-5 USD
- Data processing and hosting: 0.000632207 USD
- Plastic pipe, fittings, and sausage casings; at manufacturer: 0.000121287 USD
- Pesticides; at manufacturer: 7.62291e-8 USD
- Other basic inorganic chemicals; at manufacturer: 0.000219065 USD
- Other real estate: 0.018442 USD
- Petrochemicals; at manufacturer: 0.000190936 USD
- Motors and generators; at manufacturer: 7.34514e-5 USD
- Fiber, yarn, and thread; at manufacturer: 0.000108882 USD
- Jewelry and silverware; at manufacturer: 3.46496e-9 USD
- Truck transport: 0.00272727 USD
- Satellite, telecommunications resellers, and all other telecommunications: 0.000355423 USD
- Valve and fittings (except for plumbing); at manufacturer: 0.000616725 USD
- Laminated plastic plates and shapes; at manufacturer: 0.00165705 USD

## Inputs from nature
- Water, saline: 1.48782e-7 m3; data quality (4,2,1,4,2)
- Occupation, industrial area: 8.05461e-6 m2*a; data quality (4,2,1,1,1)
- Occupation, urban, discontinuously built: 0.000422453 m2*a; data quality (4,2,1,1,1)
- Water, fresh: 0.000178374, 0.000102454 m3 (2 entries, compartments not in this file); data quality (1,2,1,4,2)
- Occupation, industrial area, built up: 2.68487e-6 m2*a; data quality (4,2,1,1,1)

## Emissions to nature
- hydrogen chloride: 2.37819e-11 kg; data quality (2,2,1,1,5)
- Cobalt: 1.64442e-11 kg; data quality (3,2,1,1,5)
- beryllium: 5.72135e-14 kg; data quality (2,2,1,1,5)
- Methane: 4.2353e-7 kg; data quality (4,2,1,4,1)
- toluene: 1.98782e-7 kg; data quality (3,2,1,2,4)
- ethane, 1,2-dichloro-: 2.65205e-16 kg; data quality (3,2,1,1,5)
- benzene, ethyl-: 1.19225e-7 kg; data quality (4,2,1,2,4)
- hexane: 1.24705e-7 kg; data quality (3,2,1,1,4)
- particulates, < 10 um: 5.73097e-7 kg; data quality (3,2,1,1,5)
- methane, bromo-, halon 1001: 1.42174e-11 kg; data quality (3,2,1,1,5)
- fluorene: 3.58389e-11 kg; data quality (3,2,1,4,1)
- Phosphorus: 4.34678e-7 kg; data quality (2,1,1,1,5)
- ethene, tetrachloro-: 5.69266e-9 kg; data quality (3,2,1,1,5)
- manganese: 3.6742e-13, 1.57466e-13 kg (2 entries, compartments not in this file); data quality (4,1,1,1,5)
- Chromium VI: 9.52433e-11 kg; data quality (3,2,1,1,5)
- Phthalate, dimethyl-: 2.47249e-8 kg; data quality (4,2,1,1,5)
- Ethene, chloro-: 8.86146e-20 kg; data quality (3,2,1,1,5)
- Methane, difluoro-, HFC-32: 1.12124e-7 kg; data quality (4,2,1,4,1)
- ethylene glycol: 5.23432e-9 kg; data quality (5,2,1,1,5)
- Xylene: 5.66251e-7 kg; data quality (4,2,1,1,5)
- trichloroethylene: 2.76487e-9 kg; data quality (3,2,1,1,5)
- ethylene oxide: 2.26017e-13 kg; data quality (3,2,1,1,5)
- selenium: 2.21959e-13 kg; data quality (2,2,1,1,5)
- nickel: 2.03506e-10 kg; data quality (3,2,1,1,5)
- Benzo(g,h,i)perylene: 5.96363e-12 kg; data quality (3,2,1,4,1)
- VOC, volatile organic compounds: 8.16659e-6 kg; data quality (3,2,1,1,4)
- Dinitrogen monoxide: 1.22387e-8 kg; data quality (4,2,1,4,1)
- Propane, 1,2-dichloro-: 1.60801e-19 kg; data quality (4,2,1,1,5)
- Phthalate, dibutyl-: 1.12741e-8 kg; data quality (4,2,1,1,5)
- 1,4-dichlorobenzene: 4.4035e-12 kg; data quality (2,2,1,1,5)
- o-Xylene: 3.38606e-9 kg; data quality (3,2,1,2,4)
- cumene: 7.18979e-9 kg; data quality (4,2,1,1,5)
- ammonia: 8.81982e-9 kg; data quality (3,2,1,2,3)
- Water, saline: 7.53876e-8 m3; data quality (4,2,1,4,2)
- manganese: 1.95201e-8 kg; data quality (3,2,1,1,5)
- ethane, 1,1,2-trichloro-: 1.89177e-19 kg; data quality (4,2,1,1,5)
- benzene: 5.04938e-8 kg; data quality (3,2,1,4,1)
- chromium: 5.24885e-14, 1.19955e-11, 5.24885e-14 kg (3 entries, compartments not in this file); data quality (4,1,1,1,5)
- 2-methylnaphthalene: 5.42266e-15 kg; data quality (2,2,1,1,5)
- Hydrocarbons, aromatic: 5.57098e-10 kg; data quality (3,2,1,4,1)
- formaldehyde: 3.01806e-8 kg; data quality (3,2,1,4,1)
- styrene: 1.36823e-6 kg; data quality (4,2,1,1,5)
- Dibenz(a,h)anthracene: 1.43878e-14 kg; data quality (3,2,1,4,1)
- Chromium, ion: 1.65646e-10 kg; data quality (2,2,1,1,5)
- carbon tetrachloride: 4.26314e-11 kg; data quality (4,2,1,1,5)
- particulates, < 2.5 um: 4.698e-7 kg; data quality (3,2,1,2,4)
- copper: 8.9283e-14, 4.67148e-12, 2.25701e-12 kg (3 entries, compartments not in this file); data quality (4,1,1,1,5)
- methyl methacrylate: 7.87904e-8 kg; data quality (4,2,1,1,5)
- propanal: 2.81945e-9 kg; data quality (3,2,1,4,1)
- Propane, 1,1,1,3,3,3-hexafluoro-, HCFC-236fa: 2.22547e-9 kg; data quality (4,2,1,4,1)
- arsenic: 4.7292e-12 kg; data quality (3,2,1,5,1)
- diethanolamine: 2.13157e-13 kg; data quality (3,2,1,1,5)
- cadmium: 1.37348e-12 kg; data quality (3,2,1,1,5)
- pyrene: 2.52754e-11 kg; data quality (3,2,1,4,1)
- benz[a]anthracene: 2.19148e-12 kg; data quality (3,2,1,4,1)
- 1,1,1-trichloroethane: 5.78237e-8 kg; data quality (3,2,1,1,5)
- isophorone: 1.18055e-10 kg; data quality (3,2,1,1,5)
- benzene, chloro-: 3.63662e-15 kg; data quality (4,2,1,1,5)
- Ethane, 1,1,1-trifluoro-, HFC-143a: 8.23781e-8 kg; data quality (4,2,1,4,1)
- acenaphthene: 1.95505e-11 kg; data quality (3,2,1,4,1)
- Benzo(k)fluoranthene: 2.21455e-12 kg; data quality (3,2,1,4,1)
- Chrysene: 2.09623e-12 kg; data quality (3,2,1,4,1)
- Ethylene glycol monoethyl ether: 1.00035e-9 kg; data quality (3,2,1,1,5)
- ethane, 1,2-dibromo-: 2.328e-17 kg; data quality (2,2,1,1,5)
- anthracene: 1.50813e-11 kg; data quality (3,2,1,4,1)
- nitric acid: 2.45646e-11 kg; data quality (3,1,1,1,5)
- mercury: 1.16024e-13 kg; data quality (3,2,1,3,3)
- 2,2,4-trimethylpentane: 2.80706e-8 kg; data quality (3,2,1,4,1)
- Nitrogen: 6.57193e-7 kg; data quality (3,2,1,1,5)
- acenaphthylene: 7.56475e-11 kg; data quality (3,2,1,4,1)
- lead: 7.36893e-13 kg; data quality (3,2,1,1,5)
- phenanthrene: 6.43509e-11 kg; data quality (3,2,1,4,1)
- Indeno(1,2,3-cd)pyrene: 1.82676e-12 kg; data quality (3,2,1,4,1)
- lead: 1.04977e-14 kg; data quality (3,1,1,1,5)
- nickel: 5.24885e-14 kg; data quality (4,1,1,1,5)
- carbon monoxide: 3.0053e-5 kg; data quality (3,2,1,1,1)
- Diethylene glycol butyl ether: 1.49015e-12 kg; data quality (3,2,1,1,5)
- fluoranthene: 2.01251e-11 kg; data quality (3,2,1,4,1)
- methyl isobutyl ketone: 6.88874e-8 kg; data quality (4,2,1,1,5)
- sulfur dioxide: 5.00714e-9 kg; data quality (3,2,1,3,2)
- m-xylene: 7.49559e-9 kg; data quality (3,2,1,2,4)
- Ethane, 1,1,1,2-tetrafluoro-, HFC-134a: 7.25692e-7 kg; data quality (4,2,1,4,1)
- methylene diphenyl diisocyanate: 1.36697e-8 kg; data quality (4,2,1,1,5)
- Triethyl amine: 7.15992e-9 kg; data quality (4,2,1,1,5)
- phenol: 1.92049e-12 kg; data quality (4,2,1,1,5)
- methane, dichloro-, hcc-30: 5.23195e-7 kg; data quality (4,2,1,1,5)
- naphthalene: 1.30884e-8 kg; data quality (3,2,1,1,4)
- Benzo(b)fluoranthene: 2.25312e-12 kg; data quality (3,2,1,4,1)
- acetophenone: 1.32282e-11 kg; data quality (3,2,1,1,5)
- dicyclopentadiene: 2.09954e-13 kg; data quality (4,1,1,1,5)
- nitrogen oxides: 1.64524e-6 kg; data quality (3,2,1,1,1)
- acrolein: 1.03841e-9 kg; data quality (3,2,1,4,1)
- tertiary-Butyl Acetate: 1.06483e-8 kg; data quality (3,2,1,1,5)
- Benzo(a)anthracene: 2.43096e-17 kg; data quality (2,2,1,1,5)
- butadiene: 8.15102e-9 kg; data quality (3,2,1,4,1)
- Carbon dioxide: 0.004762 kg; data quality (4,2,1,4,1)
- methanol: 2.22972e-8 kg; data quality (4,2,1,1,5)
- 1,4-dioxane: 6.38596e-13 kg; data quality (4,2,1,1,5)
- PHOSPHORUS: 3.43135e-12 kg; data quality (2,2,1,1,5)
- Ethane, pentafluoro-, HFC-125: 1.92536e-7 kg; data quality (4,2,1,4,1)
- 1,1,2,2-tetrachloroethane: 3.13138e-19 kg; data quality (3,2,1,1,5)
- Water, fresh: 0.000237747 m3; data quality (1,2,1,4,2)
- benzo(a)pyrene: 2.09411e-12 kg; data quality (3,2,1,4,1)
- chloroform: 6.87029e-15 kg; data quality (4,2,1,1,5)
- acetaldehyde: 1.29376e-8 kg; data quality (3,2,1,4,1)
- para-xylene: 2.20812e-9 kg; data quality (3,2,1,1,5)
- 3-methylcholanthrene: 2.73531e-18 kg; data quality (2,2,1,1,5)

## Inventory method
Input-output

## Modelling constants
The reference unit of all processes is 1 USD2013 of the good or service. The technosphere inputs are based on the US BEA detailed input-output tables for 2007. The IO tables are combined to develop a commodity-by-commodity model based on the the industry-technology assumption (see Suh et al., 2010), which assumes all commodities produced by a given industry have the same input structure, but that multiple industries can produce the same commodity. Thus, model technosphere flows represent commodity outputs (and not industry outputs) from other processes in the model. There are no by-products included in these processes. All commodity production is based on US-conditions, despite in reality that some goods and services are produced overseas, as USEEIO v1.1 is a single-region IO model.

## Completeness
The input-output approach assures that all purchased inputs associated with the sectors making these commodities as reported in the US census for 2007 are included. The direct resources extracted including minerals, energy sources, water and land occupied are included. Emissions to air include all critieria air pollutants, greenhouse gases, and hazardous and toxic air pollutants as defined by US EPA. Releases to water include toxics, total nitrogen and total phosphorus, and water discharges. Releases to soil or groundwater include toxics and agriculutural pesticides. Some metal releases to air, water and soil are not included because they could not be speciated. Solid hazardous and non-hazardous wastes generated are not included as an elementary flows although purchases of waste services are included.

## Data treatment
Greenhouse gases are primarily from the US Greenhouse Gas Emission Inventory (USEPA 2016a). Biogenic C uptake is not included (change from version 1.0), as biogenic C emission are not included. Toxic releases to air, water and soil (except pesticides) are from the 2013 Toxic Release Inventory (USEPA 2015a). Criteria air pollutants and hazardous air pollutants are from the 2011 National Emissions Inventory (USEPA 2015b). All estimates are normalized by industry based on sector output in the data year, then converted to 2013 USD using relative sector-specific CPIs (if data year is not 2013). Energy use represent raw renewables or fossil fuel energies and is based on EIA data for 2014. See Table 1 in Yang, Ingwersen et al. 2017 and Supporting Information 1, and the v1.1 data update notes (Ingwersen et al. 2017) for all details on environmental data sources used.Land occupation for commercial buildings was estimated based on the building floorspace data provided by the U.S. Energy Information Administration 2012 Commercial Building Energy Consumption Survey (CBECS) (EIA 2015). Total commercial public supply water use is reported by USGS (Maupin et al. 2014). Water use is allocated across commercial sectors based on their use of water, sewage, and other services in USD based on the 2007 Benchmark Use Table before redefinitions (BEA 2015).

## Data collection
2015-2016

## Sampling procedure
US federal government sources, including surveys and US EPA emissions databases are used as the primary sources. From these sources, data for US reporting establishments/facilities are aggregated by the NAICS sector as defined in the BEA detailed 2007 input-output tables. When level of sector aggregation differs, or when direct emissions are not reported but modeled, additional sources are used to make allocations and estimates.

## Review details
In regard to quality assurance and peer-review, each dataset created went through Quality Assurance as defined in a quality assurance project plans at US EPA, CSRA or ERG. The model was assembled with the IO model builder model (USEPA 2016c). Validation functions were used to check that all the model components were properly assembled and harmonized. Bayou Demeke and Santosh Ghimire provided internal peer review of the model methodology and the manuscript underwent standard EPA management review. An editor and two anonymous reviewers at the Journal of Cleaner Production reviewed the model. In regard to data quality evaluation, data quality assessment was performed at the flow and process levels according to the updated US EPA data quality assessment guidelines as defined in US EPA (2016b).

## Intended application
The primary application is for use in the US Environmentally-Extended Input-Ouput model, USEEIO, version 1.1. This model is being used by the US EPA for supporting tools that prioritize goods and services based on potential environmental impacts, resource use or emissions for large regions, including the US and US states, and as a strealined tool for organizations as a starting point to consider sustainable materials management. Model results are designed to provide meso/macro-level decision support.

## Project
USEEIO v1.1 was developed by the US EPA with CSRA and ERG with Wesley W. Ingwersen and David E. Meyer as research leads. Yi Yang was the technical lead on the work for CSRA (contract EP-C-15-012); Troy Hawkins was lead for ERG (contract EP-C-12-021).

## Sources
- EIA 2017
- Torcellini et al. 2003
- EIA 2016
- USGS 2015
- EIA 2013
- USEPA 2016b
- Ingwersen et al. DRAFT
- Statistics Canada 2010
- Yienger et al. 1995
- USDA 2006
- USDA 2016
- USDA 2014
- Macknick et al. 2011
- USEPA 2015a
- USDA 2009a
- BEA 2015
- USGS 2016
- Edelen and Ingwersen 2017
- EIA 2015
- USEPA 2015b
- Maupin et al. 2014
- Ingwersen et al. 2017
- USEPA 2016c
- Blackhurst et al. 2010
- Goebes et al. 2003
- Lovelace 2009
- USEPA 2016a
- USDA 2009b
- BLM 2008
- Kim et el. 2013
- Nickerson et al. 2011
