# Clay and ceramic products; at manufacturer

Dataset: openLCA process, unit process
Category: 3271: Clay Product and Refractory Manufacturing
Geography: United States
Time period: 2017-01-01 to 2017-12-31
Data quality: US EPA - Process Pedigree Matrix (1;1)
Exchange data quality scheme: US EPA - Flow Pedigree Matrix
Generated by: US EPA with CSRA and ERG
Owner: US EPA
Published in: Yang, Ingwersen et al. 2017
restrictionsDescription: This model shold be appropriately cited (see Yang, Ingwersen et al. 2017 source or Publication field) when used. Any changes or derivations of this model by the user should be documented. The model itself and any results from use of this model shall not be construed to consitute US EPA opinion or policy.
copyright: false

## General comment
BEA Code & Name is '327100:Clay product and refractory manufacturing'. Description of the primary industry producing this good or service, adapted from the Census Bureau NAICS 2007 descriptions: This industry group comprises (1) Pottery, Ceramics, and Plumbing Fixture Manufacturing, and (2) Clay Building Material and Refractories Manufacturing.

## Technology
The process describes the average US production of this good or service within this NAICS-based grouping defined in the BEA 2007 detailed input-output tables (BEA 2015). Distribution, wholesale and retailing of this good or service, use, and final disposal are not included. Creation of a product system with this process will enable modeling of all upstream (supply-chain) activities.

## Geography
Data represent the 50 US states

## Time period
2017 was the year in which this version of USEEIO was released and is the target date for the model

## Reference product
- Clay and ceramic products; at manufacturer: 1 USD

## Inputs from technosphere
All rows: data quality (1,3,1,1,1)
- Air conditioning, refrigeration, and warm air heating equipment; at manufacturer: 3.41122e-5 USD
- Gaskets, seals, musical instruments, fasteners, brooms, brushes, mop and other misc. goods; at manufacturer: 4.0635e-5 USD
- Sports: 0.000122336 USD
- Synthetic rubber and artificial and synthetic fibers; at manufacturer: 0.00031464 USD
- Used and secondhand goods: 8.54872e-9 USD
- Company and enterprise management: 0.048484 USD
- Industrial process furnaces and ovens; at manufacturer: 1.05424e-6 USD
- Rubber tires; at manufacturer: 2.37903e-8 USD
- Primary iron, steel, and ferroalloy products; at manufacturer: 0.00161531 USD
- Vending, commercial laundry, and other commercial and service industry machinery; at manufacturer: 6.15444e-5 USD
- Wiring devices; at manufacturer: 4.98056e-5 USD
- Postal service: 5.50064e-6 USD
- Architectural, engineering, and related services: 0.00898586 USD
- Warehousing: 0.00270038 USD
- Light gauge metal cans, boxes, and containers; at manufacturer: 4.38493e-6 USD
- Computer systems design: 0.000727291 USD
- Metal coatings, engravings, and heat treatments; at manufacturer: 0.00739912 USD
- Commercial machinery repair: 0.00333748 USD
- Limited-service restaurants: 0.00135176 USD
- Accounting, tax preparation, bookkeeping, and payroll: 0.00238857 USD
- Material handling equipment; at manufacturer: 0.000953907 USD
- Communication and energy wire and cable; at manufacturer: 0.000102757 USD
- Other retail: 2.40267e-6 USD
- Unrefined oil and gas; at extraction site: 3.66087e-6 USD
- Primary copper; at manufacturer: 4.03419e-5 USD
- Civic, social, professional, and similar organizations: 0.000361941 USD
- Metal windows, doors, and architectural products; at manufacturer: 9.41958e-5 USD
- Marketing research and all other miscellaneous professional, scientific, and technical services: 0.0021186 USD
- All other forging, stamping, and sintering; at manufacturer: 5.5881e-6 USD
- Packaged meat (except poultry); at manufacturer: 4.89528e-8 USD
- Fertilizers; at manufacturer: 1.07125e-7 USD
- Watches, clocks, and other measuring and controlling devices; at manufacturer: 8.54872e-9 USD
- Petrochemicals; at manufacturer: 0.000232307 USD
- Cutlery and handtools; at manufacturer: 0.000241964 USD
- Truck transport: 0.0139111 USD
- Other basic inorganic chemicals; at manufacturer: 0.0020983 USD
- Custom computer programming: 1.30153e-6 USD
- All other food and drinking places: 6.60135e-7 USD
- Lids, jars, bottle caps, other metal closures and crowns; at manufacturer: 0.0153356 USD
- Paper; at manufacturer: 1.50636e-6 USD
- Cement; at manufacturer: 7.3125e-5 USD
- Lessors of nonfinancial intangible assets: 0.00256573 USD
- Nondepository credit intermediation and related activities: 0.00846423 USD
- Power boilers and heat exchangers; at manufacturer: 8.10953e-8 USD
- Coal; at mine: 0.0202603 USD
- Surgical appliance and supplies; at manufacturer: 0.00128317 USD
- Investigation and security: 0.000250452 USD
- Cardboard; at manufacturer: 0.00270113 USD
- Wooden windows, door, and flooring; at manufacturer: 0.00116147 USD
- Waste management and remediation: 0.00389516 USD
- Scenic and sightseeing transportation and support activities for transportation: 0.00059407 USD
- Custom metal rolls; at manufacturer: 1.38387e-5 USD
- Valve and fittings (except for plumbing); at manufacturer: 6.23381e-5 USD
- Mineral wool; at manufacturer: 0.000465075 USD
- Light fixtures; at manufacturer: 2.37903e-8 USD
- Industrial molds; at manufacturer: 4.56244e-6 USD
- Other primary nonferrous metals; at manufacturer: 0.000396615 USD
- Independent artists, writers, and performers: 0.00023936 USD
- Iron, gold, silver, and other metal ores; at mine: 0.00311 USD
- State and local government enterprises: 0.00164738 USD
- Greenhouse crops, mushrooms, nurseries, and flowers; at farm: 1.51312e-6 USD
- Specialized design: 0.000599909 USD
- Vehicle repair: 0.0016687 USD
- Polystyrene foam products; at manufacturer: 1.70974e-8 USD
- General merchandise stores: 1.25832e-6 USD
- Fabric; at manufacturer: 2.7963e-5 USD
- Adhesives; at manufacturer: 0.00128169 USD
- Clothing; at manufacturer: 1.70974e-8 USD
- Rubber and plastic belts and hoses; at manufacturer: 7.70405e-7 USD
- Buildings and dwellings services: 0.00584733 USD
- Fabricated pipe and pipe fittings; at manufacturer: 9.0934e-6 USD
- Cast iron and steel; at manufacturer: 1.7879e-5 USD
- Carbon and graphite products; at manufacturer: 2.41233e-5 USD
- Secondary steel products; at manufacturer: 1.76405e-5 USD
- Vehicles and parts sales: 0.000136314 USD
- Urethane and other foam products; at manufacturer: 2.13718e-8 USD
- Laminated plastic plates and shapes; at manufacturer: 1.76478e-6 USD
- Environmental and other technical consulting services: 0.000240447 USD
- Consumer goods and general rental centers: 0.000116916 USD
- Water transport (boats, ships, ferries): 0.00512181 USD
- Other computer related services, including facilities management: 0.000362748 USD
- Software: 6.13862e-7 USD
- Printed circuit and electronic assembly; at manufacturer: 0.00194168 USD
- Satellite, telecommunications resellers, and all other telecommunications: 0.000117246 USD
- Full-service restaurants: 0.000737881 USD
- Aluminum; at manufacturer: 0.000118091 USD
- Monetary authorities and depository credit intermediation: 0.00645884 USD
- Magazines and journals; at publisher: 4.32593e-7 USD
- Other basic organic chemicals; at manufacturer: 0.00481708 USD
- Paints and coatings; at manufacturer: 0.00302319 USD
- Plastic bags, films, and sheets; at manufacturer: 3.62772e-5 USD
- Home furniture - Cabinets and non-wood, nonupholstered; at manufacturer: 4.6118e-7 USD
- Data processing and hosting: 0.00255414 USD
- Securities and commodities brokerage and exchanges: 0.000554666 USD
- Golf courses, marinas, ski resorts, fitness and other rec centers and industries: 0.000123154 USD
- Other rubber products; at manufacturer: 0.00221847 USD
- Special tools, dies, jigs, and fixtures; at manufacturer: 1.15908e-6 USD
- other miscellaneous electrical equipment and components; at manufacturer: 6.27007e-5 USD
- Corn products; at manufacturer: 1.42479e-5 USD
- Nonresidential building repair and maintanence: 0.00452746 USD
- Employment services: 0.00198223 USD
- Welding and Soldering Equipment, Scales and Balances, and other general purpose machinery; at manufacturer: 1.07815e-5 USD
- Computer terminals and other computer peripheral equipment; at manufacturer: 0.000125022 USD
- Soap and cleaning compounds; at manufacturer: 1.44986e-7 USD
- Other transportation equipment; at manufacturer: 1.21643e-7 USD
- Legal services: 0.00193452 USD
- Paper bags and coated paper; at manufacturer: 7.92219e-6 USD
- Business support: 0.000731615 USD
- Screws, nuts, and bolts; at manufacturer: 0.00182209 USD
- Relay and industrial controls; at manufacturer: 0.000145677 USD
- Wireless communications; at manufacturer: 2.38104e-6 USD
- Metal pipe fittings, ball and roller bearings, industrial patterns, metal bath fixtures, other misc. fabricated metals; at manufacturer: 0.0144755 USD
- Pipeline transport: 0.000118135 USD
- Glass and glass products; at manufacturer: 0.00046673 USD
- Facilities support: 0.000120597 USD
- Industrial process variable instruments; at manufacturer: 0.000121175 USD
- Food and beverage stores: 5.74672e-7 USD
- Light bulbs; at manufacturer: 4.4822e-8 USD
- Performances: 1.37905e-8 USD
- Lumber and treated lumber; at manufacturer: 0.00255592 USD
- Ball and roller bearings; at manufacturer: 3.75335e-6 USD
- Air transport: 0.0015871 USD
- Cutting and machine tool accessory, rolling mill, and other metalworking machines; at manufacturer: 0.000598331 USD
- Motor vehicle steering, suspension components (except spring), and brake systems; at manufacturer: 6.09197e-6 USD
- Promoters and agents: 4.46671e-7 USD
- Finished and coated fabric; at manufacturer: 0.00534287 USD
- Natural gas; at consumer: 0.0462687 USD
- Hotels and campgrounds: 0.000737677 USD
- Metal structural products; at manufacturer: 4.93115e-6 USD
- Machinery for the paper, textile, food or other industries (except semiconductor machinery); at manufacturer: 2.78553e-7 USD
- Ground or treated minerals and earth; at manufacturer: 0.0058077 USD
- Other support services: 0.00048202 USD
- Mechanical power transmission equipment; at manufacturer: 4.05477e-8 USD
- Drinking water and wastewater treatment; at consumer: 0.00164707 USD
- Rail transport: 0.0150768 USD
- Investment advice, portfolio management, and other financial advising services: 0.000245977 USD
- Copper, nickel, lead, and zinc; at mine: 0.00110704 USD
- Motors and generators; at manufacturer: 8.69304e-5 USD
- Synthetic dyes and pigments; at manufacturer: 0.00116189 USD
- Compressed Gases; at manufacturer: 0.000236495 USD
- Timber and raw forest products; at forest: 6.49017e-7 USD
- Scientific research and development: 0.000116462 USD
- Noncomparable imports: 0.00202698 USD
- Vehicle engines and engine parts; at manufacturer: 5.98242e-6 USD
- Transmission and power train parts; at manufacturer: 0.000122653 USD
- Aluminum products; at manufacturer: 8.4025e-5 USD
- Hydraulic pumps, motors, cylinders and actuators; at manufacturer: 8.38575e-5 USD
- Electricity; at consumer: 0.0130499 USD
- Metal cutting and forming machine tools; at manufacturer: 3.12217e-6 USD
- Cardboard containers; at manufacturer: 0.00314325 USD
- Clay and ceramic products; at manufacturer: 0.0573718 USD
- Lime and gypsum products; at manufacturer: 0.000541247 USD
- Plastic pipe, fittings, and sausage casings; at manufacturer: 3.63215e-6 USD
- Metal hinges, keys, lock, and other hardware; at manufacturer: 8.43324e-7 USD
- Other vehicle parts; at manufacturer: 0.000321815 USD
- Other secondary nonferrous metal products; at manufacturer: 3.25992e-5 USD
- Plywood and veneer; at manufacturer: 0.00313596 USD
- Sand, gravel, clay, phosphate, other nonmetallic minerals; at mine: 0.0326009 USD
- Wireless telecommunications: 0.000719846 USD
- Insurance carriers: 0.00845676 USD
- Gasoline, fuels, and by-products of petroleum refining; at manufacturer: 0.0163284 USD
- Air purification and ventilation equipment; at manufacturer: 1.95774e-5 USD
- Household goods repair: 0.000595191 USD
- Heavy gauge metal tanks; at manufacturer: 8.10953e-8 USD
- Passenger ground transport: 0.000368641 USD
- Advertising and public relations: 0.00598858 USD
- Ophthalmic goods; at manufacturer: 9.03242e-9 USD
- Other real estate: 0.00270093 USD
- Other concrete products; at manufacturer: 0.000116811 USD
- Nonferrous metal casts; at manufacturer: 1.44841e-5 USD
- Veneer, plywood, and engineered wood; at manufacturer: 0.00604284 USD
- Fiber, yarn, and thread; at manufacturer: 0.000116578 USD
- Other petroleum and coal products; at manufacturer: 0.00093892 USD
- Vehicle electrical and electronic equipment; at manufacturer: 2.2348e-7 USD
- Dimensional stone; at mine: 0.00115563 USD
- Office administration: 0.000117101 USD
- Other nonmetallic mineral products; at manufacturer: 0.000466978 USD
- Electronic equipment repair and maintenance: 0.000950646 USD
- Springs and wires; at manufacturer: 7.32308e-7 USD
- Telecommunications: 0.0023883 USD
- Specialty transformers; at manufacturer: 1.28231e-8 USD
- Semiconductors; at manufacturer: 0.0042568 USD
- Abrasive products; at manufacturer: 0.000478422 USD
- Other plastic products; at manufacturer: 0.00164683 USD
- Dry-cleaning and laundry: 0.000116253 USD
- Plastics; at manufacturer: 0.000139122 USD
- Commercial equipment rental: 0.00106854 USD
- Animal farms and aquaculture ponds (except cattle and poultry): 2.56461e-8 USD
- Secondary copper products; at manufacturer: 6.54354e-6 USD
- Vehicle rental and leasing: 0.00120051 USD
- Chemicals (except basic chemicals, agrichemicals, polymers, paints, pharmaceuticals,soaps, cleaning compounds); at manufacturer: 0.000837372 USD
- Management consulting: 0.000718001 USD
- Wholesale trade: 0.0260855 USD
- Electronic capacitors, resistors, coils, transformers, connectors and other components (except semiconductors and printed circuit assemblies); at manufacturer: 0.000326954 USD
- Machine shops; at manufacturer: 0.00655485 USD
- Pumps and pumping equipment; at manufacturer: 3.94194e-5 USD
- Speed changers, industrial high-speed drives, and gears; at manufacturer: 1.61382e-5 USD
- Insurance agencies and brokerages: 0.00293167 USD

## Inputs from nature
- Occupation, industrial area: 0.00177007 m2*a; data quality (4,2,1,1,1)
- Occupation, urban, discontinuously built: 0.000266258 m2*a; data quality (4,2,1,1,1)
- Water, fresh: 0.00103472 m3; data quality (2,2,1,4,2)
- Occupation, industrial area, built up: 0.000590024 m2*a; data quality (4,2,1,1,1)
- Water, saline: 0.000126249 m3; data quality (4,2,1,4,2)
- Energy, solar: 1.77587e-7 MJ; data quality (3,1,1,1,1)
- Energy, wind: 1.38245e-7 MJ; data quality (3,1,1,1,1)
- Water, fresh: 0.00269635 m3; data quality (3,2,1,4,2)

## Emissions to nature
- 1-Methyl-2-pyrrolidinone: 5.32574e-11 kg; data quality (5,1,1,1,4)
- ETHYLENETHIOUREA: 8.05563e-15 kg; data quality (5,2,1,1,5)
- Xylene: 7.21557e-7 kg; data quality (4,2,1,1,5)
- Nickel, ion: 3.58092e-12 kg; data quality (3,2,1,1,4)
- silver: 5.45198e-14, 1.0904e-14 kg (2 entries, compartments not in this file); data quality (4,1,1,1,5)
- Ethane, pentafluoro-, HFC-125: 6.36247e-9 kg; data quality (4,2,1,4,1)
- Propene: 5.35511e-10 kg; data quality (3,1,1,1,5)
- formaldehyde: 7.67798e-7 kg; data quality (2,2,1,2,4)
- benzyl chloride: 1.19557e-9 kg; data quality (2,2,1,1,5)
- Sodium formate: 3.79026e-12 kg; data quality (3,1,1,1,4)
- pyrene: 6.42091e-11 kg; data quality (3,2,1,2,2)
- ETHENE: 4.76474e-10 kg; data quality (3,1,1,1,4)
- formic acid: 2.37302e-11 kg; data quality (3,1,1,1,5)
- Diethylene glycol butyl ether: 1.0922e-10 kg; data quality (4,2,1,1,5)
- 1,4-dioxane: 9.28188e-10 kg; data quality (4,2,1,1,5)
- epichlorohydrin: 5.89874e-13 kg; data quality (3,2,1,1,5)
- manganese: 1.45546e-11 kg; data quality (4,1,1,1,4)
- Dibenz(a,h)anthracene: 1.57393e-12 kg; data quality (2,2,1,1,2)
- dibenzofuran: 3.75008e-11 kg; data quality (4,2,1,1,5)
- fluoranthene: 1.42154e-10 kg; data quality (2,2,1,2,2)
- Zinc: 4.61487e-11 kg; data quality (5,1,1,1,4)
- selenium: 5.81688e-8 kg; data quality (2,2,1,1,5)
- Dinitrogen monoxide: 2.07766e-6 kg; data quality (4,2,1,4,1)
- Sodium formate: 4.24661e-12 kg; data quality (3,1,1,1,5)
- methane, monochloro-, r-40: 3.57617e-7 kg; data quality (3,2,1,1,5)
- methylene diphenyl diisocyanate: 2.72635e-10 kg; data quality (4,2,1,1,5)
- Phthalate, dimethyl-: 2.80426e-10 kg; data quality (4,2,1,1,5)
- sulfur dioxide: 0.00112342 kg; data quality (2,2,1,1,5)
- phenanthrene: 2.16918e-9 kg; data quality (3,2,1,2,3)
- polychlorinated biphenyls: 1.33758e-14 kg; data quality (3,1,1,1,4)
- chloroform: 8.531e-11 kg; data quality (4,2,1,1,5)
- tertiary-Butyl Acetate: 3.82887e-9 kg; data quality (3,2,1,1,5)
- ammonia: 2.61719e-5 kg; data quality (3,2,1,1,4)
- 2-METHOXYETHANOL: 1.1654e-14 kg; data quality (4,2,1,1,5)
- Phthalate, dibutyl-: 3.26405e-8 kg; data quality (4,2,1,1,5)
- benzene, chloro-: 9.40018e-10 kg; data quality (4,2,1,1,5)
- hydrogen fluoride: 9.0784e-5 kg; data quality (2,2,1,1,5)
- nitric acid: 2.73883e-9 kg; data quality (3,1,1,1,5)
- trifluralin: 1.90615e-13 kg; data quality (4,1,1,1,5)
- arsenic: 1.21235e-11 kg; data quality (2,1,1,1,4)
- Ethylene glycol monoethyl ether: 2.91425e-8, 8.84507e-7 kg (2 entries, compartments not in this file); data quality (5,1,1,1,5)
- Aluminum: 2.13491e-9 kg; data quality (4,1,1,1,3)
- ALUMINUM OXIDE: 4.2097e-9 kg; data quality (5,1,1,1,4)
- acrylonitrile: 2.3532e-10 kg; data quality (4,2,1,1,5)
- Chrysene: 2.0359e-11 kg; data quality (2,2,1,2,2)
- Propane, 1,1,1,3,3,3-hexafluoro-, HCFC-236fa: 7.35419e-11 kg; data quality (4,2,1,4,1)
- fluorene: 7.02463e-8 kg; data quality (2,2,1,1,5)
- Nitrogen: 1.23227e-6 kg; data quality (5,2,1,1,5)
- pentachlorophenol: 7.0913e-17 kg; data quality (3,2,1,1,5)
- o-toluidine: 3.26592e-11 kg; data quality (3,1,1,1,4)
- Chromium, ion: 1.86182e-7 kg; data quality (2,2,1,1,5)
- 2,4-dimethylphenol: 5.16011e-13 kg; data quality (4,1,1,1,4)
- 1,2-BUTYLENE OXIDE: 3.3845e-10 kg; data quality (4,2,1,1,5)
- Water, saline: 6.39702e-5 m3; data quality (4,2,1,4,2)
- oxadiazon: 4.76539e-13 kg; data quality (3,1,1,1,5)
- ethane, 1,2-dibromo-: 5.81124e-11 kg; data quality (2,2,1,1,5)
- methanol: 6.43327e-12 kg; data quality (3,1,1,1,5)
- beryllium: 4.01752e-10 kg; data quality (2,2,1,1,5)
- methyl isobutyl ketone: 1.6058e-7 kg; data quality (4,2,1,1,5)
- 4-nitrophenol: 1.2592e-14 kg; data quality (2,2,1,1,4)
- ethane, 1,1,2-trichloro-: 6.62402e-11 kg; data quality (4,2,1,1,5)
- phenol: 6.32041e-7 kg; data quality (4,2,1,1,5)
- antimony: 7.3665e-9 kg; data quality (3,2,1,1,5)
- diethanolamine: 1.41727e-11 kg; data quality (3,2,1,1,2)
- ethylene oxide: 2.46978e-12 kg; data quality (3,2,1,1,5)
- carbonyl sulfide: 2.64643e-7 kg; data quality (4,2,1,1,2)
- Carbon dioxide: 0.318298 kg; data quality (4,2,1,4,1)
- naphthalene: 1.99203e-7 kg; data quality (3,2,1,1,5)
- propargyl alcohol: 1.12606e-10 kg; data quality (4,1,1,1,4)
- bromoform: 2.9165e-11 kg; data quality (3,2,1,1,5)
- Cobalt: 4.91314e-9 kg; data quality (3,2,1,1,5)
- ethene, tetrachloro-: 1.64317e-9 kg; data quality (3,2,1,1,5)
- Ethylene glycol monoethyl ether: 2.19269e-11 kg; data quality (5,1,1,1,3)
- 2-methylnaphthalene: 1.47793e-8 kg; data quality (2,2,1,1,5)
- toluene: 1.21994e-15 kg; data quality (5,1,1,1,5)
- phthalic anhydride: 1.33451e-13 kg; data quality (2,2,1,1,5)
- hydroquinone: 2.38512e-15 kg; data quality (3,2,1,1,5)
- nitrogen oxides: 0.00121567 kg; data quality (2,2,1,1,5)
- Dimethyl sulfate: 3.62844e-11 kg; data quality (2,2,1,1,5)
- acenaphthene: 4.35725e-10 kg; data quality (3,2,1,2,3)
- methane, tetrachloro-, R-10: 8.58142e-12 kg; data quality (3,1,1,1,5)
- arsenic: 1.07567e-8 kg; data quality (3,2,1,1,5)
- Triethyl amine: 4.0591e-10 kg; data quality (4,2,1,1,5)
- Benzene, 1,2,4-trimethyl-: 1.01179e-14 kg; data quality (5,1,1,1,4)
- 3,3'-Dichlorobenzidine: 4.1427e-15 kg; data quality (3,2,1,1,4)
- ethylene glycol: 2.91797e-10 kg; data quality (5,1,1,1,5)
- aniline: 3.25821e-11 kg; data quality (3,1,1,1,4)
- Methane, tetrafluoro-, R-14: 3.76121e-8 kg; data quality (2,1,1,1,1)
- 1,4-dichlorobenzene: 1.08671e-8 kg; data quality (2,2,1,1,5)
- methyl methacrylate: 2.82672e-7 kg; data quality (4,2,1,1,5)
- lead: 2.34029e-9 kg; data quality (3,1,1,1,5)
- ethyl acrylate: 1.78215e-8 kg; data quality (4,2,1,1,5)
- naphthalene: 4.2495e-14 kg; data quality (4,1,1,1,4)
- lead: 2.78515e-11 kg; data quality (3,1,1,1,4)
- 1,1,2,2-tetrachloroethane: 6.38805e-11 kg; data quality (3,2,1,1,5)
- 2,4/2,6-toluenediisocyanate (mixture): 2.18079e-14 kg; data quality (4,1,1,1,5)
- Indeno(1,2,3-cd)pyrene: 4.41984e-12 kg; data quality (2,2,1,2,2)
- PCB-1: 1.18087e-20 kg; data quality (2,2,1,1,5)
- benzene: 7.78803e-7 kg; data quality (3,2,1,1,5)
- barium: 5.05893e-13, 1.04109e-12 kg (2 entries, compartments not in this file); data quality (4,1,1,1,4)
- benzene: 8.09429e-14 kg; data quality (3,1,1,1,4)
- Ethane, 1,1,1-trifluoro-, HFC-143a: 2.72223e-9 kg; data quality (4,2,1,4,1)
- Vinyl acetate: 2.65223e-13 kg; data quality (4,1,1,1,4)
- Zinc: 1.07691e-6 kg; data quality (5,1,1,1,5)
- Phenol: 4.59057e-12 kg; data quality (3,1,1,1,5)
- chromium: 1.05526e-11, 1.34662e-6, 1.53866e-12 kg (3 entries, compartments not in this file); data quality (4,1,1,1,5)
- Xylene: 1.01179e-14 kg; data quality (4,1,1,1,4)
- ethylene glycol: 9.92772e-7 kg; data quality (5,2,1,1,5)
- Thiophanat-methyl: 2.02052e-13 kg; data quality (4,1,1,1,5)
- 1,4-BENZOQUINONE: 3.13388e-15 kg; data quality (3,2,1,1,5)
- isophorone: 2.06872e-9 kg; data quality (2,2,1,1,5)
- 2,4-dinitrophenol: 4.62849e-16 kg; data quality (5,2,1,1,5)
- N,N-DIMETHYLANILINE: 4.41315e-12 kg; data quality (5,2,1,1,5)
- particulates, < 2.5 um: 0.000465557 kg; data quality (3,2,1,1,5)
- Hydrazine: 2.27728e-11 kg; data quality (4,2,1,1,3)
- TERT-BUTYL ALCOHOL: 2.29354e-10, 4.93179e-13 kg (2 entries, compartments not in this file); data quality (4,1,1,1,5)
- Phosphorus: 6.17073e-7 kg; data quality (2,1,1,1,5)
- copper: 1.6799e-11 kg; data quality (4,1,1,1,4)
- hydrogen chloride: 5.88069e-5 kg; data quality (2,2,1,1,5)
- 3-methylcholanthrene: 1.25246e-14 kg; data quality (2,2,1,1,5)
- m-xylene: 1.65977e-8 kg; data quality (3,2,1,4,1)
- NITROUS ACID: 2.12749e-9 kg; data quality (5,1,1,1,4)
- propanal: 2.36367e-8 kg; data quality (3,2,1,4,1)
- mercury: 3.03452e-12 kg; data quality (3,1,1,1,4)
- particulates, < 10 um: 0.000250703 kg; data quality (3,2,1,1,5)
- carbon monoxide: 0.00132549 kg; data quality (2,2,1,1,4)
- 2,4,6-trichlorophenol: 1.54987e-18 kg; data quality (2,2,1,1,5)
- Water, fresh: 0.00315093 m3; data quality (3,2,1,4,2)
- t-butyl methyl ether: 1.35212e-10 kg; data quality (4,1,1,1,4)
- 2,2,4-trimethylpentane: 1.65679e-7 kg; data quality (3,2,1,1,4)
- acenaphthylene: 7.97724e-10 kg; data quality (3,2,1,2,4)
- maleic anhydride: 4.25982e-14 kg; data quality (2,2,1,1,5)
- vinyl acetate: 3.28072e-11 kg; data quality (4,2,1,1,5)
- Benzo(a)anthracene: 1.12352e-13 kg; data quality (2,2,1,1,5)
- 1,2,4-trimethylbenzene: 2.8217e-10 kg; data quality (5,1,1,1,4)
- Benzo(k)fluoranthene: 4.68162e-12 kg; data quality (3,2,1,3,1)
- dimethyl formamide: 2.00799e-10 kg; data quality (4,1,1,1,4)
- carbon tetrachloride: 5.10771e-11 kg; data quality (4,2,1,1,5)
- cyclohexane: 5.05539e-7 kg; data quality (4,1,1,1,5)
- 2-chloro-1-phenylethanone: 5.47342e-12 kg; data quality (2,2,1,1,5)
- acrolein: 1.94777e-8 kg; data quality (2,2,1,2,4)
- phthalate, dioctyl-: 4.59109e-7 kg; data quality (3,2,1,1,5)
- MOLYBDENUM(VI): 3.89335e-12, 1.03101e-11, 1.61861e-9 kg (3 entries, compartments not in this file); data quality (3,1,1,1,4)
- Sulfuric acid: 3.82068e-6 kg; data quality (2,1,1,1,5)
- avermectin B1: 3.94234e-13 kg; data quality (3,1,1,1,4)
- Dinitrotoluene, technical grade (2,4 (77%)- and 2,6 (19%)-): 3.06538e-10 kg; data quality (5,1,1,1,3)
- Ethane, 1,1,2-trichloro-1,2,2-trifluoro-, CFC-113: 3.02938e-12 kg; data quality (4,1,1,1,4)
- acrylic acid: 1.63315e-7 kg; data quality (4,1,1,1,5)
- nickel: 4.87516e-11 kg; data quality (4,1,1,1,5)
- copper: 4.86857e-11 kg; data quality (4,1,1,1,5)
- HYDROGEN SULFIDE: 3.59791e-12 kg; data quality (3,1,1,1,4)
- Methyl iodide: 2.4755e-8 kg; data quality (4,2,1,1,5)
- butadiene: 2.24788e-8 kg; data quality (3,2,1,3,2)
- carbon disulfide: 1.59402e-8 kg; data quality (4,2,1,1,4)
- propylene oxide: 8.56458e-12 kg; data quality (3,2,1,1,4)
- Ethene, chloro-: 1.90121e-11 kg; data quality (3,2,1,1,5)
- methane, bromo-, halon 1001: 1.4947e-9 kg; data quality (3,2,1,1,5)
- toluene, 2,4-dinitro-: 2.08124e-13 kg; data quality (5,2,1,1,5)
- Hydrazine, methyl-: 4.0481e-10 kg; data quality (2,2,1,1,5)
- Methane: 1.40555e-5 kg; data quality (4,2,1,4,1)
- Chromium VI: 9.96754e-8 kg; data quality (3,2,1,1,5)
- QUINOLINE: 7.72733e-11 kg; data quality (3,2,1,1,3)
- Butanol: 3.34385e-11 kg; data quality (5,1,1,1,3)
- Titanium: 1.02103e-11 kg; data quality (5,2,1,1,4)
- Hexane: 1.01179e-14 kg; data quality (4,1,1,1,4)
- benzo(a)pyrene: 1.40672e-11 kg; data quality (2,2,1,2,3)
- monochloroethane: 1.39459e-7 kg; data quality (3,2,1,1,5)
- Benzo(b)fluoranthene: 1.09476e-11 kg; data quality (2,2,1,2,2)
- 1,1,1-trichloroethane: 2.7119e-9 kg; data quality (4,2,1,1,5)
- Pendimethalin: 6.46186e-13 kg; data quality (5,1,1,1,5)
- Ethane, 1,1,1,2-tetrafluoro-, HFC-134a: 2.89389e-8 kg; data quality (4,2,1,4,1)
- Asbestos: 8.42874e-15 kg; data quality (5,2,1,1,5)
- ethane, 1,2-dichloro-: 1.19183e-10 kg; data quality (3,2,1,1,5)
- 2-ethoxyethyl acetate: 7.67993e-12 kg; data quality (5,2,1,1,5)
- cobalt: 5.26129e-14 kg; data quality (4,1,1,1,4)
- toluene: 1.0114e-6 kg; data quality (4,2,1,1,5)
- ACIFLUORFEN-SODIUM: 1.35077e-11 kg; data quality (3,1,1,1,4)
- copper: 1.20683e-10 kg; data quality (4,1,1,1,3)
- Sulfur hexafluoride: 4.35347e-9 kg; data quality (4,2,1,4,1)
- VOC, volatile organic compounds: 0.000155533 kg; data quality (3,2,1,1,5)
- Benzo(g,h,i)perylene: 6.6877e-14 kg; data quality (2,1,1,1,3)
- Aluminum: 7.50455e-8 kg; data quality (4,1,1,1,5)
- styrene: 1.17539e-5 kg; data quality (4,2,1,1,5)
- mercury: 1.69161e-12 kg; data quality (3,1,1,1,3)
- diisocyanates: 2.52808e-12 kg; data quality (4,1,1,1,5)
- 2,4,5,2',5'-PENTACHLOROBIPHENYL: 2.4613e-19 kg; data quality (2,2,1,1,5)
- DIETHANOLAMINE: 9.9155e-11 kg; data quality (4,1,1,1,4)
- ethylbenzene: 3.18543e-10 kg; data quality (4,1,1,1,4)
- manganese: 6.24116e-7 kg; data quality (4,1,1,1,5)
- Triethylene glycol: 1.39395e-7 kg; data quality (5,2,1,1,5)
- benz[a]anthracene: 7.4659e-12 kg; data quality (2,2,1,2,2)
- methanol: 2.60595e-8 kg; data quality (4,2,1,1,3)
- cumene: 6.70913e-10 kg; data quality (4,2,1,1,3)
- nickel: 6.62054e-8 kg; data quality (3,2,1,1,5)
- SEC-BUTYL ALCOHOL: 2.15899e-10 kg; data quality (5,1,1,1,5)
- vanadium: 1.4165e-14 kg; data quality (5,1,1,1,4)
- acetaldehyde: 1.32544e-7 kg; data quality (3,2,1,4,2)
- HYDROFLUORIC ACID: 1.01179e-14 kg; data quality (3,1,1,1,4)
- Cresol: 1.06842e-11 kg; data quality (3,2,1,1,4)
- ammonia: 6.20991e-8 kg; data quality (3,1,1,1,4)
- toluene-2,4-diisocyante: 2.2366e-10 kg; data quality (3,2,1,1,5)
- HYDROCHLORIC ACID: 8.99641e-9 kg; data quality (2,1,1,1,4)
- BUTYL ISOCYANATE: 1.63751e-12 kg; data quality (4,2,1,1,5)
- acetophenone: 1.8149e-10 kg; data quality (4,1,1,1,4)
- butanol: 9.46643e-10 kg; data quality (5,1,1,1,4)
- Carbaryl: 4.76539e-13 kg; data quality (5,1,1,1,5)
- chlorine: 5.55066e-12 kg; data quality (2,1,1,1,4)
- phenol: 3.01033e-10 kg; data quality (3,1,1,1,5)
- BENEFIN: 4.76539e-13 kg; data quality (5,1,1,1,5)
- Ethene, trichloro-: 5.45198e-14 kg; data quality (5,1,1,1,5)
- Benzo(g,h,i)perylene: 7.14954e-9 kg; data quality (3,2,1,1,5)
- cyanide: 7.86419e-9 kg; data quality (3,2,1,1,5)
- CHLORONAPHTHALENE: 1.09165e-18 kg; data quality (1,2,1,1,5)
- Ethane, hexafluoro-, HFC-116: 6.93398e-9 kg; data quality (2,1,1,1,1)
- hexane: 4.66746e-7 kg; data quality (3,2,1,1,5)
- o-Xylene: 8.52504e-9 kg; data quality (3,2,1,3,2)
- catechol: 5.06675e-17 kg; data quality (5,2,1,1,5)
- antimony: 2.32124e-13 kg; data quality (2,1,1,1,4)
- acetonitrile: 2.11199e-10 kg; data quality (3,1,1,1,4)
- o-cresol: 1.05529e-11 kg; data quality (4,2,1,1,5)
- manganese: 1.62259e-7 kg; data quality (3,2,1,1,5)
- Propene, 1,3-dichloro-: 3.10488e-11 kg; data quality (3,2,1,1,5)
- trichloroethylene: 7.00004e-9 kg; data quality (4,2,1,1,5)
- cadmium: 3.30227e-9 kg; data quality (3,2,1,1,5)
- methane, dichloro-, hcc-30: 2.97271e-9 kg; data quality (4,2,1,1,5)
- nickel: 1.83458e-11 kg; data quality (4,1,1,1,4)
- fluorine: 1.87503e-7 kg; data quality (4,1,1,1,5)
- PHOSPHORUS: 5.54055e-8 kg; data quality (2,2,1,1,5)
- Nitrobenzene: 9.16076e-11 kg; data quality (3,1,1,1,4)
- chlorine: 3.67801e-7 kg; data quality (4,2,1,1,5)
- m-cresol: 3.99676e-11 kg; data quality (3,1,1,1,4)
- nitric acid: 1.01179e-14 kg; data quality (3,1,1,1,4)
- Propane, 1,2-dichloro-: 8.99495e-11 kg; data quality (5,1,1,1,4)
- 2,3,4'-TRICHLOROBIPHENYL: 1.39538e-19 kg; data quality (2,2,1,1,5)
- benzene, ethyl-: 4.73e-8 kg; data quality (3,2,1,3,3)
- para-xylene: 1.46812e-9 kg; data quality (3,2,1,2,4)
- Methane, difluoro-, HFC-32: 3.7052e-9 kg; data quality (4,2,1,4,1)
- anthracene: 1.50654e-10 kg; data quality (3,2,1,1,5)
- Chrysene, 5-methyl-: 1.70641e-18 kg; data quality (2,2,1,1,5)
- lead: 1.90505e-7 kg; data quality (3,2,1,1,5)
- ALUMINUM OXIDE: 1.24305e-12 kg; data quality (5,1,1,1,5)
- PYRIDINE: 2.94982e-10 kg; data quality (4,1,1,1,4)
- 4,4'-METHYLENEBIS(2-CHLOROANALINE): 2.41669e-15 kg; data quality (5,2,1,1,5)
- mercury: 5.47966e-9 kg; data quality (2,2,1,1,5)
- ACRYLAMIDE: 2.69739e-13 kg; data quality (4,1,1,1,4)
- p-cresol: 2.42397e-11 kg; data quality (3,1,1,1,4)
- hydrogen sulfide: 3.09606e-9 kg; data quality (3,1,1,1,4)
- biphenyl: 3.28727e-10 kg; data quality (4,2,1,1,5)
- hexachlorobenzene: 3.7556e-15 kg; data quality (4,1,1,1,4)
- Hydrocarbons, aromatic: 3.33241e-8 kg; data quality (4,2,1,2,2)

## Inventory method
Input-output

## Modelling constants
The reference unit of all processes is 1 USD2013 of the good or service. The technosphere inputs are based on the US BEA detailed input-output tables for 2007. The IO tables are combined to develop a commodity-by-commodity model based on the the industry-technology assumption (see Suh et al., 2010), which assumes all commodities produced by a given industry have the same input structure, but that multiple industries can produce the same commodity. Thus, model technosphere flows represent commodity outputs (and not industry outputs) from other processes in the model. There are no by-products included in these processes. All commodity production is based on US-conditions, despite in reality that some goods and services are produced overseas, as USEEIO v1.1 is a single-region IO model.

## Completeness
The input-output approach assures that all purchased inputs associated with the sectors making these commodities as reported in the US census for 2007 are included. The direct resources extracted including minerals, energy sources, water and land occupied are included. Emissions to air include all critieria air pollutants, greenhouse gases, and hazardous and toxic air pollutants as defined by US EPA. Releases to water include toxics, total nitrogen and total phosphorus, and water discharges. Releases to soil or groundwater include toxics and agriculutural pesticides. Some metal releases to air, water and soil are not included because they could not be speciated. Solid hazardous and non-hazardous wastes generated are not included as an elementary flows although purchases of waste services are included.

## Data treatment
Greenhouse gases are primarily from the US Greenhouse Gas Emission Inventory (USEPA 2016a). Biogenic C uptake is not included (change from version 1.0), as biogenic C emission are not included. Toxic releases to air, water and soil (except pesticides) are from the 2013 Toxic Release Inventory (USEPA 2015a). Criteria air pollutants and hazardous air pollutants are from the 2011 National Emissions Inventory (USEPA 2015b). All estimates are normalized by industry based on sector output in the data year, then converted to 2013 USD using relative sector-specific CPIs (if data year is not 2013). Energy use represent raw renewables or fossil fuel energies and is based on EIA data for 2014. See Table 1 in Yang, Ingwersen et al. 2017 and Supporting Information 1, and the v1.1 data update notes (Ingwersen et al. 2017) for all details on environmental data sources used.Land occupation associated with manufacturing buildings was estimated based on the building floorspace data provided by the U.S. Energy Information Administration in the 2010 Manufacturing Energy Consumption Survey (EIA 2013). Portions of total renewable energy (EIA 2016) based on EIA-923 reports for 2014 (EIA 2017) are included. Nitrogen and Phosphorus releases are modeled in total N and total P equivalents as estimated by the Discharge Monitoring Report Nutrient Loading tool (USEPA 2016b). Self-supplied withdrawals were assigned to industrial sectors based on water use statistics for Canadian industries by NAICS 3-digit sector scaled to US production levels based on gross domestic product by industry (BEA 2015; Statistics Canada 2010), and further disaggregated to the manufacturing sectors based on compensation of employees as provided by the 2007 IO tables (BEA 2015). Water withdrawals associated with public supply were allocated to sectors based on their use of water, sewage, and other services in USD based on the IO tables (BEA 2015). Portions of total renewable energy (EIA 2016) by type are assigned to sectors (hydro, wind, solar, or) based on EIA-923 reports for 2014 (EIA 2017).

## Data collection
2015-2016

## Sampling procedure
US federal government sources, including surveys and US EPA emissions databases are used as the primary sources. From these sources, data for US reporting establishments/facilities are aggregated by the NAICS sector as defined in the BEA detailed 2007 input-output tables. When level of sector aggregation differs, or when direct emissions are not reported but modeled, additional sources are used to make allocations and estimates.

## Review details
In regard to quality assurance and peer-review, each dataset created went through Quality Assurance as defined in a quality assurance project plans at US EPA, CSRA or ERG. The model was assembled with the IO model builder model (USEPA 2016c). Validation functions were used to check that all the model components were properly assembled and harmonized. Bayou Demeke and Santosh Ghimire provided internal peer review of the model methodology and the manuscript underwent standard EPA management review. An editor and two anonymous reviewers at the Journal of Cleaner Production reviewed the model. In regard to data quality evaluation, data quality assessment was performed at the flow and process levels according to the updated US EPA data quality assessment guidelines as defined in US EPA (2016b).

## Intended application
The primary application is for use in the US Environmentally-Extended Input-Ouput model, USEEIO, version 1.1. This model is being used by the US EPA for supporting tools that prioritize goods and services based on potential environmental impacts, resource use or emissions for large regions, including the US and US states, and as a strealined tool for organizations as a starting point to consider sustainable materials management. Model results are designed to provide meso/macro-level decision support.

## Project
USEEIO v1.1 was developed by the US EPA with CSRA and ERG with Wesley W. Ingwersen and David E. Meyer as research leads. Yi Yang was the technical lead on the work for CSRA (contract EP-C-15-012); Troy Hawkins was lead for ERG (contract EP-C-12-021).

## Sources
- EIA 2016
- USDA 2016
- USEPA 2015a
- USGS 2015
- Lovelace 2009
- BLM 2008
- EIA 2013
- Blackhurst et al. 2010
- USEPA 2016a
- USDA 2006
- USDA 2009b
- USEPA 2015b
- USDA 2009a
- Maupin et al. 2014
- Torcellini et al. 2003
- Statistics Canada 2010
- Kim et el. 2013
- Ingwersen et al. DRAFT
- Nickerson et al. 2011
- EIA 2015
- Edelen and Ingwersen 2017
- USDA 2014
- BEA 2015
- USEPA 2016b
- Macknick et al. 2011
- Goebes et al. 2003
- EIA 2017
- Ingwersen et al. 2017
- USEPA 2016c
- Yienger et al. 1995
- USGS 2016
