# Computers; at manufacturer

Dataset: openLCA process, unit process
Category: 3341: Computer and Peripheral Equipment Manufacturing
Geography: United States
Time period: 2017-01-01 to 2017-12-31
Data quality: US EPA - Process Pedigree Matrix (1;1)
Exchange data quality scheme: US EPA - Flow Pedigree Matrix
Generated by: US EPA with CSRA and ERG
Owner: US EPA
Published in: Yang, Ingwersen et al. 2017
restrictionsDescription: This model shold be appropriately cited (see Yang, Ingwersen et al. 2017 source or Publication field) when used. Any changes or derivations of this model by the user should be documented. The model itself and any results from use of this model shall not be construed to consitute US EPA opinion or policy.
copyright: false

## General comment
BEA Code & Name is '334111:Electronic computer manufacturing'. Description of the primary industry producing this good or service, adapted from the Census Bureau NAICS 2007 descriptions: This U.S. industry comprises establishments primarily engaged in manufacturing and/or assembling electronic computers, such as mainframes, personal computers, workstations, laptops, and computer servers. Computers can be analog, digital, or hybrid. Digital computers, the most common type, are devices that do all of the following: (1) store the processing program or programs and the data immediately necessary for the execution of the program; (2) can be freely programmed in accordance with the requirements of the user; (3) perform arithmetical computations specified by the user; and (4) execute, without human intervention, a processing program that requires the computer to modify its execution by logical decision during the processing run. Analog computers are capable of simulating mathematical models and contain at least analog, control, and programming elements. The manufacture of computers includes the assembly or integration of processors, coprocessors, memory, storage, and input/output devices into a user-programmable final product.

## Technology
The process describes the average US production of this good or service within this NAICS-based grouping defined in the BEA 2007 detailed input-output tables (BEA 2015). Distribution, wholesale and retailing of this good or service, use, and final disposal are not included. Creation of a product system with this process will enable modeling of all upstream (supply-chain) activities.

## Geography
Data represent the 50 US states

## Time period
2017 was the year in which this version of USEEIO was released and is the target date for the model

## Reference product
- Computers; at manufacturer: 1 USD

## Inputs from technosphere
All rows: data quality (1,3,1,1,1)
- Primary batteries; at manufacturer: 0.00850094 USD
- Glass and glass products; at manufacturer: 2.26145e-5 USD
- Telecommunications: 0.00146562 USD
- Veneer, plywood, and engineered wood; at manufacturer: 5.27074e-5 USD
- Audio and video equipment; at manufacturer: 1.42905e-5 USD
- Postal service: 6.66484e-7 USD
- Scientific research and development: 4.99169e-8 USD
- Advertising and public relations: 0.00197899 USD
- Buildings and dwellings services: 0.000914491 USD
- Legal services: 0.00266193 USD
- Paper; at manufacturer: 8.09229e-7 USD
- Springs and wires; at manufacturer: 3.82566e-7 USD
- Electronic capacitors, resistors, coils, transformers, connectors and other components (except semiconductors and printed circuit assemblies); at manufacturer: 0.0115193 USD
- Relay and industrial controls; at manufacturer: 0.00018357 USD
- Semiconductor machinery; at manufacturer: 3.19509e-7 USD
- Light bulbs; at manufacturer: 6.86458e-9 USD
- Cutlery and handtools; at manufacturer: 9.78271e-5 USD
- Vehicle rental and leasing: 0.000177439 USD
- Plastic bags, films, and sheets; at manufacturer: 0.00358426 USD
- Limited-service restaurants: 6.32508e-6 USD
- Other concrete products; at manufacturer: 2.67289e-5 USD
- Concrete pipe, bricks, and blocks; at manufacturer: 1.93358e-5 USD
- Magazines and journals; at publisher: 0.000310146 USD
- Full-service restaurants: 4.00585e-6 USD
- Secondary copper products; at manufacturer: 0.000735495 USD
- Other primary nonferrous metals; at manufacturer: 0.000336831 USD
- Plywood and veneer; at manufacturer: 2.8435e-6 USD
- Wiring devices; at manufacturer: 0.000557237 USD
- Paper bags and coated paper; at manufacturer: 5.44099e-6 USD
- Consumer goods and general rental centers: 2.49849e-5 USD
- Cutting and machine tool accessory, rolling mill, and other metalworking machines; at manufacturer: 0.000245477 USD
- Other computer related services, including facilities management: 0.000121839 USD
- Cast iron and steel; at manufacturer: 1.85258e-6 USD
- Other basic inorganic chemicals; at manufacturer: 6.2433e-5 USD
- Cement; at manufacturer: 5.1183e-6 USD
- Welding and Soldering Equipment, Scales and Balances, and other general purpose machinery; at manufacturer: 2.4354e-5 USD
- Metal hinges, keys, lock, and other hardware; at manufacturer: 3.35533e-5 USD
- Other vehicle parts; at manufacturer: 0.00340586 USD
- Communication and energy wire and cable; at manufacturer: 0.000321359 USD
- Primary iron, steel, and ferroalloy products; at manufacturer: 0.000146714 USD
- Sand, gravel, clay, phosphate, other nonmetallic minerals; at mine: 2.31362e-6 USD
- Other petroleum and coal products; at manufacturer: 0.000563273 USD
- Waste management and remediation: 0.000375201 USD
- Machine shops; at manufacturer: 0.00207776 USD
- Noncomparable imports: 0.00414435 USD
- Aluminum; at manufacturer: 2.16827e-5 USD
- All other food and drinking places: 1.57795e-7 USD
- Semiconductors; at manufacturer: 0.0632467 USD
- Copper, nickel, lead, and zinc; at mine: 5.94214e-7 USD
- Hotels and campgrounds: 4.75688e-6 USD
- Motors and generators; at manufacturer: 0.000216021 USD
- Adhesives; at manufacturer: 1.08974e-5 USD
- Computer terminals and other computer peripheral equipment; at manufacturer: 0.0837819 USD
- Lids, jars, bottle caps, other metal closures and crowns; at manufacturer: 0.000317003 USD
- Insurance agencies and brokerages: 0.000495889 USD
- Pipeline transport: 5.687e-7 USD
- Newspapers; at publisher: 2.42256e-5 USD
- Architectural, engineering, and related services: 0.000127031 USD
- Metal plumbing drains, faucets, valves, and other fittings; at manufacturer: 2.10419e-5 USD
- Rail transport: 0.000105733 USD
- Commercial machinery repair: 0.000591515 USD
- External hard drives, CDs, other storage media; at manufacturer: 0.00419637 USD
- Electricity; at consumer: 0.0010175 USD
- Motor vehicle steering, suspension components (except spring), and brake systems; at manufacturer: 2.36651e-5 USD
- Other retail: 7.65097e-5 USD
- Management consulting: 0.00121097 USD
- Nondepository credit intermediation and related activities: 0.00108986 USD
- Aluminum products; at manufacturer: 2.17649e-5 USD
- Nonferrous metal casts; at manufacturer: 2.33133e-6 USD
- Cardboard; at manufacturer: 9.27432e-5 USD
- Nonresidential building repair and maintanence: 0.000789423 USD
- Facilities support: 9.95933e-6 USD
- Warehousing: 0.000383382 USD
- Office administration: 0.000145253 USD
- Performances: 5.12309e-8 USD
- Iron, gold, silver, and other metal ores; at mine: 2.08424e-6 USD
- Storage batteries; at manufacturer: 0.000550364 USD
- Vehicles and parts sales: 0.000665706 USD
- Specialty transformers; at manufacturer: 1.04188e-6 USD
- Light fixtures; at manufacturer: 5.1183e-6 USD
- Urethane and other foam products; at manufacturer: 3.50635e-6 USD
- Machinery for the paper, textile, food or other industries (except semiconductor machinery); at manufacturer: 7.07051e-7 USD
- Soap and cleaning compounds; at manufacturer: 7.49884e-5 USD
- Switchgear and switchboards; at manufacturer: 6.76753e-5 USD
- Independent artists, writers, and performers: 4.71888e-7 USD
- Natural gas; at consumer: 0.000260741 USD
- Truck transport: 0.00602298 USD
- Company and enterprise management: 0.018676 USD
- Sports: 5.27221e-7 USD
- Paints and coatings; at manufacturer: 3.19509e-7 USD
- other miscellaneous electrical equipment and components; at manufacturer: 0.00391638 USD
- Custom metal rolls; at manufacturer: 6.23628e-5 USD
- Air conditioning, refrigeration, and warm air heating equipment; at manufacturer: 1.41892e-6 USD
- All other forging, stamping, and sintering; at manufacturer: 0.000269196 USD
- Civic, social, professional, and similar organizations: 5.20491e-7 USD
- Software: 7.2559e-5 USD
- Air transport: 0.00108525 USD
- Plastics; at manufacturer: 4.21204e-5 USD
- Accounting, tax preparation, bookkeeping, and payroll: 0.0012986 USD
- Ball and roller bearings; at manufacturer: 6.27093e-5 USD
- Plastic pipe, fittings, and sausage casings; at manufacturer: 0.000196335 USD
- Lumber and treated lumber; at manufacturer: 3.12785e-5 USD
- Clay and ceramic products; at manufacturer: 5.23204e-5 USD
- Employment services: 0.000163754 USD
- Transmission and power train parts; at manufacturer: 2.36651e-5 USD
- Industrial process variable instruments; at manufacturer: 0.000143079 USD
- Computers; at manufacturer: 0.029522 USD
- Laminated plastic plates and shapes; at manufacturer: 2.9305e-6 USD
- Computer storage device readers; at manufacturer: 0.1466 USD
- Golf courses, marinas, ski resorts, fitness and other rec centers and industries: 7.37561e-7 USD
- Investment advice, portfolio management, and other financial advising services: 5.21805e-7 USD
- Satellite, telecommunications resellers, and all other telecommunications: 0.000121584 USD
- Electronic equipment repair and maintenance: 0.000172831 USD
- Specialized design: 6.61052e-5 USD
- Material handling equipment; at manufacturer: 2.39764e-5 USD
- Passenger ground transport: 1.95929e-6 USD
- Household goods repair: 9.88907e-5 USD
- Data processing and hosting: 0.000563408 USD
- Lime and gypsum products; at manufacturer: 9.09921e-6 USD
- Light gauge metal cans, boxes, and containers; at manufacturer: 7.58554e-5 USD
- Monetary authorities and depository credit intermediation: 0.000683556 USD
- Chemicals (except basic chemicals, agrichemicals, polymers, paints, pharmaceuticals,soaps, cleaning compounds); at manufacturer: 0.00167894 USD
- Fluid meters and counting devices; at manufacturer: 1.99667e-7 USD
- Insurance carriers: 0.00125024 USD
- Other support services: 3.75623e-5 USD
- Metal pipe fittings, ball and roller bearings, industrial patterns, metal bath fixtures, other misc. fabricated metals; at manufacturer: 0.000127565 USD
- Valve and fittings (except for plumbing); at manufacturer: 3.65116e-5 USD
- Vehicle electrical and electronic equipment; at manufacturer: 0.000324149 USD
- Gasoline, fuels, and by-products of petroleum refining; at manufacturer: 9.21307e-5 USD
- Wholesale trade: 0.0687055 USD
- Business support: 0.000168225 USD
- Investigation and security: 3.68218e-5 USD
- Computer systems design: 0.000629133 USD
- Wood kitchen cabinets and countertops; at manufacturer: 4.32212e-5 USD
- Metal windows, doors, and architectural products; at manufacturer: 0.0064212 USD
- Other basic organic chemicals; at manufacturer: 0.00027071 USD
- Printed circuit and electronic assembly; at manufacturer: 0.049135 USD
- Water transport (boats, ships, ferries): 2.71167e-5 USD
- Metal coatings, engravings, and heat treatments; at manufacturer: 0.00145154 USD
- Wireless communications; at manufacturer: 0.000122442 USD
- Custom computer programming: 9.48403e-6 USD
- Wooden windows, door, and flooring; at manufacturer: 5.23217e-5 USD
- Cardboard containers; at manufacturer: 0.000175586 USD
- Lessors of nonfinancial intangible assets: 0.000150376 USD
- Promoters and agents: 4.99169e-8 USD
- Other real estate: 5.28115e-5 USD
- Metal structural products; at manufacturer: 0.00033476 USD
- Environmental and other technical consulting services: 0.00026668 USD
- Home furniture - Cabinets and non-wood, nonupholstered; at manufacturer: 2.32723e-6 USD
- Drinking water and wastewater treatment; at consumer: 0.000150555 USD
- Vehicle repair: 0.000296362 USD
- General merchandise stores: 2.45963e-5 USD
- State and local government enterprises: 0.000174269 USD
- Signal testing instruments; at manufacturer: 9.13008e-5 USD
- Wireless telecommunications: 0.000604595 USD
- Other plastic products; at manufacturer: 0.000461342 USD
- Abrasive products; at manufacturer: 0.000172612 USD
- Screws, nuts, and bolts; at manufacturer: 0.000224536 USD
- Telephones; at manufacturer: 4.50614e-5 USD
- Vending, commercial laundry, and other commercial and service industry machinery; at manufacturer: 2.43755e-6 USD
- Compressed Gases; at manufacturer: 1.95381e-5 USD
- Marketing research and all other miscellaneous professional, scientific, and technical services: 7.73679e-6 USD
- Petrochemicals; at manufacturer: 6.45883e-7 USD
- Food and beverage stores: 3.19509e-7 USD
- Commercial equipment rental: 0.000150737 USD
- Securities and commodities brokerage and exchanges: 0.000102712 USD
- Optical instruments and lenses; at manufacturer: 2.98228e-6 USD
- Gaskets, seals, musical instruments, fasteners, brooms, brushes, mop and other misc. goods; at manufacturer: 1.1374e-6 USD
- Other secondary nonferrous metal products; at manufacturer: 0.000151779 USD

## Inputs from nature
- Occupation, urban, discontinuously built: 0.000871297 m2*a; data quality (4,2,1,1,1)
- Water, saline: 2.57794e-5 m3; data quality (4,2,1,4,2)
- Water, fresh: 0.00018327 m3; data quality (2,2,1,4,2)
- Occupation, industrial area: 0.000812267 m2*a; data quality (4,2,1,1,1)
- Occupation, industrial area, built up: 0.000270756 m2*a; data quality (4,2,1,1,1)
- Water, fresh: 0.000502096 m3; data quality (3,2,1,4,2)

## Emissions to nature
- diisocyanates: 8.15857e-14 kg; data quality (4,1,1,1,4)
- 2-(2-ETHOXYETHOXY) ETHYL ACETATE: 1.85048e-10 kg; data quality (5,2,1,1,5)
- Methane, difluoro-, HFC-32: 2.51923e-10 kg; data quality (4,2,1,4,1)
- 1,1,1-trichloroethane: 9.60596e-8 kg; data quality (3,2,1,1,5)
- silver: 6.51456e-13 kg; data quality (4,1,1,1,5)
- benzene, chloro-: 4.34584e-13 kg; data quality (4,2,1,1,5)
- o-Xylene: 4.75441e-10 kg; data quality (3,2,1,1,5)
- carbon monoxide: 6.14383e-6 kg; data quality (2,2,1,1,4)
- trichloroethylene: 1.44233e-8 kg; data quality (3,2,1,1,5)
- Benzo(g,h,i)perylene: 1.34961e-13 kg; data quality (3,2,1,2,3)
- ethylene glycol: 2.38176e-9 kg; data quality (5,2,1,1,5)
- Nitrogen: 2.69775e-10 kg; data quality (5,2,1,1,5)
- Ethylene glycol monoethyl ether: 5.07453e-12, 2.04616e-7 kg (2 entries, compartments not in this file); data quality (5,1,1,1,5)
- Carbon dioxide: 0.0019833 kg; data quality (4,2,1,4,1)
- tertiary-Butyl Acetate: 1.9255e-9 kg; data quality (3,2,1,1,5)
- Water, saline: 1.30624e-5 m3; data quality (4,2,1,4,2)
- Ethanol, 2-butoxy-: 2.07228e-11 kg; data quality (5,2,1,1,5)
- acrylic acid: 3.48113e-14 kg; data quality (4,1,1,1,4)
- naphthalene: 3.27871e-9 kg; data quality (3,2,1,1,5)
- nitric acid: 1.25395e-9 kg; data quality (3,1,1,1,5)
- Chromium VI: 9.46085e-13 kg; data quality (3,2,1,1,5)
- dimethyl formamide: 9.93967e-10 kg; data quality (4,2,1,1,5)
- VOC, volatile organic compounds: 1.2497e-5 kg; data quality (3,2,1,1,5)
- Benzo(a)anthracene: 1.26768e-13 kg; data quality (2,2,1,1,5)
- diethanolamine: 1.22944e-10 kg; data quality (3,2,1,1,5)
- manganese: 2.4628e-10 kg; data quality (3,2,1,1,5)
- chlorine: 8.86125e-11 kg; data quality (4,2,1,1,5)
- Propane, 1,2-dichloro-: 3.61032e-14 kg; data quality (4,2,1,1,5)
- acrylonitrile: 8.55779e-11 kg; data quality (4,2,1,1,5)
- nitrogen oxides: 5.34707e-6 kg; data quality (2,2,1,1,5)
- propylene oxide: 1.8858e-13 kg; data quality (3,2,1,1,5)
- phenanthrene: 1.31346e-11 kg; data quality (3,2,1,2,3)
- Benzo(b)fluoranthene: 8.00402e-14 kg; data quality (2,2,1,2,3)
- copper: 3.18281e-11, 1.95392e-11, 1.38385e-10 kg (3 entries, compartments not in this file); data quality (4,1,1,1,5)
- benzo(a)pyrene: 1.14222e-13 kg; data quality (3,2,1,2,4)
- hydrogen chloride: 7.01452e-8 kg; data quality (2,2,1,1,5)
- carbon tetrachloride: 1.24991e-10 kg; data quality (4,2,1,1,5)
- acenaphthylene: 3.07588e-12 kg; data quality (3,2,1,3,2)
- ethylene glycol: 6.34316e-13 kg; data quality (5,1,1,1,5)
- 1,4-dioxane: 1.59315e-10 kg; data quality (4,2,1,1,5)
- Sulfuric acid: 1.12588e-9 kg; data quality (2,1,1,1,5)
- acetonitrile: 1.88807e-10 kg; data quality (3,2,1,1,5)
- Benzo(k)fluoranthene: 6.49567e-14 kg; data quality (3,2,1,3,3)
- Methane: 3.97427e-8 kg; data quality (4,2,1,4,1)
- butadiene: 1.42892e-10 kg; data quality (3,2,1,4,1)
- 1,4-dichlorobenzene: 7.1651e-10 kg; data quality (2,2,1,1,5)
- 1,1,2,2-tetrachloroethane: 1.3479e-10 kg; data quality (3,2,1,1,5)
- ammonia: 7.08801e-8 kg; data quality (3,2,1,1,5)
- Chrysene: 1.86651e-13 kg; data quality (2,2,1,2,4)
- PHOSPHORUS: 5.48988e-13 kg; data quality (2,2,1,1,5)
- 2-methylnaphthalene: 3.0258e-13 kg; data quality (2,2,1,1,5)
- Diethylene glycol butyl ether: 2.97549e-10 kg; data quality (4,2,1,1,5)
- carbonyl sulfide: 6.07111e-13 kg; data quality (4,2,1,1,5)
- acetophenone: 3.50036e-13 kg; data quality (3,2,1,1,5)
- mercury: 2.8259e-13 kg; data quality (2,2,1,1,5)
- Triethyl amine: 3.64293e-11 kg; data quality (3,2,1,1,5)
- cyanide: 4.57003e-11 kg; data quality (2,2,1,1,5)
- methylene diphenyl diisocyanate: 2.5351e-12 kg; data quality (4,2,1,1,5)
- hydroquinone: 3.98234e-11 kg; data quality (3,2,1,1,5)
- methyl isobutyl ketone: 3.758e-9 kg; data quality (3,2,1,1,5)
- 4,4'-METHYLENEBIS(2-CHLOROANALINE): 9.36649e-12 kg; data quality (5,2,1,1,5)
- Cadmium: 1.14177e-12 kg; data quality (3,1,1,1,5)
- ethane, 1,1,2-trichloro-: 4.26723e-14 kg; data quality (4,2,1,1,5)
- ethane, 1,2-dibromo-: 1.5099e-10 kg; data quality (2,2,1,1,5)
- t-butyl methyl ether: 1.48667e-8 kg; data quality (3,2,1,1,5)
- particulates, < 10 um: 5.60253e-8 kg; data quality (3,2,1,1,5)
- catechol: 4.07834e-12 kg; data quality (5,2,1,1,5)
- Cobalt: 9.08131e-13 kg; data quality (3,2,1,1,5)
- benzene, ethyl-: 1.23134e-8 kg; data quality (4,2,1,1,5)
- biphenyl: 2.84475e-13 kg; data quality (4,2,1,1,5)
- monochloroethane: 3.77649e-15 kg; data quality (3,2,1,1,5)
- fluorene: 9.24442e-12 kg; data quality (2,2,1,2,4)
- benz[a]anthracene: 4.71461e-13 kg; data quality (2,2,1,1,5)
- chromium: 2.86711e-12, 1.90295e-12 kg (2 entries, compartments not in this file); data quality (4,1,1,1,5)
- acetaldehyde: 1.54376e-9 kg; data quality (3,2,1,4,2)
- Dinitrogen monoxide: 4.48214e-9 kg; data quality (4,2,1,4,1)
- cadmium: 1.2646e-11 kg; data quality (3,2,1,1,5)
- 2,2,4-trimethylpentane: 5.23967e-9 kg; data quality (3,2,1,1,5)
- phenol: 7.22323e-10 kg; data quality (4,2,1,1,5)
- pyrene: 1.54429e-12 kg; data quality (2,2,1,2,4)
- lead: 7.42026e-14 kg; data quality (3,1,1,1,5)
- fluoranthene: 2.44885e-12 kg; data quality (2,2,1,2,4)
- nickel: 1.392e-8 kg; data quality (3,2,1,1,5)
- arsenic: 3.08014e-12 kg; data quality (3,2,1,2,4)
- ethylbenzene: 5.04576e-10 kg; data quality (4,1,1,1,5)
- Ethane, pentafluoro-, HFC-125: 4.32594e-10 kg; data quality (4,2,1,4,1)
- anthracene: 6.55543e-13 kg; data quality (3,2,1,2,4)
- 2-ethoxyethyl acetate: 1.59125e-10 kg; data quality (5,2,1,1,5)
- Asbestos: 7.61718e-17 kg; data quality (5,2,1,1,5)
- 2-METHOXYETHANOL: 8.70077e-12 kg; data quality (4,2,1,1,5)
- nickel: 5.20139e-12 kg; data quality (4,1,1,1,5)
- ethene, tetrachloro-: 8.64227e-9 kg; data quality (3,2,1,1,5)
- selenium: 5.10141e-13 kg; data quality (2,2,1,1,5)
- isophorone: 3.08653e-12 kg; data quality (3,2,1,1,5)
- styrene: 4.06504e-9 kg; data quality (4,2,1,1,5)
- propanal: 2.68974e-10 kg; data quality (3,2,1,4,1)
- methanol: 3.21283e-7 kg; data quality (4,2,1,1,5)
- cumene: 4.07075e-9 kg; data quality (4,2,1,1,5)
- BUTYL ISOCYANATE: 8.69394e-9 kg; data quality (4,2,1,1,5)
- phthalate, dioctyl-: 3.13081e-10 kg; data quality (3,2,1,1,5)
- Xylene: 7.18079e-8 kg; data quality (4,2,1,1,5)
- Phthalate, dibutyl-: 3.05463e-11 kg; data quality (3,2,1,1,5)
- Zinc: 1.2052e-11 kg; data quality (5,1,1,1,5)
- hydrogen fluoride: 2.16712e-9 kg; data quality (2,2,1,1,5)
- 2-nitropropane: 4.44404e-16 kg; data quality (5,2,1,1,5)
- Cresol: 2.2414e-11 kg; data quality (4,2,1,1,5)
- sulfur dioxide: 1.77686e-6 kg; data quality (2,2,1,1,5)
- Hydrocarbons, aromatic: 8.20491e-11 kg; data quality (3,2,1,4,1)
- formaldehyde: 1.26667e-7 kg; data quality (2,2,1,1,5)
- chloroform: 1.98253e-9 kg; data quality (4,2,1,1,5)
- acrolein: 1.05035e-10 kg; data quality (3,2,1,4,1)
- BIS (2-ETHOXY ETHYL) ETHER: 4.26498e-10 kg; data quality (5,2,1,1,5)
- Dibenz(a,h)anthracene: 8.13033e-14 kg; data quality (2,2,1,1,5)
- Ethane, 1,1,1-trifluoro-, HFC-143a: 1.85089e-10 kg; data quality (4,2,1,4,1)
- Propane, 1,1,1,3,3,3-hexafluoro-, HCFC-236fa: 5.00023e-12 kg; data quality (4,2,1,4,1)
- hexane: 4.6327e-8 kg; data quality (3,2,1,1,5)
- particulates, < 2.5 um: 3.58379e-7 kg; data quality (3,2,1,1,5)
- methane, dichloro-, hcc-30: 1.76683e-8 kg; data quality (3,2,1,1,5)
- acenaphthene: 2.26615e-12 kg; data quality (3,2,1,4,1)
- Water, fresh: 0.000581252 m3; data quality (3,2,1,4,2)
- ACRYLAMIDE: 1.64769e-14 kg; data quality (4,2,1,1,5)
- 4,4'-METHYLENEDIANILINE: 2.33085e-12 kg; data quality (4,2,1,1,5)
- phthalic anhydride: 1.42895e-18 kg; data quality (2,2,1,1,5)
- 1-Methyl-2-pyrrolidinone: 9.10167e-9 kg; data quality (5,1,1,1,5)
- epichlorohydrin: 8.30899e-13 kg; data quality (3,2,1,1,5)
- lead: 2.38411e-11 kg; data quality (3,1,1,1,4)
- Indeno(1,2,3-cd)pyrene: 8.41879e-14 kg; data quality (2,2,1,1,5)
- Ethane, 1,1,1,2-tetrafluoro-, HFC-134a: 1.6305e-9 kg; data quality (4,2,1,4,1)
- antimony: 8.72646e-12 kg; data quality (3,2,1,1,5)
- benzene: 2.03931e-8 kg; data quality (3,2,1,1,5)
- Phosphorus: 5.96857e-8 kg; data quality (2,1,1,1,5)
- carbon disulfide: 7.70612e-13 kg; data quality (4,2,1,1,5)
- formic acid: 2.19473e-11 kg; data quality (3,1,1,1,5)
- methyl methacrylate: 2.8579e-16 kg; data quality (4,2,1,1,5)
- methane, monochloro-, r-40: 1.26745e-15 kg; data quality (3,2,1,1,5)
- Propene, 1,3-dichloro-: 3.54271e-14 kg; data quality (3,2,1,1,5)
- lead: 3.51245e-9 kg; data quality (3,2,1,1,5)
- para-xylene: 4.27503e-10 kg; data quality (3,2,1,1,5)
- beryllium: 2.32189e-13 kg; data quality (2,2,1,1,5)
- m-xylene: 1.09996e-9 kg; data quality (3,2,1,2,4)
- ethylene oxide: 5.8262e-16 kg; data quality (3,2,1,1,5)
- ethane, 1,2-dichloro-: 2.65558e-12 kg; data quality (3,2,1,1,5)
- 3-methylcholanthrene: 1.42618e-14 kg; data quality (2,2,1,1,5)
- Chromium, ion: 1.49765e-11 kg; data quality (2,2,1,1,5)
- toluene: 7.22666e-8 kg; data quality (4,2,1,1,5)
- Ethene, chloro-: 3.04569e-10 kg; data quality (3,2,1,1,5)

## Inventory method
Input-output

## Modelling constants
The reference unit of all processes is 1 USD2013 of the good or service. The technosphere inputs are based on the US BEA detailed input-output tables for 2007. The IO tables are combined to develop a commodity-by-commodity model based on the the industry-technology assumption (see Suh et al., 2010), which assumes all commodities produced by a given industry have the same input structure, but that multiple industries can produce the same commodity. Thus, model technosphere flows represent commodity outputs (and not industry outputs) from other processes in the model. There are no by-products included in these processes. All commodity production is based on US-conditions, despite in reality that some goods and services are produced overseas, as USEEIO v1.1 is a single-region IO model.

## Completeness
The input-output approach assures that all purchased inputs associated with the sectors making these commodities as reported in the US census for 2007 are included. The direct resources extracted including minerals, energy sources, water and land occupied are included. Emissions to air include all critieria air pollutants, greenhouse gases, and hazardous and toxic air pollutants as defined by US EPA. Releases to water include toxics, total nitrogen and total phosphorus, and water discharges. Releases to soil or groundwater include toxics and agriculutural pesticides. Some metal releases to air, water and soil are not included because they could not be speciated. Solid hazardous and non-hazardous wastes generated are not included as an elementary flows although purchases of waste services are included.

## Data treatment
Greenhouse gases are primarily from the US Greenhouse Gas Emission Inventory (USEPA 2016a). Biogenic C uptake is not included (change from version 1.0), as biogenic C emission are not included. Toxic releases to air, water and soil (except pesticides) are from the 2013 Toxic Release Inventory (USEPA 2015a). Criteria air pollutants and hazardous air pollutants are from the 2011 National Emissions Inventory (USEPA 2015b). All estimates are normalized by industry based on sector output in the data year, then converted to 2013 USD using relative sector-specific CPIs (if data year is not 2013). Energy use represent raw renewables or fossil fuel energies and is based on EIA data for 2014. See Table 1 in Yang, Ingwersen et al. 2017 and Supporting Information 1, and the v1.1 data update notes (Ingwersen et al. 2017) for all details on environmental data sources used.Land occupation associated with manufacturing buildings was estimated based on the building floorspace data provided by the U.S. Energy Information Administration in the 2010 Manufacturing Energy Consumption Survey (EIA 2013). Portions of total renewable energy (EIA 2016) based on EIA-923 reports for 2014 (EIA 2017) are included. Nitrogen and Phosphorus releases are modeled in total N and total P equivalents as estimated by the Discharge Monitoring Report Nutrient Loading tool (USEPA 2016b). Self-supplied withdrawals were assigned to industrial sectors based on water use statistics for Canadian industries by NAICS 3-digit sector scaled to US production levels based on gross domestic product by industry (BEA 2015; Statistics Canada 2010), and further disaggregated to the manufacturing sectors based on compensation of employees as provided by the 2007 IO tables (BEA 2015). Water withdrawals associated with public supply were allocated to sectors based on their use of water, sewage, and other services in USD based on the IO tables (BEA 2015). Portions of total renewable energy (EIA 2016) by type are assigned to sectors (hydro, wind, solar, or) based on EIA-923 reports for 2014 (EIA 2017).

## Data collection
2015-2016

## Sampling procedure
US federal government sources, including surveys and US EPA emissions databases are used as the primary sources. From these sources, data for US reporting establishments/facilities are aggregated by the NAICS sector as defined in the BEA detailed 2007 input-output tables. When level of sector aggregation differs, or when direct emissions are not reported but modeled, additional sources are used to make allocations and estimates.

## Review details
In regard to quality assurance and peer-review, each dataset created went through Quality Assurance as defined in a quality assurance project plans at US EPA, CSRA or ERG. The model was assembled with the IO model builder model (USEPA 2016c). Validation functions were used to check that all the model components were properly assembled and harmonized. Bayou Demeke and Santosh Ghimire provided internal peer review of the model methodology and the manuscript underwent standard EPA management review. An editor and two anonymous reviewers at the Journal of Cleaner Production reviewed the model. In regard to data quality evaluation, data quality assessment was performed at the flow and process levels according to the updated US EPA data quality assessment guidelines as defined in US EPA (2016b).

## Intended application
The primary application is for use in the US Environmentally-Extended Input-Ouput model, USEEIO, version 1.1. This model is being used by the US EPA for supporting tools that prioritize goods and services based on potential environmental impacts, resource use or emissions for large regions, including the US and US states, and as a strealined tool for organizations as a starting point to consider sustainable materials management. Model results are designed to provide meso/macro-level decision support.

## Project
USEEIO v1.1 was developed by the US EPA with CSRA and ERG with Wesley W. Ingwersen and David E. Meyer as research leads. Yi Yang was the technical lead on the work for CSRA (contract EP-C-15-012); Troy Hawkins was lead for ERG (contract EP-C-12-021).

## Sources
- USEPA 2015a
- Ingwersen et al. 2017
- EIA 2013
- USEPA 2016a
- Maupin et al. 2014
- Blackhurst et al. 2010
- EIA 2017
- Lovelace 2009
- BLM 2008
- USEPA 2016b
- USDA 2009b
- Nickerson et al. 2011
- Kim et el. 2013
- USDA 2006
- USEPA 2016c
- Goebes et al. 2003
- Ingwersen et al. DRAFT
- USGS 2015
- USEPA 2015b
- USDA 2014
- EIA 2015
- EIA 2016
- BEA 2015
- Edelen and Ingwersen 2017
- Yienger et al. 1995
- USGS 2016
- USDA 2016
- Statistics Canada 2010
- Macknick et al. 2011
- USDA 2009a
- Torcellini et al. 2003
