# Religious organizations

Dataset: openLCA process, unit process
Category: 8131: Religious Organizations
Geography: United States
Time period: 2017-01-01 to 2017-12-31
Data quality: US EPA - Process Pedigree Matrix (1;1)
Exchange data quality scheme: US EPA - Flow Pedigree Matrix
Generated by: US EPA with CSRA and ERG
Owner: US EPA
Published in: Yang, Ingwersen et al. 2017
restrictionsDescription: This model shold be appropriately cited (see Yang, Ingwersen et al. 2017 source or Publication field) when used. Any changes or derivations of this model by the user should be documented. The model itself and any results from use of this model shall not be construed to consitute US EPA opinion or policy.
copyright: false

## General comment
BEA Code & Name is '813100:Religious organizations'. Description of the primary industry producing this good or service, adapted from the Census Bureau NAICS 2007 descriptions: This industry comprises (1) establishments primarily engaged in operating religious organizations, such as churches, religious temples, and monasteries, and/or (2) establishments primarily engaged in administering an organized religion or promoting religious activities.

## Technology
The process describes the average US production of this good or service within this NAICS-based grouping defined in the BEA 2007 detailed input-output tables (BEA 2015). Distribution, wholesale and retailing of this good or service, use, and final disposal are not included. Creation of a product system with this process will enable modeling of all upstream (supply-chain) activities.

## Geography
Data represent the 50 US states

## Time period
2017 was the year in which this version of USEEIO was released and is the target date for the model

## Reference product
- Religious organizations: 1 USD

## Inputs from technosphere
All rows: data quality (1,3,1,1,1)
- Clothing; at manufacturer: 0.000711753 USD
- Food and beverage stores: 3.88229e-5 USD
- Greenhouse crops, mushrooms, nurseries, and flowers; at farm: 0.000103528 USD
- Pesticides; at manufacturer: 6.47048e-5 USD
- Lumber and treated lumber; at manufacturer: 0.000103528 USD
- Bread and other baked goods; at manufacturer: 0.000608225 USD
- Seasonings and dressings; at manufacturer: 1.2941e-5 USD
- Other real estate: 0.262106 USD
- Electronic equipment repair and maintenance: 6.47048e-5 USD
- Waste management and remediation: 0.00054352 USD
- Travel arrangement and reservation: 0.00270466 USD
- Drinking water and wastewater treatment; at consumer: 0.00112586 USD
- Scientific research and development: 0.000297642 USD
- Advertising and public relations: 0.00380464 USD
- Accounting, tax preparation, bookkeeping, and payroll: 0.00239408 USD
- Environmental and other technical consulting services: 0.00529285 USD
- Dry-cleaning and laundry: 0.000892926 USD
- Fruit and vegetable preservation; at manufacturer: 0.000569402 USD
- Asphalt shingles; at manufacturer: 7.76458e-5 USD
- Nonresidential building repair and maintanence: 0.0224137 USD
- Carpets and rugs; at manufacturer: 2.58819e-5 USD
- Motor vehicle steering, suspension components (except spring), and brake systems; at manufacturer: 1.2941e-5 USD
- Plastic pipe, fittings, and sausage casings; at manufacturer: 0.000168233 USD
- Investment advice, portfolio management, and other financial advising services: 0.10477 USD
- Dry, condensed, and evaporated dairy; at manufacturer: 3.88229e-5 USD
- Civic, social, professional, and similar organizations: 0.000698812 USD
- Gasoline, fuels, and by-products of petroleum refining; at manufacturer: 0.00562932 USD
- Communications equipment; at manufacturer: 5.17639e-5 USD
- Soap and cleaning compounds; at manufacturer: 3.88229e-5 USD
- Rubber tires; at manufacturer: 0.000336465 USD
- Coffee and tea; at manufacturer: 0.000181173 USD
- Electricity; at consumer: 0.000776458 USD
- Satellite, telecommunications resellers, and all other telecommunications: 0.000724694 USD
- Other rubber products; at manufacturer: 0.00106116 USD
- Other vehicle parts; at manufacturer: 7.76458e-5 USD
- Wireless telecommunications: 0.000207055 USD
- Scenic and sightseeing transportation and support activities for transportation: 6.47048e-5 USD
- Movies and film: 0.000349406 USD
- Directory, mailing list, and other publishers; at publisher: 0.000634107 USD
- Water transport (boats, ships, ferries): 2.58819e-5 USD
- Data processing and hosting: 0.00287289 USD
- Truck transport: 0.000711753 USD
- Gaskets, seals, musical instruments, fasteners, brooms, brushes, mop and other misc. goods; at manufacturer: 0.000569402 USD
- Vehicle engines and engine parts; at manufacturer: 2.58819e-5 USD
- Natural gas; at consumer: 0.00222585 USD
- Vehicles and parts sales: 1.2941e-5 USD
- Hotels and campgrounds: 3.88229e-5 USD
- Books; at publisher: 0.00175997 USD
- Performances: 0.00012941 USD
- Chemicals (except basic chemicals, agrichemicals, polymers, paints, pharmaceuticals,soaps, cleaning compounds); at manufacturer: 7.76458e-5 USD
- Flavored drink concentrates; at manufacturer: 0.000207055 USD
- Vehicle electrical and electronic equipment; at manufacturer: 2.58819e-5 USD
- Computer terminals and other computer peripheral equipment; at manufacturer: 0.000763517 USD
- Plywood and veneer; at manufacturer: 0.000103528 USD
- Paper bags and coated paper; at manufacturer: 0.000647048 USD
- Watches, clocks, and other measuring and controlling devices; at manufacturer: 1.2941e-5 USD
- Insurance carriers: 0.000362347 USD
- Welding and Soldering Equipment, Scales and Balances, and other general purpose machinery; at manufacturer: 1.2941e-5 USD
- Plastic bags, films, and sheets; at manufacturer: 6.47048e-5 USD
- Computer systems design: 0.00134586 USD
- Asphalt pavement; at manufacturer: 0.000116469 USD
- Fresh vegetables, melons, and potatoes; at farm: 2.58819e-5 USD
- Postal service: 0.00786811 USD
- Employment services: 0.000245878 USD
- Internet publishing and broadcasting: 0.000685871 USD
- Lessors of nonfinancial intangible assets: 2.58819e-5 USD
- Cardboard containers; at manufacturer: 0.0010741 USD
- Promoters and agents: 0.00178585 USD
- Cutlery and handtools; at manufacturer: 0.000142351 USD
- Nondepository credit intermediation and related activities: 0.0845951 USD
- Veneer, plywood, and engineered wood; at manufacturer: 0.000452934 USD
- Frozen food; at manufacturer: 0.000194114 USD
- Other plastic products; at manufacturer: 0.000737635 USD
- Wooden windows, door, and flooring; at manufacturer: 0.000245878 USD
- Other retail: 0.00102234 USD
- General merchandise stores: 0.000142351 USD
- Independent artists, writers, and performers: 0.00027176 USD
- Magazines and journals; at publisher: 0.000297642 USD
- Business support: 0.00210938 USD
- Cookies, crackers, pastas, and tortillas; at manufacturer: 6.47048e-5 USD
- Securities and commodities brokerage and exchanges: 0.0915832 USD
- Wireless communications; at manufacturer: 0.000349406 USD
- Stationery; at manufacturer: 0.000181173 USD
- Wholesale trade: 0.00285995 USD
- Adhesives; at manufacturer: 1.2941e-5 USD
- Paper; at manufacturer: 0.000828222 USD
- All other food and drinking places: 0.000375288 USD
- Other textiles; at manufacturer: 0.000219996 USD
- Used and secondhand goods: 0.000116469 USD
- Books, newspapers, magazines, and other print media; at manufacturer: 0.00108704 USD
- Cheese; at manufacturer: 5.17639e-5 USD
- Specialized design: 0.00067293 USD
- Heating equipment other than warm air furnaces; at manufacturer: 1.2941e-5 USD
- Vehicle rental and leasing: 0.000310583 USD
- Ice cream and frozen desserts; at manufacturer: 9.05867e-5 USD
- Commercial equipment rental: 2.58819e-5 USD
- Metal pipe fittings, ball and roller bearings, industrial patterns, metal bath fixtures, other misc. fabricated metals; at manufacturer: 0.000258819 USD
- Legal services: 0.0075834 USD
- Other petroleum and coal products; at manufacturer: 0.000168233 USD
- Household goods repair: 0.000245878 USD
- Packaged meat (except poultry); at manufacturer: 0.00054352 USD
- Soft drinks, bottled water, and ice; at manufacturer: 1.2941e-5 USD
- Leather; at manufacturer: 1.2941e-5 USD
- Management consulting: 0.0011388 USD
- Pipeline transport: 3.88229e-5 USD
- Commercial machinery repair: 0.000375288 USD
- Telecommunications: 0.00630225 USD
- Flours and malts; at manufacturer: 3.88229e-5 USD
- External hard drives, CDs, other storage media; at manufacturer: 0.000349406 USD
- Fresh fruits and tree nuts; at farm: 1.2941e-5 USD
- Glass and glass products; at manufacturer: 2.58819e-5 USD
- News syndicates, libraries, archives, Internet publishing and all other information services: 0.000918808 USD
- Monetary authorities and depository credit intermediation: 0.00266584 USD
- Marketing research and all other miscellaneous professional, scientific, and technical services: 0.0176256 USD
- Software: 0.000232937 USD
- Transmission and power train parts; at manufacturer: 1.2941e-5 USD
- Sound recording: 0.00477522 USD
- Wild-caught fish and game; at place of capture: 0.000232937 USD
- Clay and ceramic products; at manufacturer: 1.2941e-5 USD
- Wineries and wine; at manufacturer: 7.76458e-5 USD
- Other support services: 0.000828222 USD
- Investigation and security: 0.000931749 USD
- Buildings and dwellings services: 0.0130445 USD
- Cardboard; at manufacturer: 0.000556461 USD
- State and local government enterprises: 0.000142351 USD
- Office supplies (not paper); at manufacturer: 5.17639e-5 USD
- Light bulbs; at manufacturer: 1.2941e-5 USD
- Full-service restaurants: 0.000867045 USD
- Couriers and messengers: 0.00254937 USD
- Architectural, engineering, and related services: 0.00419287 USD
- Air transport: 2.58819e-5 USD
- Other educational services: 0.00437405 USD
- Limited-service restaurants: 0.00121645 USD
- Rail transport: 6.47048e-5 USD
- Fluid milk and butter; at manufacturer: 0.00102234 USD
- Air conditioning, refrigeration, and warm air heating equipment; at manufacturer: 3.88229e-5 USD
- Insurance agencies and brokerages: 5.17639e-5 USD
- Other computer related services, including facilities management: 0.00182468 USD
- Ambulances: 0.000168233 USD

## Inputs from nature
- Water, fresh: 0.000382854, 0.000662567 m3 (2 entries, compartments not in this file); data quality (1,2,1,4,2)
- Occupation, urban, discontinuously built: 0.0197948 m2*a; data quality (4,2,1,1,1)

## Emissions to nature
- particulates, < 2.5 um: 3.24632e-7 kg; data quality (3,2,1,4,1)
- Chromium, ion: 1.10907e-11 kg; data quality (3,2,1,4,2)
- acrolein: 2.91457e-9 kg; data quality (3,2,1,4,1)
- selenium: 1.7558e-14 kg; data quality (2,2,1,1,5)
- beryllium: 1.32599e-14 kg; data quality (2,2,1,1,5)
- butadiene: 2.29316e-8 kg; data quality (3,2,1,4,1)
- 2,2,4-trimethylpentane: 7.90135e-8 kg; data quality (3,2,1,4,1)
- Nitrogen: 4.79532e-9 kg; data quality (2,2,1,1,5)
- Benzo(g,h,i)perylene: 1.67879e-11 kg; data quality (3,2,1,4,1)
- hydrogen chloride: 1.81773e-10 kg; data quality (2,2,1,1,5)
- Cobalt: 1.38953e-13 kg; data quality (3,2,1,1,5)
- Methane: 1.11444e-6 kg; data quality (4,2,1,4,1)
- acetaldehyde: 3.6203e-8 kg; data quality (3,2,1,4,1)
- ammonia: 1.52036e-8 kg; data quality (3,2,1,3,2)
- Ethane, 1,1,1-trifluoro-, HFC-143a: 3.44944e-9 kg; data quality (4,2,1,4,1)
- benz[a]anthracene: 6.25529e-12 kg; data quality (3,2,1,4,1)
- toluene: 2.1551e-7 kg; data quality (3,2,1,4,1)
- Water, fresh: 0.000885173 m3; data quality (1,2,1,4,2)
- propanal: 7.89754e-9 kg; data quality (3,2,1,4,1)
- Chrysene: 6.10871e-12 kg; data quality (3,2,1,4,1)
- m-xylene: 7.45116e-9 kg; data quality (3,2,1,4,1)
- benzene, ethyl-: 5.55423e-8 kg; data quality (3,2,1,4,1)
- fluoranthene: 5.71732e-11 kg; data quality (3,2,1,4,1)
- Dibenz(a,h)anthracene: 4.11705e-14 kg; data quality (3,2,1,4,1)
- nitrogen oxides: 4.26727e-6 kg; data quality (3,2,1,1,1)
- acenaphthylene: 2.13991e-10 kg; data quality (3,2,1,4,1)
- formaldehyde: 7.74967e-8 kg; data quality (3,2,1,4,1)
- carbon monoxide: 8.41366e-5 kg; data quality (3,2,1,1,1)
- Carbon dioxide: 0.0122 kg; data quality (4,2,1,4,1)
- Xylene: 1.81546e-7 kg; data quality (3,2,1,4,1)
- particulates, < 10 um: 1.70248e-8 kg; data quality (3,2,1,4,1)
- o-Xylene: 2.67495e-9 kg; data quality (3,2,1,4,1)
- mercury: 8.44384e-13 kg; data quality (2,2,1,2,4)
- VOC, volatile organic compounds: 3.75456e-6 kg; data quality (3,2,1,1,1)
- hexane: 5.16659e-8 kg; data quality (3,2,1,4,1)
- pyrene: 7.16599e-11 kg; data quality (3,2,1,4,1)
- para-xylene: 1.39452e-10 kg; data quality (3,2,1,4,1)
- phenanthrene: 1.86169e-10 kg; data quality (3,2,1,4,1)
- manganese: 6.69759e-12 kg; data quality (3,2,1,5,1)
- fluorene: 1.02424e-10 kg; data quality (3,2,1,4,1)
- naphthalene: 4.82476e-9 kg; data quality (3,2,1,4,1)
- anthracene: 4.26207e-11 kg; data quality (3,2,1,4,1)
- acenaphthene: 5.54334e-11 kg; data quality (3,2,1,4,1)
- Benzo(b)fluoranthene: 6.49532e-12 kg; data quality (3,2,1,4,1)
- Methane, difluoro-, HFC-32: 4.695e-9 kg; data quality (4,2,1,4,1)
- arsenic: 1.19607e-11 kg; data quality (3,2,1,5,1)
- benzo(a)pyrene: 5.89693e-12 kg; data quality (3,2,1,4,1)
- 2-methylnaphthalene: 2.21428e-14 kg; data quality (2,2,1,1,5)
- Benzo(k)fluoranthene: 6.23376e-12 kg; data quality (3,2,1,4,1)
- Phosphorus: 5.87025e-10 kg; data quality (2,1,1,1,5)
- nickel: 2.74635e-11 kg; data quality (3,2,1,4,2)
- Dinitrogen monoxide: 3.23423e-8 kg; data quality (4,2,1,4,1)
- cadmium: 2.02918e-12 kg; data quality (3,2,1,1,5)
- Hydrocarbons, aromatic: 1.55771e-9 kg; data quality (3,2,1,4,1)
- benzene: 1.41438e-7 kg; data quality (3,2,1,4,1)
- Chromium VI: 2.74125e-12 kg; data quality (3,2,1,5,1)
- Ethane, pentafluoro-, HFC-125: 8.06211e-9 kg; data quality (4,2,1,4,1)
- sulfur dioxide: 5.15384e-8 kg; data quality (2,2,1,2,4)
- Ethane, 1,1,1,2-tetrafluoro-, HFC-134a: 3.03871e-8 kg; data quality (4,2,1,4,1)
- Indeno(1,2,3-cd)pyrene: 5.1433e-12 kg; data quality (3,2,1,4,1)
- lead: 5.59503e-12 kg; data quality (3,2,1,1,5)
- Propane, 1,1,1,3,3,3-hexafluoro-, HCFC-236fa: 9.31876e-11 kg; data quality (4,2,1,4,1)
- styrene: 2.16837e-9 kg; data quality (3,2,1,4,1)

## Inventory method
Input-output

## Modelling constants
The reference unit of all processes is 1 USD2013 of the good or service. The technosphere inputs are based on the US BEA detailed input-output tables for 2007. The IO tables are combined to develop a commodity-by-commodity model based on the the industry-technology assumption (see Suh et al., 2010), which assumes all commodities produced by a given industry have the same input structure, but that multiple industries can produce the same commodity. Thus, model technosphere flows represent commodity outputs (and not industry outputs) from other processes in the model. There are no by-products included in these processes. All commodity production is based on US-conditions, despite in reality that some goods and services are produced overseas, as USEEIO v1.1 is a single-region IO model.

## Completeness
The input-output approach assures that all purchased inputs associated with the sectors making these commodities as reported in the US census for 2007 are included. The direct resources extracted including minerals, energy sources, water and land occupied are included. Emissions to air include all critieria air pollutants, greenhouse gases, and hazardous and toxic air pollutants as defined by US EPA. Releases to water include toxics, total nitrogen and total phosphorus, and water discharges. Releases to soil or groundwater include toxics and agriculutural pesticides. Some metal releases to air, water and soil are not included because they could not be speciated. Solid hazardous and non-hazardous wastes generated are not included as an elementary flows although purchases of waste services are included.

## Data treatment
Greenhouse gases are primarily from the US Greenhouse Gas Emission Inventory (USEPA 2016a). Biogenic C uptake is not included (change from version 1.0), as biogenic C emission are not included. Toxic releases to air, water and soil (except pesticides) are from the 2013 Toxic Release Inventory (USEPA 2015a). Criteria air pollutants and hazardous air pollutants are from the 2011 National Emissions Inventory (USEPA 2015b). All estimates are normalized by industry based on sector output in the data year, then converted to 2013 USD using relative sector-specific CPIs (if data year is not 2013). Energy use represent raw renewables or fossil fuel energies and is based on EIA data for 2014. See Table 1 in Yang, Ingwersen et al. 2017 and Supporting Information 1, and the v1.1 data update notes (Ingwersen et al. 2017) for all details on environmental data sources used.Land occupation for commercial buildings was estimated based on the building floorspace data provided by the U.S. Energy Information Administration 2012 Commercial Building Energy Consumption Survey (CBECS) (EIA 2015). Total commercial public supply water use is reported by USGS (Maupin et al. 2014). Water use is allocated across commercial sectors based on their use of water, sewage, and other services in USD based on the 2007 Benchmark Use Table before redefinitions (BEA 2015).

## Data collection
2015-2016

## Sampling procedure
US federal government sources, including surveys and US EPA emissions databases are used as the primary sources. From these sources, data for US reporting establishments/facilities are aggregated by the NAICS sector as defined in the BEA detailed 2007 input-output tables. When level of sector aggregation differs, or when direct emissions are not reported but modeled, additional sources are used to make allocations and estimates.

## Review details
In regard to quality assurance and peer-review, each dataset created went through Quality Assurance as defined in a quality assurance project plans at US EPA, CSRA or ERG. The model was assembled with the IO model builder model (USEPA 2016c). Validation functions were used to check that all the model components were properly assembled and harmonized. Bayou Demeke and Santosh Ghimire provided internal peer review of the model methodology and the manuscript underwent standard EPA management review. An editor and two anonymous reviewers at the Journal of Cleaner Production reviewed the model. In regard to data quality evaluation, data quality assessment was performed at the flow and process levels according to the updated US EPA data quality assessment guidelines as defined in US EPA (2016b).

## Intended application
The primary application is for use in the US Environmentally-Extended Input-Ouput model, USEEIO, version 1.1. This model is being used by the US EPA for supporting tools that prioritize goods and services based on potential environmental impacts, resource use or emissions for large regions, including the US and US states, and as a strealined tool for organizations as a starting point to consider sustainable materials management. Model results are designed to provide meso/macro-level decision support.

## Project
USEEIO v1.1 was developed by the US EPA with CSRA and ERG with Wesley W. Ingwersen and David E. Meyer as research leads. Yi Yang was the technical lead on the work for CSRA (contract EP-C-15-012); Troy Hawkins was lead for ERG (contract EP-C-12-021).

## Sources
- USDA 2014
- BEA 2015
- Torcellini et al. 2003
- Ingwersen et al. 2017
- USDA 2016
- USEPA 2015a
- Maupin et al. 2014
- BLM 2008
- USDA 2006
- EIA 2016
- USEPA 2016c
- USGS 2016
- EIA 2017
- EIA 2015
- Goebes et al. 2003
- USEPA 2016b
- Yienger et al. 1995
- USDA 2009a
- EIA 2013
- Ingwersen et al. DRAFT
- Blackhurst et al. 2010
- Lovelace 2009
- Edelen and Ingwersen 2017
- USDA 2009b
- USGS 2015
- Statistics Canada 2010
- Macknick et al. 2011
- Kim et el. 2013
- USEPA 2015b
- USEPA 2016a
- Nickerson et al. 2011
