# Truck transport

Dataset: openLCA process, unit process
Category: 48-49: Transportation and Warehousing
Geography: United States
Time period: 2017-01-01 to 2017-12-31
Data quality: US EPA - Process Pedigree Matrix (1;1)
Exchange data quality scheme: US EPA - Flow Pedigree Matrix
Generated by: US EPA with CSRA and ERG
Owner: US EPA
Published in: Yang, Ingwersen et al. 2017
restrictionsDescription: This model shold be appropriately cited (see Yang, Ingwersen et al. 2017 source or Publication field) when used. Any changes or derivations of this model by the user should be documented. The model itself and any results from use of this model shall not be construed to consitute US EPA opinion or policy.
copyright: false

## General comment
BEA Code & Name is '484000:Truck transportation'. Description of the primary industry producing this good or service, adapted from the Census Bureau NAICS 2007 descriptions: Industries in the Truck Transportation subsector provide over-the-road transportation of cargo using motor vehicles, such as trucks and tractor trailers. The subsector is subdivided into general freight trucking and specialized freight trucking. This distinction reflects differences in equipment used, type of load carried, scheduling, terminal, and other networking services. General freight transportation establishments handle a wide variety of general commodities, generally palletized, and transported in a container or van trailer. Specialized freight transportation is the transportation of cargo that, because of size, weight, shape, or other inherent characteristics require specialized equipment for transportation. Each of these industry groups is further subdivided based on distance traveled. Local trucking establishments primarily carry goods within a single metropolitan area and its adjacent nonurban areas. Long distance trucking establishments carry goods between metropolitan areas. The Specialized Freight Trucking industry group includes a separate industry for Used Household and Office Goods Moving. The household and office goods movers are separated because of the substantial network of establishments that has developed to deal with local and long-distance moving and the associated storage. In this area, the same establishment provides both local and long-distance services, while other specialized freight establishments generally limit their services to either local or long-distance hauling.

## Technology
The process describes the average US production of this good or service within this NAICS-based grouping defined in the BEA 2007 detailed input-output tables (BEA 2015). Distribution, wholesale and retailing of this good or service, use, and final disposal are not included. Creation of a product system with this process will enable modeling of all upstream (supply-chain) activities.

## Geography
Data represent the 50 US states

## Time period
2017 was the year in which this version of USEEIO was released and is the target date for the model

## Reference product
- Truck transport: 1 USD

## Inputs from technosphere
All rows: data quality (1,3,1,1,1)
- Employment services: 0.00677556 USD
- Screws, nuts, and bolts; at manufacturer: 0.000374 USD
- Soap and cleaning compounds; at manufacturer: 7.16488e-6 USD
- Fruit and vegetable preservation; at manufacturer: 1.1065e-9 USD
- Telecommunications: 0.00289881 USD
- Animal farms and aquaculture ponds (except cattle and poultry): 6.19638e-8 USD
- Other plastic products; at manufacturer: 0.00221197 USD
- Other retail: 0.00596098 USD
- Used and secondhand goods: -0.000784095 USD
- Polystyrene foam products; at manufacturer: 3.80141e-6 USD
- Dry-cleaning and laundry: 0.000268799 USD
- External hard drives, CDs, other storage media; at manufacturer: 1.1065e-9 USD
- Speed changers, industrial high-speed drives, and gears; at manufacturer: 9.95846e-9 USD
- other miscellaneous electrical equipment and components; at manufacturer: 5.53248e-9 USD
- Performances: 1.1065e-9 USD
- Springs and wires; at manufacturer: 0.000164901 USD
- Air and gas compressors; at manufacturer: 7.41352e-8 USD
- Office supplies (not paper); at manufacturer: 1.88104e-8 USD
- Vehicle rental and leasing: 0.0140441 USD
- Air transport: 0.00562535 USD
- Electricity; at consumer: 0.00112162 USD
- Air purification and ventilation equipment; at manufacturer: 1.3278e-8 USD
- Wireless communications; at manufacturer: 0.000214555 USD
- Books, newspapers, magazines, and other print media; at manufacturer: 0.00117017 USD
- Primary iron, steel, and ferroalloy products; at manufacturer: 4.42598e-8 USD
- Insurance agencies and brokerages: 2.16464e-5 USD
- Other support activities for mining: 4.83539e-7 USD
- Cutting and machine tool accessory, rolling mill, and other metalworking machines; at manufacturer: 1.43158e-5 USD
- Facilities support: 0.000791851 USD
- Computer storage device readers; at manufacturer: 1.1065e-9 USD
- Hotels and campgrounds: 1.13113e-5 USD
- General merchandise stores: 0.000686626 USD
- Water transport (boats, ships, ferries): 0.000314819 USD
- Movies and film: 3.58587e-6 USD
- Packaged meat (except poultry); at manufacturer: 2.21299e-9 USD
- Data processing and hosting: 7.17136e-5 USD
- Storage batteries; at manufacturer: 7.87576e-5 USD
- Other textiles; at manufacturer: 4.6855e-5 USD
- Gasoline, fuels, and by-products of petroleum refining; at manufacturer: 0.153459 USD
- Architectural, engineering, and related services: 0.00075832 USD
- Cutlery and handtools; at manufacturer: 0.00267124 USD
- Colleges, universities, junior colleges, and professional schools: 8.85197e-9 USD
- News syndicates, libraries, archives, Internet publishing and all other information services: 2.50314e-5 USD
- Insurance carriers: 0.032175 USD
- Hydraulic pumps, motors, cylinders and actuators; at manufacturer: 1.1065e-9 USD
- State and local government enterprises: 0.000150209 USD
- Marketing research and all other miscellaneous professional, scientific, and technical services: 0.00197809 USD
- Other computer related services, including facilities management: 0.000229519 USD
- Communications equipment; at manufacturer: 3.21832e-5 USD
- Truck transport: 0.0136806 USD
- Ice cream and frozen desserts; at manufacturer: 1.1065e-9 USD
- Other support services: 0.00142734 USD
- Buildings and dwellings services: 0.00107877 USD
- Bread and other baked goods; at manufacturer: 3.31949e-9 USD
- Company and enterprise management: 0.0156496 USD
- Compressed Gases; at manufacturer: 1.45139e-5 USD
- Wireless telecommunications: 0.00149597 USD
- Motor vehicle steering, suspension components (except spring), and brake systems; at manufacturer: 0.00366901 USD
- Railroad rolling stock; at manufacturer: 1.83678e-7 USD
- Pet care, photofinishing, parking and other sundry services: 1.07277e-5 USD
- Office administration: 0.00184552 USD
- Investigation and security: 0.00088452 USD
- Other real estate: 0.0158001 USD
- Natural gas; at consumer: 0.0013384 USD
- Travel arrangement and reservation: 1.43645e-5 USD
- All other converted paper products; at manufacturer: 1.1065e-8 USD
- Aircraft; at manufacturer: 1.20842e-6 USD
- Computer terminals and other computer peripheral equipment; at manufacturer: 0.00045065 USD
- Paper; at manufacturer: 3.78569e-6 USD
- Advertising and public relations: 0.00297149 USD
- Noncomparable imports: 0.00231515 USD
- Rubber tires; at manufacturer: 0.00339061 USD
- Passenger ground transport: 3.58034e-6 USD
- Seafood; at manufacturer: 1.1065e-9 USD
- Full-service restaurants: 0.000590232 USD
- Newspapers; at publisher: 3.57591e-6 USD
- Ships and ship repair; at manufacturer: 2.43429e-8 USD
- Promoters and agents: 5.37389e-5 USD
- Light bulbs; at manufacturer: 9.73643e-9 USD
- Waste management and remediation: 0.00143869 USD
- Drinking water and wastewater treatment; at consumer: 0.000125288 USD
- Glass and glass products; at manufacturer: 2.17942e-5 USD
- Legal services: 0.000378297 USD
- Other transportation equipment; at manufacturer: 2.50663e-5 USD
- Plastic bags, films, and sheets; at manufacturer: 5.56227e-5 USD
- Postal service: 0.0350568 USD
- Paints and coatings; at manufacturer: 0.000221937 USD
- Ball and roller bearings; at manufacturer: 4.42598e-9 USD
- Commercial equipment rental: 0.0110811 USD
- Chemicals (except basic chemicals, agrichemicals, polymers, paints, pharmaceuticals,soaps, cleaning compounds); at manufacturer: 0.000404223 USD
- Business support: 0.00132102 USD
- Communication and energy wire and cable; at manufacturer: 4.29401e-5 USD
- Securities and commodities brokerage and exchanges: 0.00350917 USD
- Other engine equipment; at manufacturer: 0.000607905 USD
- Wholesale trade: 0.0295979 USD
- Vehicles and parts sales: 0.00431009 USD
- Stationery; at manufacturer: 1.1065e-9 USD
- Fluid meters and counting devices; at manufacturer: 1.78904e-5 USD
- Transmission and power train parts; at manufacturer: 0.000283489 USD
- Nondepository credit intermediation and related activities: 0.00109508 USD
- Mattresses, blinds and shades; at manufacturer: 1.21715e-8 USD
- Household goods repair: 0.000437159 USD
- Other basic organic chemicals; at manufacturer: 0.000211323 USD
- Audio and video equipment; at manufacturer: 3.59804e-6 USD
- Synthetic dyes and pigments; at manufacturer: 3.65144e-8 USD
- Sports: 1.1065e-9 USD
- Cheese; at manufacturer: 1.1065e-9 USD
- Satellite, telecommunications resellers, and all other telecommunications: 0.000393613 USD
- Motors and generators; at manufacturer: 0.00039729 USD
- Consumer goods and general rental centers: 0.0051079 USD
- Accounting, tax preparation, bookkeeping, and payroll: 0.00177168 USD
- Couriers and messengers: 0.0506385 USD
- Monetary authorities and depository credit intermediation: 0.0128355 USD
- Scenic and sightseeing transportation and support activities for transportation: 0.0402105 USD
- Veneer, plywood, and engineered wood; at manufacturer: 0.000433363 USD
- Coal; at mine: 1.1065e-9 USD
- Electronic equipment repair and maintenance: 0.000623568 USD
- Cardboard containers; at manufacturer: 0.000410839 USD
- Urethane and other foam products; at manufacturer: 3.7286e-6 USD
- Investment advice, portfolio management, and other financial advising services: 0.00056518 USD
- Fresh vegetables, melons, and potatoes; at farm: 1.1065e-9 USD
- Books; at publisher: 3.58565e-6 USD
- Air conditioning, refrigeration, and warm air heating equipment; at manufacturer: 6.07905e-5 USD
- Scientific research and development: 4.42598e-9 USD
- Valve and fittings (except for plumbing); at manufacturer: 0.000765858 USD
- Computer systems design: 0.000250838 USD
- Rail transport: 0.00932984 USD
- Pickup trucks, vans, and SUVs; at manufacturer: 5.53248e-9 USD
- Metal pipe fittings, ball and roller bearings, industrial patterns, metal bath fixtures, other misc. fabricated metals; at manufacturer: 0.00120182 USD
- Light gauge metal cans, boxes, and containers; at manufacturer: 3.71554e-6 USD
- Coffee and tea; at manufacturer: 1.1065e-9 USD
- Warehousing: 0.0144432 USD
- Vehicle seating and interior trim (upholstery); at manufacturer: 1.79415e-5 USD
- Independent artists, writers, and performers: 0.000182436 USD
- Vehicle electrical and electronic equipment; at manufacturer: 0.0101273 USD
- Specialized design: 0.000250563 USD
- Relay and industrial controls; at manufacturer: 3.94552e-5 USD
- Lessors of nonfinancial intangible assets: 0.00545339 USD
- Vehicle engines and engine parts; at manufacturer: 0.00373775 USD
- Vending, commercial laundry, and other commercial and service industry machinery; at manufacturer: 1.07386e-5 USD
- Wild-caught fish and game; at place of capture: 1.1065e-9 USD
- Other nonmetallic mineral products; at manufacturer: 0.000110853 USD
- Watches, clocks, and other measuring and controlling devices; at manufacturer: 3.31949e-9 USD
- Electronic capacitors, resistors, coils, transformers, connectors and other components (except semiconductors and printed circuit assemblies); at manufacturer: 1.07288e-5 USD
- Internet publishing and broadcasting: 2.21299e-9 USD
- Management consulting: 0.00105386 USD
- Material handling equipment; at manufacturer: 6.11343e-5 USD
- Food and beverage stores: 0.000203828 USD
- Pipeline transport: 0.000958826 USD
- Golf courses, marinas, ski resorts, fitness and other rec centers and industries: 3.58255e-6 USD
- Seasonings and dressings; at manufacturer: 2.21299e-9 USD
- Petrochemicals; at manufacturer: 1.1065e-9 USD
- Gaskets, seals, musical instruments, fasteners, brooms, brushes, mop and other misc. goods; at manufacturer: 2.59785e-5 USD
- All other food and drinking places: 0.000444493 USD
- Metal coatings, engravings, and heat treatments; at manufacturer: 0.00217082 USD
- Cast iron and steel; at manufacturer: 1.67081e-7 USD
- Paper bags and coated paper; at manufacturer: 6.57034e-5 USD
- Nonresidential building repair and maintanence: 0.000763809 USD
- Machine shops; at manufacturer: 0.0011378 USD
- Nonferrous metal casts; at manufacturer: 1.1065e-9 USD
- Carbon and graphite products; at manufacturer: 7.74547e-9 USD
- Civic, social, professional, and similar organizations: 0.000890843 USD
- Pumps and pumping equipment; at manufacturer: 2.10234e-8 USD
- Vehicle repair: 0.00190954 USD
- Software: 7.20382e-6 USD
- Other petroleum and coal products; at manufacturer: 0.00177374 USD
- Magazines and journals; at publisher: 0.000118262 USD
- Office machinery; at manufacturer: 1.45836e-6 USD
- Environmental and other technical consulting services: 0.000247326 USD
- Breweries and beer; at manufacturer: 4.42598e-9 USD
- Industrial process variable instruments; at manufacturer: 1.1065e-9 USD
- Other basic inorganic chemicals; at manufacturer: 5.36918e-5 USD
- Other aircraft parts; at manufacturer: 1.66251e-6 USD
- Aircraft engines and parts; at manufacturer: 9.73643e-9 USD
- Semiconductors; at manufacturer: 1.1065e-9 USD
- Welding and Soldering Equipment, Scales and Balances, and other general purpose machinery; at manufacturer: 1.43059e-5 USD
- Limited-service restaurants: 0.000636731 USD
- Commercial machinery repair: 3.26326e-5 USD
- Directory, mailing list, and other publishers; at publisher: 2.14729e-5 USD
- Cardboard; at manufacturer: 0.000366164 USD
- Metal hinges, keys, lock, and other hardware; at manufacturer: 0.000139647 USD
- Other vehicle parts; at manufacturer: 0.00796034 USD

## Inputs from nature
- Occupation, traffic area, road network: 0.138074 m2*a; data quality (2,3,1,1,1)
- Water, fresh: 7.78334e-5, 4.49748e-5 m3 (2 entries, compartments not in this file); data quality (1,2,1,4,2)
- Energy, solar: 0.000130662 MJ; data quality (3,1,1,1,1)
- Occupation, urban, discontinuously built: 0.000162704 m2*a; data quality (4,2,1,1,1)

## Emissions to nature
- diethanolamine: 1.3976e-10 kg; data quality (3,2,1,1,5)
- Carbon dioxide: 1.26178 kg; data quality (4,2,1,4,1)
- formaldehyde: 7.14526e-5 kg; data quality (3,2,1,1,1)
- benzene: 3.90972e-5 kg; data quality (3,2,1,1,1)
- Phthalate, dimethyl-: 1.10662e-15 kg; data quality (4,2,1,1,3)
- Ethane, 1,1,1,2-tetrafluoro-, HFC-134a: 1.3521e-5 kg; data quality (4,2,1,4,1)
- sulfur dioxide: 2.12043e-5 kg; data quality (3,2,1,4,1)
- carbon monoxide: 0.0165709 kg; data quality (3,2,1,1,1)
- Phthalate, dibutyl-: 9.23574e-13 kg; data quality (4,2,1,1,3)
- Hydrazine: 1.84437e-16 kg; data quality (4,2,1,1,3)
- ethyl acrylate: 4.78238e-9 kg; data quality (4,2,1,1,5)
- ethylene glycol: 7.17852e-12 kg; data quality (5,2,1,1,5)
- cumene: 1.60806e-9 kg; data quality (3,2,1,1,5)
- Chromium VI: 2.62852e-10 kg; data quality (3,2,1,4,1)
- benzene, ethyl-: 2.18297e-5 kg; data quality (3,2,1,4,1)
- Benzo(g,h,i)perylene: 4.44877e-8 kg; data quality (3,2,1,4,1)
- Propane, 1,1,1,3,3,3-hexafluoro-, HCFC-236fa: 4.14647e-8 kg; data quality (4,2,1,4,1)
- Water, fresh: 0.000103983 m3; data quality (1,2,1,4,2)
- hydrogen fluoride: 1.17146e-13 kg; data quality (2,2,1,1,3)
- Phosphorus: 3.88339e-10 kg; data quality (3,1,1,1,5)
- Propene: 7.96161e-14 kg; data quality (3,1,1,1,5)
- lead: 4.25755e-16, 4.25755e-16 kg (2 entries, compartments not in this file); data quality (3,1,1,1,5)
- o-Xylene: 1.03453e-10 kg; data quality (3,2,1,1,4)
- Dinitrogen monoxide: 1.18969e-5 kg; data quality (4,2,1,4,1)
- butadiene: 6.90835e-6 kg; data quality (3,2,1,1,1)
- anthracene: 2.28685e-7 kg; data quality (3,2,1,4,1)
- toluene-2,4-diisocyante: 4.27387e-15 kg; data quality (3,2,1,1,3)
- Dibenz(a,h)anthracene: 1.60647e-9 kg; data quality (3,2,1,4,1)
- methane, dichloro-, hcc-30: 1.60236e-8 kg; data quality (3,2,1,1,5)
- beryllium: 6.2926e-13 kg; data quality (2,2,1,1,5)
- benzo(a)pyrene: 4.65892e-8 kg; data quality (3,2,1,4,1)
- ethane, 1,2-dibromo-: 1.62964e-16 kg; data quality (2,2,1,1,4)
- 1,4-dichlorobenzene: 2.13405e-16 kg; data quality (2,2,1,1,5)
- methyl methacrylate: 3.62373e-9 kg; data quality (4,2,1,1,5)
- naphthalene: 2.12877e-16 kg; data quality (4,1,1,1,5)
- Chrysene: 7.44152e-8 kg; data quality (3,2,1,4,1)
- Nickel, ion: 7.50152e-15 kg; data quality (3,2,1,1,3)
- cadmium: 2.78415e-13 kg; data quality (3,2,1,1,4)
- Cresol: 3.47844e-13 kg; data quality (4,2,1,1,5)
- phenol: 1.65232e-10 kg; data quality (4,2,1,1,3)
- maleic anhydride: 5.15778e-16 kg; data quality (2,2,1,1,3)
- Ethene, chloro-: 6.93005e-14 kg; data quality (3,2,1,1,3)
- Ethylene glycol monoethyl ether: 8.03334e-10 kg; data quality (3,2,1,1,5)
- AZIRIDINE: 1.20496e-9 kg; data quality (5,2,1,1,5)
- Benzo(k)fluoranthene: 1.37498e-8 kg; data quality (3,2,1,4,1)
- cyanide: 5.9066e-17 kg; data quality (3,2,1,1,3)
- Hydrocarbons, aromatic: 1.04233e-10 kg; data quality (3,2,1,1,5)
- selenium: 5.32085e-14 kg; data quality (2,2,1,1,5)
- fluoranthene: 4.48749e-7 kg; data quality (3,2,1,4,1)
- acrolein: 5.28625e-6 kg; data quality (3,2,1,4,1)
- propanal: 3.8092e-6 kg; data quality (3,2,1,4,1)
- Methane: 1.28919e-5 kg; data quality (4,2,1,4,1)
- Chloramben: 2.54984e-17 kg; data quality (2,2,1,1,3)
- epichlorohydrin: 3.10669e-15 kg; data quality (3,2,1,1,3)
- benz[a]anthracene: 1.20854e-7 kg; data quality (3,2,1,4,1)
- dimethyl formamide: 4.85069e-14 kg; data quality (4,2,1,1,3)
- 1,1-DICHLOROETHYLENE: 1.81221e-11 kg; data quality (3,2,1,1,5)
- vinyl acetate: 5.42204e-9 kg; data quality (4,2,1,1,5)
- acrylonitrile: 2.93163e-16 kg; data quality (4,2,1,1,3)
- biphenyl: 1.13192e-13 kg; data quality (4,2,1,1,5)
- m-xylene: 2.3685e-10 kg; data quality (3,2,1,1,4)
- arsenic: 3.79903e-9 kg; data quality (3,2,1,4,1)
- nickel: 7.52591e-9 kg; data quality (3,2,1,4,1)
- 4-aminobiphenyl: 4.79467e-10 kg; data quality (5,2,1,1,5)
- Ethane, 1,1,1-trifluoro-, HFC-143a: 1.53486e-6 kg; data quality (4,2,1,4,1)
- methanol: 7.70166e-9 kg; data quality (3,2,1,1,5)
- 2,2,4-trimethylpentane: 2.39206e-5 kg; data quality (3,2,1,4,1)
- Methane, difluoro-, HFC-32: 2.08908e-6 kg; data quality (4,2,1,4,1)
- lead: 2.28069e-10 kg; data quality (3,2,1,1,3)
- Ethane, pentafluoro-, HFC-125: 3.58731e-6 kg; data quality (4,2,1,4,1)
- methane, monochloro-, r-40: 1.92967e-15 kg; data quality (3,2,1,1,3)
- Triethyl amine: 8.12417e-13 kg; data quality (4,2,1,1,3)
- monochloroethane: 4.14617e-16 kg; data quality (3,2,1,1,3)
- phthalate, dioctyl-: 6.13253e-13 kg; data quality (3,2,1,1,3)
- 2-METHOXYETHANOL: 4.59709e-15 kg; data quality (4,2,1,1,3)
- 2,4-D: 3.82707e-18 kg; data quality (3,2,1,1,3)
- 1,4-dioxane: 3.67445e-16 kg; data quality (4,2,1,1,3)
- Nitrogen: 1.58593e-9 kg; data quality (3,2,1,1,5)
- Bis-(chloromethyl)ether: 4.61093e-20 kg; data quality (5,2,1,1,3)
- 1-METHYLNAPTHALENE: 5.58004e-11 kg; data quality (2,2,1,1,3)
- Xylene: 7.70827e-5 kg; data quality (3,2,1,4,1)
- 1,1,2,2-tetrachloroethane: 2.38887e-13 kg; data quality (3,2,1,1,3)
- hexane: 2.40073e-5 kg; data quality (3,2,1,4,1)
- trichloroethylene: 3.16173e-8 kg; data quality (3,2,1,1,5)
- acenaphthylene: 5.3313e-7 kg; data quality (3,2,1,4,1)
- methylene diphenyl diisocyanate: 5.22787e-14 kg; data quality (4,2,1,1,3)
- chromium: 1.15507e-14 kg; data quality (4,1,1,1,5)
- naphthalene: 8.30837e-6 kg; data quality (3,2,1,4,1)
- ammonia: 6.21449e-5 kg; data quality (3,2,1,4,1)
- ALLYL CHLORIDE: 1.79638e-13 kg; data quality (3,2,1,1,3)
- chloroform: 6.70459e-13 kg; data quality (4,2,1,1,3)
- t-butyl methyl ether: 2.35288e-9 kg; data quality (3,2,1,1,5)
- chlorine: 3.13416e-15 kg; data quality (4,2,1,1,3)
- pyrene: 5.72434e-7 kg; data quality (3,2,1,4,1)
- methyl isobutyl ketone: 8.3111e-10 kg; data quality (4,2,1,1,5)
- aniline: 1.39112e-17 kg; data quality (4,2,1,1,3)
- 2-methylnaphthalene: 4.65462e-11 kg; data quality (2,2,1,1,3)
- Urethane: 2.85877e-18 kg; data quality (5,2,1,1,3)
- 3-methylcholanthrene: 3.54007e-18 kg; data quality (2,2,1,1,5)
- benzene, chloro-: 1.91021e-16 kg; data quality (4,2,1,1,3)
- 1,1,1-trichloroethane: 4.68143e-8 kg; data quality (3,2,1,1,5)
- CHLOROPRENE: 4.42649e-17 kg; data quality (2,2,1,1,3)
- ethylene oxide: 9.08353e-18 kg; data quality (3,2,1,1,3)
- Methyl iodide: 3.28759e-16 kg; data quality (4,2,1,1,3)
- acenaphthene: 2.3468e-7 kg; data quality (3,2,1,4,1)
- Cobalt: 7.08466e-14 kg; data quality (3,2,1,1,5)
- antimony: 5.65228e-14 kg; data quality (3,2,1,1,5)
- benzidine: 5.44089e-15 kg; data quality (2,2,1,1,3)
- 2-nitropropane: 5.98751e-14 kg; data quality (5,2,1,1,3)
- Benzo(a)anthracene: 2.90472e-17 kg; data quality (2,2,1,1,5)
- carbon tetrachloride: 5.13806e-14 kg; data quality (4,2,1,1,3)
- manganese: 4.822e-9 kg; data quality (3,2,1,4,1)
- Propene, 1,3-dichloro-: 1.11718e-16 kg; data quality (3,2,1,1,3)
- propylene oxide: 2.0446e-10 kg; data quality (3,2,1,1,5)
- Hexane: 2.12877e-19 kg; data quality (4,1,1,1,5)
- BUTYL ISOCYANATE: 2.86617e-13 kg; data quality (4,2,1,1,3)
- nitrogen oxides: 0.00942471 kg; data quality (3,2,1,1,1)
- styrene: 1.66379e-6 kg; data quality (3,2,1,4,1)
- N,N-DIMETHYLANILINE: 2.37979e-14 kg; data quality (5,2,1,1,5)
- para-xylene: 4.31792e-11 kg; data quality (3,2,1,1,5)
- Chromium, ion: 1.58592e-13 kg; data quality (2,2,1,1,4)
- 1,2-BUTYLENE OXIDE: 3.16374e-11 kg; data quality (4,2,1,1,5)
- 1,2,4-trimethylbenzene: 4.81103e-14 kg; data quality (5,1,1,1,5)
- QUINOLINE: 1.17535e-18 kg; data quality (3,2,1,1,5)
- Benzo(b)fluoranthene: 2.16039e-8 kg; data quality (3,2,1,4,1)
- phenanthrene: 9.06225e-7 kg; data quality (3,2,1,4,1)
- BIS (2-ETHOXY ETHYL) ETHER: 9.43074e-14 kg; data quality (5,2,1,1,5)
- acetaldehyde: 3.69341e-5 kg; data quality (3,2,1,1,1)
- PHOSPHORUS: 1.0039e-13 kg; data quality (2,2,1,1,5)
- hydroquinone: 3.96542e-16 kg; data quality (3,2,1,1,4)
- acetonitrile: 3.68874e-16 kg; data quality (3,2,1,1,3)
- hydrogen sulfide: 9.22992e-14 kg; data quality (3,2,1,1,3)
- ethane, 1,2-dichloro-: 1.72024e-11 kg; data quality (3,2,1,1,5)
- ethylbenzene: 5.36451e-14 kg; data quality (4,1,1,1,5)
- Propane, 1,2-dichloro-: 2.47587e-14 kg; data quality (4,2,1,1,3)
- ethene, tetrachloro-: 4.53363e-9 kg; data quality (3,2,1,1,5)
- acrylic acid: 2.01801e-9 kg; data quality (4,2,1,1,5)
- particulates, < 2.5 um: 0.000391448 kg; data quality (3,2,1,1,1)
- toluene: 0.000107705 kg; data quality (3,2,1,4,1)
- n-nitrosodimethylamine: 8.29967e-18 kg; data quality (5,2,1,1,3)
- Benzo(g,h,i)perylene: 4.25755e-18 kg; data quality (2,1,1,1,5)
- CHLOROMETHYL METHYL ETHER: 5.20251e-16 kg; data quality (5,2,1,1,3)
- Xylene: 2.12877e-15 kg; data quality (4,1,1,1,5)
- particulates, < 10 um: 0.000172265 kg; data quality (3,2,1,4,1)
- toluene: 2.12877e-15 kg; data quality (5,1,1,1,5)
- ethane, 1,1,2-trichloro-: 1.91589e-13 kg; data quality (4,2,1,1,5)
- mercury: 2.70119e-10 kg; data quality (3,2,1,4,1)
- VOC, volatile organic compounds: 0.00128825 kg; data quality (3,2,1,1,1)
- fluorene: 4.77453e-7 kg; data quality (3,2,1,4,1)
- hydrogen chloride: 8.39585e-10 kg; data quality (2,2,1,1,5)
- Indeno(1,2,3-cd)pyrene: 1.82746e-8 kg; data quality (3,2,1,4,1)

## Inventory method
Input-output

## Modelling constants
The reference unit of all processes is 1 USD2013 of the good or service. The technosphere inputs are based on the US BEA detailed input-output tables for 2007. The IO tables are combined to develop a commodity-by-commodity model based on the the industry-technology assumption (see Suh et al., 2010), which assumes all commodities produced by a given industry have the same input structure, but that multiple industries can produce the same commodity. Thus, model technosphere flows represent commodity outputs (and not industry outputs) from other processes in the model. There are no by-products included in these processes. All commodity production is based on US-conditions, despite in reality that some goods and services are produced overseas, as USEEIO v1.1 is a single-region IO model.

## Completeness
The input-output approach assures that all purchased inputs associated with the sectors making these commodities as reported in the US census for 2007 are included. The direct resources extracted including minerals, energy sources, water and land occupied are included. Emissions to air include all critieria air pollutants, greenhouse gases, and hazardous and toxic air pollutants as defined by US EPA. Releases to water include toxics, total nitrogen and total phosphorus, and water discharges. Releases to soil or groundwater include toxics and agriculutural pesticides. Some metal releases to air, water and soil are not included because they could not be speciated. Solid hazardous and non-hazardous wastes generated are not included as an elementary flows although purchases of waste services are included.

## Data treatment
Greenhouse gases are primarily from the US Greenhouse Gas Emission Inventory (USEPA 2016a). Biogenic C uptake is not included (change from version 1.0), as biogenic C emission are not included. Toxic releases to air, water and soil (except pesticides) are from the 2013 Toxic Release Inventory (USEPA 2015a). Criteria air pollutants and hazardous air pollutants are from the 2011 National Emissions Inventory (USEPA 2015b). All estimates are normalized by industry based on sector output in the data year, then converted to 2013 USD using relative sector-specific CPIs (if data year is not 2013). Energy use represent raw renewables or fossil fuel energies and is based on EIA data for 2014. See Table 1 in Yang, Ingwersen et al. 2017 and Supporting Information 1, and the v1.1 data update notes (Ingwersen et al. 2017) for all details on environmental data sources used.Total transportation land use is reported in the USGA Major Uses of Land for 2007 (Nickerson et al. 2011). Land use for roads was allocated to relevant transportation sectors based on the shares of Federal Highway Administration fees. Transportation land use for airports and railroads were each assumed 5% of the total use of urban land.

## Data collection
2015-2016

## Sampling procedure
US federal government sources, including surveys and US EPA emissions databases are used as the primary sources. From these sources, data for US reporting establishments/facilities are aggregated by the NAICS sector as defined in the BEA detailed 2007 input-output tables. When level of sector aggregation differs, or when direct emissions are not reported but modeled, additional sources are used to make allocations and estimates.

## Review details
In regard to quality assurance and peer-review, each dataset created went through Quality Assurance as defined in a quality assurance project plans at US EPA, CSRA or ERG. The model was assembled with the IO model builder model (USEPA 2016c). Validation functions were used to check that all the model components were properly assembled and harmonized. Bayou Demeke and Santosh Ghimire provided internal peer review of the model methodology and the manuscript underwent standard EPA management review. An editor and two anonymous reviewers at the Journal of Cleaner Production reviewed the model. In regard to data quality evaluation, data quality assessment was performed at the flow and process levels according to the updated US EPA data quality assessment guidelines as defined in US EPA (2016b).

## Intended application
The primary application is for use in the US Environmentally-Extended Input-Ouput model, USEEIO, version 1.1. This model is being used by the US EPA for supporting tools that prioritize goods and services based on potential environmental impacts, resource use or emissions for large regions, including the US and US states, and as a strealined tool for organizations as a starting point to consider sustainable materials management. Model results are designed to provide meso/macro-level decision support.

## Project
USEEIO v1.1 was developed by the US EPA with CSRA and ERG with Wesley W. Ingwersen and David E. Meyer as research leads. Yi Yang was the technical lead on the work for CSRA (contract EP-C-15-012); Troy Hawkins was lead for ERG (contract EP-C-12-021).

## Sources
- Ingwersen et al. 2017
- USEPA 2016a
- USEPA 2016b
- Ingwersen et al. DRAFT
- Nickerson et al. 2011
- EIA 2013
- Blackhurst et al. 2010
- USDA 2016
- Macknick et al. 2011
- Maupin et al. 2014
- USEPA 2015b
- Torcellini et al. 2003
- EIA 2015
- Edelen and Ingwersen 2017
- USEPA 2015a
- BEA 2015
- BLM 2008
- USDA 2014
- USGS 2015
- Lovelace 2009
- USGS 2016
- Kim et el. 2013
- Statistics Canada 2010
- Yienger et al. 1995
- Goebes et al. 2003
- USEPA 2016c
- EIA 2017
- USDA 2006
- USDA 2009a
- EIA 2016
- USDA 2009b
