# Other real estate

Dataset: openLCA process, unit process
Category: 53: Real Estate and Rental and Leasing
Geography: United States
Time period: 2017-01-01 to 2017-12-31
Data quality: US EPA - Process Pedigree Matrix (1;1)
Exchange data quality scheme: US EPA - Flow Pedigree Matrix
Generated by: US EPA with CSRA and ERG
Owner: US EPA
Published in: Yang, Ingwersen et al. 2017
restrictionsDescription: This model shold be appropriately cited (see Yang, Ingwersen et al. 2017 source or Publication field) when used. Any changes or derivations of this model by the user should be documented. The model itself and any results from use of this model shall not be construed to consitute US EPA opinion or policy.
copyright: false

## General comment
BEA Code & Name is '531ORE:Other real estate'. Description of the primary industry producing this good or service, adapted from the Census Bureau NAICS 2007 descriptions: The Real Estate and Rental and Leasing sector comprises establishments primarily engaged in renting, leasing, or otherwise allowing the use of tangible or intangible assets, and establishments providing related services. The major portion of this sector comprises establishments that rent, lease, or otherwise allow the use of their own assets by others. The assets may be tangible, as is the case of real estate and equipment, or intangible, as is the case with patents and trademarks. This sector also includes establishments primarily engaged in managing real estate for others, selling, renting and/or buying real estate for others, and appraising real estate. These activities are closely related to this sectors main activity, and it was felt that from a production basis they would best be included here. In addition, a substantial proportion of property management is self-performed by lessors. The main components of this sector are the real estate lessors industries (including equity real estate investment trusts (REITs)); equipment lessors industries (including motor vehicles, computers, and consumer goods); and lessors of nonfinancial intangible assets (except copyrighted works). Excluded from this sector are establishments primarily engaged in renting or leasing equipment with operators. Establishments renting or leasing equipment with operators are classified in various subsectors of NAICS depending on the nature of the services provided (e.g., transportation, construction, agriculture). These activities are excluded from this sector because the client is paying for the expertise and knowledge of the equipment operator, in addition to the rental of the equipment. In many cases, such as the rental of heavy construction equipment, the operator is essential to operate the equipment. Related NAICS codes are: 531

## Technology
The process describes the average US production of this good or service within this NAICS-based grouping defined in the BEA 2007 detailed input-output tables (BEA 2015). Distribution, wholesale and retailing of this good or service, use, and final disposal are not included. Creation of a product system with this process will enable modeling of all upstream (supply-chain) activities.

## Geography
Data represent the 50 US states

## Time period
2017 was the year in which this version of USEEIO was released and is the target date for the model

## Reference product
- Other real estate: 1 USD

## Inputs from technosphere
All rows: data quality (1,3,1,1,1)
- Metal hinges, keys, lock, and other hardware; at manufacturer: 4.80979e-5 USD
- Railroad rolling stock; at manufacturer: 6.53511e-8 USD
- Clothing; at manufacturer: 8.48904e-7 USD
- Natural gas; at consumer: 0.0073569 USD
- Pet care, photofinishing, parking and other sundry services: 3.5247e-5 USD
- Cardboard containers; at manufacturer: 9.58285e-6 USD
- Springs and wires; at manufacturer: 6.84341e-10 USD
- Carpets and rugs; at manufacturer: 2.28114e-10 USD
- Management consulting: 0.000988289 USD
- Cutlery and handtools; at manufacturer: 0.00011222 USD
- Computer terminals and other computer peripheral equipment; at manufacturer: 0.000103673 USD
- Rubber tires; at manufacturer: 0.000123065 USD
- Flours and malts; at manufacturer: 8.67609e-7 USD
- Synthetic dyes and pigments; at manufacturer: 2.25433e-7 USD
- Polystyrene foam products; at manufacturer: 6.09961e-9 USD
- Coffee and tea; at manufacturer: 2.61404e-7 USD
- Secondary copper products; at manufacturer: 1.11776e-8 USD
- Software: 0.000231851 USD
- Water transport (boats, ships, ferries): 0.000103197 USD
- Communication and energy wire and cable; at manufacturer: 1.19259e-5 USD
- Coal; at mine: 0.00247329 USD
- Company and enterprise management: 0.00559932 USD
- Telecommunications: 0.0127409 USD
- Analytical laboratory instruments; at manufacturer: 5.46329e-8 USD
- Full-service restaurants: 0.0069049 USD
- Pipeline transport: 1.70341e-5 USD
- Greenhouse crops, mushrooms, nurseries, and flowers; at farm: 1.11811e-6 USD
- Other vehicle parts; at manufacturer: 7.44614e-5 USD
- Breweries and beer; at manufacturer: 1.04562e-6 USD
- Wholesale trade: 0.0018253 USD
- Semiconductor machinery; at manufacturer: 0.000939229 USD
- Scenic and sightseeing transportation and support activities for transportation: 9.77591e-7 USD
- Wireless telecommunications: 0.00578163 USD
- Cookies, crackers, pastas, and tortillas; at manufacturer: 2.02068e-7 USD
- Cutting and machine tool accessory, rolling mill, and other metalworking machines; at manufacturer: 9.10548e-9 USD
- Commercial equipment rental: 0.00128841 USD
- Nondepository credit intermediation and related activities: 0.00190321 USD
- Data processing and hosting: 0.00119798 USD
- Nonresidential building repair and maintanence: 0.0470572 USD
- Soft drinks, bottled water, and ice; at manufacturer: 2.65414e-7 USD
- Machinery for the paper, textile, food or other industries (except semiconductor machinery); at manufacturer: 2.23778e-5 USD
- Heating equipment other than warm air furnaces; at manufacturer: 2.23919e-6 USD
- Air purification and ventilation equipment; at manufacturer: 1.95245e-5 USD
- Books, newspapers, magazines, and other print media; at manufacturer: 3.01196e-5 USD
- Fabric; at manufacturer: 1.16479e-8 USD
- Plastic bottles; at manufacturer: 3.25469e-8 USD
- Vehicle rental and leasing: 0.00288402 USD
- Seafood; at manufacturer: 3.92106e-7 USD
- Copper, nickel, lead, and zinc; at mine: 0.00187172 USD
- Plywood and veneer; at manufacturer: 9.14249e-7 USD
- Books; at publisher: 3.58464e-5 USD
- Unrefined oil and gas; at extraction site: 0.000103966 USD
- Business support: 0.00225653 USD
- Light gauge metal cans, boxes, and containers; at manufacturer: 1.08729e-9 USD
- Other basic inorganic chemicals; at manufacturer: 4.03813e-5 USD
- Ink and ink cartridges; at manufacturer: 7.8424e-8 USD
- Bread and other baked goods; at manufacturer: 4.59463e-7 USD
- Hotels and campgrounds: 0.00275933 USD
- Other plastic products; at manufacturer: 2.33588e-5 USD
- Other computer related services, including facilities management: 0.00248903 USD
- Vehicle repair: 0.00177118 USD
- Office supplies (not paper); at manufacturer: 2.46147e-5 USD
- Securities and commodities brokerage and exchanges: 0.00312744 USD
- Carbon and graphite products; at manufacturer: 2.55181e-7 USD
- Stationery; at manufacturer: 1.23055e-5 USD
- Screws, nuts, and bolts; at manufacturer: 4.74335e-8 USD
- Distilleries and spirits; at manufacturer: 6.53511e-8 USD
- Household goods repair: 0.00272865 USD
- Ice cream and frozen desserts; at manufacturer: 5.24814e-7 USD
- Urethane and other foam products; at manufacturer: 7.81797e-9 USD
- Fluid milk and butter; at manufacturer: 2.67419e-7 USD
- Electronic capacitors, resistors, coils, transformers, connectors and other components (except semiconductors and printed circuit assemblies); at manufacturer: 7.34927e-9 USD
- Abrasive products; at manufacturer: 3.19359e-9 USD
- Metal pipe fittings, ball and roller bearings, industrial patterns, metal bath fixtures, other misc. fabricated metals; at manufacturer: 0.000457659 USD
- Home laundry machines; at manufacturer: 3.62378e-7 USD
- Aluminum; at manufacturer: 0.00111811 USD
- Ophthalmic goods; at manufacturer: 2.23622e-6 USD
- Wild-caught fish and game; at place of capture: 2.61404e-7 USD
- Sugar, candy, and chocolate; at manufacturer: 6.53511e-8 USD
- Wiring devices; at manufacturer: 7.52775e-9 USD
- Specialty transformers; at manufacturer: 5.02077e-7 USD
- Curtains and linens; at manufacturer: 1.8351e-6 USD
- Scientific research and development: 8.42129e-8 USD
- General merchandise stores: 0.000109593 USD
- Insurance agencies and brokerages: 0.000101947 USD
- Other secondary nonferrous metal products; at manufacturer: 6.84341e-10 USD
- Independent artists, writers, and performers: 0.00148402 USD
- Packaged meat (except poultry); at manufacturer: 3.0262e-6 USD
- Lessors of nonfinancial intangible assets: 0.000697609 USD
- All other foods; at manufacturer: 1.32707e-7 USD
- All other food and drinking places: 0.000210557 USD
- Directory, mailing list, and other publishers; at publisher: 2.33168e-5 USD
- News syndicates, libraries, archives, Internet publishing and all other information services: 2.1887e-5 USD
- Plastic pipe, fittings, and sausage casings; at manufacturer: 1.88642e-8 USD
- Printed circuit and electronic assembly; at manufacturer: 1.09266e-7 USD
- Postal service: 0.000215654 USD
- Rubber and plastic belts and hoses; at manufacturer: 0.000368977 USD
- Facilities support: 0.00304644 USD
- Printing support; at manufacturer: 6.98521e-7 USD
- Noncomparable imports: 0.00201176 USD
- Light bulbs; at manufacturer: 1.13348e-6 USD
- Other engine equipment; at manufacturer: 1.29421e-9 USD
- All other converted paper products; at manufacturer: 1.08729e-9 USD
- Glass and glass products; at manufacturer: 1.2706e-5 USD
- Newspapers; at publisher: 1.12612e-6 USD
- Cheese; at manufacturer: 1.17632e-6 USD
- Vending, commercial laundry, and other commercial and service industry machinery; at manufacturer: 2.58946e-5 USD
- Leather; at manufacturer: 9.11907e-8 USD
- Employment services: 0.0620044 USD
- Electricity; at consumer: 0.0773911 USD
- Transmission and power train parts; at manufacturer: 5.94316e-5 USD
- Other textiles; at manufacturer: 4.60261e-5 USD
- Commercial machinery repair: 0.0033765 USD
- Wireless communications; at manufacturer: 2.82457e-5 USD
- Snack foods; at manufacturer: 6.53511e-8 USD
- Motor vehicle steering, suspension components (except spring), and brake systems; at manufacturer: 2.27626e-5 USD
- Other basic organic chemicals; at manufacturer: 0.00255709 USD
- Compressed Gases; at manufacturer: 3.07301e-7 USD
- Dry-cleaning and laundry: 0.000153536 USD
- Soap and cleaning compounds; at manufacturer: 0.00164731 USD
- Used and secondhand goods: 1.29421e-9 USD
- Metal coatings, engravings, and heat treatments; at manufacturer: 3.24864e-7 USD
- Gaskets, seals, musical instruments, fasteners, brooms, brushes, mop and other misc. goods; at manufacturer: 9.73716e-5 USD
- Promoters and agents: 0.000218298 USD
- Photographers: 6.05158e-5 USD
- Vehicle engines and engine parts; at manufacturer: 1.71288e-5 USD
- Office furniture and custom architectural woodwork and millwork; at manufacturer: 1.24167e-6 USD
- Switchgear and switchboards; at manufacturer: 2.97607e-6 USD
- Rail transport: 0.000989348 USD
- Paints and coatings; at manufacturer: 0.000215798 USD
- Advertising and public relations: 0.00236392 USD
- Other support services: 0.00231335 USD
- Accounting, tax preparation, bookkeeping, and payroll: 0.0046374 USD
- Warehousing: 0.000180572 USD
- Automatic controls for HVAC and refrigeration equipment; at manufacturer: 8.19493e-8 USD
- Wooden windows, door, and flooring; at manufacturer: 0.00297196 USD
- Insurance carriers: 0.0193316 USD
- Cardboard; at manufacturer: 0.000110728 USD
- Radio and television: 6.53511e-8 USD
- Audio and video equipment; at manufacturer: 1.14258e-6 USD
- Specialized design: 0.00086634 USD
- Other real estate: 0.149193 USD
- Fruit and vegetable preservation; at manufacturer: 1.96937e-6 USD
- Air conditioning, refrigeration, and warm air heating equipment; at manufacturer: 3.38335e-6 USD
- Limited-service restaurants: 0.00508059 USD
- Plastic bags, films, and sheets; at manufacturer: 4.73237e-8 USD
- Dry, condensed, and evaporated dairy; at manufacturer: 6.53511e-8 USD
- Performances: 9.6652e-5 USD
- Material handling equipment; at manufacturer: 1.53675e-8 USD
- Drinking water and wastewater treatment; at consumer: 0.00104062 USD
- Office administration: 0.00619827 USD
- Civic, social, professional, and similar organizations: 0.000419039 USD
- Other petroleum and coal products; at manufacturer: 0.000241619 USD
- Golf courses, marinas, ski resorts, fitness and other rec centers and industries: 0.000386391 USD
- Movies and film: 5.70429e-5 USD
- Other retail: 0.000420561 USD
- Other nonmetallic mineral products; at manufacturer: 1.78898e-5 USD
- Veneer, plywood, and engineered wood; at manufacturer: 2.05354e-5 USD
- Sports: 0.000203908 USD
- Other concrete products; at manufacturer: 1.45364e-5 USD
- Truck transport: 0.000629407 USD
- Turbines and turbine generator sets; at manufacturer: 2.00507e-9 USD
- Environmental and other technical consulting services: 0.000132407 USD
- Paper bags and coated paper; at manufacturer: 0.000111958 USD
- State and local government enterprises: 0.000587783 USD
- Sporting and athletic goods; at manufacturer: 2.23622e-6 USD
- Primary iron, steel, and ferroalloy products; at manufacturer: 0.00143342 USD
- Adhesives; at manufacturer: 2.25159e-6 USD
- Vehicles and parts sales: 0.000231475 USD
- Paper; at manufacturer: 7.16318e-5 USD
- Lids, jars, bottle caps, other metal closures and crowns; at manufacturer: 1.30702e-7 USD
- Light fixtures; at manufacturer: 9.22965e-5 USD
- Lime and gypsum products; at manufacturer: 2.86799e-6 USD
- Internet publishing and broadcasting: 7.88545e-6 USD
- Vehicle electrical and electronic equipment; at manufacturer: 4.36689e-5 USD
- Buildings and dwellings services: 0.0467394 USD
- Passenger ground transport: 0.00104128 USD
- Architectural, engineering, and related services: 0.0207689 USD
- Investigation and security: 0.0147023 USD
- Fresh vegetables, melons, and potatoes; at farm: 6.73561e-8 USD
- Consumer goods and general rental centers: 0.000282313 USD
- Satellite, telecommunications resellers, and all other telecommunications: 0.00126689 USD
- Storage batteries; at manufacturer: 6.82431e-5 USD
- Other educational services: 4.21065e-7 USD
- Small electrical appliances; at manufacturer: 4.47244e-6 USD
- Couriers and messengers: 1.55343e-6 USD
- Waste management and remediation: 0.0126992 USD
- Frozen food; at manufacturer: 1.33108e-6 USD
- Food and beverage stores: 2.34806e-5 USD
- Machine shops; at manufacturer: 3.62516e-6 USD
- Electronic equipment repair and maintenance: 0.00238697 USD
- Fluid meters and counting devices; at manufacturer: 1.34186e-5 USD
- Gasoline, fuels, and by-products of petroleum refining; at manufacturer: 0.0022449 USD
- Investment advice, portfolio management, and other financial advising services: 0.000691384 USD
- Travel arrangement and reservation: 0.000398553 USD
- Metal structural products; at manufacturer: 2.23869e-6 USD
- Air transport: 0.00265219 USD
- External hard drives, CDs, other storage media; at manufacturer: 3.3759e-5 USD
- Motors and generators; at manufacturer: 1.56545e-5 USD
- Jewelry and silverware; at manufacturer: 1.00784e-5 USD
- Secondary steel products; at manufacturer: 1.99975e-9 USD
- Communications equipment; at manufacturer: 4.52323e-6 USD
- Ball and roller bearings; at manufacturer: 3.26755e-7 USD
- Legal services: 0.0101579 USD
- Seasonings and dressings; at manufacturer: 5.26819e-7 USD
- Sound recording: 4.70528e-6 USD
- Computer systems design: 0.0029981 USD
- Other rubber products; at manufacturer: 4.56227e-10 USD
- Shelving and lockers; at manufacturer: 1.45445e-5 USD
- Packaged poultry; at manufacturer: 6.53511e-7 USD
- Industrial process variable instruments; at manufacturer: 1.56808e-5 USD
- Aluminum products; at manufacturer: 1.36868e-9 USD
- Magazines and journals; at publisher: 0.000102016 USD
- Monetary authorities and depository credit intermediation: 0.0310008 USD
- Flavored drink concentrates; at manufacturer: 1.96053e-7 USD
- Marketing research and all other miscellaneous professional, scientific, and technical services: 0.00227896 USD
- Chemicals (except basic chemicals, agrichemicals, polymers, paints, pharmaceuticals,soaps, cleaning compounds); at manufacturer: 0.000768416 USD

## Inputs from nature
- Energy, solar: 1.87384e-7 MJ; data quality (3,1,1,1,1)
- Water, fresh: 0.00072361, 0.000418127 m3 (2 entries, compartments not in this file); data quality (1,2,1,4,2)
- Occupation, urban, discontinuously built: 5.13765e-5 m2*a; data quality (4,2,1,1,1)

## Emissions to nature
- Propene: 4.38573e-15 kg; data quality (3,1,1,1,5)
- ethene, tetrachloro-: 1.10418e-8 kg; data quality (3,2,1,1,5)
- butadiene: 1.03607e-8 kg; data quality (3,2,1,4,1)
- Urethane: 1.00174e-17 kg; data quality (5,2,1,1,5)
- bis(2-chloroethyl)ether: 2.29549e-20 kg; data quality (3,2,1,1,5)
- 2-Acetylaminofluorene: 1.71305e-15 kg; data quality (5,2,1,1,5)
- NITROGLYCERIN: 5.07481e-12, 3.24572e-12, 1.23416e-11 kg (3 entries, compartments not in this file); data quality (5,1,1,1,5)
- methyl methacrylate: 2.22313e-15 kg; data quality (4,2,1,1,5)
- chloroform: 4.08752e-13 kg; data quality (4,2,1,1,5)
- 2-NITROPROPANE: 4.38573e-16 kg; data quality (5,1,1,1,5)
- ethane, 1,1,2-trichloro-: 1.33486e-15 kg; data quality (4,2,1,1,5)
- arsenic: 6.7085e-12 kg; data quality (3,2,1,4,2)
- Cresol: 1.18006e-14 kg; data quality (4,2,1,1,5)
- nickel: 9.56708e-11 kg; data quality (3,2,1,1,5)
- manganese: 1.71496e-14, 1.06363e-12 kg (2 entries, compartments not in this file); data quality (4,1,1,1,5)
- Diethylene glycol butyl ether: 3.4137e-13 kg; data quality (4,2,1,1,5)
- Aluminum: 2.32444e-14 kg; data quality (4,1,1,1,5)
- 3,3'-dimethylbenzidine: 2.04058e-17 kg; data quality (1,2,1,1,5)
- 1,2,4-trimethylbenzene: 6.68385e-14 kg; data quality (5,1,1,1,5)
- ammonia: 2.23633e-13 kg; data quality (3,1,1,1,5)
- selenium: 1.38563e-12 kg; data quality (2,2,1,1,5)
- o-Xylene: 1.20809e-9 kg; data quality (3,2,1,4,1)
- acrolein: 1.32257e-9 kg; data quality (3,2,1,4,1)
- carbon disulfide: 1.88533e-14 kg; data quality (4,2,1,1,5)
- chromium: 1.12634e-14, 1.32581e-12, 1.37052e-15 kg (3 entries, compartments not in this file); data quality (4,1,1,1,5)
- Toluene, 2,4-dinitro-: 1.75429e-16 kg; data quality (5,1,1,1,5)
- benzene: 4.99973e-17 kg; data quality (3,1,1,1,5)
- Ethane, 1,1,1-trifluoro-, HFC-143a: 1.89453e-9 kg; data quality (4,2,1,4,1)
- Propane, 1,1,1,3,3,3-hexafluoro-, HCFC-236fa: 5.11812e-11 kg; data quality (4,2,1,4,1)
- Phosphorus: 2.19508e-6 kg; data quality (2,1,1,1,4)
- 1-Methyl-2-pyrrolidinone: 9.06697e-13, 6.81542e-14 kg (2 entries, compartments not in this file); data quality (5,1,1,1,5)
- o-cresol: 1.25312e-17 kg; data quality (4,2,1,1,5)
- 1,1-DICHLOROETHYLENE: 1.84748e-13 kg; data quality (3,2,1,1,5)
- benzene: 6.41533e-8 kg; data quality (3,2,1,4,1)
- chlorine: 1.26309e-14 kg; data quality (2,1,1,1,5)
- epichlorohydrin: 3.25886e-15 kg; data quality (3,2,1,1,5)
- Phthalate, dibutyl-: 1.78357e-14 kg; data quality (4,2,1,1,5)
- hexachlorobenzene: 4.18257e-15 kg; data quality (3,2,1,1,5)
- methyl isobutyl ketone: 4.87996e-12 kg; data quality (4,2,1,1,5)
- ethane, 1,2-dibromo-: 3.11256e-14 kg; data quality (2,2,1,1,5)
- methylene diphenyl diisocyanate: 5.51773e-13 kg; data quality (4,2,1,1,5)
- ethane, 1,2-dichloro-: 6.3645e-13 kg; data quality (3,2,1,1,5)
- Ethylene glycol: 2.96045e-12 kg; data quality (5,1,1,1,5)
- cyclohexane: 8.77145e-17 kg; data quality (4,1,1,1,5)
- ethyl acrylate: 1.97398e-13 kg; data quality (4,2,1,1,5)
- hydroquinone: 2.66578e-14 kg; data quality (3,2,1,1,5)
- monochloroethane: 8.39711e-13 kg; data quality (3,2,1,1,5)
- acetamide: 1.71305e-17 kg; data quality (5,2,1,1,5)
- 1-METHYLNAPTHALENE: 2.61993e-17 kg; data quality (2,2,1,1,5)
- benz[a]anthracene: 3.11614e-12 kg; data quality (3,2,1,4,1)
- carbon tetrachloride: 1.37257e-13 kg; data quality (4,2,1,1,5)
- 2,2,4-trimethylpentane: 3.56902e-8 kg; data quality (3,2,1,4,1)
- Ethane, pentafluoro-, HFC-125: 4.42794e-9 kg; data quality (4,2,1,4,1)
- anthracene: 1.9222e-11 kg; data quality (3,2,1,4,1)
- phthalate, dioctyl-: 1.79605e-13 kg; data quality (3,2,1,1,5)
- hydrogen fluoride: 1.48415e-11 kg; data quality (2,2,1,1,5)
- ethylbenzene: 6.15232e-13 kg; data quality (4,1,1,1,5)
- PHOSPHORUS: 5.39775e-12 kg; data quality (2,2,1,1,5)
- m-xylene: 3.36576e-9 kg; data quality (3,2,1,4,1)
- sulfur dioxide: 1.13286e-7 kg; data quality (2,2,1,1,5)
- acetophenone: 5.28741e-16 kg; data quality (4,2,1,1,5)
- ammonia: 3.18501e-8 kg; data quality (3,2,1,2,4)
- isophorone: 5.89911e-14 kg; data quality (2,2,1,1,5)
- 2,4-D: 1.06325e-13 kg; data quality (3,2,1,1,5)
- ETHYLENETHIOUREA: 2.74089e-17 kg; data quality (5,2,1,1,5)
- hydrogen sulfide: 8.22781e-14 kg; data quality (3,2,1,1,5)
- mercury: 8.36812e-13 kg; data quality (2,2,1,1,5)
- particulates, < 2.5 um: 1.7923e-7 kg; data quality (3,2,1,3,2)
- nickel: 1.99366e-12, 3.73664e-17 kg (2 entries, compartments not in this file); data quality (4,1,1,1,5)
- 4-nitrophenol: 1.20449e-17 kg; data quality (2,2,1,1,5)
- Ethylene glycol monoethyl ether: 1.31541e-13 kg; data quality (3,2,1,1,5)
- lead: 1.53064e-10, 1.23668e-14 kg (2 entries, compartments not in this file); data quality (3,1,1,1,5)
- Chrysene, 5-methyl-: 6.25068e-19 kg; data quality (2,2,1,1,5)
- 2-METHOXYETHANOL: 3.98028e-17 kg; data quality (4,2,1,1,5)
- toluene-2,4-diisocyante: 9.29825e-16 kg; data quality (3,2,1,1,5)
- acenaphthene: 2.48465e-11 kg; data quality (3,2,1,4,1)
- benzene, ethyl-: 2.51378e-8 kg; data quality (3,2,1,4,1)
- NITRIC ACID: 6.51895e-14 kg; data quality (3,1,1,1,5)
- 1,1,2,2-tetrachloroethane: 4.50157e-14 kg; data quality (3,2,1,1,5)
- propanal: 3.56728e-9 kg; data quality (3,2,1,4,1)
- pyrene: 3.22684e-11 kg; data quality (3,2,1,4,1)
- Benzo(g,h,i)perylene: 7.59305e-12 kg; data quality (3,2,1,4,1)
- phenanthrene: 8.27127e-11 kg; data quality (3,2,1,4,1)
- Dimethylcarbamyl chloride: 1.33318e-19 kg; data quality (5,2,1,1,5)
- 1,2-BUTYLENE OXIDE: 1.01019e-14 kg; data quality (4,2,1,1,5)
- benzidine: 3.42611e-15 kg; data quality (2,2,1,1,5)
- 1,1,1-trichloroethane: 4.51524e-11 kg; data quality (3,2,1,1,5)
- cyanide: 8.20489e-13 kg; data quality (2,2,1,1,5)
- CHLORONAPHTHALENE: 1.06337e-21 kg; data quality (1,2,1,1,5)
- Hydrazine: 3.46722e-15 kg; data quality (4,2,1,1,5)
- Chromium VI: 1.51853e-12 kg; data quality (3,2,1,4,2)
- Hexachlorocyclopentadiene: 3.37312e-16 kg; data quality (3,2,1,1,5)
- beryllium: 1.03591e-13 kg; data quality (2,2,1,1,5)
- ethylene oxide: 1.28137e-15 kg; data quality (3,2,1,1,5)
- nitric acid: 8.77145e-17, 2.50179e-11 kg (2 entries, compartments not in this file); data quality (3,1,1,1,5)
- antimony: 4.98693e-12 kg; data quality (3,2,1,1,5)
- Hydrazine, methyl-: 5.3685e-15 kg; data quality (2,2,1,1,5)
- acrylic acid: 7.12682e-17 kg; data quality (4,2,1,1,5)
- Hydrocarbons, aromatic: 7.05492e-10 kg; data quality (3,2,1,4,1)
- acetaldehyde: 1.64035e-8 kg; data quality (3,2,1,4,1)
- acenaphthylene: 9.62514e-11 kg; data quality (3,2,1,4,1)
- 2-(2-BUTOXYETHOXY) ETHYL ACETATE: 3.77906e-14 kg; data quality (5,2,1,1,5)
- barium: 2.19874e-16 kg; data quality (4,1,1,1,5)
- Asbestos: 2.12079e-16 kg; data quality (5,2,1,1,5)
- Xylene: 8.20837e-8 kg; data quality (3,2,1,4,1)
- Phthalate, dibutyl-: 3.01177e-12 kg; data quality (4,1,1,1,5)
- Phosphorus: 8.68374e-14 kg; data quality (4,1,1,1,5)
- fluoranthene: 2.71984e-11 kg; data quality (3,2,1,4,1)
- hexachloroethane: 8.56527e-17 kg; data quality (4,2,1,1,5)
- methanol: 2.67332e-12 kg; data quality (4,2,1,1,5)
- phenol: 3.98821e-12 kg; data quality (4,2,1,1,5)
- Dinitrotoluene, technical grade (2,4 (77%)- and 2,6 (19%)-): 8.2128e-12, 8.77145e-17 kg (2 entries, compartments not in this file); data quality (5,1,1,1,5)
- NITROUS ACID: 8.77145e-17 kg; data quality (5,1,1,1,5)
- Chromium, ion: 7.23799e-12 kg; data quality (3,2,1,3,3)
- Nitrogen: 5.75453e-6 kg; data quality (2,2,1,1,5)
- 2-ethoxyethyl acetate: 3.35355e-14 kg; data quality (5,2,1,1,5)
- Cobalt: 5.97036e-12 kg; data quality (3,2,1,1,5)
- 1,4-dioxane: 1.42941e-15 kg; data quality (4,2,1,1,5)
- 2,4,5-trichlorophenol: 1.71305e-17 kg; data quality (2,2,1,1,5)
- Carbon dioxide: 0.0392041 kg; data quality (4,2,1,4,1)
- Indeno(1,2,3-cd)pyrene: 2.32563e-12 kg; data quality (3,2,1,4,1)
- 2,4-dinitrophenol: 1.38972e-17 kg; data quality (5,2,1,1,5)
- polychlorinated biphenyls: 1.88516e-20 kg; data quality (3,2,1,1,5)
- benzyl chloride: 2.43147e-14 kg; data quality (2,2,1,1,5)
- 2-nitropropane: 4.04795e-21 kg; data quality (5,2,1,1,5)
- carbonyl sulfide: 6.86503e-15 kg; data quality (4,2,1,1,5)
- Dimethyl sulfate: 2.66694e-15 kg; data quality (2,2,1,1,5)
- Benzo(k)fluoranthene: 2.81556e-12 kg; data quality (3,2,1,4,1)
- 2-chloro-1-phenylethanone: 2.43149e-16 kg; data quality (2,2,1,1,5)
- 1,4-BENZOQUINONE: 3.83921e-19 kg; data quality (3,2,1,1,5)
- propylene oxide: 3.705e-11 kg; data quality (3,2,1,1,5)
- benzene, chloro-: 1.80171e-14 kg; data quality (4,2,1,1,5)
- Propoxur: 1.71305e-17 kg; data quality (5,2,1,1,5)
- diethanolamine: 3.92296e-14 kg; data quality (3,2,1,1,5)
- 7-OXABICYCLO[2,2,1]HEPTANE-2,3-DICARBOXYLIC ACID, DIPOTASSIUM SALT: 1.40475e-12 kg; data quality (5,1,1,1,5)
- Chrysene: 3.06717e-12 kg; data quality (3,2,1,4,2)
- Triethyl amine: 3.63321e-15 kg; data quality (4,2,1,1,5)
- Sulfuric acid: 1.3291e-11 kg; data quality (2,1,1,1,5)
- lead: 7.34082e-12 kg; data quality (3,2,1,1,5)
- 2-methylnaphthalene: 4.13225e-14 kg; data quality (2,2,1,1,5)
- 1,4-dichlorobenzene: 3.8117e-14 kg; data quality (2,2,1,1,5)
- ALLYL CHLORIDE: 1.33318e-19 kg; data quality (3,2,1,1,5)
- hydrogen chloride: 1.75753e-10 kg; data quality (2,2,1,1,5)
- Water, fresh: 0.000966724 m3; data quality (1,2,1,4,2)
- hexachloro-1,3-butadiene: 1.53391e-15 kg; data quality (4,2,1,1,5)
- nitrogen oxides: 2.41802e-6 kg; data quality (3,2,1,1,2)
- benzo(a)pyrene: 2.71108e-12 kg; data quality (3,2,1,4,1)
- toluene, 2,4-dinitro-: 1.4043e-17 kg; data quality (5,2,1,1,5)
- hexane: 2.28733e-8 kg; data quality (3,2,1,4,1)
- para-xylene: 6.30482e-11 kg; data quality (3,2,1,4,1)
- PYRENE, 1-NITRO-: 1.23207e-18 kg; data quality (2,2,1,1,5)
- acrylonitrile: 9.40332e-14 kg; data quality (4,2,1,1,5)
- acetonitrile: 2.26408e-14 kg; data quality (3,2,1,1,5)
- ethylene glycol: 2.59147e-12 kg; data quality (5,2,1,1,5)
- copper: 3.80001e-10, 1.78813e-13, 1.76425e-12 kg (3 entries, compartments not in this file); data quality (4,1,1,1,5)
- ethylene glycol: 2.85072e-14 kg; data quality (5,1,1,1,5)
- formic acid: 3.04369e-14 kg; data quality (3,1,1,1,5)
- Propane, 1,2-dichloro-: 1.49375e-14 kg; data quality (4,2,1,1,5)
- Propane sultone: 1.71305e-17 kg; data quality (5,2,1,1,5)
- methane, bromo-, halon 1001: 1.44027e-13 kg; data quality (3,2,1,1,5)
- methane, dichloro-, hcc-30: 3.30088e-11 kg; data quality (4,2,1,1,5)
- Ethene, chloro-: 4.74334e-12 kg; data quality (3,2,1,1,5)
- trichloroethylene: 1.34403e-11 kg; data quality (4,2,1,1,5)
- toluene: 9.75716e-8 kg; data quality (3,2,1,4,1)
- styrene: 9.80459e-10 kg; data quality (3,2,1,4,1)
- formaldehyde: 3.63898e-8 kg; data quality (3,2,1,4,1)
- 3-methylcholanthrene: 9.50006e-16 kg; data quality (2,2,1,1,5)
- manganese: 7.31361e-12 kg; data quality (3,2,1,3,3)
- p-phenylenediamine: 1.71305e-15 kg; data quality (5,2,1,1,5)
- bromoform: 1.56954e-15 kg; data quality (3,2,1,1,5)
- Methane, difluoro-, HFC-32: 2.57862e-9 kg; data quality (4,2,1,4,1)
- t-butyl methyl ether: 2.56767e-12 kg; data quality (3,2,1,1,5)
- Xylene: 3.24544e-16 kg; data quality (4,1,1,1,5)
- 1,2,4-trichlorobenzene: 1.16246e-15 kg; data quality (4,2,1,1,5)
- biphenyl: 3.18768e-14 kg; data quality (4,2,1,1,5)
- Methane: 3.27461e-6 kg; data quality (4,2,1,4,1)
- Nitrobenzene: 1.77579e-16 kg; data quality (4,2,1,1,5)
- phenol: 1.05257e-15 kg; data quality (3,1,1,1,5)
- Dibenz(a,h)anthracene: 1.86108e-14 kg; data quality (3,2,1,4,1)
- Propene, 1,3-dichloro-: 6.94383e-15 kg; data quality (3,2,1,1,5)
- cumene: 3.54424e-13 kg; data quality (4,2,1,1,5)
- Triethylene glycol: 1.23169e-17 kg; data quality (5,2,1,1,5)
- chlorine: 3.65916e-12 kg; data quality (4,2,1,1,5)
- carbon monoxide: 3.82186e-5 kg; data quality (3,2,1,1,1)
- dibenzofuran: 2.40578e-15 kg; data quality (4,2,1,1,5)
- particulates, < 10 um: 1.22116e-8 kg; data quality (3,2,1,3,3)
- dimethyl formamide: 4.19426e-13 kg; data quality (4,2,1,1,5)
- naphthalene: 2.24962e-9 kg; data quality (3,2,1,4,1)
- butanol: 7.07242e-12 kg; data quality (5,1,1,1,5)
- Benzo(a)anthracene: 8.433e-15 kg; data quality (2,2,1,1,5)
- methane, monochloro-, r-40: 3.12469e-14 kg; data quality (3,2,1,1,5)
- Naphthalene: 1.03729e-13 kg; data quality (4,1,1,1,5)
- cadmium: 2.51766e-12 kg; data quality (3,2,1,1,5)
- BUTYL ISOCYANATE: 8.46935e-14 kg; data quality (4,2,1,1,5)
- Benzo(b)fluoranthene: 2.88887e-12 kg; data quality (3,2,1,4,1)
- fluorene: 4.60412e-11 kg; data quality (3,2,1,4,1)
- Phthalate, dimethyl-: 5.68018e-15 kg; data quality (4,2,1,1,5)
- pentachlorophenol: 1.068e-19 kg; data quality (3,2,1,1,5)
- vinyl acetate: 4.16355e-15 kg; data quality (4,2,1,1,5)
- Dinitrogen monoxide: 7.6565e-8 kg; data quality (4,2,1,4,1)
- Ethane, 1,1,1,2-tetrafluoro-, HFC-134a: 1.66894e-8 kg; data quality (4,2,1,4,1)
- aniline: 2.26123e-18 kg; data quality (4,2,1,1,5)
- VOC, volatile organic compounds: 1.73437e-6 kg; data quality (3,2,1,1,1)

## Inventory method
Input-output

## Modelling constants
The reference unit of all processes is 1 USD2013 of the good or service. The technosphere inputs are based on the US BEA detailed input-output tables for 2007. The IO tables are combined to develop a commodity-by-commodity model based on the the industry-technology assumption (see Suh et al., 2010), which assumes all commodities produced by a given industry have the same input structure, but that multiple industries can produce the same commodity. Thus, model technosphere flows represent commodity outputs (and not industry outputs) from other processes in the model. There are no by-products included in these processes. All commodity production is based on US-conditions, despite in reality that some goods and services are produced overseas, as USEEIO v1.1 is a single-region IO model.

## Completeness
The input-output approach assures that all purchased inputs associated with the sectors making these commodities as reported in the US census for 2007 are included. The direct resources extracted including minerals, energy sources, water and land occupied are included. Emissions to air include all critieria air pollutants, greenhouse gases, and hazardous and toxic air pollutants as defined by US EPA. Releases to water include toxics, total nitrogen and total phosphorus, and water discharges. Releases to soil or groundwater include toxics and agriculutural pesticides. Some metal releases to air, water and soil are not included because they could not be speciated. Solid hazardous and non-hazardous wastes generated are not included as an elementary flows although purchases of waste services are included.

## Data treatment
Greenhouse gases are primarily from the US Greenhouse Gas Emission Inventory (USEPA 2016a). Biogenic C uptake is not included (change from version 1.0), as biogenic C emission are not included. Toxic releases to air, water and soil (except pesticides) are from the 2013 Toxic Release Inventory (USEPA 2015a). Criteria air pollutants and hazardous air pollutants are from the 2011 National Emissions Inventory (USEPA 2015b). All estimates are normalized by industry based on sector output in the data year, then converted to 2013 USD using relative sector-specific CPIs (if data year is not 2013). Energy use represent raw renewables or fossil fuel energies and is based on EIA data for 2014. See Table 1 in Yang, Ingwersen et al. 2017 and Supporting Information 1, and the v1.1 data update notes (Ingwersen et al. 2017) for all details on environmental data sources used.Land occupation for commercial buildings was estimated based on the building floorspace data provided by the U.S. Energy Information Administration 2012 Commercial Building Energy Consumption Survey (CBECS) (EIA 2015). Total commercial public supply water use is reported by USGS (Maupin et al. 2014). Water use is allocated across commercial sectors based on their use of water, sewage, and other services in USD based on the 2007 Benchmark Use Table before redefinitions (BEA 2015).

## Data collection
2015-2016

## Sampling procedure
US federal government sources, including surveys and US EPA emissions databases are used as the primary sources. From these sources, data for US reporting establishments/facilities are aggregated by the NAICS sector as defined in the BEA detailed 2007 input-output tables. When level of sector aggregation differs, or when direct emissions are not reported but modeled, additional sources are used to make allocations and estimates.

## Review details
In regard to quality assurance and peer-review, each dataset created went through Quality Assurance as defined in a quality assurance project plans at US EPA, CSRA or ERG. The model was assembled with the IO model builder model (USEPA 2016c). Validation functions were used to check that all the model components were properly assembled and harmonized. Bayou Demeke and Santosh Ghimire provided internal peer review of the model methodology and the manuscript underwent standard EPA management review. An editor and two anonymous reviewers at the Journal of Cleaner Production reviewed the model. In regard to data quality evaluation, data quality assessment was performed at the flow and process levels according to the updated US EPA data quality assessment guidelines as defined in US EPA (2016b).

## Intended application
The primary application is for use in the US Environmentally-Extended Input-Ouput model, USEEIO, version 1.1. This model is being used by the US EPA for supporting tools that prioritize goods and services based on potential environmental impacts, resource use or emissions for large regions, including the US and US states, and as a strealined tool for organizations as a starting point to consider sustainable materials management. Model results are designed to provide meso/macro-level decision support.

## Project
USEEIO v1.1 was developed by the US EPA with CSRA and ERG with Wesley W. Ingwersen and David E. Meyer as research leads. Yi Yang was the technical lead on the work for CSRA (contract EP-C-15-012); Troy Hawkins was lead for ERG (contract EP-C-12-021).

## Sources
- USDA 2016
- Macknick et al. 2011
- Maupin et al. 2014
- USEPA 2015b
- Edelen and Ingwersen 2017
- BEA 2015
- Torcellini et al. 2003
- USGS 2016
- USEPA 2016b
- Statistics Canada 2010
- Goebes et al. 2003
- EIA 2015
- Lovelace 2009
- USDA 2014
- Yienger et al. 1995
- Ingwersen et al. DRAFT
- EIA 2016
- USEPA 2016a
- Blackhurst et al. 2010
- USGS 2015
- EIA 2013
- USEPA 2015a
- Ingwersen et al. 2017
- EIA 2017
- Nickerson et al. 2011
- USEPA 2016c
- USDA 2006
- Kim et el. 2013
- USDA 2009a
- BLM 2008
- USDA 2009b
