# Ground or treated minerals and earth; at manufacturer

Dataset: openLCA process, unit process
Category: 3279: Other Nonmetallic Mineral Product Manufacturing
Geography: United States
Time period: 2017-01-01 to 2017-12-31
Data quality: US EPA - Process Pedigree Matrix (1;1)
Exchange data quality scheme: US EPA - Flow Pedigree Matrix
Generated by: US EPA with CSRA and ERG
Owner: US EPA
Published in: Yang, Ingwersen et al. 2017
restrictionsDescription: This model shold be appropriately cited (see Yang, Ingwersen et al. 2017 source or Publication field) when used. Any changes or derivations of this model by the user should be documented. The model itself and any results from use of this model shall not be construed to consitute US EPA opinion or policy.
copyright: false

## General comment
BEA Code & Name is '327992:Ground or treated mineral and earth manufacturing'. Description of the primary industry producing this good or service, adapted from the Census Bureau NAICS 2007 descriptions: This U.S. industry comprises establishments primarily engaged in calcining, dead burning, or otherwise processing beyond beneficiation, clays, ceramic and refractory minerals, barite, and miscellaneous nonmetallic minerals.

## Technology
The process describes the average US production of this good or service within this NAICS-based grouping defined in the BEA 2007 detailed input-output tables (BEA 2015). Distribution, wholesale and retailing of this good or service, use, and final disposal are not included. Creation of a product system with this process will enable modeling of all upstream (supply-chain) activities.

## Geography
Data represent the 50 US states

## Time period
2017 was the year in which this version of USEEIO was released and is the target date for the model

## Reference product
- Ground or treated minerals and earth; at manufacturer: 1 USD

## Inputs from technosphere
All rows: data quality (1,3,1,1,1)
- Timber and raw forest products; at forest: 9.50754e-6 USD
- Data processing and hosting: 0.00509347 USD
- Computer terminals and other computer peripheral equipment; at manufacturer: 0.00031764 USD
- Dry-cleaning and laundry: 2.14795e-6 USD
- Cardboard; at manufacturer: 0.00320168 USD
- Other concrete products; at manufacturer: 2.27179e-6 USD
- Other computer related services, including facilities management: 0.000638704 USD
- Other plastic products; at manufacturer: 0.000356524 USD
- Surgical appliance and supplies; at manufacturer: 2.23114e-5 USD
- Cement; at manufacturer: 0.00321667 USD
- Software: 5.06402e-7 USD
- Investigation and security: 0.000636987 USD
- Transmission and power train parts; at manufacturer: 0.000323452 USD
- Rubber tires; at manufacturer: 4.05315e-6 USD
- Construction machinery; at manufacturer: 5.67372e-5 USD
- Scientific research and development: 2.28012e-6 USD
- Packaged meat (except poultry); at manufacturer: 4.96662e-7 USD
- Wiring devices; at manufacturer: 1.13523e-6 USD
- Fiber, yarn, and thread; at manufacturer: 9.5492e-6 USD
- Electronic capacitors, resistors, coils, transformers, connectors and other components (except semiconductors and printed circuit assemblies); at manufacturer: 0.00096174 USD
- Nondepository credit intermediation and related activities: 0.00458909 USD
- Specialized design: 0.000329627 USD
- Dimensional stone; at mine: 0.0601495 USD
- Primary iron, steel, and ferroalloy products; at manufacturer: 0.0210093 USD
- Legal services: 0.00322854 USD
- Valve and fittings (except for plumbing); at manufacturer: 9.92297e-6 USD
- Glass and glass products; at manufacturer: 9.54488e-6 USD
- Industrial process furnaces and ovens; at manufacturer: 0.000145558 USD
- Sand, gravel, clay, phosphate, other nonmetallic minerals; at mine: 0.0223729 USD
- Secondary copper products; at manufacturer: 4.96662e-6 USD
- Investment advice, portfolio management, and other financial advising services: 0.000678467 USD
- Ophthalmic goods; at manufacturer: 7.09518e-8 USD
- Printed circuit and electronic assembly; at manufacturer: 0.00350098 USD
- Other basic organic chemicals; at manufacturer: 0.00925259 USD
- Relay and industrial controls; at manufacturer: 0.00131765 USD
- Business support: 0.00127957 USD
- Nonresidential building repair and maintanence: 0.00521084 USD
- Secondary steel products; at manufacturer: 6.53374e-6 USD
- Greenhouse crops, mushrooms, nurseries, and flowers; at farm: 2.51169e-5 USD
- Custom metal rolls; at manufacturer: 1.50486e-5 USD
- All other forging, stamping, and sintering; at manufacturer: 1.00119e-5 USD
- Vehicle electrical and electronic equipment; at manufacturer: 1.49285e-6 USD
- Lumber and treated lumber; at manufacturer: 5.48398e-5 USD
- Plastic pipe, fittings, and sausage casings; at manufacturer: 6.95327e-6 USD
- Travel arrangement and reservation: 3.05038e-6 USD
- Cutting and machine tool accessory, rolling mill, and other metalworking machines; at manufacturer: 0.000333812 USD
- Monetary authorities and depository credit intermediation: 0.00865497 USD
- Buildings and dwellings services: 0.00704715 USD
- Other nonmetallic mineral products; at manufacturer: 8.72679e-6 USD
- Company and enterprise management: 0.0200302 USD
- Copper, nickel, lead, and zinc; at mine: 0.0031595 USD
- Magazines and journals; at publisher: 1.24514e-6 USD
- Aluminum products; at manufacturer: 2.6541e-5 USD
- Light gauge metal cans, boxes, and containers; at manufacturer: 7.66193e-6 USD
- Noncomparable imports: 0.00130412 USD
- Other real estate: 0.00132012 USD
- Aluminum; at manufacturer: 1.61667e-5 USD
- Electricity; at consumer: 0.0182848 USD
- Securities and commodities brokerage and exchanges: 0.00162295 USD
- Used and secondhand goods: 1.41904e-7 USD
- Full-service restaurants: 0.00190467 USD
- Other rubber products; at manufacturer: 4.11273e-5 USD
- Computer systems design: 0.001279 USD
- Watches, clocks, and other measuring and controlling devices; at manufacturer: 1.41904e-7 USD
- Hotels and campgrounds: 0.00190479 USD
- Screws, nuts, and bolts; at manufacturer: 0.00225816 USD
- Polystyrene foam products; at manufacturer: 2.83807e-7 USD
- Electronic equipment repair and maintenance: 0.000964682 USD
- Home furniture - Cabinets and non-wood, nonupholstered; at manufacturer: 3.26378e-6 USD
- Civic, social, professional, and similar organizations: 0.000638445 USD
- Environmental and other technical consulting services: 0.000321391 USD
- Paints and coatings; at manufacturer: 8.92762e-5 USD
- Light bulbs; at manufacturer: 7.09518e-8 USD
- Facilities support: 3.03137e-6 USD
- Paper; at manufacturer: 3.54759e-7 USD
- Machine shops; at manufacturer: 0.00712143 USD
- Metal pipe fittings, ball and roller bearings, industrial patterns, metal bath fixtures, other misc. fabricated metals; at manufacturer: 0.0031189 USD
- Metal windows, doors, and architectural products; at manufacturer: 5.94113e-7 USD
- Insurance agencies and brokerages: 0.00132458 USD
- Animal farms and aquaculture ponds (except cattle and poultry): 4.25711e-7 USD
- Specialty transformers; at manufacturer: 1.99519e-6 USD
- General merchandise stores: 1.94783e-8 USD
- Cardboard containers; at manufacturer: 0.00418062 USD
- Motor vehicle steering, suspension components (except spring), and brake systems; at manufacturer: 0.000320746 USD
- Tobacco, cotton, sugarcane, peanuts, sugar beets, herbs and spices, and other crops; at farm: 2.13527e-6 USD
- Plastic bags, films, and sheets; at manufacturer: 2.73164e-5 USD
- Rail transport: 0.0204277 USD
- Ready-mix concrete; at manufacturer: 1.98678e-6 USD
- Soap and cleaning compounds; at manufacturer: 1.77379e-6 USD
- Cast iron and steel; at manufacturer: 1.48528e-5 USD
- Iron, gold, silver, and other metal ores; at mine: 0.00884904 USD
- Coal; at mine: 0.016733 USD
- Natural gas; at consumer: 0.0386678 USD
- Other basic inorganic chemicals; at manufacturer: 5.98122e-5 USD
- Unrefined oil and gas; at extraction site: 1.22725e-5 USD
- Plywood and veneer; at manufacturer: 6.44137e-5 USD
- Petrochemicals; at manufacturer: 4.05661e-6 USD
- Commercial machinery repair: 0.00383784 USD
- Lime and gypsum products; at manufacturer: 0.00378491 USD
- State and local government enterprises: 0.000974813 USD
- Sports: 0.000317033 USD
- Vehicle engines and engine parts; at manufacturer: 0.000318059 USD
- Independent artists, writers, and performers: 0.000319323 USD
- Springs and wires; at manufacturer: 4.99312e-6 USD
- Warehousing: 0.00100601 USD
- Industrial process variable instruments; at manufacturer: 2.02831e-6 USD
- Air transport: 0.00349993 USD
- Wooden windows, door, and flooring; at manufacturer: 2.0425e-5 USD
- Chemicals (except basic chemicals, agrichemicals, polymers, paints, pharmaceuticals,soaps, cleaning compounds); at manufacturer: 0.000991094 USD
- All other food and drinking places: 4.22933e-7 USD
- Pipeline transport: 3.94897e-6 USD
- Plastics; at manufacturer: 6.82973e-5 USD
- Golf courses, marinas, ski resorts, fitness and other rec centers and industries: 0.000317658 USD
- Mining and oil/gas field machinery; at manufacturer: 2.28779e-5 USD
- Advertising and public relations: 0.0017155 USD
- Office administration: 3.14303e-6 USD
- Finished and coated fabric; at manufacturer: 0.000106073 USD
- Synthetic rubber and artificial and synthetic fibers; at manufacturer: 6.9687e-5 USD
- Truck transport: 0.0185579 USD
- Satellite, telecommunications resellers, and all other telecommunications: 3.87802e-6 USD
- Performances: 9.043e-8 USD
- Ground or treated minerals and earth; at manufacturer: 0.0856865 USD
- Gaskets, seals, musical instruments, fasteners, brooms, brushes, mop and other misc. goods; at manufacturer: 8.05442e-5 USD
- Paper bags and coated paper; at manufacturer: 3.60724e-6 USD
- Vehicle repair: 0.00192048 USD
- Marketing research and all other miscellaneous professional, scientific, and technical services: 0.00666388 USD
- Drinking water and wastewater treatment; at consumer: 0.000976868 USD
- Synthetic dyes and pigments; at manufacturer: 2.34286e-5 USD
- Lessors of nonfinancial intangible assets: 0.00450662 USD
- Mineral wool; at manufacturer: 9.76888e-6 USD
- Employment services: 3.7719e-5 USD
- Vending, commercial laundry, and other commercial and service industry machinery; at manufacturer: 4.25711e-7 USD
- Metal hinges, keys, lock, and other hardware; at manufacturer: 4.95411e-6 USD
- Semiconductors; at manufacturer: 0.00795531 USD
- Promoters and agents: 1.71121e-7 USD
- Consumer goods and general rental centers: 2.32881e-6 USD
- Cutlery and handtools; at manufacturer: 0.000325962 USD
- Other primary nonferrous metals; at manufacturer: 4.96662e-7 USD
- Other retail: 4.85899e-7 USD
- Passenger ground transport: 0.000952547 USD
- Ball and roller bearings; at manufacturer: 7.90128e-6 USD
- Waste management and remediation: 0.00291394 USD
- Vehicles and parts sales: 0.000634963 USD
- Architectural, engineering, and related services: 0.019181 USD
- Other support activities for mining: 7.07689e-5 USD
- Postal service: 4.37579e-6 USD
- Abrasive products; at manufacturer: 1.48942e-5 USD
- Air conditioning, refrigeration, and warm air heating equipment; at manufacturer: 9.5159e-7 USD
- Other secondary nonferrous metal products; at manufacturer: 1.48101e-5 USD
- Other support services: 0.000641989 USD
- Water transport (boats, ships, ferries): 0.0111088 USD
- Limited-service restaurants: 0.00349154 USD
- Communications equipment; at manufacturer: 9.73913e-9 USD
- Other petroleum and coal products; at manufacturer: 2.01869e-5 USD
- Gasoline, fuels, and by-products of petroleum refining; at manufacturer: 0.0137889 USD
- Hydraulic pumps, motors, cylinders and actuators; at manufacturer: 5.94113e-6 USD
- Wireless telecommunications: 0.000963376 USD
- Welding and Soldering Equipment, Scales and Balances, and other general purpose machinery; at manufacturer: 2.39441e-6 USD
- Urethane and other foam products; at manufacturer: 3.54759e-7 USD
- Veneer, plywood, and engineered wood; at manufacturer: 0.000109488 USD
- Adhesives; at manufacturer: 2.23114e-5 USD
- Other vehicle parts; at manufacturer: 0.00253292 USD
- Commercial equipment rental: 0.00105742 USD
- Telecommunications: 0.00258372 USD
- Vehicle rental and leasing: 0.00160466 USD
- Fabric; at manufacturer: 7.44994e-6 USD
- Nonferrous metal casts; at manufacturer: 1.67335e-5 USD
- Metal coatings, engravings, and heat treatments; at manufacturer: 0.00960708 USD
- Metal structural products; at manufacturer: 9.72807e-6 USD
- Lids, jars, bottle caps, other metal closures and crowns; at manufacturer: 0.00027578 USD
- Household goods repair: 0.0006409 USD
- Laminated plastic plates and shapes; at manufacturer: 2.62522e-6 USD
- Wholesale trade: 0.0199101 USD
- Clay and ceramic products; at manufacturer: 0.00100266 USD
- Accounting, tax preparation, bookkeeping, and payroll: 0.00290644 USD
- Insurance carriers: 0.00430249 USD
- Clothing; at manufacturer: 2.83807e-7 USD
- Management consulting: 0.000651312 USD
- Material handling equipment; at manufacturer: 0.0013288 USD
- Compressed Gases; at manufacturer: 4.56302e-6 USD
- Scenic and sightseeing transportation and support activities for transportation: 0.00064071 USD
- Rubber and plastic belts and hoses; at manufacturer: 1.83023e-6 USD

## Inputs from nature
- Occupation, industrial area: 0.000247433 m2*a; data quality (4,2,1,1,1)
- Water, fresh: 0.000924332, 0.000439711 m3 (2 entries, compartments not in this file); data quality (2,2,1,4,2)
- Water, saline: 0.000280115 m3; data quality (4,2,1,4,2)
- Peat: 7.76971e-5 kg; data quality (1,1,1,1,1)
- Clay, unspecified: 0.00246323 kg; data quality (1,1,1,1,1)
- Occupation, urban, discontinuously built: 7.96562e-5 m2*a; data quality (4,2,1,1,1)
- Diatomite: 0.000149583 kg; data quality (1,1,1,1,1)
- Phosphate ore: 0.00420029 kg; data quality (1,1,1,1,1)
- Sodium chloride: 0.00752068 kg; data quality (1,1,1,1,1)
- Kyanite: 1.82621e-5 kg; data quality (1,1,1,1,1)
- Fluorspar: 1.89262e-5 kg; data quality (1,1,1,1,1)
- Energy, solar: 2.94784e-6 MJ; data quality (3,1,1,1,1)
- Perlite: 7.48748e-5 kg; data quality (1,1,1,1,1)
- Zeolites: 1.06418e-5 kg; data quality (1,1,1,1,1)
- Occupation, industrial area, built up: 8.24775e-5 m2*a; data quality (4,2,1,1,1)
- Boron: 0.000648582 kg; data quality (1,1,1,1,1)
- Clay, bentonite: 0.000796893 kg; data quality (1,1,1,1,1)
- Garnet: 5.34582e-6 kg; data quality (1,1,1,1,1)
- Talc: 0.000101272 kg; data quality (1,1,1,1,1)
- Gypsum: 0.00182621 kg; data quality (1,1,1,1,1)
- Potassium: 0.000117148 kg; data quality (1,1,1,1,1)
- Barite: 0.000110071 kg; data quality (1,1,1,1,1)
- Feldspar: 8.79903e-5 kg; data quality (1,1,1,1,1)
- Occupation, mineral extraction site: 0.00029294 m2*a; data quality (1,3,1,1,1)
- Vermiculite: 1.66019e-5 kg; data quality (1,1,1,1,1)
- Pumice: 4.61534e-5 kg; data quality (1,1,1,1,1)
- Lithium: 1.44437e-7 kg; data quality (1,1,1,1,1)
- Sodium carbonate: 0.00194243 kg; data quality (1,1,1,1,1)
- Kaolin: 0.00104758 kg; data quality (1,1,1,1,1)
- Energy, wind: 2.29478e-6 MJ; data quality (3,1,1,1,1)
- Mica: 7.63689e-6 kg; data quality (1,1,1,1,1)

## Emissions to nature
- Ethylene glycol monoethyl ether: 4.67014e-8 kg; data quality (5,1,1,1,4)
- carbon monoxide: 0.000379096 kg; data quality (2,2,1,1,2)
- Ethane, 1,1,1-trifluoro-, HFC-143a: 9.70402e-11 kg; data quality (4,2,1,4,1)
- acetophenone: 7.96217e-9 kg; data quality (4,1,1,1,4)
- Methyl iodide: 4.31894e-10 kg; data quality (4,2,1,1,5)
- cyanide: 1.66642e-10 kg; data quality (3,2,1,1,5)
- copper: 5.06256e-13, 1.6915e-10 kg (2 entries, compartments not in this file); data quality (4,1,1,1,5)
- chloroform: 2.74333e-10 kg; data quality (3,1,1,1,4)
- Diethylene glycol butyl ether: 1.67301e-10 kg; data quality (4,2,1,1,5)
- arsenic: 6.54935e-10 kg; data quality (2,1,1,1,4)
- propargyl alcohol: 6.08317e-9 kg; data quality (4,1,1,1,4)
- Cresol: 2.39874e-10 kg; data quality (2,1,1,1,4)
- nickel: 1.42159e-7 kg; data quality (3,2,1,1,3)
- diethanolamine: 5.48497e-13 kg; data quality (3,2,1,1,5)
- dibenzofuran: 8.31657e-10 kg; data quality (4,2,1,1,1)
- anthracene: 6.28258e-11 kg; data quality (3,2,1,1,3)
- Aluminum: 1.58203e-7 kg; data quality (4,1,1,1,4)
- 1,4-BENZOQUINONE: 2.40567e-11 kg; data quality (3,2,1,1,1)
- o-toluidine: 1.76431e-9 kg; data quality (3,1,1,1,4)
- fluorine: 3.27503e-9 kg; data quality (4,1,1,1,5)
- chromium: 2.37308e-11, 4.65123e-14, 2.36811e-8 kg (3 entries, compartments not in this file); data quality (4,1,1,1,5)
- Benzo(g,h,i)perylene: 1.2285e-10 kg; data quality (3,2,1,1,5)
- Asbestos: 8.57713e-14 kg; data quality (5,2,1,1,1)
- Benzo(a)anthracene: 4.16793e-14 kg; data quality (2,2,1,1,1)
- MOLYBDENUM(VI): 8.40681e-8 kg; data quality (3,1,1,1,4)
- trichloroethylene: 3.41551e-9 kg; data quality (4,2,1,1,5)
- toluene, 2,4-dinitro-: 3.91859e-15 kg; data quality (5,2,1,1,5)
- ethyl acrylate: 3.1128e-10 kg; data quality (4,2,1,1,5)
- formaldehyde: 3.16533e-7 kg; data quality (2,2,1,2,2)
- cyclohexane: 1.37772e-8 kg; data quality (4,1,1,1,5)
- Pendimethalin: 1.07263e-11 kg; data quality (5,1,1,1,5)
- monochloroethane: 2.43763e-9 kg; data quality (3,2,1,1,5)
- phenol: 4.929e-7 kg; data quality (4,2,1,1,3)
- acenaphthylene: 1.34664e-10 kg; data quality (3,2,1,4,1)
- 1,4-dioxane: 1.40765e-13 kg; data quality (4,2,1,1,5)
- Benzo(b)fluoranthene: 2.66076e-12 kg; data quality (3,2,1,3,2)
- Propene, 1,3-dichloro-: 5.52048e-13 kg; data quality (3,2,1,1,5)
- CHLORONAPHTHALENE: 1.59829e-17 kg; data quality (1,2,1,1,5)
- ACRYLAMIDE: 1.45718e-11 kg; data quality (4,1,1,1,4)
- ethane, 1,1,2-trichloro-: 1.14455e-12 kg; data quality (4,2,1,1,5)
- methane, dichloro-, hcc-30: 9.40218e-9 kg; data quality (4,2,1,1,1)
- o-Xylene: 4.13965e-9 kg; data quality (3,2,1,3,2)
- lead: 4.27372e-11 kg; data quality (3,1,1,1,5)
- propanal: 1.3215e-8 kg; data quality (3,2,1,4,1)
- mercury: 6.16146e-15, 2.03608e-16 kg (2 entries, compartments not in this file); data quality (3,1,1,1,5)
- Nitrobenzene: 4.94881e-9 kg; data quality (3,1,1,1,4)
- ethane, 1,2-dibromo-: 2.66395e-10 kg; data quality (5,1,1,1,4)
- benzene, ethyl-: 1.49023e-7 kg; data quality (4,2,1,1,3)
- Ethylene glycol monoethyl ether: 5.09019e-10 kg; data quality (5,1,1,1,5)
- methanol: 1.06788e-10 kg; data quality (3,1,1,1,5)
- cumene: 3.32119e-8 kg; data quality (4,2,1,1,3)
- Water, fresh: 0.00109841 m3; data quality (2,2,1,4,2)
- toluene: 2.02503e-14 kg; data quality (5,1,1,1,5)
- ethylbenzene: 1.28384e-8 kg; data quality (4,1,1,1,4)
- particulates, < 2.5 um: 0.000286885 kg; data quality (3,2,1,1,3)
- hydrogen sulfide: 2.31386e-8 kg; data quality (3,2,1,1,3)
- ethane, 1,2-dichloro-: 2.94885e-10 kg; data quality (4,1,1,1,4)
- ethylene glycol: 6.17609e-12 kg; data quality (5,1,1,1,5)
- benz[a]anthracene: 4.79835e-11 kg; data quality (2,2,1,1,3)
- m-cresol: 2.15775e-9 kg; data quality (3,1,1,1,4)
- manganese: 6.95885e-7 kg; data quality (3,2,1,1,3)
- tertiary-Butyl Acetate: 4.16057e-9 kg; data quality (3,2,1,1,5)
- Propene: 6.03752e-11 kg; data quality (3,1,1,1,5)
- methyl isobutyl ketone: 1.96844e-8 kg; data quality (3,2,1,1,4)
- acrolein: 9.28983e-9 kg; data quality (3,2,1,3,2)
- 2-METHOXYETHANOL: 1.9345e-13 kg; data quality (4,2,1,1,5)
- phthalic anhydride: 3.33008e-14 kg; data quality (2,2,1,1,5)
- lead: 1.24603e-8 kg; data quality (3,2,1,1,4)
- Dibenz(a,h)anthracene: 6.29612e-14 kg; data quality (2,2,1,1,2)
- acetonitrile: 1.13548e-8 kg; data quality (3,1,1,1,4)
- Methane: 8.42486e-6 kg; data quality (4,2,1,4,1)
- BENEFIN: 7.91025e-12 kg; data quality (5,1,1,1,5)
- methane, monochloro-, r-40: 6.24904e-9 kg; data quality (3,2,1,1,5)
- Cobalt: 1.33121e-10 kg; data quality (3,2,1,1,4)
- benzene, chloro-: 5.2835e-10 kg; data quality (4,2,1,1,3)
- ethylene oxide: 4.08387e-11 kg; data quality (3,2,1,1,5)
- Triethylene glycol: 2.43476e-9 kg; data quality (5,2,1,1,5)
- copper: 1.9793e-10 kg; data quality (4,1,1,1,4)
- Propane, 1,1,1,3,3,3-hexafluoro-, HCFC-236fa: 2.62157e-12 kg; data quality (4,2,1,4,1)
- hydroquinone: 9.6875e-15 kg; data quality (3,2,1,1,5)
- Hydrazine, methyl-: 7.21989e-12 kg; data quality (2,2,1,1,5)
- 1,1,1-trichloroethane: 8.10919e-10 kg; data quality (3,2,1,1,5)
- p-cresol: 1.3081e-9 kg; data quality (3,1,1,1,4)
- particulates, < 10 um: 0.000248838 kg; data quality (3,2,1,1,3)
- hydrogen chloride: 1.91597e-6 kg; data quality (2,2,1,1,4)
- benzene: 8.06855e-7 kg; data quality (3,2,1,1,3)
- pentachlorophenol: 1.13168e-15 kg; data quality (3,2,1,1,5)
- chlorine: 3.97369e-7 kg; data quality (4,2,1,1,3)
- phenanthrene: 1.11851e-9 kg; data quality (3,2,1,2,3)
- benzo(a)pyrene: 1.85807e-12 kg; data quality (3,2,1,3,1)
- Zinc: 1.88087e-8 kg; data quality (5,1,1,1,5)
- Ethane, pentafluoro-, HFC-125: 2.26804e-10 kg; data quality (4,2,1,4,1)
- hexane: 6.54263e-7 kg; data quality (3,2,1,1,3)
- ACIFLUORFEN-SODIUM: 7.29711e-10 kg; data quality (3,1,1,1,4)
- TERT-BUTYL ALCOHOL: 1.34863e-9, 8.18648e-12 kg (2 entries, compartments not in this file); data quality (4,1,1,1,5)
- butanol: 2.59565e-8 kg; data quality (5,1,1,1,4)
- o-cresol: 1.71588e-13 kg; data quality (4,2,1,1,5)
- styrene: 2.16159e-7 kg; data quality (4,2,1,1,5)
- Nitrogen: 3.33921e-5 kg; data quality (5,2,1,1,5)
- isophorone: 4.87728e-11 kg; data quality (2,2,1,1,5)
- methane, bromo-, halon 1001: 2.96323e-11 kg; data quality (3,2,1,1,5)
- t-butyl methyl ether: 5.87182e-9 kg; data quality (4,1,1,1,4)
- Propane, 1,2-dichloro-: 3.13888e-9 kg; data quality (5,1,1,1,4)
- polychlorinated biphenyls: 1.53814e-12 kg; data quality (3,2,1,1,1)
- nitric acid: 4.76792e-8 kg; data quality (3,1,1,1,4)
- Dimethyl sulfate: 2.19662e-11 kg; data quality (3,1,1,1,4)
- Ethene, chloro-: 1.12529e-11 kg; data quality (3,2,1,1,5)
- formic acid: 7.59384e-12 kg; data quality (3,1,1,1,5)
- Triethyl amine: 3.80605e-9 kg; data quality (4,2,1,1,5)
- ETHYLENETHIOUREA: 1.33719e-13 kg; data quality (5,2,1,1,5)
- Xylene: 3.8096e-7 kg; data quality (4,2,1,1,3)
- ammonia: 0.000451948 kg; data quality (3,2,1,1,3)
- beryllium: 1.9727e-11 kg; data quality (2,2,1,1,4)
- VOC, volatile organic compounds: 0.000241244 kg; data quality (3,2,1,1,3)
- phenol: 5.09019e-12 kg; data quality (3,1,1,1,5)
- 4,4'-METHYLENEBIS(2-CHLOROANALINE): 4.01156e-14 kg; data quality (5,2,1,1,5)
- methyl methacrylate: 2.89451e-8 kg; data quality (3,1,1,1,4)
- 4-nitrophenol: 2.62334e-15 kg; data quality (2,2,1,1,5)
- Dinitrogen monoxide: 1.28848e-6 kg; data quality (4,2,1,4,1)
- 1,2-BUTYLENE OXIDE: 5.80114e-12 kg; data quality (4,2,1,1,5)
- trifluralin: 3.1641e-12 kg; data quality (4,1,1,1,5)
- 1,2,4-trimethylbenzene: 2.02375e-9 kg; data quality (5,1,1,1,5)
- Benzo(k)fluoranthene: 1.48993e-12 kg; data quality (3,2,1,4,1)
- ammonia: 3.34594e-6 kg; data quality (3,1,1,1,4)
- cadmium: 4.3087e-10 kg; data quality (3,2,1,1,3)
- para-xylene: 1.28001e-9 kg; data quality (3,2,1,2,4)
- dimethyl formamide: 8.56249e-9 kg; data quality (4,1,1,1,4)
- Carbon dioxide: 0.198226 kg; data quality (4,2,1,4,1)
- carbonyl sulfide: 4.38607e-12 kg; data quality (4,2,1,1,5)
- hexachlorobenzene: 2.02884e-13 kg; data quality (4,1,1,1,4)
- oxadiazon: 7.91025e-12 kg; data quality (3,1,1,1,5)
- BUTYL ISOCYANATE: 3.14907e-13 kg; data quality (4,2,1,1,5)
- vinyl acetate: 1.22118e-11 kg; data quality (4,2,1,1,5)
- toluene: 6.14903e-7 kg; data quality (3,2,1,1,3)
- Hydrazine: 1.23023e-9 kg; data quality (4,2,1,1,3)
- naphthalene: 1.64046e-7 kg; data quality (3,2,1,1,3)
- 2-chloro-1-phenylethanone: 9.75308e-14 kg; data quality (2,2,1,1,5)
- antimony: 5.92944e-9 kg; data quality (3,2,1,1,3)
- ALUMINUM OXIDE: 2.27096e-7 kg; data quality (5,1,1,1,4)
- lead: 1.34063e-9 kg; data quality (3,1,1,1,4)
- sulfur dioxide: 0.00110727 kg; data quality (2,2,1,1,3)
- carbon disulfide: 2.66443e-7 kg; data quality (4,2,1,1,3)
- toluene-2,4-diisocyante: 2.13451e-13 kg; data quality (3,2,1,1,5)
- Water, saline: 0.000234151 m3; data quality (4,2,1,1,2)
- benzyl chloride: 2.08718e-11 kg; data quality (2,2,1,1,5)
- 2-methylnaphthalene: 2.68841e-10 kg; data quality (2,2,1,1,5)
- Chrysene, 5-methyl-: 2.83253e-17 kg; data quality (2,2,1,1,5)
- Ethane, 1,1,2-trichloro-1,2,2-trifluoro-, CFC-113: 1.63653e-10 kg; data quality (4,1,1,1,4)
- manganese: 1.09012e-8, 2.72113e-13 kg (2 entries, compartments not in this file); data quality (4,1,1,1,5)
- ethylene glycol: 2.55074e-8 kg; data quality (5,2,1,1,5)
- Thiophanat-methyl: 3.35395e-12 kg; data quality (4,1,1,1,5)
- AMMONIA: 7.02539e-10 kg; data quality (3,1,1,1,5)
- 1-Methyl-2-pyrrolidinone: 1.99698e-9 kg; data quality (5,1,1,1,4)
- avermectin B1: 2.12973e-11 kg; data quality (3,1,1,1,4)
- epichlorohydrin: 3.26953e-14 kg; data quality (3,2,1,1,5)
- bromoform: 5.43575e-13 kg; data quality (3,2,1,1,5)
- PYRIDINE: 1.58115e-8 kg; data quality (4,1,1,1,4)
- ETHENE: 7.26158e-9 kg; data quality (3,1,1,1,4)
- nitrogen oxides: 0.00080313 kg; data quality (2,2,1,1,3)
- selenium: 6.74843e-9 kg; data quality (2,2,1,1,3)
- Phthalate, dimethyl-: 4.85478e-12 kg; data quality (4,2,1,1,5)
- biphenyl: 4.77269e-11 kg; data quality (4,2,1,1,1)
- Chromium, ion: 1.07198e-7 kg; data quality (3,2,1,1,3)
- carbon tetrachloride: 2.67092e-10 kg; data quality (3,1,1,1,4)
- butadiene: 5.89305e-7 kg; data quality (2,2,1,1,3)
- hydrogen fluoride: 3.64139e-6 kg; data quality (2,2,1,1,4)
- m-xylene: 9.7328e-9 kg; data quality (3,2,1,3,2)
- acenaphthene: 1.0625e-10 kg; data quality (3,2,1,4,1)
- fluoranthene: 2.38946e-10 kg; data quality (2,2,1,1,3)
- 2,4,6-trichlorophenol: 2.57269e-17 kg; data quality (2,2,1,1,5)
- Phosphorus: 2.01224e-5 kg; data quality (2,1,1,1,5)
- propylene oxide: 1.13454e-11 kg; data quality (3,2,1,1,4)
- Hydrocarbons, aromatic: 1.44672e-7 kg; data quality (4,2,1,1,3)
- Carbaryl: 7.91025e-12 kg; data quality (5,1,1,1,5)
- methanol: 7.98186e-7 kg; data quality (4,2,1,1,3)
- 1,4-dichlorobenzene: 2.36929e-10 kg; data quality (2,2,1,1,5)
- aniline: 1.75795e-9 kg; data quality (3,1,1,1,4)
- acrylic acid: 2.85254e-9 kg; data quality (4,1,1,1,5)
- acetaldehyde: 1.14431e-7 kg; data quality (3,2,1,3,2)
- acrylonitrile: 9.77131e-11 kg; data quality (4,2,1,1,1)
- Chromium VI: 4.70101e-8 kg; data quality (3,2,1,1,3)
- antimony: 1.58205e-13 kg; data quality (2,1,1,1,5)
- Ethane, 1,1,1,2-tetrafluoro-, HFC-134a: 8.54855e-10 kg; data quality (4,2,1,4,1)
- pyrene: 1.49295e-10 kg; data quality (2,2,1,1,3)
- ethene, tetrachloro-: 2.0142e-9 kg; data quality (3,1,1,1,4)
- nickel: 7.16494e-10 kg; data quality (4,1,1,1,4)
- Indeno(1,2,3-cd)pyrene: 8.96426e-13 kg; data quality (3,2,1,4,1)
- 1,1,2,2-tetrachloroethane: 2.64444e-10 kg; data quality (4,1,1,1,4)
- diisocyanates: 4.9394e-12 kg; data quality (4,1,1,1,5)
- N,N-DIMETHYLANILINE: 7.32557e-11 kg; data quality (5,2,1,1,5)
- PHOSPHORUS: 1.79602e-8 kg; data quality (3,2,1,1,3)
- 2,4-dinitrophenol: 4.2219e-15 kg; data quality (5,2,1,1,5)
- 2-ethoxyethyl acetate: 1.56287e-11 kg; data quality (5,2,1,1,5)
- Methane, difluoro-, HFC-32: 1.3208e-10 kg; data quality (4,2,1,4,1)
- Phthalate, dibutyl-: 2.61692e-9 kg; data quality (4,1,1,1,4)
- Sulfuric acid: 9.73037e-8 kg; data quality (2,1,1,1,5)
- 3-methylcholanthrene: 2.86826e-16 kg; data quality (2,2,1,1,4)
- 2,2,4-trimethylpentane: 1.55317e-7 kg; data quality (3,2,1,1,3)
- Chrysene: 1.44445e-11 kg; data quality (2,2,1,2,3)
- hexachloro-1,3-butadiene: 4.73479e-14 kg; data quality (4,2,1,1,1)
- fluorene: 1.9757e-7 kg; data quality (2,2,1,1,3)
- arsenic: 6.86157e-10 kg; data quality (3,2,1,1,4)
- mercury: 5.69745e-9 kg; data quality (2,2,1,1,3)
- phthalate, dioctyl-: 8.44793e-9 kg; data quality (3,2,1,1,5)
- methylene diphenyl diisocyanate: 1.66687e-11 kg; data quality (4,2,1,1,2)

## Inventory method
Input-output

## Modelling constants
The reference unit of all processes is 1 USD2013 of the good or service. The technosphere inputs are based on the US BEA detailed input-output tables for 2007. The IO tables are combined to develop a commodity-by-commodity model based on the the industry-technology assumption (see Suh et al., 2010), which assumes all commodities produced by a given industry have the same input structure, but that multiple industries can produce the same commodity. Thus, model technosphere flows represent commodity outputs (and not industry outputs) from other processes in the model. There are no by-products included in these processes. All commodity production is based on US-conditions, despite in reality that some goods and services are produced overseas, as USEEIO v1.1 is a single-region IO model.

## Completeness
The input-output approach assures that all purchased inputs associated with the sectors making these commodities as reported in the US census for 2007 are included. The direct resources extracted including minerals, energy sources, water and land occupied are included. Emissions to air include all critieria air pollutants, greenhouse gases, and hazardous and toxic air pollutants as defined by US EPA. Releases to water include toxics, total nitrogen and total phosphorus, and water discharges. Releases to soil or groundwater include toxics and agriculutural pesticides. Some metal releases to air, water and soil are not included because they could not be speciated. Solid hazardous and non-hazardous wastes generated are not included as an elementary flows although purchases of waste services are included.

## Data treatment
Greenhouse gases are primarily from the US Greenhouse Gas Emission Inventory (USEPA 2016a). Biogenic C uptake is not included (change from version 1.0), as biogenic C emission are not included. Toxic releases to air, water and soil (except pesticides) are from the 2013 Toxic Release Inventory (USEPA 2015a). Criteria air pollutants and hazardous air pollutants are from the 2011 National Emissions Inventory (USEPA 2015b). All estimates are normalized by industry based on sector output in the data year, then converted to 2013 USD using relative sector-specific CPIs (if data year is not 2013). Energy use represent raw renewables or fossil fuel energies and is based on EIA data for 2014. See Table 1 in Yang, Ingwersen et al. 2017 and Supporting Information 1, and the v1.1 data update notes (Ingwersen et al. 2017) for all details on environmental data sources used.Land occupation associated with manufacturing buildings was estimated based on the building floorspace data provided by the U.S. Energy Information Administration in the 2010 Manufacturing Energy Consumption Survey (EIA 2013). Portions of total renewable energy (EIA 2016) based on EIA-923 reports for 2014 (EIA 2017) are included. Nitrogen and Phosphorus releases are modeled in total N and total P equivalents as estimated by the Discharge Monitoring Report Nutrient Loading tool (USEPA 2016b). Self-supplied withdrawals were assigned to industrial sectors based on water use statistics for Canadian industries by NAICS 3-digit sector scaled to US production levels based on gross domestic product by industry (BEA 2015; Statistics Canada 2010), and further disaggregated to the manufacturing sectors based on compensation of employees as provided by the 2007 IO tables (BEA 2015). Water withdrawals associated with public supply were allocated to sectors based on their use of water, sewage, and other services in USD based on the IO tables (BEA 2015). Portions of total renewable energy (EIA 2016) by type are assigned to sectors (hydro, wind, solar, or) based on EIA-923 reports for 2014 (EIA 2017).

## Data collection
2015-2016

## Sampling procedure
US federal government sources, including surveys and US EPA emissions databases are used as the primary sources. From these sources, data for US reporting establishments/facilities are aggregated by the NAICS sector as defined in the BEA detailed 2007 input-output tables. When level of sector aggregation differs, or when direct emissions are not reported but modeled, additional sources are used to make allocations and estimates.

## Review details
In regard to quality assurance and peer-review, each dataset created went through Quality Assurance as defined in a quality assurance project plans at US EPA, CSRA or ERG. The model was assembled with the IO model builder model (USEPA 2016c). Validation functions were used to check that all the model components were properly assembled and harmonized. Bayou Demeke and Santosh Ghimire provided internal peer review of the model methodology and the manuscript underwent standard EPA management review. An editor and two anonymous reviewers at the Journal of Cleaner Production reviewed the model. In regard to data quality evaluation, data quality assessment was performed at the flow and process levels according to the updated US EPA data quality assessment guidelines as defined in US EPA (2016b).

## Intended application
The primary application is for use in the US Environmentally-Extended Input-Ouput model, USEEIO, version 1.1. This model is being used by the US EPA for supporting tools that prioritize goods and services based on potential environmental impacts, resource use or emissions for large regions, including the US and US states, and as a strealined tool for organizations as a starting point to consider sustainable materials management. Model results are designed to provide meso/macro-level decision support.

## Project
USEEIO v1.1 was developed by the US EPA with CSRA and ERG with Wesley W. Ingwersen and David E. Meyer as research leads. Yi Yang was the technical lead on the work for CSRA (contract EP-C-15-012); Troy Hawkins was lead for ERG (contract EP-C-12-021).

## Sources
- USDA 2009b
- Yienger et al. 1995
- Goebes et al. 2003
- USEPA 2016a
- USEPA 2016c
- Nickerson et al. 2011
- USEPA 2016b
- USGS 2016
- USGS 2015
- Edelen and Ingwersen 2017
- Maupin et al. 2014
- EIA 2015
- USDA 2014
- Lovelace 2009
- USDA 2006
- Blackhurst et al. 2010
- USDA 2009a
- USEPA 2015b
- Ingwersen et al. 2017
- EIA 2016
- EIA 2017
- BLM 2008
- Ingwersen et al. DRAFT
- EIA 2013
- Macknick et al. 2011
- Torcellini et al. 2003
- USEPA 2015a
- BEA 2015
- USDA 2016
- Kim et el. 2013
- Statistics Canada 2010
