# Legal services

Dataset: openLCA process, unit process
Category: 5411: Legal Services
Geography: United States
Time period: 2017-01-01 to 2017-12-31
Data quality: US EPA - Process Pedigree Matrix (1;1)
Exchange data quality scheme: US EPA - Flow Pedigree Matrix
Generated by: US EPA with CSRA and ERG
Owner: US EPA
Published in: Yang, Ingwersen et al. 2017
restrictionsDescription: This model shold be appropriately cited (see Yang, Ingwersen et al. 2017 source or Publication field) when used. Any changes or derivations of this model by the user should be documented. The model itself and any results from use of this model shall not be construed to consitute US EPA opinion or policy.
copyright: false

## General comment
BEA Code & Name is '541100:Legal services'. Description of the primary industry producing this good or service, adapted from the Census Bureau NAICS 2007 descriptions: This industry group comprises (1) Offices of Lawyers, (2) Offices of Notaries, and (3) Other Legal Services including: (a) Title Abstract and Settlement Offices, and (b) All Other Legal Services.

## Technology
The process describes the average US production of this good or service within this NAICS-based grouping defined in the BEA 2007 detailed input-output tables (BEA 2015). Distribution, wholesale and retailing of this good or service, use, and final disposal are not included. Creation of a product system with this process will enable modeling of all upstream (supply-chain) activities.

## Geography
Data represent the 50 US states

## Time period
2017 was the year in which this version of USEEIO was released and is the target date for the model

## Reference product
- Legal services: 1 USD

## Inputs from technosphere
All rows: data quality (1,3,1,1,1)
- Computer terminals and other computer peripheral equipment; at manufacturer: 0.0013593 USD
- Movies and film: 3.12084e-5 USD
- Couriers and messengers: 0.00147373 USD
- Vehicle repair: 0.000696987 USD
- Telephones; at manufacturer: 0.000530543 USD
- Waste management and remediation: 0.000225394 USD
- External hard drives, CDs, other storage media; at manufacturer: 0.000457723 USD
- Coal; at mine: 3.4676e-6 USD
- Metal pipe fittings, ball and roller bearings, industrial patterns, metal bath fixtures, other misc. fabricated metals; at manufacturer: 6.58844e-5 USD
- Promoters and agents: 0.000343292 USD
- Nonresidential building repair and maintanence: 0.000513205 USD
- Household goods repair: 0.00070739 USD
- Commercial machinery repair: 0.00132462 USD
- Soap and cleaning compounds; at manufacturer: 4.16112e-5 USD
- Postal service: 0.0014876 USD
- Sporting and athletic goods; at manufacturer: 3.4676e-6 USD
- Pet care, photofinishing, parking and other sundry services: 0.000267005 USD
- Stationery; at manufacturer: 1.38704e-5 USD
- Advertising and public relations: 0.0206391 USD
- Automatic controls for HVAC and refrigeration equipment; at manufacturer: 0.000166445 USD
- Switchgear and switchboards; at manufacturer: 0.000537478 USD
- Consumer goods and general rental centers: 0.000613765 USD
- Civic, social, professional, and similar organizations: 0.000724728 USD
- Independent artists, writers, and performers: 0.000551348 USD
- Carbon and graphite products; at manufacturer: 0.000551348 USD
- Electricity; at consumer: 0.00128995 USD
- Newspapers; at publisher: 3.4676e-6 USD
- Books, newspapers, magazines, and other print media; at manufacturer: 0.00256602 USD
- Golf courses, marinas, ski resorts, fitness and other rec centers and industries: 0.000690052 USD
- Office supplies (not paper); at manufacturer: 9.01576e-5 USD
- Gasoline, fuels, and by-products of petroleum refining; at manufacturer: 0.000481996 USD
- Other plastic products; at manufacturer: 0.000308616 USD
- Other computer related services, including facilities management: 0.00448707 USD
- Glass and glass products; at manufacturer: 2.42732e-5 USD
- Specialty transformers; at manufacturer: 0.000124834 USD
- Computer storage device readers; at manufacturer: 6.9352e-6 USD
- Employment services: 0.00575275 USD
- Monetary authorities and depository credit intermediation: 0.00864126 USD
- Air conditioning, refrigeration, and warm air heating equipment; at manufacturer: 6.58844e-5 USD
- Communications equipment; at manufacturer: 4.85464e-5 USD
- Buildings and dwellings services: 0.00208749 USD
- Air transport: 0.00275674 USD
- Specialized design: 0.000267005 USD
- Other retail: 0.000176848 USD
- Shelving and lockers; at manufacturer: 2.08056e-5 USD
- Facilities support: 0.000558283 USD
- Internet publishing and broadcasting: 0.00108536 USD
- Accounting, tax preparation, bookkeeping, and payroll: 0.00591919 USD
- Analytical laboratory instruments; at manufacturer: 0.000124834 USD
- Truck transport: 0.000471593 USD
- Commercial equipment rental: 0.00120672 USD
- Lessors of nonfinancial intangible assets: 0.00328035 USD
- Business support: 0.0156077 USD
- Magazines and journals; at publisher: 0.000166445 USD
- Water transport (boats, ships, ferries): 3.4676e-6 USD
- Rail transport: 0.000117898 USD
- Plastic pipe, fittings, and sausage casings; at manufacturer: 3.4676e-6 USD
- Investigation and security: 0.000717793 USD
- Nondepository credit intermediation and related activities: 0.00212217 USD
- Paper; at manufacturer: 5.89492e-5 USD
- Hotels and campgrounds: 0.00282956 USD
- Welding and Soldering Equipment, Scales and Balances, and other general purpose machinery; at manufacturer: 1.38704e-5 USD
- Pipeline transport: 3.4676e-6 USD
- Printed circuit and electronic assembly; at manufacturer: 0.0002462 USD
- Jewelry and silverware; at manufacturer: 1.38704e-5 USD
- Screws, nuts, and bolts; at manufacturer: 3.4676e-6 USD
- Light fixtures; at manufacturer: 0.00015951 USD
- Insurance agencies and brokerages: 0.000221926 USD
- Full-service restaurants: 0.00414725 USD
- Communication and energy wire and cable; at manufacturer: 0.000350227 USD
- Wholesale trade: 0.00156735 USD
- General merchandise stores: 2.42732e-5 USD
- Metal structural products; at manufacturer: 0.000194186 USD
- Greenhouse crops, mushrooms, nurseries, and flowers; at farm: 3.4676e-6 USD
- Electronic equipment repair and maintenance: 0.00052014 USD
- Cardboard containers; at manufacturer: 0.000353695 USD
- Travel arrangement and reservation: 0.000176848 USD
- All other food and drinking places: 0.00079408 USD
- Software: 0.000839159 USD
- Plastic bags, films, and sheets; at manufacturer: 6.9352e-6 USD
- Environmental and other technical consulting services: 0.000846094 USD
- Directory, mailing list, and other publishers; at publisher: 0.000166445 USD
- Office administration: 0.001498 USD
- Noncomparable imports: 0.0013697 USD
- Management consulting: 0.0037242 USD
- Unrefined oil and gas; at extraction site: 2.42732e-5 USD
- Legal services: 0.00813845 USD
- Performances: 0.000475061 USD
- Food and beverage stores: 6.9352e-6 USD
- Veneer, plywood, and engineered wood; at manufacturer: 2.08056e-5 USD
- Dry-cleaning and laundry: 7.28196e-5 USD
- Vehicle rental and leasing: 0.0025903 USD
- Company and enterprise management: 0.0124209 USD
- Wireless communications; at manufacturer: 0.000301681 USD
- Plastic bottles; at manufacturer: 3.4676e-6 USD
- Marketing research and all other miscellaneous professional, scientific, and technical services: 0.00122059 USD
- Photographers: 0.000440385 USD
- Passenger ground transport: 0.00128648 USD
- Sports: 0.000263538 USD
- Other support services: 0.00361324 USD
- Securities and commodities brokerage and exchanges: 0.00419579 USD
- Natural gas; at consumer: 0.00015951 USD
- Architectural, engineering, and related services: 0.00154308 USD
- Cardboard; at manufacturer: 0.000527075 USD
- Polystyrene foam products; at manufacturer: 3.4676e-6 USD
- Paper bags and coated paper; at manufacturer: 0.000131769 USD
- Warehousing: 0.000492399 USD
- Limited-service restaurants: 0.00252094 USD
- Other real estate: 0.0649447 USD
- Light bulbs; at manufacturer: 3.4676e-6 USD
- News syndicates, libraries, archives, Internet publishing and all other information services: 5.54816e-5 USD
- Telecommunications: 0.0072993 USD
- State and local government enterprises: 0.000901576 USD
- Chemicals (except basic chemicals, agrichemicals, polymers, paints, pharmaceuticals,soaps, cleaning compounds); at manufacturer: 0.000485464 USD
- Scenic and sightseeing transportation and support activities for transportation: 0.00107149 USD
- Data processing and hosting: 0.00332543 USD
- Computer systems design: 0.00192105 USD
- Satellite, telecommunications resellers, and all other telecommunications: 0.000745534 USD
- Books; at publisher: 0.00010056 USD
- Investment advice, portfolio management, and other financial advising services: 0.000357163 USD
- Wireless telecommunications: 0.00312431 USD
- Drinking water and wastewater treatment; at consumer: 7.28196e-5 USD
- Audio and video equipment; at manufacturer: 3.4676e-6 USD
- Insurance carriers: 0.0141443 USD

## Inputs from nature
- Water, fresh: 2.43981e-5, 4.22234e-5 m3 (2 entries, compartments not in this file); data quality (1,2,1,4,2)
- Occupation, urban, discontinuously built: 0.000780423 m2*a; data quality (4,2,1,1,1)

## Emissions to nature
- naphthalene: 1.07573e-9 kg; data quality (3,2,1,2,4)
- methane, bromo-, halon 1001: 1.08158e-12 kg; data quality (3,2,1,1,5)
- particulates, < 10 um: 5.86554e-8 kg; data quality (3,2,1,1,5)
- Xylene: 1.61849e-8 kg; data quality (3,2,1,4,1)
- phenol: 3.68249e-12 kg; data quality (4,2,1,1,5)
- hydrogen chloride: 1.02926e-8 kg; data quality (2,2,1,1,5)
- Propene, 1,3-dichloro-: 5.63577e-15 kg; data quality (3,2,1,1,5)
- formaldehyde: 7.88477e-9 kg; data quality (3,2,1,3,2)
- 2-METHOXYETHANOL: 8.80112e-13 kg; data quality (4,2,1,1,5)
- ethyl acrylate: 5.86741e-12 kg; data quality (4,2,1,1,5)
- styrene: 1.30854e-8 kg; data quality (4,2,1,1,5)
- nitrogen oxides: 2.11022e-6 kg; data quality (2,2,1,1,4)
- Ethylene glycol monoethyl ether: 5.86741e-13 kg; data quality (3,2,1,1,5)
- hexane: 1.70333e-8 kg; data quality (3,2,1,2,4)
- ethane, 1,2-dibromo-: 9.4566e-15 kg; data quality (2,2,1,1,5)
- 2-methylnaphthalene: 1.78876e-13 kg; data quality (2,2,1,1,5)
- Cobalt: 5.95096e-12 kg; data quality (3,2,1,1,5)
- acrolein: 7.2245e-10 kg; data quality (2,2,1,2,4)
- Benzo(b)fluoranthene: 8.13894e-13 kg; data quality (3,2,1,3,2)
- Hydrocarbons, aromatic: 1.50713e-10 kg; data quality (3,2,1,4,2)
- propylene oxide: 1.32017e-9 kg; data quality (3,2,1,1,5)
- carbon tetrachloride: 8.23994e-12 kg; data quality (4,2,1,1,5)
- acenaphthylene: 1.72334e-11 kg; data quality (3,2,1,4,1)
- Benzo(a)anthracene: 5.41923e-14 kg; data quality (2,2,1,1,5)
- cyanide: 7.77432e-13 kg; data quality (3,2,1,1,5)
- selenium: 5.05989e-11 kg; data quality (2,2,1,1,5)
- fluoranthene: 4.75185e-12 kg; data quality (3,2,1,4,1)
- acenaphthene: 4.66006e-12 kg; data quality (3,2,1,4,1)
- ethane, 1,2-dichloro-: 9.72877e-12 kg; data quality (3,2,1,1,5)
- Ethene, chloro-: 1.30108e-12 kg; data quality (3,2,1,1,5)
- Propane, 1,2-dichloro-: 2.38522e-12 kg; data quality (4,2,1,1,5)
- Propane, 1,1,1,3,3,3-hexafluoro-, HCFC-236fa: 1.57419e-10 kg; data quality (4,2,1,4,1)
- arsenic: 1.77594e-11 kg; data quality (3,2,1,1,5)
- AZIRIDINE: 1.17348e-12 kg; data quality (4,2,1,1,5)
- 1,4-dioxane: 2.81636e-10 kg; data quality (4,2,1,1,5)
- benzene: 1.29591e-8 kg; data quality (3,2,1,4,1)
- butadiene: 1.88064e-9 kg; data quality (3,2,1,4,1)
- monochloroethane: 3.99201e-16 kg; data quality (3,2,1,1,5)
- biphenyl: 4.52564e-14 kg; data quality (4,2,1,1,5)
- ethylene oxide: 4.65886e-9 kg; data quality (3,2,1,1,5)
- Dinitrogen monoxide: 2.45244e-9 kg; data quality (4,2,1,4,1)
- benzene, ethyl-: 4.55752e-9 kg; data quality (3,2,1,4,1)
- Triethylene glycol: 1.29083e-11 kg; data quality (5,2,1,1,5)
- chlorine: 1.27616e-11 kg; data quality (4,2,1,1,5)
- aniline: 1.46685e-12 kg; data quality (4,2,1,1,5)
- Methane, difluoro-, HFC-32: 7.93113e-9 kg; data quality (4,2,1,4,1)
- Dimethoxy methane: 2.28829e-11 kg; data quality (2,2,1,1,5)
- Nitrogen: 1.24896e-9 kg; data quality (4,2,1,1,5)
- o-Xylene: 2.17703e-10 kg; data quality (3,2,1,4,1)
- benz[a]anthracene: 5.90273e-13 kg; data quality (3,2,1,4,2)
- phthalate, dioctyl-: 2.14194e-11 kg; data quality (3,2,1,1,5)
- Titanium: 8.80112e-13 kg; data quality (5,2,1,1,5)
- beryllium: 7.1904e-12 kg; data quality (2,2,1,1,5)
- methyl methacrylate: 2.27362e-10 kg; data quality (4,2,1,1,5)
- fluorene: 8.4443e-12 kg; data quality (3,2,1,4,1)
- acrylic acid: 3.48231e-10 kg; data quality (4,2,1,1,5)
- 1,2,4-trichlorobenzene: 6.0141e-11 kg; data quality (4,2,1,1,5)
- Water, fresh: 5.64094e-5 m3; data quality (1,2,1,4,2)
- ammonia: 3.17817e-8 kg; data quality (3,2,1,1,5)
- 2-(2-BUTOXYETHOXY) ETHYL ACETATE: 8.31412e-10 kg; data quality (5,2,1,1,5)
- para-xylene: 1.12566e-11 kg; data quality (3,2,1,4,1)
- carbon monoxide: 8.09612e-6 kg; data quality (3,2,1,1,2)
- Methyl iodide: 5.86741e-13 kg; data quality (4,2,1,1,5)
- toluene-2,4-diisocyante: 9.24117e-11 kg; data quality (3,2,1,1,5)
- Dibenz(a,h)anthracene: 2.48722e-14 kg; data quality (2,2,1,1,4)
- Phosphorus: 1.98826e-10 kg; data quality (2,1,1,1,5)
- m-xylene: 6.01458e-10 kg; data quality (3,2,1,4,1)
- ethane, 1,1,2-trichloro-: 5.9353e-13 kg; data quality (4,2,1,1,5)
- dimethyl formamide: 1.26325e-9 kg; data quality (4,2,1,1,5)
- Chromium VI: 4.83831e-12 kg; data quality (3,2,1,1,5)
- particulates, < 2.5 um: 3.65578e-7 kg; data quality (3,2,1,1,5)
- phenanthrene: 1.51864e-11 kg; data quality (3,2,1,4,1)
- vinyl acetate: 2.05359e-12 kg; data quality (4,2,1,1,5)
- Benzo(g,h,i)perylene: 1.38506e-12 kg; data quality (3,2,1,4,1)
- carbon disulfide: 1.76022e-12 kg; data quality (4,2,1,1,5)
- propanal: 6.41889e-10 kg; data quality (3,2,1,4,1)
- PHOSPHORUS: 3.27437e-12 kg; data quality (2,2,1,1,5)
- hydrogen fluoride: 6.50187e-10 kg; data quality (2,2,1,1,5)
- t-butyl methyl ether: 3.57032e-10 kg; data quality (3,2,1,1,5)
- acetonitrile: 3.37024e-9 kg; data quality (3,2,1,1,5)
- pentachlorophenol: 3.67737e-15 kg; data quality (3,2,1,1,5)
- toluene: 3.54825e-8 kg; data quality (4,2,1,2,3)
- antimony: 2.55765e-11 kg; data quality (3,2,1,1,5)
- anthracene: 3.46531e-12 kg; data quality (3,2,1,4,1)
- Indeno(1,2,3-cd)pyrene: 4.45278e-13 kg; data quality (3,2,1,4,1)
- Triethyl amine: 2.14161e-11 kg; data quality (4,2,1,1,5)
- Dimethylcarbamyl chloride: 2.05359e-12 kg; data quality (5,2,1,1,5)
- methyl isobutyl ketone: 5.07707e-9 kg; data quality (4,2,1,1,5)
- Chrysene: 6.84932e-13 kg; data quality (3,2,1,3,2)
- trichloroethylene: 2.16316e-12 kg; data quality (4,2,1,1,5)
- Propane sultone: 1.46685e-12 kg; data quality (5,2,1,1,5)
- Carbon dioxide: 0.000885613 kg; data quality (4,2,1,4,1)
- 4,4'-METHYLENEDIANILINE: 8.80112e-13 kg; data quality (4,2,1,1,5)
- 2-PHENOXYETHANOL: 8.80112e-13 kg; data quality (5,2,1,1,5)
- cumene: 1.17348e-12 kg; data quality (4,2,1,1,5)
- 2,4-dinitrophenol: 1.2979e-14 kg; data quality (5,2,1,1,5)
- Ethane, pentafluoro-, HFC-125: 1.36191e-8 kg; data quality (4,2,1,4,1)
- ethylene glycol: 1.90632e-8 kg; data quality (5,2,1,1,5)
- sulfur dioxide: 9.82252e-7 kg; data quality (2,2,1,1,5)
- acetaldehyde: 4.00643e-9 kg; data quality (3,2,1,3,2)
- Methane: 8.07911e-8 kg; data quality (4,2,1,4,1)
- pyrene: 7.32632e-12 kg; data quality (3,2,1,3,2)
- Ethane, 1,1,1-trifluoro-, HFC-143a: 5.82705e-9 kg; data quality (4,2,1,4,1)
- benzene, chloro-: 3.84706e-11 kg; data quality (4,2,1,1,5)
- 3-methylcholanthrene: 6.09694e-15 kg; data quality (2,2,1,1,5)
- ACRYLAMIDE: 3.22708e-12 kg; data quality (4,2,1,1,5)
- phthalic anhydride: 3.52045e-12 kg; data quality (2,2,1,1,5)
- manganese: 6.68577e-10 kg; data quality (3,2,1,1,5)
- Ethane, 1,1,1,2-tetrafluoro-, HFC-134a: 5.13321e-8 kg; data quality (4,2,1,4,1)
- methane, dichloro-, hcc-30: 3.7168e-9 kg; data quality (4,2,1,1,5)
- Dimethyl sulfate: 1.32017e-11 kg; data quality (2,2,1,1,5)
- methylene diphenyl diisocyanate: 2.05359e-12 kg; data quality (4,2,1,1,5)
- 1,1,1-trichloroethane: 8.90666e-12 kg; data quality (4,2,1,1,5)
- acetamide: 8.80112e-13 kg; data quality (5,2,1,1,5)
- methane, monochloro-, r-40: 1.65842e-12 kg; data quality (3,2,1,1,5)
- methanol: 1.87118e-8 kg; data quality (4,2,1,1,5)
- 4-nitrophenol: 7.9316e-15 kg; data quality (2,2,1,1,5)
- VOC, volatile organic compounds: 4.02718e-6 kg; data quality (3,2,1,1,5)
- Diethylene glycol butyl ether: 5.45669e-11 kg; data quality (5,2,1,1,5)
- 1,1,2,2-tetrachloroethane: 8.53885e-15 kg; data quality (3,2,1,1,5)
- mercury: 3.04743e-12 kg; data quality (2,2,1,1,5)
- cadmium: 1.38967e-11 kg; data quality (3,2,1,1,5)
- chloroform: 1.95469e-9 kg; data quality (4,2,1,1,5)
- Benzo(k)fluoranthene: 8.00168e-13 kg; data quality (3,2,1,3,2)
- Phosphine: 2.93371e-13 kg; data quality (4,2,1,1,5)
- benzo(a)pyrene: 6.75017e-13 kg; data quality (3,2,1,3,2)
- 2,2,4-trimethylpentane: 6.72274e-9 kg; data quality (3,2,1,4,1)
- acetophenone: 2.49388e-12 kg; data quality (4,2,1,1,5)
- hydroquinone: 2.34697e-12 kg; data quality (3,2,1,1,5)
- Chromium, ion: 7.82793e-11 kg; data quality (2,2,1,1,5)
- ethene, tetrachloro-: 2.74053e-12 kg; data quality (3,2,1,1,5)
- nickel: 9.35232e-10 kg; data quality (3,2,1,1,5)
- p-cresol: 5.86741e-13 kg; data quality (4,2,1,1,5)
- lead: 2.76869e-10 kg; data quality (3,2,1,1,5)

## Inventory method
Input-output

## Modelling constants
The reference unit of all processes is 1 USD2013 of the good or service. The technosphere inputs are based on the US BEA detailed input-output tables for 2007. The IO tables are combined to develop a commodity-by-commodity model based on the the industry-technology assumption (see Suh et al., 2010), which assumes all commodities produced by a given industry have the same input structure, but that multiple industries can produce the same commodity. Thus, model technosphere flows represent commodity outputs (and not industry outputs) from other processes in the model. There are no by-products included in these processes. All commodity production is based on US-conditions, despite in reality that some goods and services are produced overseas, as USEEIO v1.1 is a single-region IO model.

## Completeness
The input-output approach assures that all purchased inputs associated with the sectors making these commodities as reported in the US census for 2007 are included. The direct resources extracted including minerals, energy sources, water and land occupied are included. Emissions to air include all critieria air pollutants, greenhouse gases, and hazardous and toxic air pollutants as defined by US EPA. Releases to water include toxics, total nitrogen and total phosphorus, and water discharges. Releases to soil or groundwater include toxics and agriculutural pesticides. Some metal releases to air, water and soil are not included because they could not be speciated. Solid hazardous and non-hazardous wastes generated are not included as an elementary flows although purchases of waste services are included.

## Data treatment
Greenhouse gases are primarily from the US Greenhouse Gas Emission Inventory (USEPA 2016a). Biogenic C uptake is not included (change from version 1.0), as biogenic C emission are not included. Toxic releases to air, water and soil (except pesticides) are from the 2013 Toxic Release Inventory (USEPA 2015a). Criteria air pollutants and hazardous air pollutants are from the 2011 National Emissions Inventory (USEPA 2015b). All estimates are normalized by industry based on sector output in the data year, then converted to 2013 USD using relative sector-specific CPIs (if data year is not 2013). Energy use represent raw renewables or fossil fuel energies and is based on EIA data for 2014. See Table 1 in Yang, Ingwersen et al. 2017 and Supporting Information 1, and the v1.1 data update notes (Ingwersen et al. 2017) for all details on environmental data sources used.Land occupation for commercial buildings was estimated based on the building floorspace data provided by the U.S. Energy Information Administration 2012 Commercial Building Energy Consumption Survey (CBECS) (EIA 2015). Total commercial public supply water use is reported by USGS (Maupin et al. 2014). Water use is allocated across commercial sectors based on their use of water, sewage, and other services in USD based on the 2007 Benchmark Use Table before redefinitions (BEA 2015).

## Data collection
2015-2016

## Sampling procedure
US federal government sources, including surveys and US EPA emissions databases are used as the primary sources. From these sources, data for US reporting establishments/facilities are aggregated by the NAICS sector as defined in the BEA detailed 2007 input-output tables. When level of sector aggregation differs, or when direct emissions are not reported but modeled, additional sources are used to make allocations and estimates.

## Review details
In regard to quality assurance and peer-review, each dataset created went through Quality Assurance as defined in a quality assurance project plans at US EPA, CSRA or ERG. The model was assembled with the IO model builder model (USEPA 2016c). Validation functions were used to check that all the model components were properly assembled and harmonized. Bayou Demeke and Santosh Ghimire provided internal peer review of the model methodology and the manuscript underwent standard EPA management review. An editor and two anonymous reviewers at the Journal of Cleaner Production reviewed the model. In regard to data quality evaluation, data quality assessment was performed at the flow and process levels according to the updated US EPA data quality assessment guidelines as defined in US EPA (2016b).

## Intended application
The primary application is for use in the US Environmentally-Extended Input-Ouput model, USEEIO, version 1.1. This model is being used by the US EPA for supporting tools that prioritize goods and services based on potential environmental impacts, resource use or emissions for large regions, including the US and US states, and as a strealined tool for organizations as a starting point to consider sustainable materials management. Model results are designed to provide meso/macro-level decision support.

## Project
USEEIO v1.1 was developed by the US EPA with CSRA and ERG with Wesley W. Ingwersen and David E. Meyer as research leads. Yi Yang was the technical lead on the work for CSRA (contract EP-C-15-012); Troy Hawkins was lead for ERG (contract EP-C-12-021).

## Sources
- Goebes et al. 2003
- BLM 2008
- USDA 2009a
- USDA 2014
- USDA 2009b
- USEPA 2016c
- Nickerson et al. 2011
- Lovelace 2009
- EIA 2016
- USEPA 2015a
- USEPA 2016a
- Edelen and Ingwersen 2017
- Ingwersen et al. DRAFT
- Ingwersen et al. 2017
- USGS 2015
- Blackhurst et al. 2010
- Yienger et al. 1995
- EIA 2013
- Maupin et al. 2014
- BEA 2015
- EIA 2015
- USDA 2006
- USEPA 2015b
- USDA 2016
- EIA 2017
- Statistics Canada 2010
- Macknick et al. 2011
- Torcellini et al. 2003
- USGS 2016
- USEPA 2016b
- Kim et el. 2013
