# Commercial equipment rental

Dataset: openLCA process, unit process
Category: 5324: Commercial and Industrial Machinery and Equipment Rental and Leasing
Geography: United States
Time period: 2017-01-01 to 2017-12-31
Data quality: US EPA - Process Pedigree Matrix (1;1)
Exchange data quality scheme: US EPA - Flow Pedigree Matrix
Generated by: US EPA with CSRA and ERG
Owner: US EPA
Published in: Yang, Ingwersen et al. 2017
restrictionsDescription: This model shold be appropriately cited (see Yang, Ingwersen et al. 2017 source or Publication field) when used. Any changes or derivations of this model by the user should be documented. The model itself and any results from use of this model shall not be construed to consitute US EPA opinion or policy.
copyright: false

## General comment
BEA Code & Name is '532400:Commercial and industrial machinery and equipment rental and leasing'. Description of the primary industry producing this good or service, adapted from the Census Bureau NAICS 2007 descriptions: This industry group comprises establishments primarily engaged in renting or leasing commercial-type and industrial-type machinery and equipment. The types of establishments included in this industry group are generally involved in providing capital or investment-type equipment that clients use in their business operations. These establishments typically cater to a business clientele and do not generally operate a retail-like or store-front facility.

## Technology
The process describes the average US production of this good or service within this NAICS-based grouping defined in the BEA 2007 detailed input-output tables (BEA 2015). Distribution, wholesale and retailing of this good or service, use, and final disposal are not included. Creation of a product system with this process will enable modeling of all upstream (supply-chain) activities.

## Geography
Data represent the 50 US states

## Time period
2017 was the year in which this version of USEEIO was released and is the target date for the model

## Reference product
- Commercial equipment rental: 1 USD

## Inputs from technosphere
All rows: data quality (1,3,1,1,1)
- Electronic equipment repair and maintenance: 0.00257197 USD
- Vehicle engines and engine parts; at manufacturer: 2.05428e-5 USD
- Computer storage device readers; at manufacturer: 1.63479e-6 USD
- Rubber and plastic belts and hoses; at manufacturer: 2.4052e-6 USD
- Directory, mailing list, and other publishers; at publisher: 1.46193e-5 USD
- Compressed Gases; at manufacturer: 8.09381e-7 USD
- Paper; at manufacturer: 0.000117123 USD
- Electronic capacitors, resistors, coils, transformers, connectors and other components (except semiconductors and printed circuit assemblies); at manufacturer: 2.62018e-5 USD
- Leather; at manufacturer: 0.000379467 USD
- Plastic bags, films, and sheets; at manufacturer: 0.000163205 USD
- Jewelry and silverware; at manufacturer: 1.30576e-6 USD
- Cutting and machine tool accessory, rolling mill, and other metalworking machines; at manufacturer: 2.30498e-6 USD
- Metal plumbing drains, faucets, valves, and other fittings; at manufacturer: 0.000155467 USD
- Software: 4.61285e-5 USD
- Full-service restaurants: 0.00261505 USD
- Commercial equipment rental: 0.00496223 USD
- Drinking water and wastewater treatment; at consumer: 9.05721e-5 USD
- Other primary nonferrous metals; at manufacturer: 0.00058995 USD
- Audio and video equipment; at manufacturer: 1.38942e-7 USD
- Heavy duty trucks; at manufacturer: 1.40303e-6 USD
- Dry-cleaning and laundry: 5.85044e-5 USD
- Investigation and security: 0.000975443 USD
- Coal; at mine: 1.46492e-5 USD
- Pumps and pumping equipment; at manufacturer: 2.80606e-6 USD
- Employment services: 0.00194487 USD
- Performances: 5.35573e-5 USD
- Other vehicle parts; at manufacturer: 5.77165e-5 USD
- Cutlery and handtools; at manufacturer: 0.000132087 USD
- Ready-mix concrete; at manufacturer: 0.00117011 USD
- Data processing and hosting: 0.000342564 USD
- Wooden windows, door, and flooring; at manufacturer: 0.00299252 USD
- Telephones; at manufacturer: 1.15783e-5 USD
- Shelving and lockers; at manufacturer: 7.64858e-9 USD
- Aluminum products; at manufacturer: 3.82429e-8 USD
- Electricity; at consumer: 0.0013221 USD
- Federal government enterprises: 0.000129903 USD
- Vehicle rental and leasing: 0.0104126 USD
- Internet publishing and broadcasting: 5.97427e-5 USD
- Home cooking appliances; at manufacturer: 0.00299189 USD
- All other forging, stamping, and sintering; at manufacturer: 4.51977e-5 USD
- Metal coatings, engravings, and heat treatments; at manufacturer: 0.000262741 USD
- Aluminum; at manufacturer: 0.000694079 USD
- Vehicle seating and interior trim (upholstery); at manufacturer: 0.000126418 USD
- Motorcycle, bicycle, and parts; at manufacturer: 5.61857e-5 USD
- Rubber tires; at manufacturer: 3.35235e-5 USD
- Industrial process variable instruments; at manufacturer: 1.41e-5 USD
- Signs; at manufacturer: 5.71733e-6 USD
- Concrete pipe, bricks, and blocks; at manufacturer: 5.27752e-7 USD
- Warehousing: 0.00069181 USD
- Semiconductors; at manufacturer: 6.29361e-5 USD
- Water transport (boats, ships, ferries): 4.67261e-5 USD
- Independent artists, writers, and performers: 0.000336337 USD
- Architectural, engineering, and related services: 0.000933581 USD
- Unrefined oil and gas; at extraction site: 6.39639e-5 USD
- Glass and glass products; at manufacturer: 3.34545e-5 USD
- Small electrical appliances; at manufacturer: 6.88372e-8 USD
- Chemicals (except basic chemicals, agrichemicals, polymers, paints, pharmaceuticals,soaps, cleaning compounds); at manufacturer: 5.76851e-5 USD
- Heating equipment other than warm air furnaces; at manufacturer: 2.28954e-7 USD
- Truck transport: 0.00146478 USD
- Other retail: 0.000105018 USD
- Rail transport: 0.00010893 USD
- Machinery for the paper, textile, food or other industries (except semiconductor machinery); at manufacturer: 7.02398e-5 USD
- Clothing; at manufacturer: 2.99144e-5 USD
- Asphalt pavement; at manufacturer: 8.43933e-5 USD
- Air transport: 0.00268308 USD
- Screws, nuts, and bolts; at manufacturer: 0.000156942 USD
- Switchgear and switchboards; at manufacturer: 0.000211431 USD
- Environmental and other technical consulting services: 0.000451187 USD
- Other computer related services, including facilities management: 0.000498475 USD
- Securities and commodities brokerage and exchanges: 0.00224156 USD
- Machine shops; at manufacturer: 0.000468169 USD
- State and local government enterprises: 0.000115054 USD
- Plywood and veneer; at manufacturer: 0.00105741 USD
- Advertising and public relations: 0.00452001 USD
- Wireless telecommunications: 0.00130945 USD
- Golf courses, marinas, ski resorts, fitness and other rec centers and industries: 0.000343183 USD
- Valve and fittings (except for plumbing); at manufacturer: 0.000160906 USD
- External hard drives, CDs, other storage media; at manufacturer: 2.02307e-5 USD
- Wood kitchen cabinets and countertops; at manufacturer: 0.00143568 USD
- Air purification and ventilation equipment; at manufacturer: 1.52972e-8 USD
- Material handling equipment; at manufacturer: 3.03631e-5 USD
- Waste management and remediation: 0.000226025 USD
- Surgical appliance and supplies; at manufacturer: 1.2026e-6 USD
- Hydraulic pumps, motors, cylinders and actuators; at manufacturer: 1.23266e-5 USD
- Nondepository credit intermediation and related activities: 0.00426377 USD
- All other converted paper products; at manufacturer: 7.64858e-9 USD
- Travel arrangement and reservation: 0.000531349 USD
- Communications equipment; at manufacturer: 9.99215e-6 USD
- Pet care, photofinishing, parking and other sundry services: 2.42307e-5 USD
- Metal hinges, keys, lock, and other hardware; at manufacturer: 0.000197605 USD
- Veneer, plywood, and engineered wood; at manufacturer: 0.000175711 USD
- Carpets and rugs; at manufacturer: 7.64858e-9 USD
- Insurance carriers: 0.00556503 USD
- Clay and ceramic products; at manufacturer: 0.000154962 USD
- Passenger ground transport: 0.000767803 USD
- Promoters and agents: 7.88657e-5 USD
- Books; at publisher: 3.26451e-6 USD
- Construction machinery; at manufacturer: 1.30281e-6 USD
- Speed changers, industrial high-speed drives, and gears; at manufacturer: 0.000256628 USD
- Other secondary nonferrous metal products; at manufacturer: 5.3091e-5 USD
- Lessors of nonfinancial intangible assets: 0.00152075 USD
- Irradiation apparatuses; at manufacturer: 0.00174176 USD
- Couriers and messengers: 0.0023415 USD
- Wholesale trade: 0.0648097 USD
- Secondary copper products; at manufacturer: 3.90078e-7 USD
- All other food and drinking places: 0.000148479 USD
- Satellite, telecommunications resellers, and all other telecommunications: 0.000253797 USD
- Storage batteries; at manufacturer: 7.46788e-6 USD
- Other engine equipment; at manufacturer: 0.000257897 USD
- Metal pipe fittings, ball and roller bearings, industrial patterns, metal bath fixtures, other misc. fabricated metals; at manufacturer: 0.000218294 USD
- Pipeline transport: 1.77247e-6 USD
- Cardboard; at manufacturer: 7.12113e-5 USD
- Telecommunications: 0.00196804 USD
- Office supplies (not paper); at manufacturer: 0.000228231 USD
- Wiring devices; at manufacturer: 0.000394478 USD
- Other rubber products; at manufacturer: 2.92029e-5 USD
- Lawn and garden equipment; at manufacturer: 0.00342809 USD
- Commercial machinery repair: 0.00775103 USD
- Cardboard containers; at manufacturer: 0.000285779 USD
- Lime and gypsum products; at manufacturer: 0.000547826 USD
- Specialty transformers; at manufacturer: 2.29457e-8 USD
- Management consulting: 0.00200615 USD
- Scientific research and development: 2.60607e-6 USD
- Petrochemicals; at manufacturer: 3.7008e-7 USD
- Metal windows, doors, and architectural products; at manufacturer: 0.00115617 USD
- Transmission and power train parts; at manufacturer: 5.86413e-5 USD
- Colleges, universities, junior colleges, and professional schools: 4.43618e-7 USD
- Copper, nickel, lead, and zinc; at mine: 0.00122353 USD
- Civic, social, professional, and similar organizations: 0.000570004 USD
- Other concrete products; at manufacturer: 0.000226565 USD
- Motors and generators; at manufacturer: 4.40953e-6 USD
- Fabric; at manufacturer: 0.000126418 USD
- Buildings and dwellings services: 0.00169737 USD
- Nonresidential building repair and maintanence: 0.000528523 USD
- Ball and roller bearings; at manufacturer: 2.80606e-6 USD
- Monetary authorities and depository credit intermediation: 0.0091808 USD
- General merchandise stores: 1.76654e-5 USD
- Photographers: 0.000126418 USD
- Finished and coated fabric; at manufacturer: 0.000238789 USD
- Adhesives; at manufacturer: 5.66454e-5 USD
- Welding and Soldering Equipment, Scales and Balances, and other general purpose machinery; at manufacturer: 0.000818822 USD
- Noncomparable imports: 0.00236424 USD
- Gaskets, seals, musical instruments, fasteners, brooms, brushes, mop and other misc. goods; at manufacturer: 0.000486257 USD
- Sporting and athletic goods; at manufacturer: 1.64575e-7 USD
- Lids, jars, bottle caps, other metal closures and crowns; at manufacturer: 0.000293038 USD
- Light gauge metal cans, boxes, and containers; at manufacturer: 1.82938e-5 USD
- Natural gas; at consumer: 0.000450123 USD
- Gasoline, fuels, and by-products of petroleum refining; at manufacturer: 0.000971378 USD
- Other basic organic chemicals; at manufacturer: 1.5109e-6 USD
- Urethane and other foam products; at manufacturer: 0.000478133 USD
- Computer terminals and other computer peripheral equipment; at manufacturer: 0.000440816 USD
- Relay and industrial controls; at manufacturer: 1.71133e-6 USD
- Newspapers; at publisher: 1.52972e-8 USD
- Vehicle electrical and electronic equipment; at manufacturer: 3.2275e-5 USD
- Nonferrous metal casts; at manufacturer: 3.6078e-6 USD
- Springs and wires; at manufacturer: 1.25457e-6 USD
- Office administration: 0.000486816 USD
- Cement; at manufacturer: 0.000154847 USD
- Magazines and journals; at publisher: 8.3963e-5 USD
- Paper bags and coated paper; at manufacturer: 0.000129468 USD
- Food and beverage stores: 6.93352e-7 USD
- Vending, commercial laundry, and other commercial and service industry machinery; at manufacturer: 9.01949e-7 USD
- Limited-service restaurants: 0.00140459 USD
- Books, newspapers, magazines, and other print media; at manufacturer: 0.000368741 USD
- Air conditioning, refrigeration, and warm air heating equipment; at manufacturer: 0.000620295 USD
- Paints and coatings; at manufacturer: 0.000774626 USD
- Sports: 0.000158326 USD
- Wireless communications; at manufacturer: 5.38377e-5 USD
- Plastic bottles; at manufacturer: 7.18656e-5 USD
- Other petroleum and coal products; at manufacturer: 1.52833e-6 USD
- Postal service: 0.00189617 USD
- Movies and film: 1.55368e-5 USD
- Other textiles; at manufacturer: 1.41229e-5 USD
- Specialized design: 0.000551075 USD
- Scenic and sightseeing transportation and support activities for transportation: 0.00177669 USD
- Insurance agencies and brokerages: 0.00143453 USD
- Soap and cleaning compounds; at manufacturer: 5.03495e-8 USD
- Accounting, tax preparation, bookkeeping, and payroll: 0.00262866 USD
- Household goods repair: 0.00201448 USD
- Fabricated pipe and pipe fittings; at manufacturer: 0.000505686 USD
- Stationery; at manufacturer: 1.80441e-5 USD
- Marketing research and all other miscellaneous professional, scientific, and technical services: 0.00138992 USD
- Company and enterprise management: 0.0139253 USD
- News syndicates, libraries, archives, Internet publishing and all other information services: 1.59123e-5 USD
- Abrasive products; at manufacturer: 0.000188284 USD
- Custom metal rolls; at manufacturer: 0.000282408 USD
- Polystyrene foam products; at manufacturer: 1.45781e-5 USD
- Mining and oil/gas field machinery; at manufacturer: 2.93634e-5 USD
- Primary iron, steel, and ferroalloy products; at manufacturer: 0.00103401 USD
- Investment advice, portfolio management, and other financial advising services: 0.00269942 USD
- Semiconductor machinery; at manufacturer: 6.09791e-5 USD
- Watches, clocks, and other measuring and controlling devices; at manufacturer: 8.42862e-5 USD
- Consumer goods and general rental centers: 0.00112026 USD
- Facilities support: 0.00023491 USD
- Lumber and treated lumber; at manufacturer: 0.000885926 USD
- Other support services: 8.0043e-5 USD
- Used and secondhand goods: -1.91759e-5 USD
- Plastic pipe, fittings, and sausage casings; at manufacturer: 0.000438267 USD
- Other nonmetallic mineral products; at manufacturer: 2.48537e-5 USD
- Other educational services: 4.65999e-6 USD
- Motor vehicle steering, suspension components (except spring), and brake systems; at manufacturer: 1.86578e-5 USD
- Laminated plastic plates and shapes; at manufacturer: 0.000267483 USD
- Vehicle repair: 0.00394587 USD
- Vehicles and parts sales: 3.66591e-5 USD
- Other real estate: 0.0124271 USD
- Cast iron and steel; at manufacturer: 4.40953e-5 USD
- Light fixtures; at manufacturer: 7.22801e-5 USD
- Business support: 0.00271725 USD
- Metal structural products; at manufacturer: 0.000665212 USD
- Secondary steel products; at manufacturer: 4.23534e-5 USD
- Legal services: 0.00315606 USD
- Hotels and campgrounds: 0.00184147 USD
- Other plastic products; at manufacturer: 0.000796228 USD
- Communication and energy wire and cable; at manufacturer: 0.000407423 USD
- Computer systems design: 0.000499842 USD
- Printed circuit and electronic assembly; at manufacturer: 5.14734e-5 USD

## Inputs from nature
- Water, fresh: 3.9969e-5, 6.9227e-5 m3 (2 entries, compartments not in this file); data quality (1,2,1,4,2)
- Occupation, urban, discontinuously built: 0.000325818 m2*a; data quality (4,2,1,1,1)
- Water, saline: 7.89481e-9 m3; data quality (4,2,1,4,2)
- Occupation, industrial area: 1.61575e-6 m2*a; data quality (4,2,1,1,1)
- Energy, solar: 0.000729417 MJ; data quality (3,1,1,1,1)
- Occupation, industrial area, built up: 5.38584e-7 m2*a; data quality (4,2,1,1,1)

## Emissions to nature
- 2-methylnaphthalene: 6.6373e-15 kg; data quality (2,2,1,1,5)
- chlorine: 2.91739e-11 kg; data quality (4,2,1,1,5)
- nickel: 1.23669e-10 kg; data quality (3,2,1,1,5)
- hexane: 3.07746e-8 kg; data quality (3,2,1,3,3)
- acetaldehyde: 1.56153e-8 kg; data quality (3,2,1,4,1)
- Phthalate, dibutyl-: 8.79306e-13 kg; data quality (3,2,1,1,5)
- nitrogen oxides: 2.62093e-6 kg; data quality (3,2,1,1,2)
- 4,4'-isopropylidenediphenol: 8.89438e-13 kg; data quality (4,1,1,1,5)
- VOC, volatile organic compounds: 4.00482e-6 kg; data quality (3,2,1,1,4)
- copper: 8.57121e-13, 1.77888e-13, 1.16296e-10 kg (3 entries, compartments not in this file); data quality (4,1,1,1,5)
- chromium: 9.96962e-11, 3.26127e-13, 1.98742e-12 kg (3 entries, compartments not in this file); data quality (4,1,1,1,5)
- Benzo(b)fluoranthene: 2.80561e-12 kg; data quality (3,2,1,4,1)
- sulfur dioxide: 2.21046e-8 kg; data quality (2,2,1,2,4)
- diisocyanates: 1.09223e-11 kg; data quality (4,1,1,1,5)
- Phthalate, dioctyl-: 3.83564e-10 kg; data quality (4,1,1,1,5)
- Chrysene: 2.64218e-12 kg; data quality (3,2,1,4,1)
- Zinc: 2.6022e-11 kg; data quality (5,1,1,1,5)
- 1,3-PHENYLENEDIAMINE: 1.24521e-12 kg; data quality (4,1,1,1,5)
- carbon monoxide: 3.71644e-5 kg; data quality (3,2,1,1,1)
- particulates, < 10 um: 1.31284e-7 kg; data quality (3,2,1,1,5)
- 4,4'-METHYLENEDIANILINE: 2.33397e-9 kg; data quality (4,2,1,1,5)
- Aluminum: 7.41198e-12 kg; data quality (4,1,1,1,5)
- ethene, tetrachloro-: 2.24121e-11 kg; data quality (3,2,1,1,5)
- anthracene: 1.83764e-11 kg; data quality (3,2,1,4,1)
- beryllium: 1.5283e-14 kg; data quality (2,2,1,1,5)
- fluorene: 4.42753e-11 kg; data quality (3,2,1,4,1)
- Chromium, ion: 4.33861e-11 kg; data quality (2,2,1,1,5)
- Chromium VI: 2.85404e-11 kg; data quality (3,2,1,1,5)
- Phosphorus: 5.64886e-8 kg; data quality (4,1,1,1,5)
- 2,2,4-trimethylpentane: 3.40484e-8 kg; data quality (3,2,1,4,1)
- styrene: 9.35772e-10 kg; data quality (3,2,1,4,1)
- 3-methylcholanthrene: 1.41554e-18 kg; data quality (2,2,1,1,5)
- Indeno(1,2,3-cd)pyrene: 2.2169e-12 kg; data quality (3,2,1,4,1)
- Water, saline: 4.00028e-9 m3; data quality (4,2,1,4,2)
- m-xylene: 3.71685e-9 kg; data quality (3,2,1,3,2)
- acenaphthene: 2.39336e-11 kg; data quality (3,2,1,4,1)
- propanal: 3.40566e-9 kg; data quality (3,2,1,4,1)
- lead: 1.00567e-11 kg; data quality (3,2,1,1,5)
- formaldehyde: 3.54435e-8 kg; data quality (3,2,1,4,1)
- antimony: 1.00741e-14 kg; data quality (3,2,1,1,5)
- methane, dichloro-, hcc-30: 9.69382e-12 kg; data quality (3,2,1,1,5)
- Benzo(g,h,i)perylene: 7.23498e-12 kg; data quality (3,2,1,4,1)
- Ethane, 1,1,1,2-tetrafluoro-, HFC-134a: 5.93145e-7 kg; data quality (4,2,1,4,1)
- Ethane, 1,1,1-trifluoro-, HFC-143a: 6.73318e-8 kg; data quality (4,2,1,4,1)
- naphthalene: 2.18885e-9 kg; data quality (3,2,1,4,1)
- acetophenone: 8.41825e-14 kg; data quality (3,2,1,1,5)
- Water, fresh: 9.24461e-5 m3; data quality (1,2,1,4,2)
- PHOSPHORUS: 1.39206e-13 kg; data quality (2,2,1,1,5)
- trichloroethylene: 1.18092e-9 kg; data quality (4,2,1,1,5)
- cumene: 3.63112e-10 kg; data quality (4,2,1,1,5)
- acrolein: 1.25651e-9 kg; data quality (3,2,1,4,1)
- para-xylene: 2.85165e-10 kg; data quality (3,2,1,2,4)
- fluorine: 7.41198e-12 kg; data quality (4,1,1,1,5)
- mercury: 1.45633e-13 kg; data quality (3,2,1,3,3)
- Carbon dioxide: 0.00289164 kg; data quality (4,2,1,4,1)
- nickel: 1.09193e-12, 3.26127e-13 kg (2 entries, compartments not in this file); data quality (4,1,1,1,5)
- Diethylene glycol butyl ether: 6.06409e-12 kg; data quality (3,2,1,1,5)
- ethylene glycol: 1.38223e-10 kg; data quality (4,2,1,1,5)
- Ethylene glycol monoethyl ether: 1.36472e-10 kg; data quality (5,1,1,1,5)
- Ethane, pentafluoro-, HFC-125: 1.57369e-7 kg; data quality (4,2,1,4,1)
- manganese: 1.06658e-11, 2.105e-12 kg (2 entries, compartments not in this file); data quality (4,1,1,1,5)
- phenol: 8.39051e-10 kg; data quality (4,2,1,1,5)
- Cobalt: 8.74609e-12 kg; data quality (3,2,1,1,5)
- ethane, 1,2-dichloro-: 1.52807e-13 kg; data quality (3,2,1,1,5)
- cadmium: 6.93956e-13 kg; data quality (3,2,1,1,5)
- Ethylene glycol: 1.90251e-9 kg; data quality (5,1,1,1,5)
- benz[a]anthracene: 2.70196e-12 kg; data quality (3,2,1,4,1)
- butadiene: 9.89396e-9 kg; data quality (3,2,1,4,1)
- tertiary-Butyl Acetate: 1.01515e-9 kg; data quality (3,2,1,1,5)
- methanol: 1.3039e-8 kg; data quality (4,2,1,1,5)
- Hydrocarbons, aromatic: 6.73367e-10 kg; data quality (3,2,1,4,1)
- acenaphthylene: 9.22896e-11 kg; data quality (3,2,1,4,1)
- phenanthrene: 8.05517e-11 kg; data quality (3,2,1,4,1)
- Methane, difluoro-, HFC-32: 9.16446e-8 kg; data quality (4,2,1,4,1)
- Propene: 4.60438e-11 kg; data quality (3,1,1,1,5)
- benzo(a)pyrene: 2.54045e-12 kg; data quality (3,2,1,4,1)
- 1,1,1-trichloroethane: 8.29505e-11 kg; data quality (3,2,1,1,5)
- BUTYL ISOCYANATE: 4.10877e-12 kg; data quality (4,2,1,1,5)
- Benzo(a)anthracene: 1.2533e-17 kg; data quality (2,2,1,1,5)
- ammonia: 9.5381e-9 kg; data quality (3,2,1,3,3)
- Nitrogen: 1.6669e-10 kg; data quality (3,2,1,1,5)
- particulates, < 2.5 um: 4.86669e-7 kg; data quality (3,2,1,2,4)
- ethylene glycol: 8.15318e-12 kg; data quality (5,1,1,1,5)
- pyrene: 3.09087e-11 kg; data quality (3,2,1,4,1)
- benzene, ethyl-: 6.61557e-8 kg; data quality (4,2,1,2,4)
- Xylene: 2.34819e-7 kg; data quality (4,2,1,2,4)
- isophorone: 7.42253e-13 kg; data quality (3,2,1,1,5)
- hydrogen fluoride: 2.05782e-14 kg; data quality (2,2,1,1,5)
- methyl isobutyl ketone: 1.32038e-8 kg; data quality (4,2,1,1,5)
- ethane, 1,2-dibromo-: 1.32755e-14 kg; data quality (2,2,1,1,5)
- Dinitrogen monoxide: 9.03953e-9 kg; data quality (4,2,1,4,1)
- Dibenz(a,h)anthracene: 1.86705e-14 kg; data quality (3,2,1,4,1)
- lead: 2.52007e-15 kg; data quality (3,1,1,1,5)
- Cresol: 8.29986e-13 kg; data quality (4,2,1,1,5)
- fluoranthene: 2.4676e-11 kg; data quality (3,2,1,4,1)
- Benzo(k)fluoranthene: 2.68649e-12 kg; data quality (3,2,1,4,1)
- arsenic: 5.38855e-12 kg; data quality (3,2,1,5,1)
- ALUMINUM OXIDE: 5.72566e-9, 4.71461e-11 kg (2 entries, compartments not in this file); data quality (5,1,1,1,5)
- hydrogen chloride: 1.70357e-12 kg; data quality (2,2,1,1,5)
- o-Xylene: 1.37485e-9 kg; data quality (3,2,1,3,2)
- ethylbenzene: 1.69343e-9 kg; data quality (4,1,1,1,5)
- manganese: 9.87326e-10 kg; data quality (3,2,1,1,5)
- Propane, 1,1,1,3,3,3-hexafluoro-, HCFC-236fa: 1.81899e-9 kg; data quality (4,2,1,4,1)
- selenium: 3.57224e-14 kg; data quality (2,2,1,1,5)
- Methane: 2.63896e-7 kg; data quality (4,2,1,4,1)
- benzene: 6.11189e-8 kg; data quality (3,2,1,4,1)
- Triethyl amine: 1.89657e-11 kg; data quality (3,2,1,1,5)
- toluene: 2.32433e-7 kg; data quality (4,2,1,2,4)
- butanol: 3.32673e-10 kg; data quality (5,1,1,1,5)

## Inventory method
Input-output

## Modelling constants
The reference unit of all processes is 1 USD2013 of the good or service. The technosphere inputs are based on the US BEA detailed input-output tables for 2007. The IO tables are combined to develop a commodity-by-commodity model based on the the industry-technology assumption (see Suh et al., 2010), which assumes all commodities produced by a given industry have the same input structure, but that multiple industries can produce the same commodity. Thus, model technosphere flows represent commodity outputs (and not industry outputs) from other processes in the model. There are no by-products included in these processes. All commodity production is based on US-conditions, despite in reality that some goods and services are produced overseas, as USEEIO v1.1 is a single-region IO model.

## Completeness
The input-output approach assures that all purchased inputs associated with the sectors making these commodities as reported in the US census for 2007 are included. The direct resources extracted including minerals, energy sources, water and land occupied are included. Emissions to air include all critieria air pollutants, greenhouse gases, and hazardous and toxic air pollutants as defined by US EPA. Releases to water include toxics, total nitrogen and total phosphorus, and water discharges. Releases to soil or groundwater include toxics and agriculutural pesticides. Some metal releases to air, water and soil are not included because they could not be speciated. Solid hazardous and non-hazardous wastes generated are not included as an elementary flows although purchases of waste services are included.

## Data treatment
Greenhouse gases are primarily from the US Greenhouse Gas Emission Inventory (USEPA 2016a). Biogenic C uptake is not included (change from version 1.0), as biogenic C emission are not included. Toxic releases to air, water and soil (except pesticides) are from the 2013 Toxic Release Inventory (USEPA 2015a). Criteria air pollutants and hazardous air pollutants are from the 2011 National Emissions Inventory (USEPA 2015b). All estimates are normalized by industry based on sector output in the data year, then converted to 2013 USD using relative sector-specific CPIs (if data year is not 2013). Energy use represent raw renewables or fossil fuel energies and is based on EIA data for 2014. See Table 1 in Yang, Ingwersen et al. 2017 and Supporting Information 1, and the v1.1 data update notes (Ingwersen et al. 2017) for all details on environmental data sources used.Land occupation for commercial buildings was estimated based on the building floorspace data provided by the U.S. Energy Information Administration 2012 Commercial Building Energy Consumption Survey (CBECS) (EIA 2015). Total commercial public supply water use is reported by USGS (Maupin et al. 2014). Water use is allocated across commercial sectors based on their use of water, sewage, and other services in USD based on the 2007 Benchmark Use Table before redefinitions (BEA 2015).

## Data collection
2015-2016

## Sampling procedure
US federal government sources, including surveys and US EPA emissions databases are used as the primary sources. From these sources, data for US reporting establishments/facilities are aggregated by the NAICS sector as defined in the BEA detailed 2007 input-output tables. When level of sector aggregation differs, or when direct emissions are not reported but modeled, additional sources are used to make allocations and estimates.

## Review details
In regard to quality assurance and peer-review, each dataset created went through Quality Assurance as defined in a quality assurance project plans at US EPA, CSRA or ERG. The model was assembled with the IO model builder model (USEPA 2016c). Validation functions were used to check that all the model components were properly assembled and harmonized. Bayou Demeke and Santosh Ghimire provided internal peer review of the model methodology and the manuscript underwent standard EPA management review. An editor and two anonymous reviewers at the Journal of Cleaner Production reviewed the model. In regard to data quality evaluation, data quality assessment was performed at the flow and process levels according to the updated US EPA data quality assessment guidelines as defined in US EPA (2016b).

## Intended application
The primary application is for use in the US Environmentally-Extended Input-Ouput model, USEEIO, version 1.1. This model is being used by the US EPA for supporting tools that prioritize goods and services based on potential environmental impacts, resource use or emissions for large regions, including the US and US states, and as a strealined tool for organizations as a starting point to consider sustainable materials management. Model results are designed to provide meso/macro-level decision support.

## Project
USEEIO v1.1 was developed by the US EPA with CSRA and ERG with Wesley W. Ingwersen and David E. Meyer as research leads. Yi Yang was the technical lead on the work for CSRA (contract EP-C-15-012); Troy Hawkins was lead for ERG (contract EP-C-12-021).

## Sources
- USDA 2016
- Statistics Canada 2010
- USEPA 2016b
- Torcellini et al. 2003
- USEPA 2016c
- Kim et el. 2013
- USDA 2014
- Lovelace 2009
- Yienger et al. 1995
- Macknick et al. 2011
- EIA 2015
- BEA 2015
- Nickerson et al. 2011
- BLM 2008
- EIA 2017
- EIA 2013
- Blackhurst et al. 2010
- EIA 2016
- USEPA 2015b
- Ingwersen et al. 2017
- USDA 2009a
- USGS 2016
- USDA 2009b
- USGS 2015
- USDA 2006
- USEPA 2015a
- USEPA 2016a
- Ingwersen et al. DRAFT
- Edelen and Ingwersen 2017
- Goebes et al. 2003
- Maupin et al. 2014
