# Performances

Dataset: openLCA process, unit process
Category: 7111: Performing Arts Companies
Geography: United States
Time period: 2017-01-01 to 2017-12-31
Data quality: US EPA - Process Pedigree Matrix (1;1)
Exchange data quality scheme: US EPA - Flow Pedigree Matrix
Generated by: US EPA with CSRA and ERG
Owner: US EPA
Published in: Yang, Ingwersen et al. 2017
restrictionsDescription: This model shold be appropriately cited (see Yang, Ingwersen et al. 2017 source or Publication field) when used. Any changes or derivations of this model by the user should be documented. The model itself and any results from use of this model shall not be construed to consitute US EPA opinion or policy.
copyright: false

## General comment
BEA Code & Name is '711100:Performing arts companies'. Description of the primary industry producing this good or service, adapted from the Census Bureau NAICS 2007 descriptions: This industry group comprises establishments primarily engaged in producing live presentations involving the performances of actors and actresses, singers, dancers, musical groups and artists, and other performing artists.

## Technology
The process describes the average US production of this good or service within this NAICS-based grouping defined in the BEA 2007 detailed input-output tables (BEA 2015). Distribution, wholesale and retailing of this good or service, use, and final disposal are not included. Creation of a product system with this process will enable modeling of all upstream (supply-chain) activities.

## Geography
Data represent the 50 US states

## Time period
2017 was the year in which this version of USEEIO was released and is the target date for the model

## Reference product
- Performances: 1 USD

## Inputs from technosphere
All rows: data quality (1,3,1,1,1)
- Fruit and vegetable preservation; at manufacturer: 1.0481e-5 USD
- Plywood and veneer; at manufacturer: 6.88631e-5 USD
- Paper; at manufacturer: 0.000146766 USD
- Transmission and power train parts; at manufacturer: 5.54256e-5 USD
- Independent artists, writers, and performers: 0.0951698 USD
- Internet publishing and broadcasting: 0.000850488 USD
- Chemicals (except basic chemicals, agrichemicals, polymers, paints, pharmaceuticals,soaps, cleaning compounds); at manufacturer: 1.0481e-5 USD
- Consumer goods and general rental centers: 0.00165878 USD
- Air transport: 0.00170701 USD
- Household goods repair: 0.000530129 USD
- Office administration: 0.00442134 USD
- Pipeline transport: 1.0497e-5 USD
- Other computer related services, including facilities management: 0.000790719 USD
- Nonresidential building repair and maintanence: 0.000470914 USD
- Waste management and remediation: 0.00144809 USD
- Asphalt shingles; at manufacturer: 3.44316e-5 USD
- Cut stone and stone products; at manufacturer: 6.88631e-5 USD
- Sports: 0.000170685 USD
- Vaccines and other biological medical products; at manufacturer: 1.90328e-6 USD
- Dry-cleaning and laundry: 3.1459e-5 USD
- Specialized design: 0.000149723 USD
- Buildings and dwellings services: 0.00255697 USD
- Amusement parks and arcades: 0.000115291 USD
- Monetary authorities and depository credit intermediation: 0.00338407 USD
- Securities and commodities brokerage and exchanges: 0.00533631 USD
- Rail transport: 4.49286e-5 USD
- Employment services: 0.0104406 USD
- Travel arrangement and reservation: 0.00344832 USD
- Air conditioning, refrigeration, and warm air heating equipment; at manufacturer: 7.93761e-5 USD
- Water transport (boats, ships, ferries): 7.93601e-5 USD
- Rubber tires; at manufacturer: 2.0962e-5 USD
- Books, newspapers, magazines, and other print media; at manufacturer: 0.00551197 USD
- Heating equipment other than warm air furnaces; at manufacturer: 3.44316e-5 USD
- Company and enterprise management: 0.0116701 USD
- Office supplies (not paper); at manufacturer: 1.0481e-5 USD
- Metal structural products; at manufacturer: 3.44316e-5 USD
- Packaged poultry; at manufacturer: 1.5994e-8 USD
- Fabricated pipe and pipe fittings; at manufacturer: 3.44316e-5 USD
- Flavored drink concentrates; at manufacturer: 0.000188658 USD
- Wiring devices; at manufacturer: 3.44316e-5 USD
- Directory, mailing list, and other publishers; at publisher: 8.99851e-5 USD
- Stationery; at manufacturer: 1.5994e-8 USD
- Truck transport: 0.00200385 USD
- Gasoline, fuels, and by-products of petroleum refining; at manufacturer: 0.00196713 USD
- Other plastic products; at manufacturer: 9.73816e-5 USD
- Insurance agencies and brokerages: 0.00686218 USD
- Magazines and journals; at publisher: 8.68366e-5 USD
- Golf courses, marinas, ski resorts, fitness and other rec centers and industries: 0.000525524 USD
- Plastic bottles; at manufacturer: 1.0497e-5 USD
- Marketing research and all other miscellaneous professional, scientific, and technical services: 0.00177879 USD
- Satellite, telecommunications resellers, and all other telecommunications: 0.000440224 USD
- Legal services: 0.00854358 USD
- Business support: 0.00269956 USD
- Other concrete products; at manufacturer: 0.000137758 USD
- Warehousing: 0.0011746 USD
- Metal windows, doors, and architectural products; at manufacturer: 0.000137726 USD
- Cardboard; at manufacturer: 0.000362289 USD
- Other retail: 2.1122e-5 USD
- Commercial equipment rental: 0.00376839 USD
- Full-service restaurants: 0.0013374 USD
- Packaged meat (except poultry); at manufacturer: 5.2469e-5 USD
- Environmental and other technical consulting services: 0.00363395 USD
- Gaskets, seals, musical instruments, fasteners, brooms, brushes, mop and other misc. goods; at manufacturer: 0.000585848 USD
- Other vehicle parts; at manufacturer: 6.28861e-5 USD
- Seafood; at manufacturer: 6.39759e-8 USD
- Lumber and treated lumber; at manufacturer: 0.000103295 USD
- Data processing and hosting: 0.00168599 USD
- Paints and coatings; at manufacturer: 8.3944e-5 USD
- Unrefined oil and gas; at extraction site: 0.000142326 USD
- Civic, social, professional, and similar organizations: 0.00213065 USD
- Concrete pipe, bricks, and blocks; at manufacturer: 3.44316e-5 USD
- Wooden windows, door, and flooring; at manufacturer: 0.000103295 USD
- Plastic bags, films, and sheets; at manufacturer: 1.0497e-5 USD
- Veneer, plywood, and engineered wood; at manufacturer: 1.0497e-5 USD
- Scenic and sightseeing transportation and support activities for transportation: 0.00210211 USD
- Vehicle repair: 0.000651493 USD
- Breweries and beer; at manufacturer: 9.73176e-5 USD
- Drinking water and wastewater treatment; at consumer: 0.000530129 USD
- Architectural, engineering, and related services: 0.00167676 USD
- Wireless telecommunications: 0.00158572 USD
- Accounting, tax preparation, bookkeeping, and payroll: 0.00985339 USD
- Commercial machinery repair: 0.0013374 USD
- Sporting and athletic goods; at manufacturer: 0.000157215 USD
- Communications equipment; at manufacturer: 1.0481e-5 USD
- Other real estate: 0.0849521 USD
- All other food and drinking places: 0.000194635 USD
- Couriers and messengers: 0.00284113 USD
- Passenger ground transport: 0.0167591 USD
- Performances: 0.000218586 USD
- Vehicles and parts sales: 1.0481e-5 USD
- Electricity; at consumer: 0.00392042 USD
- Light fixtures; at manufacturer: 0.000309884 USD
- Screws, nuts, and bolts; at manufacturer: 1.5994e-8 USD
- Wireless communications; at manufacturer: 4.1924e-5 USD
- Photographers: 6.28861e-5 USD
- Soft drinks, bottled water, and ice; at manufacturer: 0.000124257 USD
- Hotels and campgrounds: 0.0010016 USD
- Metal pipe fittings, ball and roller bearings, industrial patterns, metal bath fixtures, other misc. fabricated metals; at manufacturer: 0.000172206 USD
- Secondary steel products; at manufacturer: 3.44316e-5 USD
- Software: 0.0001213 USD
- Clothing; at manufacturer: 0.00241021 USD
- Fertilizers; at manufacturer: 3.44316e-5 USD
- Snack foods; at manufacturer: 1.0481e-5 USD
- Coal; at mine: 1.5994e-8 USD
- Postal service: 0.00206771 USD
- Cardboard containers; at manufacturer: 0.000256038 USD
- Plastic pipe, fittings, and sausage casings; at manufacturer: 4.49286e-5 USD
- Computer terminals and other computer peripheral equipment; at manufacturer: 7.33671e-5 USD
- General merchandise stores: 3.19879e-8 USD
- Electronic equipment repair and maintenance: 0.00151713 USD
- Used and secondhand goods: -0.00230675 USD
- Investigation and security: 0.000914944 USD
- Metal plumbing drains, faucets, valves, and other fittings; at manufacturer: 3.44316e-5 USD
- Paper bags and coated paper; at manufacturer: 1.0513e-5 USD
- Seasonings and dressings; at manufacturer: 2.0962e-5 USD
- Copper, nickel, lead, and zinc; at mine: 0.00348213 USD
- Natural gas; at consumer: 0.000806184 USD
- Promoters and agents: 0.0361301 USD
- Movies and film: 4.49126e-5 USD
- Nondepository credit intermediation and related activities: 0.00391715 USD
- Management consulting: 0.0156395 USD
- Clay and ceramic products; at manufacturer: 3.44316e-5 USD
- Pet care, photofinishing, parking and other sundry services: 0.00696267 USD
- Advertising and public relations: 0.0389986 USD
- Lessors of nonfinancial intangible assets: 0.00739809 USD
- Ambulances: 0.000387797 USD
- Wineries and wine; at manufacturer: 7.99699e-8 USD
- Computer systems design: 0.000756223 USD
- Other support services: 0.00272815 USD
- Primary iron, steel, and ferroalloy products; at manufacturer: 0.000241063 USD
- Telecommunications: 0.00408057 USD
- Ready-mix concrete; at manufacturer: 0.000103295 USD
- Other educational services: 0.014566 USD
- Vehicle rental and leasing: 0.00792301 USD
- Limited-service restaurants: 0.000570442 USD
- Insurance carriers: 0.0143079 USD
- Noncomparable imports: 0.00120818 USD
- Sound recording: 0.000157215 USD
- Investment advice, portfolio management, and other financial advising services: 0.000635025 USD
- News syndicates, libraries, archives, Internet publishing and all other information services: 6.58746e-5 USD
- State and local government enterprises: 0.000630451 USD
- Wholesale trade: 0.00294482 USD
- Facilities support: 0.000970241 USD

## Inputs from nature
- Occupation, urban, discontinuously built: 0.000292222 m2*a; data quality (4,2,1,1,1)
- Water, fresh: 0.000162261, 0.000280809 m3 (2 entries, compartments not in this file); data quality (1,2,1,4,2)

## Emissions to nature
- carbon monoxide: 0.00213927 kg; data quality (3,2,1,1,1)
- nickel: 3.10061e-10 kg; data quality (3,2,1,5,1)
- propanal: 3.60505e-7 kg; data quality (3,2,1,4,1)
- arsenic: 8.9953e-10 kg; data quality (3,2,1,5,1)
- pyrene: 8.18524e-9 kg; data quality (3,2,1,4,1)
- fluoranthene: 6.69466e-9 kg; data quality (3,2,1,4,1)
- particulates, < 10 um: 1.786e-6 kg; data quality (3,2,1,4,1)
- anthracene: 2.53826e-9 kg; data quality (3,2,1,4,1)
- acenaphthene: 1.073e-9 kg; data quality (3,2,1,4,1)
- acetaldehyde: 1.78193e-6 kg; data quality (3,2,1,4,1)
- propylene oxide: 1.58012e-15 kg; data quality (3,2,1,1,5)
- m-xylene: 4.04497e-7 kg; data quality (3,2,1,4,1)
- benzene, ethyl-: 1.01658e-5 kg; data quality (3,2,1,4,1)
- butadiene: 1.16703e-6 kg; data quality (3,2,1,4,1)
- styrene: 7.71633e-7 kg; data quality (3,2,1,4,1)
- mercury: 3.21023e-12 kg; data quality (3,2,1,5,1)
- phenanthrene: 7.80374e-9 kg; data quality (3,2,1,4,1)
- Carbon dioxide: 0.00369025 kg; data quality (4,2,1,4,1)
- Phosphorus: 1.93092e-6 kg; data quality (4,1,1,1,5)
- Nitrogen: 1.63026e-6 kg; data quality (2,2,1,1,5)
- benzo(a)pyrene: 7.28392e-10 kg; data quality (3,2,1,4,1)
- 2-methylnaphthalene: 1.0225e-15 kg; data quality (2,2,1,1,5)
- antimony: 1.24107e-17 kg; data quality (3,2,1,1,5)
- Ethane, pentafluoro-, HFC-125: 1.43258e-8 kg; data quality (4,2,1,4,1)
- Cobalt: 3.64922e-15 kg; data quality (3,2,1,1,5)
- nitrogen oxides: 2.48137e-5 kg; data quality (3,2,1,1,1)
- formaldehyde: 3.86742e-6 kg; data quality (3,2,1,4,1)
- hydrogen chloride: 6.49661e-15 kg; data quality (2,2,1,1,5)
- VOC, volatile organic compounds: 0.00056365 kg; data quality (3,2,1,1,1)
- Ethane, 1,1,1-trifluoro-, HFC-143a: 6.12939e-9 kg; data quality (4,2,1,4,1)
- toluene: 8.84947e-5 kg; data quality (3,2,1,4,1)
- Benzo(g,h,i)perylene: 2.71978e-9 kg; data quality (3,2,1,4,1)
- cadmium: 5.35564e-14 kg; data quality (3,2,1,1,5)
- 3-methylcholanthrene: 1.78878e-18 kg; data quality (2,2,1,1,5)
- Chromium, ion: 1.69989e-10 kg; data quality (3,2,1,5,1)
- Chrysene: 5.65969e-10 kg; data quality (3,2,1,4,1)
- Benzo(b)fluoranthene: 4.91543e-10 kg; data quality (3,2,1,4,1)
- ammonia: 1.99355e-7 kg; data quality (3,2,1,4,1)
- cyanide: 3.69411e-15 kg; data quality (3,2,1,1,5)
- Indeno(1,2,3-cd)pyrene: 8.22773e-10 kg; data quality (3,2,1,4,1)
- Water, fresh: 0.000375154 m3; data quality (1,2,1,4,2)
- methanol: 2.00577e-15 kg; data quality (4,2,1,1,5)
- o-Xylene: 1.41042e-7 kg; data quality (3,2,1,4,1)
- hexane: 7.78288e-6 kg; data quality (3,2,1,4,1)
- naphthalene: 1.42469e-7 kg; data quality (3,2,1,4,1)
- benzene, chloro-: 6.97436e-18 kg; data quality (4,2,1,1,5)
- Benzo(k)fluoranthene: 4.50814e-10 kg; data quality (3,2,1,4,1)
- Dinitrogen monoxide: 9.65346e-9 kg; data quality (4,2,1,4,1)
- Xylene: 4.30972e-5 kg; data quality (3,2,1,4,1)
- Methane, difluoro-, HFC-32: 8.34265e-9 kg; data quality (4,2,1,4,1)
- acenaphthylene: 7.24023e-9 kg; data quality (3,2,1,4,1)
- Chromium VI: 7.14382e-11 kg; data quality (3,2,1,5,1)
- Propane, 1,1,1,3,3,3-hexafluoro-, HCFC-236fa: 1.65587e-10 kg; data quality (4,2,1,4,1)
- sulfur dioxide: 2.67902e-7 kg; data quality (3,2,1,3,2)
- Dibenz(a,h)anthracene: 2.03487e-11 kg; data quality (3,2,1,4,1)
- selenium: 3.81321e-15 kg; data quality (2,2,1,1,5)
- fluorene: 6.97358e-9 kg; data quality (3,2,1,4,1)
- beryllium: 7.70263e-16 kg; data quality (2,2,1,1,5)
- lead: 2.39096e-14 kg; data quality (3,2,1,1,5)
- Ethane, 1,1,1,2-tetrafluoro-, HFC-134a: 5.39955e-8 kg; data quality (4,2,1,4,1)
- 2,2,4-trimethylpentane: 3.34967e-5 kg; data quality (3,2,1,4,1)
- phenol: 9.38669e-9 kg; data quality (4,2,1,1,5)
- Hydrocarbons, aromatic: 4.19355e-8 kg; data quality (3,2,1,4,1)
- benz[a]anthracene: 8.30215e-10 kg; data quality (3,2,1,4,1)
- manganese: 8.69129e-11 kg; data quality (3,2,1,5,1)
- particulates, < 2.5 um: 2.04228e-5 kg; data quality (3,2,1,4,1)
- benzene: 1.09386e-5 kg; data quality (3,2,1,4,1)
- PHOSPHORUS: 3.6793e-15 kg; data quality (2,2,1,1,5)
- acrolein: 2.93817e-7 kg; data quality (3,2,1,4,1)
- Benzo(a)anthracene: 1.58992e-17 kg; data quality (2,2,1,1,5)
- lead: 7.14456e-13 kg; data quality (3,1,1,1,5)
- Methane: 3.3683e-7 kg; data quality (4,2,1,4,1)

## Inventory method
Input-output

## Modelling constants
The reference unit of all processes is 1 USD2013 of the good or service. The technosphere inputs are based on the US BEA detailed input-output tables for 2007. The IO tables are combined to develop a commodity-by-commodity model based on the the industry-technology assumption (see Suh et al., 2010), which assumes all commodities produced by a given industry have the same input structure, but that multiple industries can produce the same commodity. Thus, model technosphere flows represent commodity outputs (and not industry outputs) from other processes in the model. There are no by-products included in these processes. All commodity production is based on US-conditions, despite in reality that some goods and services are produced overseas, as USEEIO v1.1 is a single-region IO model.

## Completeness
The input-output approach assures that all purchased inputs associated with the sectors making these commodities as reported in the US census for 2007 are included. The direct resources extracted including minerals, energy sources, water and land occupied are included. Emissions to air include all critieria air pollutants, greenhouse gases, and hazardous and toxic air pollutants as defined by US EPA. Releases to water include toxics, total nitrogen and total phosphorus, and water discharges. Releases to soil or groundwater include toxics and agriculutural pesticides. Some metal releases to air, water and soil are not included because they could not be speciated. Solid hazardous and non-hazardous wastes generated are not included as an elementary flows although purchases of waste services are included.

## Data treatment
Greenhouse gases are primarily from the US Greenhouse Gas Emission Inventory (USEPA 2016a). Biogenic C uptake is not included (change from version 1.0), as biogenic C emission are not included. Toxic releases to air, water and soil (except pesticides) are from the 2013 Toxic Release Inventory (USEPA 2015a). Criteria air pollutants and hazardous air pollutants are from the 2011 National Emissions Inventory (USEPA 2015b). All estimates are normalized by industry based on sector output in the data year, then converted to 2013 USD using relative sector-specific CPIs (if data year is not 2013). Energy use represent raw renewables or fossil fuel energies and is based on EIA data for 2014. See Table 1 in Yang, Ingwersen et al. 2017 and Supporting Information 1, and the v1.1 data update notes (Ingwersen et al. 2017) for all details on environmental data sources used.Land occupation for commercial buildings was estimated based on the building floorspace data provided by the U.S. Energy Information Administration 2012 Commercial Building Energy Consumption Survey (CBECS) (EIA 2015). Total commercial public supply water use is reported by USGS (Maupin et al. 2014). Water use is allocated across commercial sectors based on their use of water, sewage, and other services in USD based on the 2007 Benchmark Use Table before redefinitions (BEA 2015).

## Data collection
2015-2016

## Sampling procedure
US federal government sources, including surveys and US EPA emissions databases are used as the primary sources. From these sources, data for US reporting establishments/facilities are aggregated by the NAICS sector as defined in the BEA detailed 2007 input-output tables. When level of sector aggregation differs, or when direct emissions are not reported but modeled, additional sources are used to make allocations and estimates.

## Review details
In regard to quality assurance and peer-review, each dataset created went through Quality Assurance as defined in a quality assurance project plans at US EPA, CSRA or ERG. The model was assembled with the IO model builder model (USEPA 2016c). Validation functions were used to check that all the model components were properly assembled and harmonized. Bayou Demeke and Santosh Ghimire provided internal peer review of the model methodology and the manuscript underwent standard EPA management review. An editor and two anonymous reviewers at the Journal of Cleaner Production reviewed the model. In regard to data quality evaluation, data quality assessment was performed at the flow and process levels according to the updated US EPA data quality assessment guidelines as defined in US EPA (2016b).

## Intended application
The primary application is for use in the US Environmentally-Extended Input-Ouput model, USEEIO, version 1.1. This model is being used by the US EPA for supporting tools that prioritize goods and services based on potential environmental impacts, resource use or emissions for large regions, including the US and US states, and as a strealined tool for organizations as a starting point to consider sustainable materials management. Model results are designed to provide meso/macro-level decision support.

## Project
USEEIO v1.1 was developed by the US EPA with CSRA and ERG with Wesley W. Ingwersen and David E. Meyer as research leads. Yi Yang was the technical lead on the work for CSRA (contract EP-C-15-012); Troy Hawkins was lead for ERG (contract EP-C-12-021).

## Sources
- Nickerson et al. 2011
- Yienger et al. 1995
- Blackhurst et al. 2010
- Goebes et al. 2003
- Macknick et al. 2011
- Lovelace 2009
- USDA 2014
- USEPA 2016c
- USGS 2016
- BEA 2015
- Edelen and Ingwersen 2017
- Statistics Canada 2010
- Maupin et al. 2014
- Kim et el. 2013
- USEPA 2016a
- USDA 2009b
- USDA 2016
- USEPA 2016b
- USDA 2009a
- EIA 2015
- EIA 2017
- USDA 2006
- Ingwersen et al. DRAFT
- USEPA 2015b
- EIA 2013
- Ingwersen et al. 2017
- USEPA 2015a
- USGS 2015
- Torcellini et al. 2003
- BLM 2008
- EIA 2016
