# State and local government enterprises

Dataset: openLCA process, unit process
Category: Government
Geography: United States
Time period: 2017-01-01 to 2017-12-31
Data quality: US EPA - Process Pedigree Matrix (1;1)
Exchange data quality scheme: US EPA - Flow Pedigree Matrix
Generated by: US EPA with CSRA and ERG
Owner: US EPA
Published in: Yang, Ingwersen et al. 2017
restrictionsDescription: This model shold be appropriately cited (see Yang, Ingwersen et al. 2017 source or Publication field) when used. Any changes or derivations of this model by the user should be documented. The model itself and any results from use of this model shall not be construed to consitute US EPA opinion or policy.
copyright: false

## General comment
BEA Code & Name is 'S00203:Other state and local government enterprises'.

## Technology
The process describes the average US production of this good or service within this NAICS-based grouping defined in the BEA 2007 detailed input-output tables (BEA 2015). Distribution, wholesale and retailing of this good or service, use, and final disposal are not included. Creation of a product system with this process will enable modeling of all upstream (supply-chain) activities.

## Geography
Data represent the 50 US states

## Time period
2017 was the year in which this version of USEEIO was released and is the target date for the model

## Reference product
- State and local government enterprises: 1 USD

## Inputs from technosphere
All rows: data quality (1,3,1,1,1)
- Investment advice, portfolio management, and other financial advising services: 3.49896e-6 USD
- Air transport: 1.04969e-5 USD
- Securities and commodities brokerage and exchanges: 1.92443e-5 USD
- Insurance agencies and brokerages: 2.27433e-5 USD
- Metal coatings, engravings, and heat treatments; at manufacturer: 1.74948e-6 USD
- Nonresidential building repair and maintanence: 0.00145907 USD
- Commercial equipment rental: 3.67391e-5 USD
- Postal service: 2.62422e-5 USD
- Specialized design: 5.24845e-6 USD
- Other computer related services, including facilities management: 3.14907e-5 USD
- Magazines and journals; at publisher: 1.74948e-6 USD
- Management consulting: 5.42339e-5 USD
- Insurance carriers: 7.52277e-5 USD
- Waste management and remediation: 3.32402e-5 USD
- Computer systems design: 2.27433e-5 USD
- Buildings and dwellings services: 2.44927e-5 USD
- Monetary authorities and depository credit intermediation: 0.00027117 USD
- Other basic inorganic chemicals; at manufacturer: 0.000185445 USD
- Independent artists, writers, and performers: 6.99793e-6 USD
- Sports: 1.74948e-6 USD
- Fertilizers; at manufacturer: 6.99793e-6 USD
- Accounting, tax preparation, bookkeeping, and payroll: 0.000306159 USD
- Office administration: 1.74948e-6 USD
- Pipeline transport: 3.49896e-6 USD
- Full-service restaurants: 8.74741e-6 USD
- Warehousing: 0.000204689 USD
- Employment services: 2.97412e-5 USD
- Other retail: 1.74948e-6 USD
- Passenger ground transport: 3.49896e-6 USD
- Fluid meters and counting devices; at manufacturer: 1.57453e-5 USD
- Wholesale trade: 0.000113716 USD
- Petrochemicals; at manufacturer: 1.74948e-6 USD
- Scientific research and development: 8.74741e-6 USD
- Drinking water and wastewater treatment; at consumer: 0.000143458 USD
- Gasoline, fuels, and by-products of petroleum refining; at manufacturer: 0.000342898 USD
- Scenic and sightseeing transportation and support activities for transportation: 1.74948e-5 USD
- Satellite, telecommunications resellers, and all other telecommunications: 5.24845e-6 USD
- Architectural, engineering, and related services: 0.000815259 USD
- Electronic equipment repair and maintenance: 0.000122464 USD
- Legal services: 0.00013646 USD
- Sand, gravel, clay, phosphate, other nonmetallic minerals; at mine: 0.000152205 USD
- Other petroleum and coal products; at manufacturer: 2.09938e-5 USD
- Natural gas; at consumer: 0.000115466 USD
- Other support services: 6.99793e-6 USD
- Advertising and public relations: 5.24845e-6 USD
- Used and secondhand goods: 1.22464e-5 USD
- Other concrete products; at manufacturer: 3.49896e-5 USD
- Electricity; at consumer: 0.000272919 USD
- Limited-service restaurants: 3.49896e-6 USD
- Rail transport: 4.89855e-5 USD
- Other basic organic chemicals; at manufacturer: 4.89855e-5 USD
- Other real estate: 0.000173199 USD
- Environmental and other technical consulting services: 9.09731e-5 USD
- Telecommunications: 5.77329e-5 USD
- Cardboard; at manufacturer: 1.74948e-6 USD
- Dimensional stone; at mine: 3.32402e-5 USD
- Commercial machinery repair: 4.7236e-5 USD
- Marketing research and all other miscellaneous professional, scientific, and technical services: 4.3737e-5 USD
- Water transport (boats, ships, ferries): 2.27433e-5 USD
- Chemicals (except basic chemicals, agrichemicals, polymers, paints, pharmaceuticals,soaps, cleaning compounds); at manufacturer: 2.27433e-5 USD
- News syndicates, libraries, archives, Internet publishing and all other information services: 1.74948e-6 USD
- Noncomparable imports: 2.27433e-5 USD
- Compressed Gases; at manufacturer: 0.000152205 USD
- Business support: 1.57453e-5 USD
- Vehicle rental and leasing: 3.67391e-5 USD
- Truck transport: 3.67391e-5 USD
- Household goods repair: 6.99793e-6 USD
- Light fixtures; at manufacturer: 1.74948e-6 USD
- Lessors of nonfinancial intangible assets: 6.12319e-5 USD
- State and local government enterprises: 0.000176698 USD
- Civic, social, professional, and similar organizations: 8.74741e-6 USD
- Wireless telecommunications: 3.49896e-6 USD
- Hotels and campgrounds: 5.24845e-6 USD
- Investigation and security: 5.24845e-6 USD
- Travel arrangement and reservation: 2.44927e-5 USD
- Nondepository credit intermediation and related activities: 4.7236e-5 USD

## Inputs from nature
- Water, fresh: 4.27807e-5, 7.40364e-5 m3 (2 entries, compartments not in this file); data quality (1,2,1,4,2)
- Energy, biomass: 0.00200828 MJ; data quality (3,1,1,1,1)
- Occupation, urban, discontinuously built: 2.51466e-6 m2*a; data quality (4,2,1,1,1)
- Energy, wind: 0.0002388 MJ; data quality (3,1,1,1,1)
- Energy, solar: 0.000508983 MJ; data quality (3,1,1,1,1)
- Energy, hydraulic potential: 0.000172471 MJ; data quality (3,1,1,1,1)

## Emissions to nature
- 1,4-BENZOQUINONE: 4.63906e-11 kg; data quality (3,2,1,1,4)
- ammonia: 2.72041e-10 kg; data quality (3,1,1,1,5)
- acenaphthylene: 2.41884e-11 kg; data quality (3,2,1,1,4)
- Asbestos: 1.90254e-14 kg; data quality (5,2,1,1,4)
- lead: 6.86061e-9 kg; data quality (3,2,1,1,4)
- CHLOROPRENE: 3.84663e-12 kg; data quality (2,2,1,1,4)
- methane, monochloro-, r-40: 6.79358e-10 kg; data quality (3,2,1,1,4)
- 2,4,5-trichlorophenol: 3.99145e-13 kg; data quality (2,2,1,1,4)
- VOC, volatile organic compounds: 6.20774e-6 kg; data quality (3,2,1,1,4)
- Benzo(a)anthracene: 1.48933e-13 kg; data quality (2,2,1,1,4)
- isophorone: 2.57699e-10 kg; data quality (2,2,1,1,4)
- hydrogen chloride: 8.58831e-7 kg; data quality (2,2,1,1,4)
- Indeno(1,2,3-cd)pyrene: 3.64267e-13 kg; data quality (2,2,1,1,4)
- Benzo(b)fluoranthene: 9.29667e-13 kg; data quality (2,2,1,1,4)
- formaldehyde: 1.68348e-7 kg; data quality (2,2,1,1,4)
- ethane, 1,2-dibromo-: 3.35923e-10 kg; data quality (2,2,1,1,4)
- acrolein: 3.30744e-8 kg; data quality (2,2,1,1,4)
- anthracene: 9.64653e-12 kg; data quality (3,2,1,1,4)
- acenaphthene: 1.72125e-10 kg; data quality (3,2,1,1,4)
- Chrysene: 6.63487e-11 kg; data quality (2,2,1,1,4)
- hydrogen fluoride: 9.93174e-8 kg; data quality (2,2,1,1,4)
- 1,1-DICHLOROETHYLENE: 3.83519e-10 kg; data quality (3,2,1,1,4)
- phosgene: 5.02301e-9 kg; data quality (5,2,1,1,4)
- ethylene glycol: 3.98314e-10 kg; data quality (5,2,1,1,4)
- pentachlorophenol: 1.5331e-10 kg; data quality (3,2,1,1,4)
- 4-nitrophenol: 3.7198e-9 kg; data quality (2,2,1,1,4)
- Hydrazine: 1.32167e-13 kg; data quality (4,2,1,1,4)
- CHLORONAPHTHALENE: 5.27496e-15 kg; data quality (1,2,1,1,4)
- o-toluidine: 2.62293e-12 kg; data quality (4,2,1,1,4)
- pyrene: 1.55853e-11 kg; data quality (2,2,1,1,4)
- CARBAZOLE: 5.6636e-13 kg; data quality (2,2,1,1,4)
- hydrogen sulfide: 1.14425e-8 kg; data quality (3,2,1,1,4)
- toluene: 5.0687e-8 kg; data quality (4,2,1,1,4)
- arsenic: 1.3333e-9 kg; data quality (3,2,1,1,4)
- ethylene oxide: 7.48207e-11 kg; data quality (3,2,1,1,4)
- beryllium: 3.56082e-11 kg; data quality (2,2,1,1,4)
- propanal: 2.35724e-9 kg; data quality (3,2,1,1,4)
- benzene: 4.12977e-8 kg; data quality (3,2,1,1,4)
- Chromium VI: 2.10558e-10 kg; data quality (3,2,1,1,4)
- acetophenone: 7.84638e-12 kg; data quality (4,2,1,1,4)
- m-cresol: 2.64334e-13 kg; data quality (4,2,1,1,4)
- PCB-1: 2.65391e-16 kg; data quality (2,2,1,1,4)
- benzo(a)pyrene: 3.29818e-12 kg; data quality (2,2,1,1,4)
- carbon monoxide: 3.01809e-5 kg; data quality (2,2,1,1,4)
- chlorine: 1.90714e-8 kg; data quality (4,2,1,1,4)
- Hydrazine, methyl-: 4.81005e-11 kg; data quality (2,2,1,1,4)
- 1,4-dioxane: 7.07732e-10 kg; data quality (4,2,1,1,4)
- HYDROGEN SULFIDE: 3.57948e-12, 2.60586e-9 kg (2 entries, compartments not in this file); data quality (3,1,1,1,5)
- Phosphorus: 0.000376199 kg; data quality (4,1,1,1,1)
- methylene diphenyl diisocyanate: 2.71835e-10 kg; data quality (4,2,1,1,4)
- Nitrogen: 0.00301086 kg; data quality (2,2,1,1,1)
- Dinitrogen monoxide: 2.59512e-5 kg; data quality (2,1,1,1,1)
- naphthalene: 5.05738e-9 kg; data quality (3,2,1,1,4)
- chloroform: 4.37373e-8 kg; data quality (4,2,1,1,4)
- t-butyl methyl ether: 1.22355e-10 kg; data quality (3,2,1,1,4)
- cadmium: 9.16527e-10 kg; data quality (3,2,1,1,4)
- Hydrocarbons, aromatic: 1.3609e-9 kg; data quality (4,2,1,1,4)
- Chrysene, 5-methyl-: 3.10074e-15 kg; data quality (2,2,1,1,4)
- 2,4,5,2',5'-PENTACHLOROBIPHENYL: 6.57232e-15 kg; data quality (2,2,1,1,4)
- trichloroethylene: 7.82404e-9 kg; data quality (4,2,1,1,4)
- 2,4-dinitrophenol: 5.34193e-12 kg; data quality (5,2,1,1,4)
- carbon disulfide: 1.95774e-9 kg; data quality (4,2,1,1,4)
- Carbon dioxide: 3.47216e-5 kg; data quality (4,2,1,4,1)
- particulates, < 10 um: 8.39773e-7 kg; data quality (3,2,1,1,4)
- 1,1,1-trichloroethane: 1.77298e-8 kg; data quality (4,2,1,1,4)
- Propane, 1,2-dichloro-: 2.49764e-10 kg; data quality (4,2,1,1,4)
- Chromium, ion: 9.86631e-10 kg; data quality (2,2,1,1,4)
- epichlorohydrin: 9.86847e-13 kg; data quality (3,2,1,1,4)
- 1,4-dichlorobenzene: 7.32959e-9 kg; data quality (2,2,1,1,4)
- phthalate, dioctyl-: 4.07395e-9 kg; data quality (3,2,1,1,4)
- PHOSPHORUS: 2.97124e-8 kg; data quality (2,2,1,1,4)
- aniline: 1.19743e-10 kg; data quality (4,2,1,1,4)
- particulates, < 2.5 um: 4.59228e-6 kg; data quality (3,2,1,1,4)
- Dibenz(a,h)anthracene: 3.15893e-13 kg; data quality (2,2,1,1,4)
- p-cresol: 5.74358e-10 kg; data quality (4,2,1,1,4)
- hexachloro-1,3-butadiene: 2.68923e-10 kg; data quality (4,2,1,1,4)
- Triethyl amine: 1.29524e-11 kg; data quality (4,2,1,1,4)
- mercury: 8.38415e-10 kg; data quality (2,2,1,1,4)
- ethyl acrylate: 2.13391e-12 kg; data quality (4,2,1,1,4)
- Ethylene glycol monoethyl ether: 7.66009e-10, 8.3044e-10 kg (2 entries, compartments not in this file); data quality (5,1,1,1,5)
- biphenyl: 5.57118e-11 kg; data quality (4,2,1,1,4)
- hexachloroethane: 2.35257e-11 kg; data quality (4,2,1,1,4)
- benzene, chloro-: 2.61616e-9 kg; data quality (4,2,1,1,4)
- butadiene: 7.63662e-10 kg; data quality (2,2,1,2,3)
- nickel: 2.38851e-9 kg; data quality (3,2,1,1,4)
- sulfur dioxide: 3.58549e-5 kg; data quality (2,2,1,1,4)
- hexane: 7.32585e-8 kg; data quality (3,2,1,1,4)
- Xylene: 3.15638e-8 kg; data quality (4,2,1,1,4)
- p-phenylenediamine: 1.29656e-10 kg; data quality (5,2,1,1,4)
- Nitrobenzene: 2.60842e-11 kg; data quality (4,2,1,1,4)
- 1,2,4-trichlorobenzene: 9.21162e-10 kg; data quality (4,2,1,1,4)
- nitrogen oxides: 2.88463e-5 kg; data quality (2,2,1,1,4)
- acrylonitrile: 6.14312e-9 kg; data quality (4,2,1,1,4)
- ammonia: 5.32664e-6 kg; data quality (3,2,1,1,4)
- polychlorinated biphenyls: 8.68855e-11 kg; data quality (3,2,1,1,4)
- Benzo(k)fluoranthene: 1.60956e-13 kg; data quality (2,2,1,2,3)
- 2,3,4'-TRICHLOROBIPHENYL: 3.13632e-15 kg; data quality (2,2,1,1,4)
- monochloroethane: 2.31334e-10 kg; data quality (3,2,1,1,4)
- bis(2-chloroethyl)ether: 4.22935e-12 kg; data quality (3,2,1,1,4)
- Phthalate, dibutyl-: 6.42455e-10 kg; data quality (4,2,1,1,4)
- ethene, tetrachloro-: 1.99712e-8 kg; data quality (3,2,1,1,4)
- ALLYL CHLORIDE: 1.88382e-11 kg; data quality (3,2,1,1,4)
- methane, dichloro-, hcc-30: 4.15539e-8 kg; data quality (4,2,1,1,4)
- selenium: 6.52216e-10 kg; data quality (2,2,1,1,4)
- Methane: 0.000946953 kg; data quality (4,2,1,4,1)
- fluorene: 2.89483e-11 kg; data quality (2,2,1,1,4)
- maleic anhydride: 1.32167e-13 kg; data quality (2,2,1,1,4)
- propylene oxide: 1.40185e-10 kg; data quality (3,2,1,1,4)
- methyl isobutyl ketone: 2.38721e-7 kg; data quality (4,2,1,1,4)
- 2-methylnaphthalene: 2.36372e-11 kg; data quality (2,2,1,1,4)
- ethane, 1,2-dichloro-: 3.46496e-9 kg; data quality (3,2,1,1,4)
- cumene: 1.94718e-9 kg; data quality (4,2,1,1,4)
- benzene, ethyl-: 6.59746e-9 kg; data quality (4,2,1,1,4)
- cyanide: 8.95426e-10 kg; data quality (3,2,1,1,4)
- dimethyl formamide: 2.77551e-12 kg; data quality (4,2,1,1,4)
- Diethylene glycol butyl ether: 1.20485e-10 kg; data quality (3,2,1,1,4)
- Phthalate, dimethyl-: 4.1741e-10 kg; data quality (4,2,1,1,4)
- phenol: 1.69003e-8 kg; data quality (4,2,1,1,4)
- benzyl chloride: 3.17354e-10 kg; data quality (2,2,1,1,4)
- TOXAPHENE (EXAMPLE ISOMER SHOWN BELOW): 1.45384e-12 kg; data quality (4,2,1,1,4)
- m-xylene: 4.07537e-10 kg; data quality (3,2,1,3,2)
- 2-chloro-1-phenylethanone: 1.98309e-12 kg; data quality (2,2,1,1,4)
- phenanthrene: 6.5436e-11 kg; data quality (3,2,1,1,4)
- carbonyl sulfide: 3.63276e-9 kg; data quality (4,2,1,1,4)
- DNOC: 3.03356e-9 kg; data quality (2,2,1,1,4)
- acetonitrile: 4.17461e-9 kg; data quality (3,2,1,1,4)
- styrene: 2.68906e-8 kg; data quality (4,2,1,1,4)
- acrylic acid: 7.54674e-11 kg; data quality (4,2,1,1,4)
- N,N-DIMETHYLANILINE: 5.14873e-11 kg; data quality (5,2,1,1,4)
- Hexachlorocyclopentadiene: 9.31555e-14 kg; data quality (3,2,1,1,4)
- methanol: 4.55806e-7 kg; data quality (4,2,1,1,4)
- acetaldehyde: 5.72644e-8 kg; data quality (3,2,1,1,4)
- Water, fresh: 9.49057e-5 m3; data quality (1,2,1,4,2)
- 3-methylcholanthrene: 9.09033e-14 kg; data quality (2,2,1,1,4)
- 2,4,6-trichlorophenol: 1.32599e-10 kg; data quality (2,2,1,1,4)
- antimony: 1.67445e-10 kg; data quality (3,2,1,1,4)
- Dimethyl sulfate: 4.40634e-11 kg; data quality (2,2,1,1,4)
- Ethene, chloro-: 3.07653e-9 kg; data quality (3,2,1,1,4)
- benz[a]anthracene: 5.69618e-10 kg; data quality (2,2,1,1,4)
- ethane, 1,1,2-trichloro-: 2.49124e-10 kg; data quality (4,2,1,1,4)
- 1,1,2,2-tetrachloroethane: 1.53018e-9 kg; data quality (3,2,1,1,4)
- bromoform: 8.32794e-11 kg; data quality (3,2,1,1,4)
- o-Xylene: 1.75977e-10 kg; data quality (3,2,1,2,3)
- vinyl acetate: 1.47042e-10 kg; data quality (4,2,1,1,4)
- 2,2,4-trimethylpentane: 4.38684e-10 kg; data quality (3,2,1,4,1)
- para-xylene: 9.08797e-11 kg; data quality (4,2,1,1,4)
- Propene, 1,3-dichloro-: 5.85901e-10 kg; data quality (3,2,1,1,4)
- methyl methacrylate: 5.70896e-11 kg; data quality (4,2,1,1,4)
- carbon tetrachloride: 1.73931e-9 kg; data quality (4,2,1,1,4)
- manganese: 6.46494e-9 kg; data quality (3,2,1,1,4)
- Methyl iodide: 2.32297e-10 kg; data quality (4,2,1,1,4)
- 2-nitropropane: 4.59876e-14 kg; data quality (5,2,1,1,4)
- AMMONIA: 3.60812e-8 kg; data quality (3,1,1,1,5)
- fluoranthene: 1.53537e-11 kg; data quality (2,2,1,1,4)
- Benzo(g,h,i)perylene: 6.83592e-12 kg; data quality (3,2,1,1,4)
- methane, bromo-, halon 1001: 4.27751e-10 kg; data quality (3,2,1,1,4)
- Cobalt: 2.42334e-10 kg; data quality (3,2,1,1,4)
- hexachlorobenzene: 6.12035e-10 kg; data quality (3,2,1,1,4)
- Cresol: 1.32876e-8 kg; data quality (4,2,1,1,4)
- toluene, 2,4-dinitro-: 8.41347e-10 kg; data quality (5,2,1,1,4)
- dibenzofuran: 2.71786e-11 kg; data quality (4,2,1,1,4)

## Inventory method
Input-output

## Modelling constants
The reference unit of all processes is 1 USD2013 of the good or service. The technosphere inputs are based on the US BEA detailed input-output tables for 2007. The IO tables are combined to develop a commodity-by-commodity model based on the the industry-technology assumption (see Suh et al., 2010), which assumes all commodities produced by a given industry have the same input structure, but that multiple industries can produce the same commodity. Thus, model technosphere flows represent commodity outputs (and not industry outputs) from other processes in the model. There are no by-products included in these processes. All commodity production is based on US-conditions, despite in reality that some goods and services are produced overseas, as USEEIO v1.1 is a single-region IO model.

## Completeness
The input-output approach assures that all purchased inputs associated with the sectors making these commodities as reported in the US census for 2007 are included. The direct resources extracted including minerals, energy sources, water and land occupied are included. Emissions to air include all critieria air pollutants, greenhouse gases, and hazardous and toxic air pollutants as defined by US EPA. Releases to water include toxics, total nitrogen and total phosphorus, and water discharges. Releases to soil or groundwater include toxics and agriculutural pesticides. Some metal releases to air, water and soil are not included because they could not be speciated. Solid hazardous and non-hazardous wastes generated are not included as an elementary flows although purchases of waste services are included.

## Data treatment
Greenhouse gases are primarily from the US Greenhouse Gas Emission Inventory (USEPA 2016a). Biogenic C uptake is not included (change from version 1.0), as biogenic C emission are not included. Toxic releases to air, water and soil (except pesticides) are from the 2013 Toxic Release Inventory (USEPA 2015a). Criteria air pollutants and hazardous air pollutants are from the 2011 National Emissions Inventory (USEPA 2015b). All estimates are normalized by industry based on sector output in the data year, then converted to 2013 USD using relative sector-specific CPIs (if data year is not 2013). Energy use represent raw renewables or fossil fuel energies and is based on EIA data for 2014. See Table 1 in Yang, Ingwersen et al. 2017 and Supporting Information 1, and the v1.1 data update notes (Ingwersen et al. 2017) for all details on environmental data sources used.Land occupation for commercial buildings was estimated based on the building floorspace data provided by the U.S. Energy Information Administration 2012 Commercial Building Energy Consumption Survey (CBECS) (EIA 2015). Total commercial public supply water use is reported by USGS (Maupin et al. 2014). Water use is allocated across commercial sectors based on their use of water, sewage, and other services in USD based on the 2007 Benchmark Use Table before redefinitions (BEA 2015).

## Data collection
2015-2016

## Sampling procedure
US federal government sources, including surveys and US EPA emissions databases are used as the primary sources. From these sources, data for US reporting establishments/facilities are aggregated by the NAICS sector as defined in the BEA detailed 2007 input-output tables. When level of sector aggregation differs, or when direct emissions are not reported but modeled, additional sources are used to make allocations and estimates.

## Review details
In regard to quality assurance and peer-review, each dataset created went through Quality Assurance as defined in a quality assurance project plans at US EPA, CSRA or ERG. The model was assembled with the IO model builder model (USEPA 2016c). Validation functions were used to check that all the model components were properly assembled and harmonized. Bayou Demeke and Santosh Ghimire provided internal peer review of the model methodology and the manuscript underwent standard EPA management review. An editor and two anonymous reviewers at the Journal of Cleaner Production reviewed the model. In regard to data quality evaluation, data quality assessment was performed at the flow and process levels according to the updated US EPA data quality assessment guidelines as defined in US EPA (2016b).

## Intended application
The primary application is for use in the US Environmentally-Extended Input-Ouput model, USEEIO, version 1.1. This model is being used by the US EPA for supporting tools that prioritize goods and services based on potential environmental impacts, resource use or emissions for large regions, including the US and US states, and as a strealined tool for organizations as a starting point to consider sustainable materials management. Model results are designed to provide meso/macro-level decision support.

## Project
USEEIO v1.1 was developed by the US EPA with CSRA and ERG with Wesley W. Ingwersen and David E. Meyer as research leads. Yi Yang was the technical lead on the work for CSRA (contract EP-C-15-012); Troy Hawkins was lead for ERG (contract EP-C-12-021).
