# Company and enterprise management

Dataset: openLCA process, unit process
Category: 55: Management of Companies and Enterprises
Geography: United States
Time period: 2017-01-01 to 2017-12-31
Data quality: US EPA - Process Pedigree Matrix (1;1)
Exchange data quality scheme: US EPA - Flow Pedigree Matrix
Generated by: US EPA with CSRA and ERG
Owner: US EPA
Published in: Yang, Ingwersen et al. 2017
restrictionsDescription: This model shold be appropriately cited (see Yang, Ingwersen et al. 2017 source or Publication field) when used. Any changes or derivations of this model by the user should be documented. The model itself and any results from use of this model shall not be construed to consitute US EPA opinion or policy.
copyright: false

## General comment
BEA Code & Name is '550000:Management of companies and enterprises'. Description of the primary industry producing this good or service, adapted from the Census Bureau NAICS 2007 descriptions: The Management of Companies and Enterprises sector comprises (1) establishments that hold the securities of (or other equity interests in) companies and enterprises for the purpose of owning a controlling interest or influencing management decisions or (2) establishments (except government establishments) that administer, oversee, and manage establishments of the company or enterprise and that normally undertake the strategic or organizational planning and decision making role of the company or enterprise. Establishments that administer, oversee, and manage may hold the securities of the company or enterprise. Establishments in this sector perform essential activities that are often undertaken, in-house, by establishments in many sectors of the economy. By consolidating the performance of these activities of the enterprise at one establishment, economies of scale are achieved. Government establishments primarily engaged in administering, overseeing, and managing governmental programs are classified in Sector 92, Public Administration. Establishments primarily engaged in providing a range of day-to-day office administrative services, such as financial planning, billing and recordkeeping, personnel, and physical distribution and logistics are classified in Industry 56111, Office Administrative Services.

## Technology
The process describes the average US production of this good or service within this NAICS-based grouping defined in the BEA 2007 detailed input-output tables (BEA 2015). Distribution, wholesale and retailing of this good or service, use, and final disposal are not included. Creation of a product system with this process will enable modeling of all upstream (supply-chain) activities.

## Geography
Data represent the 50 US states

## Time period
2017 was the year in which this version of USEEIO was released and is the target date for the model

## Reference product
- Company and enterprise management: 1 USD

## Inputs from technosphere
All rows: data quality (1,3,1,1,1)
- State and local government enterprises: 0.000658845 USD
- Truck transport: 0.000861017 USD
- Environmental and other technical consulting services: 0.00495442 USD
- Audio and video equipment; at manufacturer: 4.04345e-5 USD
- Cutlery and handtools; at manufacturer: 2.61635e-5 USD
- Computer terminals and other computer peripheral equipment; at manufacturer: 0.00283517 USD
- Vehicle electrical and electronic equipment; at manufacturer: 0.000225958 USD
- Wholesale trade: 0.0053326 USD
- Other support activities for mining: 2.3785e-6 USD
- Legal services: 0.0209522 USD
- All other forging, stamping, and sintering; at manufacturer: 2.3785e-6 USD
- Scenic and sightseeing transportation and support activities for transportation: 0.000107033 USD
- Insurance carriers: 0.00224055 USD
- Travel arrangement and reservation: 0.0048236 USD
- Speed changers, industrial high-speed drives, and gears; at manufacturer: 2.3785e-6 USD
- Architectural, engineering, and related services: 0.00304448 USD
- Investigation and security: 4.757e-6 USD
- Satellite, telecommunications resellers, and all other telecommunications: 0.000813447 USD
- Newspapers; at publisher: 8.0869e-5 USD
- Computers; at manufacturer: 0.000240229 USD
- Investment advice, portfolio management, and other financial advising services: 0.00147943 USD
- Commercial equipment rental: 0.00299691 USD
- Metal pipe fittings, ball and roller bearings, industrial patterns, metal bath fixtures, other misc. fabricated metals; at manufacturer: 0.000601761 USD
- Business support: 0.00264014 USD
- Vehicle engines and engine parts; at manufacturer: 2.3785e-6 USD
- Soap and cleaning compounds; at manufacturer: 0.00443352 USD
- Cardboard; at manufacturer: 8.80045e-5 USD
- Ready-mix concrete; at manufacturer: 2.3785e-6 USD
- Office machinery; at manufacturer: 0.000573219 USD
- Paper bags and coated paper; at manufacturer: 3.8056e-5 USD
- Lids, jars, bottle caps, other metal closures and crowns; at manufacturer: 2.3785e-6 USD
- Civic, social, professional, and similar organizations: 0.00329184 USD
- Pipeline transport: 3.3299e-5 USD
- All other food and drinking places: 0.00140094 USD
- Springs and wires; at manufacturer: 0.000161738 USD
- Air conditioning, refrigeration, and warm air heating equipment; at manufacturer: 1.4271e-5 USD
- Software: 0.00226671 USD
- Wireless communications; at manufacturer: 0.000216444 USD
- Postal service: 0.000651709 USD
- Other animal food; at manufacturer: 2.3785e-6 USD
- Telephones; at manufacturer: 0.0116523 USD
- Industrial molds; at manufacturer: 2.3785e-6 USD
- Agriculture and forestry support: 1.4271e-5 USD
- Vehicle repair: 0.00255213 USD
- Sound recording: 0.00034964 USD
- Wireless telecommunications: 0.00347975 USD
- Coal; at mine: 0.000116547 USD
- Tobacco, cotton, sugarcane, peanuts, sugar beets, herbs and spices, and other crops; at farm: 4.757e-6 USD
- Noncomparable imports: 0.00601523 USD
- Books, newspapers, magazines, and other print media; at manufacturer: 0.0018029 USD
- Dimensional stone; at mine: 2.3785e-6 USD
- Full-service restaurants: 0.00187188 USD
- Gaskets, seals, musical instruments, fasteners, brooms, brushes, mop and other misc. goods; at manufacturer: 2.14065e-5 USD
- Semiconductors; at manufacturer: 0.000197416 USD
- Soft drinks, bottled water, and ice; at manufacturer: 0.000235472 USD
- Household goods repair: 0.00145564 USD
- Iron, gold, silver, and other metal ores; at mine: 2.3785e-6 USD
- Other real estate: 0.0313296 USD
- Fresh wheat, corn, rice, and other grains; at farm: 9.514e-6 USD
- Metal structural products; at manufacturer: 7.1355e-6 USD
- Waste management and remediation: 0.00157457 USD
- Cardboard containers; at manufacturer: 0.000140332 USD
- Consumer goods and general rental centers: 0.00270435 USD
- Tobacco products; at manufacturer: 4.757e-6 USD
- Rail transport: 8.32475e-5 USD
- Polystyrene foam products; at manufacturer: 4.757e-6 USD
- Glass and glass products; at manufacturer: 0.000187902 USD
- Magazines and journals; at publisher: 0.000516135 USD
- Valve and fittings (except for plumbing); at manufacturer: 9.514e-6 USD
- Lime and gypsum products; at manufacturer: 2.3785e-6 USD
- Vending, commercial laundry, and other commercial and service industry machinery; at manufacturer: 2.3785e-6 USD
- Other concrete products; at manufacturer: 3.8056e-5 USD
- Institutional furniture; at manufacturer: 7.1355e-6 USD
- Accounting, tax preparation, bookkeeping, and payroll: 0.0130033 USD
- Shelving and lockers; at manufacturer: 2.3785e-6 USD
- Management consulting: 0.0194871 USD
- Telecommunications: 0.00843416 USD
- Books; at publisher: 1.4271e-5 USD
- Performances: 0.00213351 USD
- Air transport: 0.000627924 USD
- Other computer related services, including facilities management: 0.0111599 USD
- Motors and generators; at manufacturer: 4.757e-6 USD
- Stationery; at manufacturer: 4.2813e-5 USD
- Surgical appliance and supplies; at manufacturer: 1.4271e-5 USD
- Toiletries; at manufacturer: 0.00123682 USD
- Other basic organic chemicals; at manufacturer: 0.000192659 USD
- Used and secondhand goods: 0.0004757 USD
- Animal farms and aquaculture ponds (except cattle and poultry): 1.66495e-5 USD
- Promoters and agents: 0.00132007 USD
- Optical instruments and lenses; at manufacturer: 2.3785e-6 USD
- Metal windows, doors, and architectural products; at manufacturer: 2.3785e-6 USD
- Veterinarians: 7.1355e-6 USD
- Pet care, photofinishing, parking and other sundry services: 4.757e-6 USD
- Computer storage device readers; at manufacturer: 8.80045e-5 USD
- Employment services: 0.00322049 USD
- Data processing and hosting: 0.00992786 USD
- Vaccines and other biological medical products; at manufacturer: 4.757e-6 USD
- Finished and coated fabric; at manufacturer: 2.3785e-6 USD
- Fluid meters and counting devices; at manufacturer: 2.3785e-6 USD
- Chemicals (except basic chemicals, agrichemicals, polymers, paints, pharmaceuticals,soaps, cleaning compounds); at manufacturer: 2.14065e-5 USD
- Storage batteries; at manufacturer: 6.1841e-5 USD
- Funds, trusts, and financial vehicles: 7.1355e-6 USD
- Vehicle rental and leasing: 0.00624832 USD
- Nonferrous metal casts; at manufacturer: 2.3785e-6 USD
- Couriers and messengers: 1.66495e-5 USD
- Computer systems design: 0.0160525 USD
- Passenger ground transport: 0.000176009 USD
- Welding and Soldering Equipment, Scales and Balances, and other general purpose machinery; at manufacturer: 1.66495e-5 USD
- All other converted paper products; at manufacturer: 2.3785e-6 USD
- Lumber and treated lumber; at manufacturer: 4.757e-6 USD
- Machine shops; at manufacturer: 0.000801555 USD
- Light bulbs; at manufacturer: 4.757e-5 USD
- Fabric; at manufacturer: 2.3785e-6 USD
- Synthetic dyes and pigments; at manufacturer: 4.757e-6 USD
- Internet publishing and broadcasting: 0.00143424 USD
- Metal hinges, keys, lock, and other hardware; at manufacturer: 2.3785e-6 USD
- Light fixtures; at manufacturer: 0.000118925 USD
- Natural gas; at consumer: 0.00162927 USD
- Drinking water and wastewater treatment; at consumer: 0.000130818 USD
- Other rubber products; at manufacturer: 0.000337747 USD
- Asphalt pavement; at manufacturer: 2.3785e-6 USD
- Power boilers and heat exchangers; at manufacturer: 2.3785e-6 USD
- Insurance agencies and brokerages: 0.000423373 USD
- News syndicates, libraries, archives, Internet publishing and all other information services: 3.09205e-5 USD
- Specialty transformers; at manufacturer: 4.757e-6 USD
- Specialized design: 0.000147467 USD
- Farm machinery and equipment; at manufacturer: 1.9028e-5 USD
- Office administration: 0.00200032 USD
- Other textiles; at manufacturer: 4.757e-6 USD
- Plastic pipe, fittings, and sausage casings; at manufacturer: 2.3785e-6 USD
- Rubber tires; at manufacturer: 1.66495e-5 USD
- Nondepository credit intermediation and related activities: 0.0112337 USD
- Relay and industrial controls; at manufacturer: 2.3785e-6 USD
- Sports: 3.56775e-5 USD
- Electricity; at consumer: 0.0106414 USD
- Securities and commodities brokerage and exchanges: 0.0141711 USD
- Transmission and power train parts; at manufacturer: 0.000199794 USD
- Scientific research and development: 0.000589868 USD
- Machinery for the paper, textile, food or other industries (except semiconductor machinery); at manufacturer: 2.3785e-6 USD
- Monetary authorities and depository credit intermediation: 0.0248648 USD
- Limited-service restaurants: 0.00147229 USD
- Other secondary nonferrous metal products; at manufacturer: 2.3785e-6 USD
- Other plastic products; at manufacturer: 5.2327e-5 USD
- Nonresidential building repair and maintanence: 0.00175771 USD
- Hotels and campgrounds: 0.00104178 USD
- Clothing; at manufacturer: 1.9028e-5 USD
- Other basic inorganic chemicals; at manufacturer: 2.3785e-6 USD
- Compressed Gases; at manufacturer: 4.757e-6 USD
- Marketing research and all other miscellaneous professional, scientific, and technical services: 0.00446444 USD
- Urethane and other foam products; at manufacturer: 2.3785e-6 USD
- Office supplies (not paper); at manufacturer: 9.514e-6 USD
- Plastic bags, films, and sheets; at manufacturer: 0.000102276 USD
- Golf courses, marinas, ski resorts, fitness and other rec centers and industries: 0.00148656 USD
- Cattle ranches and feedlots: 9.514e-6 USD
- Independent artists, writers, and performers: 0.000877667 USD
- Advertising and public relations: 0.0583066 USD
- Mechanical power transmission equipment; at manufacturer: 4.757e-6 USD
- Warehousing: 1.18925e-5 USD
- Other support services: 0.000423373 USD
- Printing support; at manufacturer: 0.00106081 USD
- Paper; at manufacturer: 0.000689765 USD
- Pumps and pumping equipment; at manufacturer: 2.3785e-6 USD
- Electronic equipment repair and maintenance: 0.00149132 USD
- Unrefined oil and gas; at extraction site: 0.0004757 USD
- Pharmaceutical products (pills, powders, solutions, etc.); at manufacturer: 7.1355e-6 USD
- Buildings and dwellings services: 0.00320384 USD
- Sand, gravel, clay, phosphate, other nonmetallic minerals; at mine: 4.757e-6 USD
- Paints and coatings; at manufacturer: 2.3785e-6 USD
- Primary iron, steel, and ferroalloy products; at manufacturer: 5.7084e-5 USD
- Lessors of nonfinancial intangible assets: 0.0212995 USD
- Snack foods; at manufacturer: 2.3785e-6 USD
- Other vehicle parts; at manufacturer: 0.000639817 USD
- Photographers: 4.757e-6 USD
- Facilities support: 7.1355e-6 USD
- Directory, mailing list, and other publishers; at publisher: 0.00033299 USD
- Amusement parks and arcades: 0.000204551 USD
- Heating equipment other than warm air furnaces; at manufacturer: 2.3785e-6 USD
- Packaged meat (except poultry); at manufacturer: 2.3785e-6 USD
- Copper, nickel, lead, and zinc; at mine: 2.3785e-6 USD
- Communications equipment; at manufacturer: 0.00101562 USD
- Commercial machinery repair: 0.00489495 USD
- Vehicle metal stamping; at manufacturer: 2.3785e-6 USD
- Gasoline, fuels, and by-products of petroleum refining; at manufacturer: 0.00463332 USD
- Aluminum; at manufacturer: 2.14065e-5 USD
- Water transport (boats, ships, ferries): 5.2327e-5 USD
- Watches, clocks, and other measuring and controlling devices; at manufacturer: 9.27615e-5 USD
- Air purification and ventilation equipment; at manufacturer: 2.3785e-6 USD

## Inputs from nature
- Occupation, urban, discontinuously built: 0.000263778 m2*a; data quality (4,2,1,1,1)
- Energy, solar: 0.000116043 MJ; data quality (3,1,1,1,1)
- Water, fresh: 7.47886e-5, 4.32154e-5 m3 (2 entries, compartments not in this file); data quality (1,2,1,4,2)

## Emissions to nature
- methane, dichloro-, hcc-30: 1.84701e-10 kg; data quality (4,2,1,1,5)
- propanal: 5.61775e-9 kg; data quality (3,2,1,4,1)
- Cobalt: 5.12674e-14 kg; data quality (3,2,1,1,5)
- naphthalene: 3.42558e-9 kg; data quality (3,2,1,4,1)
- ammonia: 9.59538e-9 kg; data quality (3,2,1,4,1)
- ethane, 1,2-dichloro-: 1.40112e-13 kg; data quality (3,2,1,1,5)
- nitrogen oxides: 2.93167e-6 kg; data quality (3,2,1,1,1)
- pyrene: 5.06266e-11 kg; data quality (3,2,1,4,1)
- Water, fresh: 9.99156e-5 m3; data quality (1,2,1,4,2)
- Ethene, chloro-: 8.91658e-14 kg; data quality (3,2,1,1,5)
- beryllium: 3.5012e-14 kg; data quality (2,2,1,1,5)
- acenaphthylene: 1.51337e-10 kg; data quality (3,2,1,4,1)
- Chromium, ion: 6.99461e-12 kg; data quality (3,2,1,5,1)
- 2,2,4-trimethylpentane: 5.62046e-8 kg; data quality (3,2,1,4,1)
- Carbon dioxide: 0.00712981 kg; data quality (4,2,1,4,1)
- Ethane, 1,1,1,2-tetrafluoro-, HFC-134a: 1.51787e-8 kg; data quality (4,2,1,4,1)
- mercury: 1.80671e-13 kg; data quality (3,2,1,4,2)
- acetaldehyde: 2.57436e-8 kg; data quality (3,2,1,4,1)
- ethane, 1,2-dibromo-: 2.64375e-13 kg; data quality (2,2,1,1,5)
- benzene: 1.00576e-7 kg; data quality (3,2,1,4,1)
- sulfur dioxide: 4.03016e-8 kg; data quality (2,2,1,2,4)
- formaldehyde: 5.53261e-8 kg; data quality (3,2,1,4,1)
- o-Xylene: 1.9023e-9 kg; data quality (3,2,1,4,1)
- Propane, 1,1,1,3,3,3-hexafluoro-, HCFC-236fa: 4.65482e-11 kg; data quality (4,2,1,4,1)
- Chromium VI: 1.88686e-12 kg; data quality (3,2,1,5,1)
- anthracene: 3.02028e-11 kg; data quality (3,2,1,4,1)
- Indeno(1,2,3-cd)pyrene: 3.65811e-12 kg; data quality (3,2,1,4,1)
- methanol: 1.10513e-9 kg; data quality (4,2,1,1,5)
- fluorene: 7.16972e-11 kg; data quality (3,2,1,4,1)
- acrolein: 2.06349e-9 kg; data quality (3,2,1,4,1)
- benzene, ethyl-: 3.95077e-8 kg; data quality (3,2,1,4,1)
- fluoranthene: 4.02987e-11 kg; data quality (3,2,1,4,1)
- Dibenz(a,h)anthracene: 2.92619e-14 kg; data quality (3,2,1,4,1)
- arsenic: 8.40033e-12 kg; data quality (3,2,1,5,1)
- m-xylene: 5.30023e-9 kg; data quality (3,2,1,4,1)
- 3-methylcholanthrene: 1.43888e-16 kg; data quality (2,2,1,1,5)
- Methane: 6.43513e-7 kg; data quality (4,2,1,4,1)
- acenaphthene: 3.89834e-11 kg; data quality (3,2,1,4,1)
- particulates, < 10 um: 2.03413e-8 kg; data quality (3,2,1,3,3)
- toluene: 1.53043e-7 kg; data quality (3,2,1,4,1)
- Chrysene: 4.1987e-12 kg; data quality (3,2,1,4,1)
- phenanthrene: 1.28577e-10 kg; data quality (3,2,1,4,1)
- Benzo(k)fluoranthene: 4.4336e-12 kg; data quality (3,2,1,4,1)
- VOC, volatile organic compounds: 2.68146e-6 kg; data quality (3,2,1,1,1)
- carbon monoxide: 5.97766e-5 kg; data quality (3,2,1,1,1)
- Dinitrogen monoxide: 1.92364e-8 kg; data quality (4,2,1,4,1)
- Ethane, pentafluoro-, HFC-125: 4.02711e-9 kg; data quality (4,2,1,4,1)
- benzo(a)pyrene: 4.19267e-12 kg; data quality (3,2,1,4,1)
- hexane: 3.29411e-8 kg; data quality (3,2,1,4,1)
- nickel: 1.79668e-11 kg; data quality (3,2,1,5,1)
- carbon tetrachloride: 2.2052e-13 kg; data quality (4,2,1,1,5)
- Hydrocarbons, aromatic: 1.10835e-9 kg; data quality (3,2,1,4,1)
- manganese: 4.64355e-12 kg; data quality (3,2,1,5,1)
- Xylene: 1.28963e-7 kg; data quality (3,2,1,4,1)
- acetonitrile: 1.84189e-10 kg; data quality (3,2,1,1,5)
- Ethane, 1,1,1-trifluoro-, HFC-143a: 1.72303e-9 kg; data quality (4,2,1,4,1)
- selenium: 1.72182e-13 kg; data quality (2,2,1,1,5)
- cadmium: 7.06879e-13 kg; data quality (3,2,1,1,5)
- 2-methylnaphthalene: 1.46478e-14 kg; data quality (2,2,1,1,5)
- diisocyanates: 4.06451e-12 kg; data quality (4,1,1,1,5)
- Benzo(g,h,i)perylene: 1.19416e-11 kg; data quality (3,2,1,4,1)
- lead: 3.89473e-13 kg; data quality (3,2,1,1,5)
- Benzo(a)anthracene: 1.27901e-15 kg; data quality (2,2,1,1,5)
- Benzo(b)fluoranthene: 4.51323e-12 kg; data quality (3,2,1,4,1)
- Methane, difluoro-, HFC-32: 2.3452e-9 kg; data quality (4,2,1,4,1)
- butadiene: 1.63202e-8 kg; data quality (3,2,1,4,1)
- particulates, < 2.5 um: 2.26865e-7 kg; data quality (3,2,1,4,1)
- benz[a]anthracene: 4.3931e-12 kg; data quality (3,2,1,4,1)
- styrene: 1.54243e-9 kg; data quality (3,2,1,4,1)
- para-xylene: 9.91966e-11 kg; data quality (3,2,1,4,1)

## Inventory method
Input-output

## Modelling constants
The reference unit of all processes is 1 USD2013 of the good or service. The technosphere inputs are based on the US BEA detailed input-output tables for 2007. The IO tables are combined to develop a commodity-by-commodity model based on the the industry-technology assumption (see Suh et al., 2010), which assumes all commodities produced by a given industry have the same input structure, but that multiple industries can produce the same commodity. Thus, model technosphere flows represent commodity outputs (and not industry outputs) from other processes in the model. There are no by-products included in these processes. All commodity production is based on US-conditions, despite in reality that some goods and services are produced overseas, as USEEIO v1.1 is a single-region IO model.

## Completeness
The input-output approach assures that all purchased inputs associated with the sectors making these commodities as reported in the US census for 2007 are included. The direct resources extracted including minerals, energy sources, water and land occupied are included. Emissions to air include all critieria air pollutants, greenhouse gases, and hazardous and toxic air pollutants as defined by US EPA. Releases to water include toxics, total nitrogen and total phosphorus, and water discharges. Releases to soil or groundwater include toxics and agriculutural pesticides. Some metal releases to air, water and soil are not included because they could not be speciated. Solid hazardous and non-hazardous wastes generated are not included as an elementary flows although purchases of waste services are included.

## Data treatment
Greenhouse gases are primarily from the US Greenhouse Gas Emission Inventory (USEPA 2016a). Biogenic C uptake is not included (change from version 1.0), as biogenic C emission are not included. Toxic releases to air, water and soil (except pesticides) are from the 2013 Toxic Release Inventory (USEPA 2015a). Criteria air pollutants and hazardous air pollutants are from the 2011 National Emissions Inventory (USEPA 2015b). All estimates are normalized by industry based on sector output in the data year, then converted to 2013 USD using relative sector-specific CPIs (if data year is not 2013). Energy use represent raw renewables or fossil fuel energies and is based on EIA data for 2014. See Table 1 in Yang, Ingwersen et al. 2017 and Supporting Information 1, and the v1.1 data update notes (Ingwersen et al. 2017) for all details on environmental data sources used.Land occupation for commercial buildings was estimated based on the building floorspace data provided by the U.S. Energy Information Administration 2012 Commercial Building Energy Consumption Survey (CBECS) (EIA 2015). Total commercial public supply water use is reported by USGS (Maupin et al. 2014). Water use is allocated across commercial sectors based on their use of water, sewage, and other services in USD based on the 2007 Benchmark Use Table before redefinitions (BEA 2015).

## Data collection
2015-2016

## Sampling procedure
US federal government sources, including surveys and US EPA emissions databases are used as the primary sources. From these sources, data for US reporting establishments/facilities are aggregated by the NAICS sector as defined in the BEA detailed 2007 input-output tables. When level of sector aggregation differs, or when direct emissions are not reported but modeled, additional sources are used to make allocations and estimates.

## Review details
In regard to quality assurance and peer-review, each dataset created went through Quality Assurance as defined in a quality assurance project plans at US EPA, CSRA or ERG. The model was assembled with the IO model builder model (USEPA 2016c). Validation functions were used to check that all the model components were properly assembled and harmonized. Bayou Demeke and Santosh Ghimire provided internal peer review of the model methodology and the manuscript underwent standard EPA management review. An editor and two anonymous reviewers at the Journal of Cleaner Production reviewed the model. In regard to data quality evaluation, data quality assessment was performed at the flow and process levels according to the updated US EPA data quality assessment guidelines as defined in US EPA (2016b).

## Intended application
The primary application is for use in the US Environmentally-Extended Input-Ouput model, USEEIO, version 1.1. This model is being used by the US EPA for supporting tools that prioritize goods and services based on potential environmental impacts, resource use or emissions for large regions, including the US and US states, and as a strealined tool for organizations as a starting point to consider sustainable materials management. Model results are designed to provide meso/macro-level decision support.

## Project
USEEIO v1.1 was developed by the US EPA with CSRA and ERG with Wesley W. Ingwersen and David E. Meyer as research leads. Yi Yang was the technical lead on the work for CSRA (contract EP-C-15-012); Troy Hawkins was lead for ERG (contract EP-C-12-021).

## Sources
- USDA 2006
- Goebes et al. 2003
- EIA 2016
- Statistics Canada 2010
- USDA 2009b
- USGS 2016
- Yienger et al. 1995
- Edelen and Ingwersen 2017
- USEPA 2016a
- Torcellini et al. 2003
- USEPA 2016b
- Blackhurst et al. 2010
- Kim et el. 2013
- BEA 2015
- USDA 2009a
- EIA 2013
- USEPA 2016c
- Ingwersen et al. DRAFT
- USEPA 2015b
- USDA 2014
- Nickerson et al. 2011
- Ingwersen et al. 2017
- USDA 2016
- Maupin et al. 2014
- BLM 2008
- USEPA 2015a
- EIA 2015
- Lovelace 2009
- Macknick et al. 2011
- EIA 2017
- USGS 2015
