# Rail transport

Dataset: openLCA process, unit process
Category: 48-49: Transportation and Warehousing
Geography: United States
Time period: 2017-01-01 to 2017-12-31
Data quality: US EPA - Process Pedigree Matrix (1;1)
Exchange data quality scheme: US EPA - Flow Pedigree Matrix
Generated by: US EPA with CSRA and ERG
Owner: US EPA
Published in: Yang, Ingwersen et al. 2017
restrictionsDescription: This model shold be appropriately cited (see Yang, Ingwersen et al. 2017 source or Publication field) when used. Any changes or derivations of this model by the user should be documented. The model itself and any results from use of this model shall not be construed to consitute US EPA opinion or policy.
copyright: false

## General comment
BEA Code & Name is '482000:Rail transportation'. Description of the primary industry producing this good or service, adapted from the Census Bureau NAICS 2007 descriptions: Industries in the Rail Transportation subsector provide rail transportation of passengers and/or cargo using railroad rolling stock. The railroads in this subsector primarily either operate on networks, with physical facilities, labor force, and equipment spread over an extensive geographic area, or operate over a short distance on a local rail line. Scenic and sightseeing rail transportation and street railroads, commuter rail, and rapid transit are not included in this subsector but are included in Subsector 487, Scenic and Sightseeing Transportation, and Subsector 485, Transit and Ground Passenger Transportation, respectively. Although these activities use railroad rolling stock, they are different from the activities included in rail transportation. Sightseeing and scenic railroads do not usually involve place-to-place transportation; the passenger's trip typically starts and ends at the same location. Commuter railroads operate in a manner more consistent with local and urban transit and are often part of integrated transit systems.

## Technology
The process describes the average US production of this good or service within this NAICS-based grouping defined in the BEA 2007 detailed input-output tables (BEA 2015). Distribution, wholesale and retailing of this good or service, use, and final disposal are not included. Creation of a product system with this process will enable modeling of all upstream (supply-chain) activities.

## Geography
Data represent the 50 US states

## Time period
2017 was the year in which this version of USEEIO was released and is the target date for the model

## Reference product
- Rail transport: 1 USD

## Inputs from technosphere
All rows: data quality (1,3,1,1,1)
- Investigation and security: 0.000493184 USD
- Springs and wires; at manufacturer: 1.50593e-7 USD
- Vehicle electrical and electronic equipment; at manufacturer: 0.00016445 USD
- Rail transport: 0.00208735 USD
- Pumps and pumping equipment; at manufacturer: 0.000443833 USD
- Cast iron and steel; at manufacturer: 0.0174357 USD
- Primary batteries; at manufacturer: 1.67326e-8 USD
- Speed changers, industrial high-speed drives, and gears; at manufacturer: 4.93669e-5 USD
- Soap and cleaning compounds; at manufacturer: 1.67326e-8 USD
- Ink and ink cartridges; at manufacturer: 1.64333e-5 USD
- Ready-mix concrete; at manufacturer: 6.02372e-7 USD
- Vehicle metal stamping; at manufacturer: 3.51384e-7 USD
- Specialty transformers; at manufacturer: 0.000180766 USD
- Software: 0.000295833 USD
- Golf courses, marinas, ski resorts, fitness and other rec centers and industries: 1.645e-5 USD
- Insurance agencies and brokerages: 4.92999e-5 USD
- Electronic capacitors, resistors, coils, transformers, connectors and other components (except semiconductors and printed circuit assemblies); at manufacturer: 3.28666e-5 USD
- Buildings and dwellings services: 0.00617976 USD
- Other petroleum and coal products; at manufacturer: 0.000230184 USD
- Air purification and ventilation equipment; at manufacturer: 0.000115033 USD
- Business support: 0.000640949 USD
- Plastic bottles; at manufacturer: 1.67326e-8 USD
- Compressed Gases; at manufacturer: 1.64333e-5 USD
- Commercial machinery repair: 1.66174e-5 USD
- General merchandise stores: 3.28666e-5 USD
- Motors and generators; at manufacturer: 7.08869e-5 USD
- Advertising and public relations: 0.00417435 USD
- Metal hinges, keys, lock, and other hardware; at manufacturer: 0.000197317 USD
- Waste management and remediation: 0.000608167 USD
- Polystyrene foam products; at manufacturer: 1.67326e-8 USD
- Nondepository credit intermediation and related activities: 0.0556268 USD
- Cutlery and handtools; at manufacturer: 0.000443699 USD
- Performances: 0.00336883 USD
- Fertilizers; at manufacturer: 3.28666e-5 USD
- Data processing and hosting: 1.84058e-7 USD
- Railroad rolling stock; at manufacturer: 0.0235657 USD
- Investment advice, portfolio management, and other financial advising services: 0.0154144 USD
- Switchgear and switchboards; at manufacturer: 0.000410833 USD
- Postal service: 3.01186e-7 USD
- Vehicles and parts sales: 0.000131467 USD
- Asphalt pavement; at manufacturer: 1.50593e-7 USD
- other miscellaneous electrical equipment and components; at manufacturer: 0.00218563 USD
- Hotels and campgrounds: 9.87505e-5 USD
- Abrasive products; at manufacturer: 1.64333e-5 USD
- Synthetic rubber and artificial and synthetic fibers; at manufacturer: 8.36628e-8 USD
- Vehicle seating and interior trim (upholstery); at manufacturer: 0.000575166 USD
- Plastic bags, films, and sheets; at manufacturer: 8.36628e-8 USD
- Vending, commercial laundry, and other commercial and service industry machinery; at manufacturer: 1.67326e-8 USD
- Magazines and journals; at publisher: 3.28666e-5 USD
- Motor vehicle steering, suspension components (except spring), and brake systems; at manufacturer: 0.000328867 USD
- Light fixtures; at manufacturer: 0.000148 USD
- Architectural, engineering, and related services: 0.0127901 USD
- Other real estate: 0.00249992 USD
- Vehicle repair: 0.000197401 USD
- State and local government enterprises: 6.69303e-8 USD
- Lumber and treated lumber; at manufacturer: 0.0239598 USD
- Commercial equipment rental: 0.0381417 USD
- Full-service restaurants: 1.65002e-5 USD
- Other basic organic chemicals; at manufacturer: 0.00023435 USD
- Scientific research and development: 3.28666e-5 USD
- Metal structural products; at manufacturer: 4.92999e-5 USD
- Other support services: 0.000936883 USD
- Limited-service restaurants: 4.94338e-5 USD
- Plastics; at manufacturer: 5.01977e-8 USD
- Food and beverage stores: 1.64333e-5 USD
- Dry-cleaning and laundry: 0.000197217 USD
- Consumer goods and general rental centers: 0.000131467 USD
- Synthetic dyes and pigments; at manufacturer: 6.57333e-5 USD
- Cement; at manufacturer: 6.57835e-5 USD
- Chemicals (except basic chemicals, agrichemicals, polymers, paints, pharmaceuticals,soaps, cleaning compounds); at manufacturer: 0.000443733 USD
- Metal pipe fittings, ball and roller bearings, industrial patterns, metal bath fixtures, other misc. fabricated metals; at manufacturer: 0.000443699 USD
- Gaskets, seals, musical instruments, fasteners, brooms, brushes, mop and other misc. goods; at manufacturer: 3.28666e-5 USD
- Mechanical power transmission equipment; at manufacturer: 8.36628e-8 USD
- Paints and coatings; at manufacturer: 0.000542918 USD
- Fluid meters and counting devices; at manufacturer: 6.35837e-7 USD
- Scenic and sightseeing transportation and support activities for transportation: 0.00290923 USD
- Wholesale trade: 0.0470792 USD
- Other educational services: 1.64333e-5 USD
- Natural gas; at consumer: 0.00031312 USD
- Wireless telecommunications: 4.93501e-5 USD
- Other vehicle parts; at manufacturer: 0.000248876 USD
- Primary iron, steel, and ferroalloy products; at manufacturer: 0.00154473 USD
- Metal coatings, engravings, and heat treatments; at manufacturer: 3.28666e-5 USD
- Insurance carriers: 0.000147933 USD
- Legal services: 0.00612971 USD
- Marketing research and all other miscellaneous professional, scientific, and technical services: 0.00110112 USD
- Environmental and other technical consulting services: 1.66341e-5 USD
- Air conditioning, refrigeration, and warm air heating equipment; at manufacturer: 1.67326e-8 USD
- Management consulting: 0.000427852 USD
- Other plastic products; at manufacturer: 0.000116138 USD
- Newspapers; at publisher: 1.64333e-5 USD
- Electricity; at consumer: 0.000198304 USD
- Nonresidential building repair and maintanence: 0.0114376 USD
- Water transport (boats, ships, ferries): 0.000295967 USD
- Other rubber products; at manufacturer: 2.84454e-7 USD
- Cardboard; at manufacturer: 0.00041085 USD
- Truck transport: 0.00468503 USD
- Accounting, tax preparation, bookkeeping, and payroll: 0.00677108 USD
- Cutting and machine tool accessory, rolling mill, and other metalworking machines; at manufacturer: 0.000443699 USD
- Colleges, universities, junior colleges, and professional schools: 0.000131483 USD
- Communications equipment; at manufacturer: 0.0001972 USD
- Other basic inorganic chemicals; at manufacturer: 1.64333e-5 USD
- Air transport: 0.00027955 USD
- Dimensional stone; at mine: 0.000542299 USD
- Office administration: 0.00027945 USD
- Satellite, telecommunications resellers, and all other telecommunications: 0.000428354 USD
- Pipeline transport: 0.000920935 USD
- Paper bags and coated paper; at manufacturer: 0.000115033 USD
- Civic, social, professional, and similar organizations: 0.000394466 USD
- Stationery; at manufacturer: 3.28666e-5 USD
- Other engine equipment; at manufacturer: 2.67721e-7 USD
- Gasoline, fuels, and by-products of petroleum refining; at manufacturer: 0.148567 USD
- Urethane and other foam products; at manufacturer: 4.18314e-7 USD
- Specialized design: 0.000444737 USD
- Books, newspapers, magazines, and other print media; at manufacturer: 0.000147933 USD
- Other computer related services, including facilities management: 0.00187357 USD
- Warehousing: 3.34651e-7 USD
- Drinking water and wastewater treatment; at consumer: 9.87839e-5 USD
- Securities and commodities brokerage and exchanges: 0.00258016 USD
- Telecommunications: 1.64333e-5 USD
- Computer systems design: 0.00524241 USD
- Relay and industrial controls; at manufacturer: 6.02372e-7 USD
- Secondary copper products; at manufacturer: 1.64333e-5 USD
- Vehicle engines and engine parts; at manufacturer: 3.31344e-5 USD
- Couriers and messengers: 1.64333e-5 USD
- Internet publishing and broadcasting: 1.17128e-7 USD
- Lessors of nonfinancial intangible assets: 0.000230066 USD
- Ball and roller bearings; at manufacturer: 3.28666e-5 USD
- Household goods repair: 0.000148285 USD
- Welding and Soldering Equipment, Scales and Balances, and other general purpose machinery; at manufacturer: 0.000132487 USD
- Vehicle rental and leasing: 0.000131467 USD
- Independent artists, writers, and performers: 1.6517e-5 USD
- Facilities support: 0.000181118 USD
- Metal windows, doors, and architectural products; at manufacturer: 1.645e-5 USD
- All other food and drinking places: 1.645e-5 USD
- Machine shops; at manufacturer: 0.000673916 USD
- Transmission and power train parts; at manufacturer: 0.000116439 USD
- Employment services: 0.000246784 USD
- Wooden windows, door, and flooring; at manufacturer: 0.0020213 USD
- Cardboard containers; at manufacturer: 0.000279366 USD
- Laminated plastic plates and shapes; at manufacturer: 1.67326e-8 USD
- Noncomparable imports: 0.00299086 USD
- Petrochemicals; at manufacturer: 4.92999e-5 USD
- Passenger ground transport: 0.00312439 USD
- Electronic equipment repair and maintenance: 0.00034515 USD
- Monetary authorities and depository credit intermediation: 0.00591939 USD
- Screws, nuts, and bolts; at manufacturer: 4.92999e-5 USD
- Other retail: 0.000361533 USD
- Concrete pipe, bricks, and blocks; at manufacturer: 1.65002e-5 USD
- Travel arrangement and reservation: 0.0036482 USD
- Plastic pipe, fittings, and sausage casings; at manufacturer: 1.33861e-7 USD
- Rubber tires; at manufacturer: 1.7705e-5 USD

## Inputs from nature
- Occupation, traffic area, rail network: 0.151431 m2*a; data quality (2,3,1,1,1)
- Water, fresh: 2.77483e-5, 4.80212e-5 m3 (2 entries, compartments not in this file); data quality (1,2,1,4,2)
- Occupation, traffic area, road network: 0.0351322 m2*a; data quality (2,3,1,1,1)
- Occupation, urban, discontinuously built: 0.000152195 m2*a; data quality (4,2,1,1,1)

## Emissions to nature
- ethyl acrylate: 6.02723e-14 kg; data quality (4,2,1,1,5)
- PYRENE, 1-NITRO-: 3.76195e-19 kg; data quality (2,2,1,1,5)
- 2-METHOXYETHANOL: 1.21532e-17 kg; data quality (4,2,1,1,5)
- phthalate, dioctyl-: 1.48583e-14 kg; data quality (3,2,1,1,5)
- ethylbenzene: 1.88346e-13 kg; data quality (4,1,1,1,5)
- ethane, 1,2-dibromo-: 1.68354e-14 kg; data quality (2,2,1,1,5)
- NITROUS ACID: 2.68528e-17 kg; data quality (5,1,1,1,5)
- ethylene glycol: 8.72717e-15 kg; data quality (5,1,1,1,5)
- m-xylene: 3.17866e-7 kg; data quality (3,2,1,1,5)
- propylene oxide: 1.93029e-15 kg; data quality (3,2,1,1,5)
- acrylic acid: 2.17607e-17 kg; data quality (4,2,1,1,5)
- antimony: 1.73368e-9 kg; data quality (3,2,1,1,5)
- nickel: 1.9961e-9 kg; data quality (3,2,1,1,5)
- carbon monoxide: 0.00141367 kg; data quality (3,2,1,1,5)
- acenaphthene: 8.67522e-9 kg; data quality (3,2,1,1,5)
- Dibenz(a,h)anthracene: 1.4276e-14 kg; data quality (3,2,1,3,2)
- Naphthalene: 3.17553e-14 kg; data quality (4,1,1,1,5)
- benzene: 1.53061e-17 kg; data quality (3,1,1,1,5)
- 1-Methyl-2-pyrrolidinone: 2.77575e-13, 2.08646e-14 kg (2 entries, compartments not in this file); data quality (5,1,1,1,5)
- 3,3'-dimethylbenzidine: 6.2306e-18 kg; data quality (1,2,1,1,5)
- benzene, ethyl-: 1.02675e-6 kg; data quality (3,2,1,1,5)
- vinyl acetate: 1.27128e-15 kg; data quality (4,2,1,1,5)
- chromium: 4.0588e-13, 4.1957e-16, 3.44817e-15 kg (3 entries, compartments not in this file); data quality (4,1,1,1,5)
- methylene diphenyl diisocyanate: 1.68476e-13 kg; data quality (4,2,1,1,5)
- NITROGLYCERIN: 9.93642e-13, 1.5536e-12, 3.77825e-12 kg (3 entries, compartments not in this file); data quality (5,1,1,1,5)
- formic acid: 9.31793e-15 kg; data quality (3,1,1,1,5)
- Aluminum: 7.116e-15 kg; data quality (4,1,1,1,5)
- barium: 6.7312e-17 kg; data quality (4,1,1,1,5)
- propanal: 2.96175e-6 kg; data quality (3,2,1,1,5)
- cumene: 1.01396e-8 kg; data quality (3,2,1,1,5)
- Triethylene glycol: 3.76076e-18 kg; data quality (5,2,1,1,5)
- 1,2-BUTYLENE OXIDE: 3.08445e-15 kg; data quality (4,2,1,1,5)
- arsenic: 4.5655e-10 kg; data quality (3,2,1,2,4)
- manganese: 5.25014e-15, 3.25617e-13 kg (2 entries, compartments not in this file); data quality (4,1,1,1,5)
- chlorine: 3.41851e-9 kg; data quality (3,2,1,1,5)
- 2-chloro-1-phenylethanone: 7.42418e-17 kg; data quality (2,2,1,1,5)
- polychlorinated biphenyls: 5.75603e-21 kg; data quality (3,2,1,1,5)
- Ethene, chloro-: 1.12908e-13 kg; data quality (3,2,1,1,5)
- Phthalate, dibutyl-: 3.50139e-8 kg; data quality (4,2,1,1,5)
- benz[a]anthracene: 4.36293e-9 kg; data quality (3,2,1,1,5)
- 2,2,4-trimethylpentane: 1.38616e-6 kg; data quality (3,2,1,1,5)
- ethylene oxide: 3.91245e-16 kg; data quality (3,2,1,1,5)
- pyrene: 2.86727e-8 kg; data quality (3,2,1,1,5)
- carbon tetrachloride: 3.23751e-14 kg; data quality (4,2,1,1,5)
- ammonia: 6.84626e-14 kg; data quality (3,1,1,1,5)
- benzyl chloride: 7.42413e-15 kg; data quality (2,2,1,1,5)
- methane, dichloro-, hcc-30: 1.63657e-8 kg; data quality (3,2,1,1,5)
- nickel: 1.14393e-17, 6.10338e-13 kg (2 entries, compartments not in this file); data quality (4,1,1,1,5)
- 2,4-dinitrophenol: 4.24328e-18 kg; data quality (5,2,1,1,5)
- Propene: 1.34264e-15 kg; data quality (3,1,1,1,5)
- particulates, < 2.5 um: 0.000269366 kg; data quality (3,2,1,1,5)
- Hydrazine: 1.05866e-15 kg; data quality (4,2,1,1,5)
- hydrogen fluoride: 1.10595e-8 kg; data quality (2,2,1,1,5)
- methyl methacrylate: 6.78799e-16 kg; data quality (4,2,1,1,5)
- nitrogen oxides: 0.0087997 kg; data quality (3,2,1,1,5)
- lead: 2.28476e-8 kg; data quality (3,2,1,1,5)
- methanol: 1.95273e-8 kg; data quality (3,2,1,1,5)
- methane, bromo-, halon 1001: 4.33527e-14 kg; data quality (3,2,1,1,5)
- styrene: 8.98214e-7 kg; data quality (3,2,1,1,5)
- 1,1-DICHLOROETHYLENE: 1.51866e-15 kg; data quality (3,2,1,1,5)
- aniline: 6.90432e-19 kg; data quality (4,2,1,1,5)
- Methane, difluoro-, HFC-32: 1.54214e-6 kg; data quality (4,2,1,4,1)
- manganese: 8.99621e-10 kg; data quality (3,2,1,1,5)
- VOC, volatile organic compounds: 0.000484501 kg; data quality (3,2,1,1,5)
- Benzo(b)fluoranthene: 1.76543e-9 kg; data quality (3,2,1,1,5)
- PHOSPHORUS: 1.53439e-9 kg; data quality (3,2,1,1,5)
- phenol: 1.21035e-12 kg; data quality (4,2,1,1,5)
- hydroquinone: 8.13956e-15 kg; data quality (3,2,1,1,5)
- Chromium VI: 6.65073e-10 kg; data quality (3,2,1,1,5)
- hydrogen sulfide: 2.51223e-14 kg; data quality (3,2,1,1,5)
- Propane sultone: 5.23055e-18 kg; data quality (5,2,1,1,5)
- butanol: 2.16514e-12 kg; data quality (5,1,1,1,5)
- ETHYLENETHIOUREA: 8.36888e-18 kg; data quality (5,2,1,1,5)
- Phosphorus: 2.65843e-14 kg; data quality (4,1,1,1,5)
- mercury: 7.93367e-9 kg; data quality (3,2,1,1,5)
- naphthalene: 7.66344e-7 kg; data quality (3,2,1,1,5)
- 1,2,4-trimethylbenzene: 2.04619e-14 kg; data quality (5,1,1,1,5)
- hexane: 2.74396e-6 kg; data quality (3,2,1,1,5)
- chloroform: 1.14521e-13 kg; data quality (4,2,1,1,5)
- hexachloro-1,3-butadiene: 4.68356e-16 kg; data quality (4,2,1,1,5)
- chlorine: 3.86681e-15 kg; data quality (2,1,1,1,5)
- Ethane, 1,1,1,2-tetrafluoro-, HFC-134a: 9.9811e-6 kg; data quality (4,2,1,4,1)
- toluene, 2,4-dinitro-: 4.28781e-18 kg; data quality (5,2,1,1,5)
- Sulfuric acid: 4.06888e-12 kg; data quality (2,1,1,1,5)
- pentachlorophenol: 3.26096e-20 kg; data quality (3,2,1,1,5)
- 2,4,5-trichlorophenol: 5.23055e-18 kg; data quality (2,2,1,1,5)
- ammonia: 3.86976e-6 kg; data quality (3,2,1,1,5)
- 2-ethoxyethyl acetate: 1.02396e-14 kg; data quality (5,2,1,1,5)
- 1-METHYLNAPTHALENE: 7.99955e-18 kg; data quality (2,2,1,1,5)
- Chrysene, 5-methyl-: 1.90855e-19 kg; data quality (2,2,1,1,5)
- ethene, tetrachloro-: 5.17919e-9 kg; data quality (3,2,1,1,5)
- acetonitrile: 6.91303e-15 kg; data quality (3,2,1,1,5)
- Urethane: 3.05867e-18 kg; data quality (5,2,1,1,5)
- 2-Acetylaminofluorene: 5.23055e-16 kg; data quality (5,2,1,1,5)
- toluene: 2.46796e-6 kg; data quality (3,2,1,1,5)
- hydrogen chloride: 1.16999e-8 kg; data quality (2,2,1,1,5)
- acenaphthylene: 1.16465e-7 kg; data quality (3,2,1,1,5)
- t-butyl methyl ether: 7.83049e-13 kg; data quality (3,2,1,1,5)
- carbon disulfide: 5.75657e-15 kg; data quality (4,2,1,1,5)
- Ethane, pentafluoro-, HFC-125: 2.64812e-6 kg; data quality (4,2,1,4,1)
- methane, monochloro-, r-40: 8.78205e-15 kg; data quality (3,2,1,1,5)
- o-Xylene: 1.62717e-7 kg; data quality (3,2,1,1,5)
- isophorone: 1.8012e-14 kg; data quality (2,2,1,1,5)
- 1,4-BENZOQUINONE: 1.17224e-19 kg; data quality (3,2,1,1,5)
- Benzo(k)fluoranthene: 1.41145e-9 kg; data quality (3,2,1,1,5)
- Xylene: 2.16076e-6 kg; data quality (3,2,1,1,5)
- 2,4-D: 3.24647e-14 kg; data quality (3,2,1,1,5)
- acrylonitrile: 2.87116e-14 kg; data quality (4,2,1,1,5)
- Benzo(a)anthracene: 2.43828e-15 kg; data quality (2,2,1,1,5)
- 2-(2-BUTOXYETHOXY) ETHYL ACETATE: 1.15388e-14 kg; data quality (5,2,1,1,5)
- copper: 5.40104e-13, 5.47416e-14, 1.16333e-10 kg (3 entries, compartments not in this file); data quality (4,1,1,1,5)
- selenium: 1.04429e-10 kg; data quality (3,2,1,1,5)
- Phthalate, dibutyl-: 9.22019e-13 kg; data quality (4,1,1,1,5)
- carbonyl sulfide: 2.09613e-15 kg; data quality (4,2,1,1,5)
- ethane, 1,2-dichloro-: 4.73212e-13 kg; data quality (3,2,1,1,5)
- acetophenone: 1.61443e-16 kg; data quality (4,2,1,1,5)
- 4-nitrophenol: 3.67773e-18 kg; data quality (2,2,1,1,5)
- bromoform: 4.17694e-16 kg; data quality (3,2,1,1,5)
- lead: 4.68589e-11, 3.78596e-15 kg (2 entries, compartments not in this file); data quality (3,1,1,1,5)
- Asbestos: 6.4755e-17 kg; data quality (5,2,1,1,5)
- Diethylene glycol butyl ether: 1.04232e-13 kg; data quality (4,2,1,1,5)
- acetamide: 5.23055e-18 kg; data quality (5,2,1,1,5)
- 1,1,1-trichloroethane: 4.65762e-8 kg; data quality (3,2,1,1,5)
- Hydrazine, methyl-: 1.63919e-15 kg; data quality (2,2,1,1,5)
- Dimethyl sulfate: 8.14307e-16 kg; data quality (2,2,1,1,5)
- Hydrocarbons, aromatic: 3.49039e-9 kg; data quality (3,2,1,1,5)
- epichlorohydrin: 9.95044e-16 kg; data quality (3,2,1,1,5)
- dimethyl formamide: 1.28065e-13 kg; data quality (4,2,1,1,5)
- 1,4-dichlorobenzene: 1.16384e-14 kg; data quality (2,2,1,1,5)
- bis(2-chloroethyl)ether: 7.00893e-21 kg; data quality (3,2,1,1,5)
- diethanolamine: 1.19782e-14 kg; data quality (3,2,1,1,5)
- dibenzofuran: 7.34568e-16 kg; data quality (4,2,1,1,5)
- benzidine: 1.04611e-15 kg; data quality (2,2,1,1,5)
- fluorene: 3.85844e-8 kg; data quality (3,2,1,1,5)
- Propane, 1,2-dichloro-: 1.71685e-15 kg; data quality (4,2,1,1,5)
- Carbon dioxide: 0.508267 kg; data quality (4,2,1,4,1)
- Propoxur: 5.23055e-18 kg; data quality (5,2,1,1,5)
- 1,1,2,2-tetrachloroethane: 1.14821e-14 kg; data quality (3,2,1,1,5)
- 1,2,4-trichlorobenzene: 3.5494e-16 kg; data quality (4,2,1,1,5)
- Chrysene: 3.23543e-9 kg; data quality (3,2,1,1,5)
- sulfur dioxide: 9.34141e-5 kg; data quality (3,2,1,1,5)
- Cresol: 3.60314e-15 kg; data quality (4,2,1,1,5)
- Dinitrotoluene, technical grade (2,4 (77%)- and 2,6 (19%)-): 2.68528e-17, 2.51426e-12 kg (2 entries, compartments not in this file); data quality (5,1,1,1,5)
- Ethylene glycol: 9.0631e-13 kg; data quality (5,1,1,1,5)
- ALLYL CHLORIDE: 4.07067e-20 kg; data quality (3,2,1,1,5)
- Ethane, 1,1,1-trifluoro-, HFC-143a: 1.13302e-6 kg; data quality (4,2,1,4,1)
- Phosphorus: 6.5178e-8 kg; data quality (3,1,1,1,5)
- Xylene: 9.93555e-17 kg; data quality (4,1,1,1,5)
- cadmium: 8.45168e-9 kg; data quality (3,2,1,1,5)
- Nitrogen: 4.45662e-7 kg; data quality (5,2,1,1,5)
- toluene-2,4-diisocyante: 2.83908e-16 kg; data quality (3,2,1,1,5)
- butadiene: 1.38494e-6 kg; data quality (3,2,1,1,5)
- 3-methylcholanthrene: 2.74333e-16 kg; data quality (2,2,1,1,5)
- acrolein: 1.45489e-6 kg; data quality (3,2,1,1,5)
- 2-NITROPROPANE: 1.34264e-16 kg; data quality (5,1,1,1,5)
- Indeno(1,2,3-cd)pyrene: 7.24826e-10 kg; data quality (3,2,1,1,5)
- hexachloroethane: 2.61527e-17 kg; data quality (4,2,1,1,5)
- Benzo(g,h,i)perylene: 8.43968e-10 kg; data quality (3,2,1,1,5)
- Ethylene glycol monoethyl ether: 8.01613e-10 kg; data quality (3,2,1,1,5)
- o-cresol: 3.8262e-18 kg; data quality (4,2,1,1,5)
- NITRIC ACID: 1.9957e-14 kg; data quality (3,1,1,1,5)
- Phthalate, dimethyl-: 1.73491e-15 kg; data quality (4,2,1,1,5)
- biphenyl: 9.73308e-15 kg; data quality (4,2,1,1,5)
- phenanthrene: 1.54956e-7 kg; data quality (3,2,1,1,5)
- Dinitrogen monoxide: 1.22932e-5 kg; data quality (4,2,1,4,1)
- BUTYL ISOCYANATE: 2.58478e-14 kg; data quality (4,2,1,1,5)
- 1,4-dioxane: 4.36449e-16 kg; data quality (4,2,1,1,5)
- Propane, 1,1,1,3,3,3-hexafluoro-, HCFC-236fa: 3.06088e-8 kg; data quality (4,2,1,4,1)
- Propene, 1,3-dichloro-: 2.12019e-15 kg; data quality (3,2,1,1,5)
- 2-nitropropane: 1.23598e-21 kg; data quality (5,2,1,1,5)
- ethane, 1,1,2-trichloro-: 3.34625e-16 kg; data quality (4,2,1,1,5)
- nitric acid: 7.65894e-12, 2.68528e-17 kg (2 entries, compartments not in this file); data quality (3,1,1,1,5)
- cyanide: 2.50523e-13 kg; data quality (2,2,1,1,5)
- particulates, < 10 um: 2.35096e-5 kg; data quality (3,2,1,1,5)
- Toluene, 2,4-dinitro-: 5.37057e-17 kg; data quality (5,1,1,1,5)
- 2-methylnaphthalene: 2.54353e-14 kg; data quality (2,2,1,1,5)
- Cobalt: 7.70133e-11 kg; data quality (3,2,1,1,5)
- anthracene: 2.74299e-8 kg; data quality (3,2,1,1,5)
- Nitrobenzene: 5.42209e-17 kg; data quality (4,2,1,1,5)
- benzene: 2.03147e-6 kg; data quality (3,2,1,1,5)
- Chromium, ion: 1.53281e-9 kg; data quality (3,2,1,1,5)
- cyclohexane: 2.68528e-17 kg; data quality (4,1,1,1,5)
- beryllium: 7.60806e-9 kg; data quality (3,2,1,1,5)
- phenol: 3.22234e-16 kg; data quality (3,1,1,1,5)
- fluoranthene: 2.03611e-8 kg; data quality (3,2,1,1,5)
- hexachlorobenzene: 1.27708e-15 kg; data quality (3,2,1,1,5)
- Methane: 4.88467e-5 kg; data quality (4,2,1,4,1)
- formaldehyde: 2.34936e-5 kg; data quality (3,2,1,1,5)
- benzene, chloro-: 5.10382e-15 kg; data quality (4,2,1,1,5)
- p-phenylenediamine: 5.23055e-16 kg; data quality (5,2,1,1,5)
- Triethyl amine: 1.10934e-15 kg; data quality (4,2,1,1,5)
- Hexachlorocyclopentadiene: 1.02993e-16 kg; data quality (3,2,1,1,5)
- benzo(a)pyrene: 7.50951e-10 kg; data quality (3,2,1,1,5)
- Water, fresh: 6.41551e-5 m3; data quality (1,2,1,4,2)
- ethylene glycol: 5.59473e-9 kg; data quality (5,2,1,1,5)
- para-xylene: 6.52613e-8 kg; data quality (3,2,1,1,5)
- 7-OXABICYCLO[2,2,1]HEPTANE-2,3-DICARBOXYLIC ACID, DIPOTASSIUM SALT: 4.30048e-13 kg; data quality (5,1,1,1,5)
- methyl isobutyl ketone: 3.23415e-9 kg; data quality (4,2,1,1,5)
- CHLORONAPHTHALENE: 3.24683e-22 kg; data quality (1,2,1,1,5)
- acetaldehyde: 1.05779e-5 kg; data quality (3,2,1,1,5)
- Dimethylcarbamyl chloride: 4.07067e-20 kg; data quality (5,2,1,1,5)
- trichloroethylene: 3.15283e-8 kg; data quality (3,2,1,1,5)
- monochloroethane: 3.11563e-14 kg; data quality (3,2,1,1,5)

## Inventory method
Input-output

## Modelling constants
The reference unit of all processes is 1 USD2013 of the good or service. The technosphere inputs are based on the US BEA detailed input-output tables for 2007. The IO tables are combined to develop a commodity-by-commodity model based on the the industry-technology assumption (see Suh et al., 2010), which assumes all commodities produced by a given industry have the same input structure, but that multiple industries can produce the same commodity. Thus, model technosphere flows represent commodity outputs (and not industry outputs) from other processes in the model. There are no by-products included in these processes. All commodity production is based on US-conditions, despite in reality that some goods and services are produced overseas, as USEEIO v1.1 is a single-region IO model.

## Completeness
The input-output approach assures that all purchased inputs associated with the sectors making these commodities as reported in the US census for 2007 are included. The direct resources extracted including minerals, energy sources, water and land occupied are included. Emissions to air include all critieria air pollutants, greenhouse gases, and hazardous and toxic air pollutants as defined by US EPA. Releases to water include toxics, total nitrogen and total phosphorus, and water discharges. Releases to soil or groundwater include toxics and agriculutural pesticides. Some metal releases to air, water and soil are not included because they could not be speciated. Solid hazardous and non-hazardous wastes generated are not included as an elementary flows although purchases of waste services are included.

## Data treatment
Greenhouse gases are primarily from the US Greenhouse Gas Emission Inventory (USEPA 2016a). Biogenic C uptake is not included (change from version 1.0), as biogenic C emission are not included. Toxic releases to air, water and soil (except pesticides) are from the 2013 Toxic Release Inventory (USEPA 2015a). Criteria air pollutants and hazardous air pollutants are from the 2011 National Emissions Inventory (USEPA 2015b). All estimates are normalized by industry based on sector output in the data year, then converted to 2013 USD using relative sector-specific CPIs (if data year is not 2013). Energy use represent raw renewables or fossil fuel energies and is based on EIA data for 2014. See Table 1 in Yang, Ingwersen et al. 2017 and Supporting Information 1, and the v1.1 data update notes (Ingwersen et al. 2017) for all details on environmental data sources used.Total transportation land use is reported in the USGA Major Uses of Land for 2007 (Nickerson et al. 2011). Land use for roads was allocated to relevant transportation sectors based on the shares of Federal Highway Administration fees. Transportation land use for airports and railroads were each assumed 5% of the total use of urban land.

## Data collection
2015-2016

## Sampling procedure
US federal government sources, including surveys and US EPA emissions databases are used as the primary sources. From these sources, data for US reporting establishments/facilities are aggregated by the NAICS sector as defined in the BEA detailed 2007 input-output tables. When level of sector aggregation differs, or when direct emissions are not reported but modeled, additional sources are used to make allocations and estimates.

## Review details
In regard to quality assurance and peer-review, each dataset created went through Quality Assurance as defined in a quality assurance project plans at US EPA, CSRA or ERG. The model was assembled with the IO model builder model (USEPA 2016c). Validation functions were used to check that all the model components were properly assembled and harmonized. Bayou Demeke and Santosh Ghimire provided internal peer review of the model methodology and the manuscript underwent standard EPA management review. An editor and two anonymous reviewers at the Journal of Cleaner Production reviewed the model. In regard to data quality evaluation, data quality assessment was performed at the flow and process levels according to the updated US EPA data quality assessment guidelines as defined in US EPA (2016b).

## Intended application
The primary application is for use in the US Environmentally-Extended Input-Ouput model, USEEIO, version 1.1. This model is being used by the US EPA for supporting tools that prioritize goods and services based on potential environmental impacts, resource use or emissions for large regions, including the US and US states, and as a strealined tool for organizations as a starting point to consider sustainable materials management. Model results are designed to provide meso/macro-level decision support.

## Project
USEEIO v1.1 was developed by the US EPA with CSRA and ERG with Wesley W. Ingwersen and David E. Meyer as research leads. Yi Yang was the technical lead on the work for CSRA (contract EP-C-15-012); Troy Hawkins was lead for ERG (contract EP-C-12-021).

## Sources
- USEPA 2015a
- Torcellini et al. 2003
- Yienger et al. 1995
- Blackhurst et al. 2010
- USEPA 2016c
- USGS 2015
- USDA 2009a
- EIA 2013
- Macknick et al. 2011
- BEA 2015
- EIA 2016
- Maupin et al. 2014
- USDA 2014
- Ingwersen et al. 2017
- USDA 2016
- USEPA 2016b
- USGS 2016
- Edelen and Ingwersen 2017
- Ingwersen et al. DRAFT
- USDA 2009b
- USDA 2006
- Kim et el. 2013
- BLM 2008
- EIA 2017
- USEPA 2015b
- EIA 2015
- USEPA 2016a
- Goebes et al. 2003
- Statistics Canada 2010
- Nickerson et al. 2011
- Lovelace 2009
